// SBML level 2 version 4

model aguda_tang_1999____main()
  // Originally created by libAntimony v1.4 (using libSBML 4.1.0-b2)

  // Compartments:
  compartment default_compartment = 1;

  // Parameters:
  k1 = 0.1;
  k1_ = 0.5;
  k1__ = 0.5;
  kn1 = 0.001;
  k2 = 0.1;
  kn2 = 1;
  k3 = 1.42;
  k3_ = 0;
  kn4 = 0.016;
  k5 = 0.02;
  kn6 = 5;
  k8 = 2;
  k9 = 2;
  k10 = 0.035;
  k17 = 3.5;
  k18 = 0.0001;
  k19 = 0.05;
  k20 = 0.01;
  k21 = 0.1;
  k22 = 0.001;
  k24 = 0.1;
  k25 = 0.01;
  k25_ = 0.02;
  k26 = 0.01;
  k26_ = 0.1;
  k28 = 0.01;
  k29 = 0.001;
  a_CyclinE_Cdk20 = 0;
  i_CyclinE_Cdk20 = 0.01;
  pRB_E2F0 = 1.95;
  E2F0 = 0;
  E2F_V_4 = 1e-6;
  pRB0 = 0.05;
  pRB_V_27 = 0.01;
  CycD_Cdk40 = 0;
  CycD_Cdk4_V_6 = 0.018;
  p270 = 5;
  p27_V_7 = 0.0001;
  CycE_Cdk2_p270 = 1;
  CycD_Cdk4_p270 = 0;
  p160 = 5;
  p16_V_23 = 0.2;
  pRB_P0 = 0.01;
  time_ = ;

  // Assignment rules:
  V_23 := k2*a_CyclinE_Cdk20*i_CyclinE_Cdk20;
  V_100 := k10*CycE_Cdk2_p270;
  V_n20 := kn2*a_CyclinE_Cdk20;
  V_90 := k9*p270*a_CyclinE_Cdk20;
  V_210 := k21*a_CyclinE_Cdk20^2;
  V_30 := k3*E2F0 + k3_;
  V_50 := k5*i_CyclinE_Cdk20;
  V_n10 := kn1;
  V_11 := k1_*CycD_Cdk40*pRB_E2F0 + k1__*CycD_Cdk4_p270*pRB_E2F0 + k1*a_CyclinE_Cdk20*pRB_E2F0;
  V_180 := k18*E2F0;
  V_n40 := kn4*E2F0;
  V_260 := k26/((1 + k26_*p160)*1);
  V_290 := k29*pRB_P0;
  V_280 := k28*pRB0;
  V_200 := k20*CycD_Cdk4_p270;
  V_n60 := kn6*CycD_Cdk40;
  V_190 := k19*p270*CycD_Cdk40;
  V_170 := k17*p160*CycD_Cdk40;
  V_80 := k8*p270*a_CyclinE_Cdk20;
  V_220 := k22*p270;
  V_250 := k25/((1 + k25_*pRB0)*1);
  V_240 := k24*p160;

  // Rate rules:
  a_CyclinE_Cdk20' = V_23 + V_100 - (V_n20 + V_90 + V_210);
  i_CyclinE_Cdk20' = V_30 + V_n20 - (V_23 + V_50);
  pRB_E2F0' = V_n10 - V_11;
  E2F0' = V_11 + E2F_V_4 + V_180 - (V_n10 + V_n40);
  pRB0' = pRB_V_27 + V_260 + V_290 - (V_n10 + V_280);
  CycD_Cdk40' = CycD_Cdk4_V_6 + V_200 - (V_n60 + V_190 + V_170);
  p270' = p27_V_7 + V_100 + V_200 - (V_80 + V_90 + V_190 + V_220);
  CycE_Cdk2_p270' = V_90 - V_100;
  CycD_Cdk4_p270' = V_190 - V_200;
  p160' = p16_V_23 + V_250 - (V_170 + V_240);
  pRB_P0' = V_11 - V_290;
end
