// SBML level 2 version 4

model albert_2005____main()
  // Originally created by libAntimony v1.4 (using libSBML 4.1.0-b2)

  // Compartments:
  compartment default_compartment = 1;

  // Parameters:
  environment_total_volume = 5.7;
  pyruvate_cyt = 10;
  adp_cyt = 1.316523;
  atp_cyt = 0.3417386;
  phosphoenolpyruvate_cyt = 0;
  twophosphoglycerate_cyt = 0;
  amp_cyt = 2.241739;
  threephosphoglycerate_cyt = 0;
  dihydroxyacetonephosphate_cyt = 2.231346;
  glycerol3phosphate_cyt = 2.768654;
  glucose_gly = 0;
  atp_gly = 0.2405019;
  adp_gly = 1.518996;
  amp_gly = 4.240502;
  glucose6phosphate_gly = 0.5;
  fructose6phosphate_gly = 0.5;
  fructose16bisphosphate_gly = 10;
  dihydroxyacetonephosphate_gly = 8.479115;
  glyceraldehyde3phosphate_gly = 2.5;
  nad_gly = 2;
  nadh_gly = 2;
  bisphosphoglycerate_gly = 0.5;
  glycerol3phosphate_gly = 10.52089;
  threephosphoglycerate_gly = 0;
  glycerol_gly = 0;
  glucose_external = 5;
  pyruvate_ext = 0;
  glycerol_ext = 0;
  v_GT_Vmax_v1 = 108.9;
  v_GT_KGlc = 1;
  v_GT_Alpha_v1 = 0.75;
  v_HK_Vmax_v2 = 1929;
  v_HK_KGlcInt_v2 = 0.1;
  v_HK_KATPg_v2 = 0.116;
  v_HK_KADPg_v2 = 0.126;
  v_HK_KGlc6P_v2 = 12;
  v_PGI_Kms_vPGI = 0.4;
  v_PGI_Kmp_vPGI = 0.12;
  v_PGI_Vf_vPGI = 1305;
  v_PGI_Vr_vPGI = 1305;
  v_PFK_Vmax_v4 = 1708;
  v_PFK_Ki1Fru16BP_v4 = 15.8;
  v_PFK_KFru6P_v4 = 0.82;
  v_PFK_KATPg_v4 = 0.026;
  v_PFK_Ki2Fru16BP_v4 = 10.7;
  v_ALD_Vmax_v5 = 560;
  v_ALD_Keq_v5 = 0.069;
  v_ALD_r_v5 = 1.19;
  v_ALD_KGAP_v5 = 0.067;
  v_ALD_KGAPi_v5 = 0.098;
  v_TPI_Kms_vTPI = 1.2;
  v_TPI_Kmp_vTPI = 0.25;
  v_TPI_Vf_vTPI = 999.3;
  v_TPI_Vr_vTPI = 5696.01;
  v_GAPDH_Vmax_v7 = 720.9;
  v_GAPDH_KGAP_v7 = 0.15;
  v_GAPDH_KNAD_v7 = 0.45;
  v_GAPDH_r_v7 = 0.67;
  v_GAPDH_KBPGA13_v7 = 0.1;
  v_GAPDH_KNADH_v7 = 0.02;
  v_GPDH_Vmax_v8 = 465;
  v_GPDH_KDHAPg_v8 = 0.1;
  v_GPDH_KNADH_v8 = 0.01;
  v_GPDH_r_v8 = 0.28;
  v_GPDH_KNAD_v8 = 0.4;
  v_GPDH_KGly3Pg_v8 = 2;
  v_GPO_Km_GPO = 1.7;
  v_GPO_V_GPO_0 = 368;
  v_PT_Km_PT = 1.96;
  v_PT_V_PT_0 = 200;
  v_PGK_Vmax_v11 = 2862;
  v_PGK_KBPGA13_v11 = 0.003;
  v_PGK_KADPg_v11 = 0.1;
  v_PGK_r_v11 = 0.47;
  v_PGK_KPGA3_v11 = 1.62;
  v_PGK_KATPg_v11 = 0.29;
  v_PK_Vmax_v12 = 1020;
  v_PK_PK_n = 2.5;
  v_PK_KADP_v12 = 0.114;
  v_AU_k_vAU = 50;
  v_GK_Vmax_v14 = 200;
  v_GK_KGly3Pg_v14 = 3.83;
  v_GK_KADPg_v14 = 0.56;
  v_GK_r_v14 = 60.86;
  v_GK_KGlycerol_v14 = 0.44;
  v_GK_KATPg_v14 = 0.24;
  v_PGM_Kms_vPGM = 0.27;
  v_PGM_Kmp_vPGM = 0.11;
  v_PGM_Vf_vPGM = 225;
  v_PGM_Vr_vPGM = 495;
  v_ENO_Kms_vENO = 0.054;
  v_ENO_Kmp_vENO = 0.24;
  v_ENO_Vf_vENO = 598;
  v_ENO_Vr_vENO = 394.68;
  v_AKc_k_vAKc = 1000000;
  v_AKc_keqakc = 0.442;
  v_AKg_k_vAKg = 1000000;
  v_AKg_keqakg = 0.442;
  v_PGT_k1_vPGT = 1000000;
  v_PGT_k2_vPGT = 1000000;
  v_ANTI_k1 = 1000000;
  v_ANTI_k2 = 1000000;
  v_GlyT_k1 = 1000000;
  v_GlyT_k2 = 1000000;
  time_ = ;

  // Assignment rules:
  glycosomal_volume := environment_total_volume*0.043;
  cytosolic_volume := environment_total_volume*0.957;
  v_PT0 := v_PT_V_PT_0*pyruvate_cyt/(v_PT_Km_PT + pyruvate_cyt);
  v_PK0 := v_PK_Vmax_v12*(phosphoenolpyruvate_cyt/(0.34*(1 + atp_cyt/0.57 + adp_cyt/0.64)))^v_PK_PK_n*adp_cyt/v_PK_KADP_v12/((1 + (phosphoenolpyruvate_cyt/(0.34*(1 + atp_cyt/0.57 + adp_cyt/0.64)))^v_PK_PK_n)*(1 + adp_cyt/v_PK_KADP_v12));
  v_AKc0 := v_AKc_k_vAKc*(atp_cyt*amp_cyt - v_AKc_keqakc*adp_cyt*adp_cyt);
  v_AU0 := v_AU_k_vAU*atp_cyt/adp_cyt;
  v_ENO0 := (v_ENO_Vf_vENO*twophosphoglycerate_cyt/v_ENO_Kms_vENO - v_ENO_Vr_vENO*phosphoenolpyruvate_cyt/v_ENO_Kmp_vENO)/(1 + twophosphoglycerate_cyt/v_ENO_Kms_vENO + phosphoenolpyruvate_cyt/v_ENO_Kmp_vENO);
  v_PGM0 := (v_PGM_Vf_vPGM*threephosphoglycerate_cyt/v_PGM_Kms_vPGM - v_PGM_Vr_vPGM*twophosphoglycerate_cyt/v_PGM_Kmp_vPGM)/(1 + threephosphoglycerate_cyt/v_PGM_Kms_vPGM + twophosphoglycerate_cyt/v_PGM_Kmp_vPGM);
  v_PGT0 := v_PGT_k1_vPGT*threephosphoglycerate_gly - v_PGT_k2_vPGT*threephosphoglycerate_cyt;
  v_ANTI0 := v_ANTI_k1*glycerol3phosphate_gly*dihydroxyacetonephosphate_cyt - v_ANTI_k2*glycerol3phosphate_cyt*dihydroxyacetonephosphate_gly;
  v_GPO0 := v_GPO_V_GPO_0*(glycerol3phosphate_cyt/v_GPO_Km_GPO/(1 + glycerol3phosphate_cyt/v_GPO_Km_GPO));
  v_GT0 := v_GT_Vmax_v1*((glucose_external - glucose_gly)/(v_GT_KGlc + glucose_external + glucose_gly + v_GT_Alpha_v1*glucose_external*glucose_gly/v_GT_KGlc));
  v_HK0 := v_HK_Vmax_v2*(glucose_gly/v_HK_KGlcInt_v2*(atp_gly/v_HK_KATPg_v2)/((1 + atp_gly/v_HK_KATPg_v2 + adp_gly/v_HK_KADPg_v2)*(1 + glucose_gly/v_HK_KGlcInt_v2 + glucose6phosphate_gly/v_HK_KGlc6P_v2)));
  v_AKg0 := v_AKg_k_vAKg*(atp_gly*amp_gly - v_AKg_keqakg*adp_gly*adp_gly);
  v_GK0 := v_GK_Vmax_v14*(glycerol3phosphate_gly/v_GK_KGly3Pg_v14*adp_gly/v_GK_KADPg_v14 - v_GK_r_v14*glycerol_gly/v_GK_KGlycerol_v14*atp_gly/v_GK_KATPg_v14)/((1 + glycerol3phosphate_gly/v_GK_KGly3Pg_v14 + glycerol_gly/v_GK_KGlycerol_v14)*(1 + adp_gly/v_GK_KADPg_v14 + atp_gly/v_GK_KATPg_v14));
  v_PFK0 := v_PFK_Vmax_v4*(v_PFK_Ki1Fru16BP_v4/(v_PFK_Ki1Fru16BP_v4 + fructose16bisphosphate_gly))*(fructose6phosphate_gly/v_PFK_KFru6P_v4*(atp_gly/v_PFK_KATPg_v4)/((1 + fructose6phosphate_gly/v_PFK_KFru6P_v4 + fructose16bisphosphate_gly/v_PFK_Ki2Fru16BP_v4)*(1 + atp_gly/v_PFK_KATPg_v4)));
  v_PGK0 := v_PGK_Vmax_v11*(bisphosphoglycerate_gly/v_PGK_KBPGA13_v11*adp_gly/v_PGK_KADPg_v11 - v_PGK_r_v11*threephosphoglycerate_gly/v_PGK_KPGA3_v11*atp_gly/v_PGK_KATPg_v11)/((1 + bisphosphoglycerate_gly/v_PGK_KBPGA13_v11 + threephosphoglycerate_gly/v_PGK_KPGA3_v11)*(1 + adp_gly/v_PGK_KADPg_v11 + atp_gly/v_PGK_KATPg_v11));
  v_PGI0 := (v_PGI_Vf_vPGI*glucose6phosphate_gly/v_PGI_Kms_vPGI - v_PGI_Vr_vPGI*fructose6phosphate_gly/v_PGI_Kmp_vPGI)/(1 + glucose6phosphate_gly/v_PGI_Kms_vPGI + fructose6phosphate_gly/v_PGI_Kmp_vPGI);
  v_ALD0 := v_ALD_Vmax_v5*(fructose16bisphosphate_gly - glyceraldehyde3phosphate_gly*dihydroxyacetonephosphate_gly/v_ALD_Keq_v5)/(0.009*(1 + atp_gly/0.68 + adp_gly/1.51 + amp_gly/3.65) + fructose16bisphosphate_gly + glyceraldehyde3phosphate_gly*0.015*(1 + atp_gly/0.68 + adp_gly/1.51 + amp_gly/3.65)/v_ALD_Keq_v5*(1/v_ALD_r_v5) + dihydroxyacetonephosphate_gly*v_ALD_KGAP_v5/v_ALD_Keq_v5*(1/v_ALD_r_v5) + fructose16bisphosphate_gly*glyceraldehyde3phosphate_gly/v_ALD_KGAPi_v5 + glyceraldehyde3phosphate_gly*dihydroxyacetonephosphate_gly/v_ALD_Keq_v5*(1/v_ALD_r_v5));
  v_GPDH0 := v_GPDH_Vmax_v8*(dihydroxyacetonephosphate_gly/v_GPDH_KDHAPg_v8*(nadh_gly/v_GPDH_KNADH_v8) - v_GPDH_r_v8*(nad_gly/v_GPDH_KNAD_v8)*(glycerol3phosphate_gly/v_GPDH_KGly3Pg_v8))/((1 + dihydroxyacetonephosphate_gly/v_GPDH_KDHAPg_v8 + glycerol3phosphate_gly/v_GPDH_KGly3Pg_v8)*(1 + nadh_gly/v_GPDH_KNADH_v8 + nad_gly/v_GPDH_KNAD_v8));
  v_GAPDH0 := v_GAPDH_Vmax_v7*(glyceraldehyde3phosphate_gly/v_GAPDH_KGAP_v7*(nad_gly/v_GAPDH_KNAD_v7) - v_GAPDH_r_v7*(bisphosphoglycerate_gly/v_GAPDH_KBPGA13_v7)*(nadh_gly/v_GAPDH_KNADH_v7))/((1 + glyceraldehyde3phosphate_gly/v_GAPDH_KGAP_v7 + bisphosphoglycerate_gly/v_GAPDH_KBPGA13_v7)*(1 + nad_gly/v_GAPDH_KNAD_v7 + nadh_gly/v_GAPDH_KNADH_v7));
  v_TPI0 := (v_TPI_Vf_vTPI*dihydroxyacetonephosphate_gly/v_TPI_Kms_vTPI - v_TPI_Vr_vTPI*glyceraldehyde3phosphate_gly/v_TPI_Kmp_vTPI)/(1 + dihydroxyacetonephosphate_gly/v_TPI_Kms_vTPI + glyceraldehyde3phosphate_gly/v_TPI_Kmp_vTPI);
  v_GlyT0 := v_GlyT_k1*glycerol_gly - v_GlyT_k2*glycerol_ext;

  // Rate rules:
  pyruvate_cyt' = -1*v_PT0/cytosolic_volume + 1*v_PK0/cytosolic_volume;
  adp_cyt' = -1*v_PK0/cytosolic_volume + 1*v_AU0/cytosolic_volume + 2*v_AKc0/cytosolic_volume;
  atp_cyt' = 1*v_PK0/cytosolic_volume - 1*v_AU0/cytosolic_volume - 1*v_AKc0/cytosolic_volume;
  phosphoenolpyruvate_cyt' = -1*v_PK0/cytosolic_volume + 1*v_ENO0/cytosolic_volume;
  twophosphoglycerate_cyt' = 1*v_PGM0/cytosolic_volume - 1*v_ENO0/cytosolic_volume;
  amp_cyt' = -1*v_AKc0/cytosolic_volume;
  threephosphoglycerate_cyt' = -1*v_PGM0/cytosolic_volume + 1*v_PGT0/cytosolic_volume;
  dihydroxyacetonephosphate_cyt' = -1*v_ANTI0/cytosolic_volume + 1*v_GPO0/cytosolic_volume;
  glycerol3phosphate_cyt' = 1*v_ANTI0/cytosolic_volume - 1*v_GPO0/cytosolic_volume;
  glucose_gly' = 1*v_GT0/glycosomal_volume - 1*v_HK0/glycosomal_volume;
  atp_gly' = -1*v_HK0/glycosomal_volume - 1*v_PFK0/glycosomal_volume + 1*v_PGK0/glycosomal_volume + 1*v_GK0/glycosomal_volume - 1*v_AKg0/glycosomal_volume;
  adp_gly' = 1*v_HK0/glycosomal_volume + 1*v_PFK0/glycosomal_volume - 1*v_PGK0/glycosomal_volume - 1*v_GK0/glycosomal_volume + 2*v_AKg0/glycosomal_volume;
  amp_gly' = -1*v_AKg0/glycosomal_volume;
  glucose6phosphate_gly' = 1*v_HK0/glycosomal_volume - 1*v_PGI0/glycosomal_volume;
  fructose6phosphate_gly' = 1*v_PGI0/glycosomal_volume - 1*v_PFK0/glycosomal_volume;
  fructose16bisphosphate_gly' = 1*v_PFK0/glycosomal_volume - 1*v_ALD0/glycosomal_volume;
  dihydroxyacetonephosphate_gly' = 1*v_ALD0/glycosomal_volume - 1*v_TPI0/glycosomal_volume - 1*v_GPDH0/glycosomal_volume + 1*v_ANTI0/glycosomal_volume;
  glyceraldehyde3phosphate_gly' = 1*v_ALD0/glycosomal_volume - 1*v_GAPDH0/glycosomal_volume + 1*v_TPI0/glycosomal_volume;
  nad_gly' = -1*v_GAPDH0/glycosomal_volume + 1*v_GPDH0/glycosomal_volume;
  nadh_gly' = 1*v_GAPDH0/glycosomal_volume - 1*v_GPDH0/glycosomal_volume;
  bisphosphoglycerate_gly' = 1*v_GAPDH0/glycosomal_volume - 1*v_PGK0/glycosomal_volume;
  glycerol3phosphate_gly' = 1*v_GPDH0/glycosomal_volume - 1*v_GK0/glycosomal_volume - 1*v_ANTI0/glycosomal_volume;
  threephosphoglycerate_gly' = 1*v_PGK0/glycosomal_volume - 1*v_PGT0/glycosomal_volume;
  glycerol_gly' = 1*v_GK0/glycosomal_volume - 1*v_GlyT0/glycosomal_volume;
  glucose_external' = 0;
  pyruvate_ext' = 0;
  glycerol_ext' = 0;
end
