// SBML level 2 version 4

model albrecht_colegrove_friel_2002_version01____main()
  // Originally created by libAntimony v1.4 (using libSBML 4.1.0-b2)

  // Compartments:
  compartment default_compartment = 1;

  // Parameters:
  Ca_i = ;
  Ca_ER = ;
  total_cytoplasmic_Ca_flux_F = 96.5;
  Ca_extrusion_across_the_plasma_membrane_k_leak_pm = 1.5e-7;
  Ca_extrusion_across_the_plasma_membrane_Vmax_extru = 25;
  Ca_extrusion_across_the_plasma_membrane_EC50_extru = 386;
  Ca_extrusion_across_the_plasma_membrane_n_extru = 2.4;
  Ca_extrusion_across_the_plasma_membrane_Ca_o = 2;
  Ca_uptake_by_SR_Ca_ATPase_Vmax_SERCA = 2146;
  Ca_uptake_by_SR_Ca_ATPase_EC50_SERCA = 30.3;
  Ca_uptake_by_SR_Ca_ATPase_n_SERCA = 2.5;
  ER_Ca_release_P_basal = 0.009;
  ER_Ca_release_Pmax_RyR = 0.05;
  ER_Ca_release_EC50_RyR = 2641;
  ER_Ca_release_n_RyR = 0.96;
  time_ = ;
  intraluminal_calcium_v_ER = ;
  intraluminal_calcium_k_ER = ;
  v_i = ;
  k_i = ;
  total_cytoplasmic_Ca_flux_I_Ca = ;

  // Assignment rules:
  cytoplasmic_calcium_J_i := J_pm + J_ER;
  J_ER := J_SERCA + ER_Ca_release_J_release;
  J_pm := Ca_extrusion_across_the_plasma_membrane_J_extru + J_ICa;
  intraluminal_calcium_Ca_ER_init := Ca_i + J_SERCA*Ca_i/(P_ER*(Ca_i/v_i));
  P_ER := v_i*(ER_Ca_release_P_basal + ER_Ca_release_Pmax_RyR/(1 + (ER_Ca_release_EC50_RyR/Ca_i)^ER_Ca_release_n_RyR));
  J_SERCA := Ca_uptake_by_SR_Ca_ATPase_Vmax_SERCA/(k_i*(1 + (Ca_uptake_by_SR_Ca_ATPase_EC50_SERCA/Ca_i)^Ca_uptake_by_SR_Ca_ATPase_n_SERCA));
  J_ICa := total_cytoplasmic_Ca_flux_I_Ca/(2*total_cytoplasmic_Ca_flux_F*v_i*k_i);
  Ca_extrusion_across_the_plasma_membrane_J_extru := k_i^(-1)*(Ca_extrusion_across_the_plasma_membrane_k_leak_pm*(Ca_i - Ca_extrusion_across_the_plasma_membrane_Ca_o) + Ca_extrusion_across_the_plasma_membrane_Vmax_extru/(1 + (Ca_extrusion_across_the_plasma_membrane_EC50_extru/Ca_i)^Ca_extrusion_across_the_plasma_membrane_n_extru));
  ER_Ca_release_J_release := P_ER*(Ca_i - Ca_ER)/(v_i*k_i);

  // Rate rules:
  Ca_i' = -cytoplasmic_calcium_J_i;
  Ca_ER' = J_ER*(v_i*k_i/(intraluminal_calcium_v_ER*intraluminal_calcium_k_ER));
end
