// SBML level 2 version 4

model aon_cortassa_2002_version01____main()
  // Originally created by libAntimony v1.4 (using libSBML 4.1.0-b2)

  // Compartments:
  compartment default_compartment = 1;

  // Parameters:
  G_o0 = 1;
  G0 = 0;
  G6P0 = 0;
  FDP0 = 0;
  G3P0 = 0;
  DPG0 = 0;
  PEP0 = 0;
  Py0 = 0;
  ATP0 = 1.4;
  ATP_PO = 4;
  ADP_Cn_ = 9;
  AMP0 = 0.5;
  GTP0 = 0.95;
  GDP0 = 0.05;
  H0 = 3.2e-8;
  NADP0 = 1;
  NADH0 = 0.01;
  NAD0 = 1;
  CD_CMTP = 0.9;
  CT0 = 0.2;
  CP0 = 1.2;
  kpol = 10;
  CT_kf = 3;
  CT_kb = 2.5;
  CP_kdp = 0.0025;
  PKp0 = 0.005;
  PKp_kp2 = 10;
  PKp_kp3 = 0.05;
  PKp_k4 = 0.02;
  C_PK = 0.01;
  V_IN_Ke_in = 12;
  V_IN_KG_in = 0.001;
  V_IN_V_IN_max = 10;
  V_HK_KG_m = 0.11;
  V_HK_KG_s = 0.0062;
  V_HK_KATP_m = 0.1;
  V_HK_V_HK_max = 13;
  V_PFK_KG6P_r = 1;
  V_PFK_KATP_r = 0.06;
  V_PFK_KAMP_r = 0.025;
  V_PFK_cATP = 1;
  V_PFK_cAMP = 0.019;
  V_PFK_cG6P = 0.0005;
  V_PFK_Lo = 25000;
  V_PFK_gr = 10;
  V_PFK_n1 = 2;
  V_PFK_V_PFK_max = 30;
  V_G6PDH_KG6P = 0.05;
  V_G6PDH_KNADP = 0.05;
  V_G6PDH_KNADP_ = 0.05;
  V_G6PDH_KTUB = 0.4;
  V_G6PDH_V_G6PDH_max = 1.6;
  V_G6PDH_V_G6PDH_max_II = 1;
  V_ALD_KG3P_m = 20;
  V_ALD_KFDP_m = 0.5;
  V_ALD_V_ALD_max = 2.5;
  V_ALD_V_ALD_max_r = 1;
  V_GAPDH_K1 = 1.1;
  V_GAPDH_K2 = 1.5;
  V_GAPDH_K3 = 2.5;
  V_GAPDH_KG3P = 0.0025;
  V_GAPDH_KNAD = 0.18;
  V_GAPDH_KNADH_i = 0.0003;
  V_GAPDH_V_GAPDH_max = 10;
  V_PGK_KDPG_m = 0.002;
  V_PGK_V_PGK_max = 3;
  V_PK_KpH = 9.5e-9;
  V_PK_KPEP_r = 1;
  V_PK_KADP_r = 0.06;
  V_PK_KFDP_r = 0.025;
  V_PK_cADP = 1;
  V_PK_cFDP = 0.01;
  V_PK_cPEP = 0.02;
  V_PK_Lo_PK = 1000;
  V_PK_gr_PK = 0.1;
  V_PK_gt_PK = 1;
  V_PK_V_PKt_max = 25;
  V_PK_V_PKp_max = 50;
  V_TCA_KPy_m = 0.329;
  V_TCA_V_TCA_max = 10;
  V_ADH_KPy__m = 0.169;
  V_ADH_V_ADH_max = 0.5;
  V_ATPase_KATP = 5;
  time_ = ;

  // Assignment rules:
  V_IN0 := V_IN_V_IN_max*(G_o0/((V_IN_KG_in + G_o0)*(1 + G6P0/V_IN_Ke_in)) - G0/((V_IN_KG_in + G0)*(1 + G6P0/V_IN_Ke_in)));
  V_HK0 := V_HK_V_HK_max*1/(1 + V_HK_KG_s*V_HK_KATP_m/(G0*ATP0) + V_HK_KG_m/G0 + V_HK_KATP_m/ATP0);
  V_PFK0 := V_PFK_V_PFK_max*V_PFK_gr*G6P0/V_PFK_KG6P_r*ATP0/V_PFK_KATP_r*(1 + G6P0/V_PFK_KG6P_r + ATP0/V_PFK_KATP_r + V_PFK_gr*G6P0/V_PFK_KG6P_r*ATP0/V_PFK_KATP_r)^(V_PFK_n1 - 1)/((1 + G6P0/V_PFK_KG6P_r + ATP0/V_PFK_KATP_r + V_PFK_gr*G6P0/V_PFK_KG6P_r*ATP0/V_PFK_KATP_r)^V_PFK_n1 + V_PFK_Lo*((1 + V_PFK_cAMP*AMP0/V_PFK_KAMP_r)/(1 + AMP0/V_PFK_KAMP_r))^V_PFK_n1*(1 + V_PFK_cG6P*G6P0/V_PFK_KG6P_r + V_PFK_cATP*ATP0/V_PFK_KATP_r + V_PFK_gr*V_PFK_cG6P*G6P0/V_PFK_KG6P_r*V_PFK_cATP*ATP0/V_PFK_KATP_r)^V_PFK_n1);
  V_G6PDH0 := V_G6PDH_V_G6PDH_max/(V_G6PDH_KG6P*V_G6PDH_KNADP/(G6P0*NADP0) + V_G6PDH_KG6P/G6P0 + V_G6PDH_KNADP/NADP0 + 1) + V_G6PDH_V_G6PDH_max_II/(V_G6PDH_KG6P*V_G6PDH_KNADP_*V_G6PDH_KTUB/(G6P0*NADP0*V_G6PDH_TUB) + V_G6PDH_KG6P*V_G6PDH_KNADP_/(G6P0*NADP0) + V_G6PDH_KNADP_*V_G6PDH_KTUB/(NADP0*V_G6PDH_TUB) + V_G6PDH_KG6P*V_G6PDH_KTUB/(G6P0*V_G6PDH_TUB) + V_G6PDH_KTUB/V_G6PDH_TUB + V_G6PDH_KG6P/G6P0 + V_G6PDH_KNADP_/NADP0 + 1);
  V_ALD0 := (V_ALD_V_ALD_max*FDP0/V_ALD_KFDP_m - V_ALD_V_ALD_max_r*G3P0/V_ALD_KG3P_m)/(1 + FDP0/V_ALD_KFDP_m + G3P0/V_ALD_KG3P_m);
  V_GAPDH0 := V_GAPDH_V_GAPDH_max/(1 + V_GAPDH_KG3P/G3P0 + V_GAPDH_KNAD/NAD0*(1 + AMP0/V_GAPDH_K1 + ADP0/V_GAPDH_K2 + ATP0/V_GAPDH_K3) + V_GAPDH_KG3P*V_GAPDH_KNAD/(G3P0*NAD0)*(1 + NADH0/V_GAPDH_KNADH_i) + 1 + AMP0/V_GAPDH_K1 + ADP0/V_GAPDH_K2 + ATP0/V_GAPDH_K3);
  V_PGK0 := V_PGK_V_PGK_max*DPG0/(V_PGK_KDPG_m + DPG0);
  V_PK0 := V_PK_V_PK_max/(1 + V_PK_KpH/H0)*(V_PK_gr_PK*(PEP0/V_PK_KPEP_r)*(ADP0/V_PK_KADP_r)*V_PK_R^(V_PK_n - 1) + V_PK_Lo_PK*((1 + V_PK_cFDP*FDP0/V_PK_KFDP_r)/(1 + FDP0/V_PK_KFDP_r))^V_PK_n*(FDP0/V_PK_KFDP_r)*V_PK_gt_PK*(V_PK_cPEP*PEP0/V_PK_KPEP_r)*(V_PK_cADP*ADP0/V_PK_KADP_r)*V_PK_T^(V_PK_n - 1))/(V_PK_R^V_PK_n + V_PK_Lo_PK*((1 + V_PK_cFDP*FDP0/V_PK_KFDP_r)/(1 + FDP0/V_PK_KFDP_r))^V_PK_n*V_PK_T^V_PK_n);
  V_TCA0 := V_TCA_V_TCA_max*Py0^2/(V_TCA_KPy_m^2 + Py0^2);
  V_ADH0 := V_ADH_V_ADH_max*Py0/(V_ADH_KPy__m + Py0);
  V_ATPase0 := V_ATPase_KATP*ATP0;
  ADP0 := ADP_Cn_ - (ATP0 + AMP0);
  CD0 := CD_CMTP - (CT0 + CP0);
  PKt0 := C_PK - PKp0;
  V_G6PDH_TUB := CT0 + CD0;
  V_PK_R := 1 + PEP0/V_PK_KPEP_r + ADP0/V_PK_KADP_r + V_PK_gr_PK*PEP0/V_PK_KPEP_r*ADP0/V_PK_KADP_r;
  V_PK_T := 1 + V_PK_cPEP*PEP0/V_PK_KPEP_r + V_PK_cADP*ADP0/V_PK_KADP_r + V_PK_gt_PK*V_PK_cPEP*PEP0/V_PK_KPEP_r*V_PK_cADP*ADP0/V_PK_KADP_r;
  V_PK_n := 4 + PKp0/C_PK;
  V_PK_V_PK_max := V_PK_V_PKt_max + (V_PK_V_PKp_max - V_PK_V_PKt_max)*PKp0/C_PK;

  // Rate rules:
  G0' = V_IN0 - V_HK0;
  G6P0' = V_HK0 - (V_PFK0 + V_G6PDH0);
  FDP0' = V_PFK0 - V_ALD0;
  G3P0' = 2*V_ALD0 - V_GAPDH0;
  DPG0' = V_GAPDH0 - V_PGK0;
  PEP0' = V_PGK0 - V_PK0;
  Py0' = V_PK0 - (V_TCA0 + V_ADH0);
  ATP0' = V_PGK0 + V_PK0 + ATP_PO*V_TCA0 - (V_HK0 + V_PFK0 + V_ATPase0);
  CT0' = -(kpol*CT0*CP0^2 + CT_kf*CD0 + CT_kb*CT0*GDP0);
  CP0' = kpol*CT0*CP0^2 - CP_kdp*CP0;
  PKp0' = 0.1*PKp_kp2*PKt0*CP0 - (PKp_kp3*PKp0 + PKp_k4*PKp0*GTP0);
end
