// SBML level 2 version 4

model aslanidi_2009____main()
  // Originally created by libAntimony v1.3 (using libSBML 4.1.0-b2)

  // Compartments:
  compartment default_compartment = 1;

  // Parameters:
  V = -83.43813;
  membrane_stim_start = 0;
  membrane_stim_end = 1;
  membrane_stim_amplitude = -80;
  equilibrium_potentials_r_NaK = 0.01833;
  Na_i = 9.927156;
  Na_o = 140;
  Ca_i0 = 0.0002235543;
  Ca_o = 1.8;
  K_i = 141.9671;
  K_o = 5.4;
  Cl_i = 18.90468;
  Cl_o = 100;
  R = 8314;
  F = 96485;
  T = 310;
  i_Na_g_Na = 8;
  m = 0.00200339;
  h = 0.9786391;
  j = 0.09866447;
  i_Na_L_g_Na_L = 0.037375;
  m_L = 0.00200339;
  h_L = 0.8946968;
  g_Ca_L = 0.3392328;
  i_Ca_L_p_Ca = 0.000243;
  z_Ca = 2;
  gamma_Cai = 1;
  gamma_Cao = 0.341;
  Ca_r0 = 0.0002241812;
  km_Ca_MK = 0.15;
  d = 2.322224e-6;
  f = 0.9985607;
  f2 = 0.8173435;
  f_Ca = 0.9610551;
  f_Ca2 = 0.8686908;
  Cm = 1;
  i_Ca_T_g_Ca_T = 0.13;
  b = 0.0002563938;
  g = 0.9720433;
  i_to_1_g_to_1 = 0.14135944;
  a = 0.0004238729;
  i = 0.9990936;
  i2 = 0.9777368;
  xr = 0.07084939;
  xs1 = 0.001173765;
  xs2 = 0.001179443;
  i_K_p_g_K_p = 0.00276;
  i_to_2_p_Cl = 4e-7;
  i_to_2_z_Cl = -1;
  a0 = 0.001490944;
  i_to_2_i_to_2_a_gate_km_to_2 = 0.1502;
  i_NaCa_X_NaCa = 0.4;
  i_NaCa_i_NaCa_max = 4.5;
  i_NaCa_km_Na_i_1 = 12.3;
  i_NaCa_km_Na_o = 87.5;
  i_NaCa_km_Ca_i = 0.0036;
  i_NaCa_km_Ca_o = 1.3;
  i_NaCa_km_Ca_act = 0.000125;
  i_NaCa_k_sat = 0.27;
  i_NaK_g_NaK = 0.61875;
  i_NaK_km_Na_i_2 = 10;
  i_NaK_km_K_o = 1.5;
  i_Ca_p_i_Ca_p_max = 0.0575;
  i_Ca_p_km_Ca_p = 0.0005;
  CT_K_Cl_CT_K_Cl_max = 7.0756e-6;
  CT_Na_Cl_CT_Na_Cl_max = 9.8443e-6;
  background_currents_g_Na_b = 0.0025;
  background_currents_g_K_b = 0.005;
  background_currents_p_Ca_b = 1.995084e-7;
  background_currents_g_Cl_b = 0.000225;
  Ca_i_km_TRPN = 0.0005;
  Ca_i_km_CMDN = 0.00238;
  Ca_i_TRPN_max = 0.07;
  Ca_i_CMDN_max = 0.05;
  Ca_MK_act_Ca_MK_trap = 8.789168e-6;
  Ca_MK_act_alpha_Ca_MK = 0.05;
  Ca_MK_act_beta_Ca_MK = 0.00068;
  Ca_MK_act_Ca_MK_0 = 0.05;
  Ca_NSR0 = 1.213252;
  Ca_JSR0 = 1.143305;
  Ca_JSR_CSQN_max = 10;
  Ca_JSR_km_CSQN = 0.8;
  Ca_r_km_b_SR = 0.00087;
  Ca_r_km_b_SL = 0.0087;
  Ca_r_b_SR_max = 0.047;
  Ca_r_b_SL_max = 1.124;
  Ca_r_tau_ss = 0.2;
  ri = 0.780287;
  ro = 1.278573e-9;
  q_rel_q_rel_ri_gate_tau_Ca_MK_max = 10;
  q_rel_q_rel_ro_gate_tau_ro = 3;
  q_leak_q_leak_max = 0.004375;
  q_leak_NSR_max = 15;
  q_up_X_q_up = 0.5;
  q_up_q_up_max = 0.004375;
  q_up_dq_up_Ca_MK_max = 0.75;
  q_up_dkm_plb_max = 0.00017;
  q_up_km_up = 0.00092;
  q_tr_tau_tr = 120;
  Vol_cell = 0.3454;
  model_parameters_radius = 0.0011;
  model_parameters_length = 0.01;
  model_parameters_rcg = 2;
  time_ = ;

  // Assignment rules:
  membrane_i_stim := ;
  membrane_i_tot := i_Na0 + i_Na_L0 + i_Ca_L0 + i_Ca_T0 + i_to_10 + i_to_20 + i_Kr0 + i_Ks0 + i_K10 + i_NaCa0 + i_NaK0 + i_Na_b + i_K_b + i_Ca_b + i_Cl_b + i_Ca_p0 + i_K_p0;
  i_Na0 := i_Na_g_Na*m^3*(0.8*h + 0.2*j)*(V - E_Na);
  i_Na_L0 := i_Na_L_g_Na_L*m_L^3*h_L*(V - E_Na);
  i_Ca_L0 := g_Ca_L*d*f*f2*f_Ca*f_Ca2*i_Ca_L_max;
  i_Ca_T0 := i_Ca_T_g_Ca_T*b*g*(V - 50);
  i_to_10 := i_to_1_g_to_1*a*(0.8*i + 0.2*i2)*(V - E_K);
  i_to_20 := 20*i_to_2_i_to_2_max*a0;
  i_Kr0 := i_Kr_g_Kr*xr*i_Kr_rr_infinity*(V - E_K);
  i_Ks0 := i_Ks_g_Ks*xs1*xs2*(V - E_Ks);
  i_K10 := (i_K1_g_K1*xK1 + 0.004)*(V - E_K);
  i_NaCa0 := (i_NaCa_X_NaCa*i_NaCa_i_NaCa_max*Na_i^3*Ca_o*exp(0.35*F*V/(R*T)) - 1.5*Na_o^3*Ca_i0*exp(-0.65*F*V/(R*T)))/((1 + (i_NaCa_km_Ca_act/(1.5*Ca_i0))^2)*(1 + i_NaCa_k_sat*exp(-0.65*V*F/(R*T)))*(i_NaCa_dNaCa_1 + i_NaCa_dNaCa_2));
  i_NaK0 := i_NaK_g_NaK*i_NaK_f_NaK*1/(1 + (i_NaK_km_Na_i_2/Na_i)^2)*K_o/(K_o + i_NaK_km_K_o);
  i_Na_b := background_currents_g_Na_b*(V - E_Na);
  i_Ca_b := 1*background_currents_p_Ca_b/Cm*z_Ca^2*V*F^2/(R*T)*(gamma_Cai*Ca_i0*exp(z_Ca*V*F/(R*T)) - gamma_Cao*Ca_o)/(exp(z_Ca*V*F/(R*T)) - 1);
  i_K_b := background_currents_g_K_b*(V - E_K);
  i_Cl_b := background_currents_g_Cl_b*(V - E_Cl);
  i_Ca_p0 := i_Ca_p_i_Ca_p_max*Ca_i0/(i_Ca_p_km_Ca_p + Ca_i0);
  i_K_p0 := i_K_p_g_K_p*i_K_p_kp*(V - E_K);
  E_Na := R*T/F*ln(Na_o/Na_i);
  E_K := R*T/F*ln(K_o/K_i);
  E_Ca := R*T/(2*F)*ln(Ca_o/Ca_i0);
  E_Cl := -R*T/F*ln(Cl_o/Cl_i);
  E_Ks := R*T/F*ln((K_o + equilibrium_potentials_r_NaK*Na_o)/(K_i + equilibrium_potentials_r_NaK*Na_i));
  i_Na_i_Na_m_gate_tau_m := 1/(i_Na_i_Na_m_gate_alpha_m + i_Na_i_Na_m_gate_beta_m);
  i_Na_i_Na_m_gate_m_infinity := i_Na_i_Na_m_gate_alpha_m/(i_Na_i_Na_m_gate_alpha_m + i_Na_i_Na_m_gate_beta_m);
  i_Na_i_Na_m_gate_alpha_m := 0.32*(V + 47.13)/(1 - exp(-0.1*(V + 47.13)));
  i_Na_i_Na_m_gate_beta_m := 0.08*exp(-V/11);
  i_Na_i_Na_h_gate_tau_h := 1/(i_Na_i_Na_h_gate_alpha_h + i_Na_i_Na_h_gate_beta_h);
  i_Na_i_Na_h_gate_h_infinity := i_Na_i_Na_h_gate_alpha_h/(i_Na_i_Na_h_gate_alpha_h + i_Na_i_Na_h_gate_beta_h);
  i_Na_i_Na_h_gate_alpha_h := ;
  i_Na_i_Na_h_gate_beta_h := ;
  i_Na_i_Na_j_gate_tau_j := 0.1/(i_Na_i_Na_j_gate_alpha_j + i_Na_i_Na_j_gate_beta_j);
  i_Na_i_Na_j_gate_j_infinity := 0.1*i_Na_i_Na_j_gate_alpha_j/(i_Na_i_Na_j_gate_alpha_j + i_Na_i_Na_j_gate_beta_j);
  i_Na_i_Na_j_gate_alpha_j := ;
  i_Na_i_Na_j_gate_beta_j := ;
  i_Na_L_i_Na_L_m_L_gate_tau_m_L := 1/(i_Na_L_i_Na_L_m_L_gate_alpha_m_L + i_Na_L_i_Na_L_m_L_gate_beta_m_L);
  i_Na_L_i_Na_L_m_L_gate_m_L_infinity := i_Na_L_i_Na_L_m_L_gate_alpha_m_L/(i_Na_L_i_Na_L_m_L_gate_alpha_m_L + i_Na_L_i_Na_L_m_L_gate_beta_m_L);
  i_Na_L_i_Na_L_m_L_gate_alpha_m_L := 0.32*(V + 47.13)/(1 - exp(-0.1*(V + 47.13)));
  i_Na_L_i_Na_L_m_L_gate_beta_m_L := 0.08*exp(-V/11);
  i_Na_L_i_Na_L_h_L_gate_tau_h_L := 175 + 125/(1 + exp(-(V + 25)/6));
  i_Na_L_i_Na_L_h_L_gate_h_L_infinity := 1/(1 + exp((V + 69)/6.1));
  i_Ca_L_max := 1*i_Ca_L_p_Ca/Cm*z_Ca^2*(V - 15)*F^2/(R*T)*(gamma_Cai*Ca_r0*exp(z_Ca*F*(V - 15)/(R*T)) - gamma_Cao*Ca_o)/(exp(z_Ca*F*(V - 15)/(R*T)) - 1);
  Ca_MK_act0 := Ca_MK_act_Ca_MK_bound + Ca_MK_act_Ca_MK_trap;
  i_Ca_L_i_Ca_L_d_gate_d_infinity := 1/(1 + exp(-(V - 4)/6.74));
  i_Ca_L_i_Ca_L_d_gate_tau_d := 0.59 + 0.8*exp(0.052*(V + 13))/(1 + exp(0.132*(V + 13)));
  i_Ca_L_i_Ca_L_f_gate_f_infinity := 1/(1 + exp((V + 18)/10));
  i_Ca_L_i_Ca_L_f_gate_tau_f := 4 + 0.005*(V - 2.5)^2;
  i_Ca_L_i_Ca_L_f2_gate_f2_infinity := 1/(1 + exp((V + 18)/10));
  i_Ca_L_i_Ca_L_f2_gate_tau_f2 := 38 + 0.07*(V - 18.6)^2;
  i_Ca_L_i_Ca_L_f_Ca_gate_f_Ca_infinity := 0.3/(1 - i_Ca_L0/0.05) + 0.55/(1 + Ca_r0/0.003) + 0.15;
  i_Ca_L_i_Ca_L_f_Ca_gate_tau_f_Ca := 0.5 + 10*1*Ca_MK_act0/(1*Ca_MK_act0 + km_Ca_MK) + 1/(1 + Ca_r0/0.003);
  i_Ca_L_i_Ca_L_f_Ca2_gate_f_Ca2_infinity := 1/(1 - i_Ca_L0/0.01);
  i_Ca_L_i_Ca_L_f_Ca2_gate_tau_f_Ca2 := 125 + 300/(1 + exp((-i_Ca_L0 - 0.175)/0.04));
  i_Ca_T_i_Ca_T_b_gate_tau_b := 1/(i_Ca_T_i_Ca_T_b_gate_alpha_b + i_Ca_T_i_Ca_T_b_gate_beta_b);
  i_Ca_T_i_Ca_T_b_gate_b_infinity := 1/(1 + exp(-(V + 33)/6.1));
  i_Ca_T_i_Ca_T_b_gate_alpha_b := 1.068*exp((V + 16.3)/30);
  i_Ca_T_i_Ca_T_b_gate_beta_b := 1.068*exp(-(V + 16.3)/30);
  i_Ca_T_i_Ca_T_g_gate_tau_g := 1/(i_Ca_T_i_Ca_T_g_gate_alpha_g + i_Ca_T_i_Ca_T_g_gate_beta_g);
  i_Ca_T_i_Ca_T_g_gate_g_infinity := 1/(1 + exp((V + 60)/6.6));
  i_Ca_T_i_Ca_T_g_gate_alpha_g := 0.015*exp(-(V + 71.7)/83.3);
  i_Ca_T_i_Ca_T_g_gate_beta_g := 0.015*exp((V + 71.7)/15.4);
  i_to_1_i_to_1_a_gate_alpha_a := 25*exp((V - 76)/20)/(1 + exp((V - 76)/20));
  i_to_1_i_to_1_a_gate_beta_a := 25*exp(-(V + 54)/20)/(1 + exp(-(V + 54)/20));
  i_to_1_i_to_1_a_gate_tau_a := 1/(i_to_1_i_to_1_a_gate_alpha_a + i_to_1_i_to_1_a_gate_beta_a);
  i_to_1_i_to_1_a_gate_a_infinity := i_to_1_i_to_1_a_gate_alpha_a/(i_to_1_i_to_1_a_gate_alpha_a + i_to_1_i_to_1_a_gate_beta_a);
  i_to_1_i_to_1_i_gate_alpha_i := 0.03/(1 + exp((V + 25)/15));
  i_to_1_i_to_1_i_gate_beta_i := 0.1*exp((V - 40)/15)/(1 + exp((V - 40)/15));
  i_to_1_i_to_1_i_gate_tau_i := 6 + 5/(1 + exp((V - 16.5)/10));
  i_to_1_i_to_1_i_gate_i_infinity := i_to_1_i_to_1_i_gate_alpha_i/(i_to_1_i_to_1_i_gate_alpha_i + i_to_1_i_to_1_i_gate_beta_i);
  i_to_1_i_to_1_i2_gate_alpha_i2 := 0.00442/(1 + exp((V + 26)/15));
  i_to_1_i_to_1_i2_gate_beta_i2 := 0.05*exp((V - 10)/15)/(1 + exp((V - 10)/15));
  i_to_1_i_to_1_i2_gate_tau_i2 := 21.5 + 30/(1 + exp((V - 25)/10));
  i_to_1_i_to_1_i2_gate_i2_infinity := i_to_1_i_to_1_i2_gate_alpha_i2/(i_to_1_i_to_1_i2_gate_alpha_i2 + i_to_1_i_to_1_i2_gate_beta_i2);
  i_Kr_g_Kr := 0.040008488*sqrt(K_o/5.4);
  i_Kr_rr_infinity := 1/(1 + exp((V - 5.4)/20.4));
  i_Kr_i_Kr_xr_gate_tau_xr := 900/(1 + exp(V/5)) + 100;
  i_Kr_i_Kr_xr_gate_xr_infinity := 1/(1 + exp(-(V + 0.085)/12.25));
  i_Ks_g_Ks := 0.052581329*(1 + 0.6/(1 + (3.8e-5/Ca_i0)^1.4));
  i_Ks_i_Ks_xs1_gate_tau_xs1 := 1/(7.61e-5*(V + 44.6)/(1 - exp(-9.97*(V + 44.6))) + 0.00036*(V - 0.55)/(exp(0.128*(V - 0.55)) - 1));
  i_Ks_i_Ks_xs1_gate_xs1_infinity := 1/(1 + exp(-(V - 9)/13.7));
  i_Ks_i_Ks_xs2_gate_tau_xs2 := 2*1/(7.61e-5*(V + 44.6)/(1 - exp(-9.97*(V + 44.6))) + 0.00036*(V - 0.55)/(exp(0.128*(V - 0.55)) - 1));
  i_Ks_i_Ks_xs2_gate_xs2_infinity := 1/(1 + exp(-(V - 9)/13.7));
  i_K1_g_K1 := 0.25*sqrt(K_o/5.4);
  xK1 := i_K1_i_K1_xK1_gate_alpha_xK1/(i_K1_i_K1_xK1_gate_alpha_xK1 + i_K1_i_K1_xK1_gate_beta_xK1);
  i_K1_i_K1_xK1_gate_alpha_xK1 := 1.02/(1 + exp(0.2385*(V - (E_K + 59.215))));
  i_K1_i_K1_xK1_gate_beta_xK1 := (0.49124*exp(0.08032*(V + 5.476 - E_K)) + exp(0.06175*(V - (594.31 + E_K))))/(1 + exp(-0.5143*(V + 4.753 - E_K)));
  i_K_p_kp := 1/(1 + exp((7.488 - V)/5.98));
  i_to_2_i_to_2_max := 1*i_to_2_p_Cl/Cm*i_to_2_z_Cl^2*V*F^2/(R*T)*(Cl_i - Cl_o*exp(-i_to_2_z_Cl*V*F/(R*T)))/(1 - exp(-i_to_2_z_Cl*V*F/(R*T)));
  i_to_2_i_to_2_a_gate_a_infinity := 1/(1 + i_to_2_i_to_2_a_gate_km_to_2/Ca_r0);
  i_to_2_i_to_2_a_gate_tau_a := 1;
  i_NaCa_dNaCa_1 := i_NaCa_km_Ca_o*Na_i^3 + 1.5*i_NaCa_km_Na_o^3*Ca_i0 + i_NaCa_km_Na_i_1^3*Ca_o*(1 + 1.5*Ca_i0/i_NaCa_km_Ca_i);
  i_NaCa_dNaCa_2 := i_NaCa_km_Ca_i*Na_o^3*(1 + Na_i/i_NaCa_km_Na_i_1) + Na_i^3*Ca_o + 1.5*Na_o^3*Ca_i0;
  i_NaK_f_NaK := 1/(1 + 0.1245*exp(-0.1*F*V/(R*T)) + 0.0365*i_NaK_sigma*exp(-F*V/(R*T)));
  i_NaK_sigma := 1/7*(exp(Na_o/67.3) - 1);
  CT_K_Cl0 := CT_K_Cl_CT_K_Cl_max*(E_K - E_Cl)/(E_K + 87.8251 - E_Cl);
  CT_Na_Cl0 := CT_Na_Cl_CT_Na_Cl_max*(E_Na - E_Cl)^4/((E_Na - E_Cl)^4 + 87.8251^4);
  Vol_myo := Vol_cell*0.68;
  a_cap := model_parameters_rcg*model_parameters_a_geo;
  Ca_i_TRPN := 2*Ca_i_TRPN_max*Ca_i0/(Ca_i0 + Ca_i_km_TRPN)^2;
  Ca_i_CMDN := 2*Ca_i_CMDN_max*Ca_i0/(Ca_i0 + Ca_i_km_CMDN)^2;
  Ca_i_b_myo := 1/(1 + Ca_i_TRPN + Ca_i_CMDN);
  Vol_nsr := Vol_cell*0.0552;
  Vol_ss := Vol_cell*0.02;
  q_up0 := q_up_X_q_up*(q_up_dq_up_Ca_MK + 1)*q_up_q_up_max*Ca_i0/(Ca_i0 + q_up_km_up - q_up_dkm_plb);
  q_leak0 := q_leak_q_leak_max*Ca_NSR0/q_leak_NSR_max;
  q_diff := (Ca_r0 - Ca_i0)/Ca_r_tau_ss;
  Ca_MK_act_Ca_MK_bound := Ca_MK_act_Ca_MK_0*(1 - Ca_MK_act_Ca_MK_trap)/(1 + km_Ca_MK/Ca_r0);
  Vol_jsr := Vol_cell*0.0048;
  q_tr0 := (Ca_NSR0 - Ca_JSR0)/q_tr_tau_tr;
  q_rel0 := q_rel_g_rel*ro*ri*(Ca_JSR0 - Ca_r0);
  Ca_r_b_SR := 2*Ca_r_b_SR_max*Ca_r0/(Ca_r0 + Ca_r_km_b_SR)^2;
  Ca_r_b_SL := 2*Ca_r_b_SL_max*Ca_r0/(Ca_r0 + Ca_r_km_b_SL)^2;
  Ca_r_Ca_r_tot := 1/(1 + Ca_r_b_SR + Ca_r_b_SL);
  q_rel_g_rel := 3000*q_rel_vg;
  q_rel_vg := 1/(1 + exp((g_Ca_L*i_Ca_L_max + 13)/5));
  q_rel_q_rel_ri_gate_tau_ri := (350 - q_rel_q_rel_ri_gate_tau_Ca_MK)/(1 + exp((Ca_r0 - 0.003 + 0.003*q_rel_q_rel_ri_gate_Ca_fac)/0.0002)) + 3 + q_rel_q_rel_ri_gate_tau_Ca_MK;
  q_rel_q_rel_ri_gate_tau_Ca_MK := q_rel_q_rel_ri_gate_tau_Ca_MK_max*1*Ca_MK_act0/(km_Ca_MK + 1*Ca_MK_act0);
  q_rel_q_rel_ri_gate_Ca_fac := 1/(1 + exp((i_Ca_L0 + 0.05)/0.015));
  q_rel_q_rel_ri_gate_ri_infinity := 1/(1 + exp((Ca_r0 - 0.0004 + 0.002*q_rel_q_rel_ri_gate_Ca_fac)/2.5e-5));
  q_rel_q_rel_ro_gate_ro_infinity := q_rel_q_rel_ro_gate_ro_infinity_JSR*i_Ca_L0^2/(i_Ca_L0^2 + 1);
  q_rel_q_rel_ro_gate_ro_infinity_JSR := Ca_JSR0^1.9/(Ca_JSR0^1.9 + (49.28*Ca_r0/(Ca_r0 + 0.0028))^1.9);
  q_up_dq_up_Ca_MK := q_up_dq_up_Ca_MK_max*Ca_MK_act0*1/(km_Ca_MK + Ca_MK_act0*1);
  q_up_dkm_plb := q_up_dkm_plb_max*Ca_MK_act0*1/(km_Ca_MK + Ca_MK_act0*1);
  model_parameters_a_geo := 2*3.14*model_parameters_radius^2 + 2*3.14*model_parameters_radius*model_parameters_length;

  // Rate rules:
  V' = -(membrane_i_tot + membrane_i_stim);
  Na_i' = -Cm*(i_Na0 + i_Na_L0 + i_Na_b + 3*i_NaK0 + 3*i_NaCa0)*a_cap/(Vol_myo*F) + CT_Na_Cl0;
  Ca_i0' = -Ca_i_b_myo*(Cm*(i_Ca_b + i_Ca_p0 - 2*i_NaCa0)*a_cap/(2*Vol_myo*F) + (q_up0 - q_leak0)*Vol_nsr/Vol_myo - q_diff*Vol_ss/Vol_myo);
  K_i' = -Cm*(i_to_10 + i_K10 + i_Kr0 + i_Ks0 + i_K_p0 + i_K_b - 2*i_NaK0)*a_cap/(Vol_myo*F) + CT_K_Cl0;
  Cl_i' = -Cm*(i_to_20 + i_Cl_b)*a_cap/(Vol_myo*F) + CT_Na_Cl0 + CT_K_Cl0;
  m' = (i_Na_i_Na_m_gate_m_infinity - m)/i_Na_i_Na_m_gate_tau_m;
  h' = (i_Na_i_Na_h_gate_h_infinity - h)/i_Na_i_Na_h_gate_tau_h;
  j' = (i_Na_i_Na_j_gate_j_infinity - j)/i_Na_i_Na_j_gate_tau_j;
  m_L' = (i_Na_L_i_Na_L_m_L_gate_m_L_infinity - m_L)/i_Na_L_i_Na_L_m_L_gate_tau_m_L;
  h_L' = (i_Na_L_i_Na_L_h_L_gate_h_L_infinity - h_L)/i_Na_L_i_Na_L_h_L_gate_tau_h_L;
  Ca_r0' = Ca_r_Ca_r_tot*(-Cm*i_Ca_L0*a_cap/(Vol_ss*z_Ca*F) + q_rel0*Vol_jsr/Vol_ss - q_diff);
  d' = (i_Ca_L_i_Ca_L_d_gate_d_infinity - d)/i_Ca_L_i_Ca_L_d_gate_tau_d;
  f' = (i_Ca_L_i_Ca_L_f_gate_f_infinity - f)/i_Ca_L_i_Ca_L_f_gate_tau_f;
  f2' = (i_Ca_L_i_Ca_L_f2_gate_f2_infinity - f2)/i_Ca_L_i_Ca_L_f2_gate_tau_f2;
  f_Ca' = (i_Ca_L_i_Ca_L_f_Ca_gate_f_Ca_infinity - f_Ca)/i_Ca_L_i_Ca_L_f_Ca_gate_tau_f_Ca;
  f_Ca2' = (i_Ca_L_i_Ca_L_f_Ca2_gate_f_Ca2_infinity - f_Ca2)/i_Ca_L_i_Ca_L_f_Ca2_gate_tau_f_Ca2;
  b' = (i_Ca_T_i_Ca_T_b_gate_b_infinity - b)/i_Ca_T_i_Ca_T_b_gate_tau_b;
  g' = (i_Ca_T_i_Ca_T_g_gate_g_infinity - g)/i_Ca_T_i_Ca_T_g_gate_tau_g;
  a' = (i_to_1_i_to_1_a_gate_a_infinity - a)/i_to_1_i_to_1_a_gate_tau_a;
  i' = (i_to_1_i_to_1_i_gate_i_infinity - i)/i_to_1_i_to_1_i_gate_tau_i;
  i2' = (i_to_1_i_to_1_i2_gate_i2_infinity - i2)/i_to_1_i_to_1_i2_gate_tau_i2;
  xr' = (i_Kr_i_Kr_xr_gate_xr_infinity - xr)/i_Kr_i_Kr_xr_gate_tau_xr;
  xs1' = (i_Ks_i_Ks_xs1_gate_xs1_infinity - xs1)/i_Ks_i_Ks_xs1_gate_tau_xs1;
  xs2' = (i_Ks_i_Ks_xs2_gate_xs2_infinity - xs2)/i_Ks_i_Ks_xs2_gate_tau_xs2;
  a0' = (i_to_2_i_to_2_a_gate_a_infinity - a0)/i_to_2_i_to_2_a_gate_tau_a;
  Ca_MK_act_Ca_MK_trap' = Ca_MK_act_alpha_Ca_MK*Ca_MK_act_Ca_MK_bound*(Ca_MK_act_Ca_MK_bound + Ca_MK_act_Ca_MK_trap) - Ca_MK_act_beta_Ca_MK*Ca_MK_act_Ca_MK_trap;
  Ca_NSR0' = q_up0 - (q_leak0 + q_tr0*Vol_jsr/Vol_nsr);
  Ca_JSR0' = (q_tr0 - q_rel0)/(1 + Ca_JSR_CSQN_max*Ca_JSR_km_CSQN/(Ca_JSR_km_CSQN + Ca_JSR0)^2);
  ri' = (q_rel_q_rel_ri_gate_ri_infinity - ri)/q_rel_q_rel_ri_gate_tau_ri;
  ro' = (q_rel_q_rel_ro_gate_ro_infinity - ro)/q_rel_q_rel_ro_gate_tau_ro;
end
