// SBML level 2 version 4

model bagci_2008b____main()
  // Originally created by libAntimony v1.4 (using libSBML 4.1.0-b2)

  // Compartments:
  compartment default_compartment = 1;

  // Parameters:
  Casp80 = 0;
  Casp8Bid = 0;
  FeLnNO = 0;
  Bid0 = 0.004;
  k_f0 = 0.1;
  k_10 = 10;
  k_00 = 0.5;
  u = 0.006;
  k_20NO = 66;
  Apaf_10 = 0.004;
  CytcApaf_10 = 0;
  Cytc0 = 0;
  P_Apaf_1 = 0.0003;
  k_11 = 5;
  k_01 = 0.5;
  Apop0 = 0;
  k_11b = 50000;
  k_01b = 0.5;
  p = 4;
  Cytc_mito0 = 0.004;
  PTPC0 = 0;
  PTPC_0 = 0;
  k_1 = 1;
  Bax_20 = 0;
  P_Cytc_mito = 0.0003;
  k14 = 10;
  tBid_mito0 = 0;
  Bax0 = 0.004;
  k12a = 10;
  tBid0 = 0;
  k11 = 10;
  tBidBax0 = 0;
  k12b = 10;
  Bcl_20 = 0.004;
  k13 = 10;
  P_oBax = 3e-5;
  p53 = 0.0066;
  p53_thresh = 0.004;
  u_Bax = 0.006;
  Casp30 = 0;
  Casp3Bcl_20 = 0;
  k_19 = 10;
  k_09 = 0.5;
  P_oBcl_2 = 8e-5;
  u_Bcl_2 = 0.006;
  k_f9 = 0.1;
  Casp3Bid0 = 0;
  k_18 = 10;
  k_08 = 0.5;
  k_f8 = 0.1;
  P_Bid = 3e-5;
  IAP0 = 0.004;
  Casp3IAP = 0;
  k_17 = 5;
  k_07 = 0.0035;
  Pro90 = 0.004;
  ApopPro9 = 0;
  ApopPro9_20 = 0;
  k_12 = 10;
  k_02 = 0.5;
  k_13 = 10;
  k_03 = 0.5;
  P_Pro9 = 0.0003;
  k_f3 = 0.1;
  ApopCasp9_2Pro30 = 0;
  ApopCasp9_20 = 0;
  Pro30 = 0.004;
  k_16b = 10;
  k_06b = 0.5;
  k_f6b = 0.1;
  Casp9Pro30 = 0;
  k_f6 = 0.001;
  Casp90 = 0;
  k_16 = 10;
  k_06 = 0.5;
  P_Pro3 = 0.0003;
  Casp9IAP = 0;
  ApopCasp9IAP = 0;
  ApopCasp9_2IAP = 0;
  ApopCasp90 = 0;
  P_IAP = 3e-5;
  k_15 = 5;
  k_05 = 0.0035;
  k_15b = 5;
  k_05b = 0.0035;
  k_15c = 5;
  k_05c = 0.0035;
  k_14 = 5;
  k_04 = 0.5;
  k_14b = 5;
  k_04b = 0.5;
  NO0 = 0;
  O_2m0 = 35;
  NO_O_2 = 35;
  NO_NO_2 = 0;
  N2O30 = 0;
  GSNO0 = 0;
  CcOX = 0.1;
  FeLn0 = 0.05;
  k_1NO = 1;
  k_4NO = 6700;
  k_12aNO = 6e-6;
  k_12bNOp = 1100;
  k_12bNOm = 81000;
  k_14NO = 0.0002;
  k_15NO = 100;
  k_16NO = 1.21;
  SOD = 10;
  k_2NO = 0.1;
  k_5NO = 2400;
  k_10NO = 0.0006;
  ONOO_m0 = 0;
  GSH0 = 10000;
  ONOO_m_GPX = 5.8;
  ONOO_m_CO_2 = 1000;
  ONOO_m_Cyt_c = 400;
  k_6NO = 0.00135;
  k_7NO = 2;
  k_8NO = 0.058;
  k_9NO = 0.025;
  k_18NO = 1;
  FeLn_0 = 0.05;
  GSH_0 = 10000;
  k_11NO = 66;
  v_m = 320;
  k_m = 50;
  k_17NO = 66;
  k_13NO = 1600;
  k_21NO = 66;
  k_22NO = 66;
  k_19NO = 10;
  k_17bNO = 0.0002;
  time_ = ;

  // Assignment rules:
  J_0 := k_10*Casp80*Bid0 - k_00*Casp8Bid;
  J_f0 := k_f0*Casp8Bid;
  Casp8_J_Casp8 := -u*Casp80;
  r_20NO := k_20NO*FeLnNO*Casp80;
  r_19NO := k_19NO*N2O30*Casp80;
  Apaf_1_J_Apaf_1 := P_Apaf_1 - u*Apaf_10;
  J_1 := k_11*Cytc0*Apaf_10 - k_01*CytcApaf_10;
  J_1b := k_11b*CytcApaf_10^p - k_01b*Apop0;
  Cytc_PTPC_act := PTPC_0 - PTPC0;
  J_14 := k14*Bax_20*Cytc_mito0;
  Cytc_J_Cytc := -u*Cytc0;
  Cytc_mito_J_Cytc_mito := P_Cytc_mito - u*Cytc_mito0;
  J_12b := k12b*tBidBax0*Bax0;
  Bax_2_J_Bax_2 := -u*Bax_20;
  J_11 := k11*tBid0;
  J_12a := k12a*tBid_mito0*Bax0;
  tBid_mito_J_tBid_mito := -u*tBid_mito0;
  J_f8 := k_f8*Casp3Bid0;
  tBid_J_tBid := -u*tBid0;
  tBidBax_J_tBidBax := -u*tBidBax0;
  J_13 := k13*Bcl_20*Bax0;
  Bax_J_Bax := Bax_P_Bax - u_Bax*Bax0;
  Bax_P_Bax := P_oBax*(1 + p53^4/(p53^4 + p53_thresh^4));
  J_9 := k_19*Casp30*Bcl_20 - k_09*Casp3Bcl_20;
  Bcl_2_J_Bcl_2 := Bcl_2_P_Bcl_2 - u_Bcl_2*Bcl_20;
  Bcl_2_P_Bcl_2 := P_oBcl_2*p53_thresh^4/(p53^4 + p53_thresh^4);
  J_f9 := k_f9*Casp3Bcl_20;
  J_8 := k_18*Casp30*Bid0 - k_08*Casp3Bid0;
  Bid_J_Bid := P_Bid - u*Bid0;
  J_f6 := k_f6*Casp9Pro30;
  J_f6b := k_f6b*ApopCasp9_2Pro30;
  J_7 := k_17*Casp30*IAP0 - k_07*Casp3IAP;
  Casp3_J_Casp3 := -u*Casp30;
  r_22NO := k_22NO*FeLnNO*Casp30;
  J_2 := k_12*Apop0*Pro90 - k_02*ApopPro9;
  J_4b := k_14b*ApopCasp90 - k_04b*Apop0*Casp90;
  J_3 := k_13*ApopPro9*Pro90 - k_03*ApopPro9_20;
  Pro9_J_Pro9 := P_Pro9 - u*Pro90;
  J_f3 := k_f3*ApopPro9_20;
  J_6b := k_16b*ApopCasp9_20*Pro30 - k_06b*ApopCasp9_2Pro30;
  J_6 := k_16*Casp90*Pro30 - k_06*Casp9Pro30;
  Pro3_J_Pro3 := P_Pro3 - u*Pro30;
  J_5 := k_15*Casp90*IAP0 - k_05*Casp9IAP;
  J_5b := k_15b*ApopCasp90*IAP0 - k_05b*ApopCasp9IAP;
  J_5c := k_15c*ApopCasp9_20*IAP0 - k_05c*ApopCasp9_2IAP;
  IAP_J_IAP := P_IAP - u*IAP0;
  J_4 := k_14*ApopCasp9_20 - k_04*ApopCasp90*Casp90;
  Casp9_J_Casp9 := -u*Casp90;
  r_21NO := k_21NO*FeLnNO*Casp90;
  NO_r_1NO := k_1NO;
  r_4NO := k_4NO*NO0*O_2m0;
  NO_r_12aNO := k_12aNO*NO0^2*NO_O_2;
  r_12bNOp := k_12bNOp*NO_NO_2*NO0;
  r_12bNOm := k_12bNOm*N2O30;
  r_14NO := k_14NO*GSNO0;
  r_15NO := k_15NO*CcOX*NO0;
  r_16NO := k_16NO*FeLn0*NO0;
  O_2m_r_2NO := k_2NO;
  r_5NO := k_5NO*SOD*O_2m0;
  r_10NO := k_10NO*GSNO0^2*O_2m0;
  r_6NO := k_6NO*ONOO_m0*GSH0;
  r_7NO := k_7NO*ONOO_m0*ONOO_m_GPX;
  r_8NO := k_8NO*ONOO_m0*ONOO_m_CO_2;
  r_9NO := k_9NO*ONOO_m0*ONOO_m_Cyt_c;
  ONOO_m_r_18NO := k_18NO*ONOO_m0*PTPC0;
  GSH_GSSG := (GSH_0 - GSH0 - GSNO0)/2;
  r_11NO := k_11NO*N2O30*GSH0;
  GSH_r_m := v_m*GSH_GSSG/(k_m + GSH_GSSG);
  r_17NO := k_17NO*FeLnNO*GSH0;
  N2O3_r_13NO := k_13NO*N2O30;

  // Rate rules:
  Casp80' = -J_0 + J_f0 + Casp8_J_Casp8 - r_19NO - r_20NO;
  Casp8Bid' = J_0 - J_f0;
  FeLnNO' = r_16NO - r_17NO - r_20NO - r_21NO - r_22NO;
  Bid0' = -J_0 - J_8 + Bid_J_Bid;
  Apaf_10' = -J_1 + Apaf_1_J_Apaf_1;
  CytcApaf_10' = J_1 - 7*J_1b;
  Cytc0' = J_14 - J_1 + Cytc_J_Cytc + k_1*Cytc_PTPC_act*Cytc_mito0;
  Apop0' = J_1b - J_2 + J_4b;
  Cytc_mito0' = -J_14 + Cytc_mito_J_Cytc_mito;
  PTPC0' = -r_19NO;
  Bax_20' = J_12b + Bax_2_J_Bax_2;
  tBid_mito0' = J_11 - J_12a + tBid_mito_J_tBid_mito;
  Bax0' = -J_12a - J_12b - J_13 + Bax_J_Bax;
  tBid0' = J_f0 + J_f8 - J_11 + J_12b + tBid_J_tBid;
  tBidBax0' = J_12a - J_12b + tBidBax_J_tBidBax;
  Bcl_20' = -J_9 - J_13 + Bcl_2_J_Bcl_2;
  Casp30' = J_f6 + J_f6b - J_7 - J_8 + J_f8 - J_9 + J_f9 + Casp3_J_Casp3 - r_22NO;
  Casp3Bcl_20' = J_9 - J_f9;
  Casp3Bid0' = J_8 - J_f8;
  IAP0' = -J_5 - J_5b - J_5c - J_7 + IAP_J_IAP;
  Casp3IAP' = J_7;
  Pro90' = -J_2 - J_3 + Pro9_J_Pro9;
  ApopPro9' = J_2 - J_3;
  ApopPro9_20' = J_3 - J_f3;
  ApopCasp9_2Pro30' = J_6b - J_f6b;
  ApopCasp9_20' = J_f3 - J_4 - J_5c - J_6b + J_f6b;
  Pro30' = -J_6 - J_6b + Pro3_J_Pro3;
  Casp9Pro30' = J_6 - J_f6;
  Casp90' = J_4 + J_4b - J_5 - J_6 + J_f6 + Casp9_J_Casp9 - r_21NO;
  Casp9IAP' = J_5;
  ApopCasp9IAP' = J_5b;
  ApopCasp9_2IAP' = J_5c;
  ApopCasp90' = J_4 - J_4b - J_5b;
  NO0' = NO_r_1NO - r_4NO - 2*NO_r_12aNO - r_12bNOp + r_12bNOm + r_14NO - r_15NO - r_16NO;
  O_2m0' = O_2m_r_2NO - r_4NO - r_5NO - r_10NO;
  NO_NO_2' = 2*NO_r_12aNO - r_12bNOp + r_12bNOm;
  N2O30' = -r_11NO + r_12bNOp - r_12bNOm - N2O3_r_13NO - r_19NO;
  GSNO0' = r_6NO - 2*r_10NO + r_11NO - r_14NO + r_17NO;
  CcOX' = -r_15NO;
  FeLn0' = -r_16NO + r_17NO + r_20NO + r_21NO + r_22NO;
  ONOO_m0' = r_4NO - r_6NO - r_7NO - r_8NO - r_9NO - ONOO_m_r_18NO;
  GSH0' = -r_6NO - r_11NO + 2*GSH_r_m - r_17NO;
end
