// SBML level 2 version 4

model baylor_2002d____main()
  // Originally created by libAntimony v1.4 (using libSBML 4.1.0-b2)

  // Compartments:
  compartment default_compartment = 1;

  // Parameters:
  Ca0 = 0.05;
  k1 = 1e14;
  k1_ = 1000;
  k3 = 1e14;
  k3_ = 10;
  k4 = 20;
  k4_ = 0;
  E0 = 240;
  CaE0 = 0.01;
  Ca2E_0 = 1;
  CaE_0 = 0.01;
  k2 = 500;
  k2_ = 1200;
  time_ = ;

  // Rate rules:
  Ca0' = k1_*CaE0 + k3_*Ca2E_0 + k4*Ca2E_0 - (k1*Ca0*E0 + k3*Ca0*CaE_0 + k4_*2*Ca0*E0);
  E0' = k1_*CaE0 + k4*Ca2E_0 - (k1*Ca0*E0 + k4_*2*Ca0*E0);
  CaE0' = k1*Ca0*E0 + k2_*CaE_0 - (k1_*CaE0 + k2*CaE0);
  Ca2E_0' = k3*CaE_0*Ca0 + k4_*E0*2*Ca0 - (k3_*Ca2E_0 + k4*Ca2E_0);
  CaE_0' = k3_*Ca2E_0 + k2*CaE0 - (k2_*CaE_0 + k3*Ca0*CaE_0);
end
