// SBML level 2 version 4

model beard_2005____main()
  // Originally created by libAntimony v1.3 (using libSBML 4.1.0-b2)

  // Compartments:
  compartment default_compartment = 1;

  // Parameters:
  Mg_tot = 0.005;
  Pi_e = 0.000125;
  ADP_e = 0;
  RT = 2.4734;
  F = 0.096484;
  n_A = 3;
  dG_C1o = -69.37;
  dG_C3o = -32.53;
  dG_C4o = -122.94;
  dG_F1o = 36.03;
  pH_e = 7.1;
  K_e = 0.15;
  ATP_e = 0;
  AMP_e = 0;
  K_DT = 2.4e-5;
  K_DD = 0.000347;
  K_AK = 0.4331;
  W_m = 0.72376;
  gamma = 5.99;
  Ctot = 0.0027;
  Qtot = 0.00135;
  NADtot = 0.00297;
  k_Pi1 = 0.00013413;
  k_Pi2 = 0.00067668;
  k_Pi3 = 0.00019172;
  k_Pi4 = 0.02531;
  k_PiH = 0.00045082;
  r = 4.5807;
  x_DH = 0.09183;
  x_C1 = 0.36923;
  x_C3 = 0.091737;
  x_C4 = 3.2562e-5;
  x_F1 = 150.93;
  x_ANT = 0.0079204;
  x_Pi1 = 339430;
  x_KH = 29802000;
  x_Hle = 250;
  x_K = 0;
  k_mADP = 3.5e-6;
  x_AK = 0;
  p_A = 85;
  k_O2 = 0.00012;
  x_buff = 100;
  x_MgA = 1000000;
  x_Pi2 = 327;
  dPsi = 160;
  H_x = 6.309573e-8;
  NADH_x = 0.0015;
  Pi_x = 0.001;
  QH2 = 0.0008;
  Cred = 0.001;
  O2 = 2.6e-5;
  ADP_mx = 0;
  ATP_mx = 0;
  ANT_flux_mincond = 1e-12;
  ATP_x = 0;
  Mg_x = 0.005;
  ADP_x = 0.01;
  ATP_i = 0;
  ATP_mi = 0;
  ADP_i = 0;
  ADP_mi = 0;
  AMP_i = 0;
  Pi_i = 0.001;
  K_x = 0.14;
  dPsi_dt_C_im = 6.756757e-6;
  t = ;

  // Assignment rules:
  H_e := 1*10^(-pH_e);
  k_dHPi := 1*10^(-6.75);
  k_dHatp := 1*10^(-6.48);
  k_dHadp := 1*10^(-6.29);
  W_x := 0.9*W_m;
  W_i := 0.1*W_m;
  H_i := H_e;
  K_i := K_e;
  dG_H := F*dPsi + RT*ln(H_i/H_x);
  J_DH := x_DH*(r*NAD_x - NADH_x)*(1 + Pi_x/k_Pi1)/(1 + Pi_x/k_Pi2);
  NAD_x := NADtot - NADH_x;
  J_C1 := x_C1*(exp(-(Electron_flux_complex_I_dG_C1op + 4*dG_H)/RT)*NADH_x - NAD_x);
  Electron_flux_complex_I_dG_C1op := dG_C1o - RT*ln(H_x/1e-7) - RT*ln(Q/QH2);
  Q := Qtot - QH2;
  J_C3 := x_C3*(1 + Pi_x/k_Pi3)/(1 + Pi_x/k_Pi4)*(exp(-(Electron_flux_complex_III_dG_C3op + 4*dG_H - 2*F*dPsi)/(2*RT))*Cox - Cred);
  Electron_flux_complex_III_dG_C3op := dG_C3o + 2*RT*ln(H_x/1e-7) - RT*ln(QH2/Q);
  Cox := Ctot - Cred;
  J_C4 := x_C4*1/(1 + k_O2/O2)*Cred/Ctot*(exp(-(Electron_flux_complex_IV_dG_C4op + 2*dG_H)/(2*RT))*Cred - Cox*exp(F*dPsi/RT));
  Electron_flux_complex_IV_dG_C4op := dG_C4o - 2*RT*ln(H_x/1e-7) - RT/2*ln(O2/1);
  J_F1 := x_F1*(exp(-(dG_F1o - n_A*dG_H)/RT)*K_DD/K_DT*ADP_mx*Pi_x - ATP_mx*1);
  J_ANT := ;
  Psi_x := -0.65*dPsi;
  Psi_i := 0.35*dPsi;
  ADP_fi := ADP_i - ADP_mi;
  ATP_fi := ATP_i - ATP_mi;
  ADP_fx := ADP_x - ADP_mx;
  ATP_fx := ATP_x - ATP_mx;
  J_MgATPx := x_MgA*(ATP_fx*Mg_x - K_DT*ATP_mx);
  J_MgADPx := x_MgA*(ADP_fx*Mg_x - K_DD*ADP_mx);
  J_MgATPi := x_MgA*(ATP_fi*Mg_i - K_DT*ATP_mi);
  Mg_i := Mg_e;
  J_MgADPi := x_MgA*(ADP_fi*Mg_i - K_DD*ADP_mi);
  J_ATP := gamma*p_A*(ATP_e - ATP_i);
  J_ADP := gamma*p_A*(ADP_e - ADP_i);
  J_AMP := gamma*p_A*(AMP_e - AMP_i);
  J_Pi2 := gamma*x_Pi2*(Pi_e - Pi_i);
  J_Pi1 := x_Pi1*(H_x*H2PIi - H_i*H2PIx)/(H2PIi + k_PiH);
  H2PIi := Pi_i*H_i/(H_i + k_dHPi);
  H2PIx := Pi_x*H_x/(H_x + k_dHPi);
  J_AKi := x_AK*(K_AK*ADP_i*ADP_i - AMP_i*ATP_i);
  J_Hle := x_Hle*dPsi*(H_i*exp(F*dPsi/RT) - H_x)/(exp(F*dPsi/RT) - 1);
  J_K := x_K*dPsi*(K_i*exp(F*dPsi/RT) - K_x)/(exp(F*dPsi/RT) - 1);
  J_KH := x_KH*(K_i*H_x - K_x*H_i);
  ADP_me := (K_DD + ADP_e + Mg_tot - sqrt((K_DD + ADP_e + Mg_tot)^2 - 4*Mg_tot*ADP_e))/2;
  ADP_fe := ADP_e - ADP_me;
  Mg_e := Mg_tot - ADP_me;

  // Rate rules:
  dPsi' = (4*J_C1 + 2*J_C3 + 4*J_C4 - n_A*J_F1 - J_ANT - J_Hle - J_K)/dPsi_dt_C_im;
  H_x' = x_buff*H_x*(J_DH - 5*J_C1 - 2*J_C3 - 4*J_C4 + (n_A - 1)*J_F1 + 2*J_Pi1 + J_Hle - J_KH)/W_x;
  NADH_x' = (J_DH - J_C1)/W_x;
  Pi_x' = (-J_F1 + J_Pi1)/W_x;
  QH2' = (J_C1 - J_C3)/W_x;
  Cred' = (2*J_C3 - 2*J_C4)/W_i;
  O2' = 0;
  ADP_mx' = J_MgADPx/W_x;
  ATP_mx' = J_MgATPx/W_x;
  ATP_x' = (J_F1 - J_ANT)/W_x;
  Mg_x' = (-J_MgATPx - J_MgADPx)/W_x;
  ADP_x' = (-J_F1 + J_ANT)/W_x;
  ATP_i' = (J_ATP + J_ANT + J_AKi)/W_i;
  ATP_mi' = J_MgATPi/W_i;
  ADP_i' = (J_ADP - J_ANT - 2*J_AKi)/W_i;
  ADP_mi' = J_MgADPi/W_i;
  AMP_i' = (J_AMP + J_AKi)/W_i;
  Pi_i' = (-J_Pi1 + J_Pi2)/W_i;
  K_x' = (J_KH + J_K)/W_x;
end
