// SBML level 2 version 4

model benson_endocardial_2008____main()
  // Originally created by libAntimony v1.4 (using libSBML 4.1.0-b2)

  // Compartments:
  compartment default_compartment = 1;

  // Parameters:
  F = 96485;
  K_o = 5.4;
  Ca_o = 1.8;
  Na_o = 140;
  Cl_o = 100;
  FonRT = 0.03743588;
  tissue = 0;
  V = -85.78184;
  cell_l = 0.01;
  cell_a = 0.0011;
  cell_stim_offset = 0;
  cell_stim_period = 1000;
  cell_stim_duration = 3;
  cell_stim_amplitude = -20;
  INa_H = 0.9873178;
  INa_m = 0.001356538;
  INa_J = 0.991925;
  Ca_ss = 0.00012271265;
  ICaL_d = 1.64013e-6;
  ICaL_dp = 8.982307;
  ICaL_f = 0.9999615;
  ICaL_fca = 0.9783662;
  ICaL_fca2 = 0.8930529;
  ICaL_f2 = 0.9922345;
  ICaL_pca = 0.000243;
  ICaL_gacai = 1;
  ICaL_gacao = 0.341;
  IKr_xr = 7.24074e-6;
  Ca_i = 0.00012131666;
  IKs_xs1 = 0.01988314;
  IKs_xs2 = 0.01989065;
  Ito_gitodv = 0.095;
  Ito_ydv = 0.01397079;
  Ito_ydv2 = 0.9999647;
  Ito_zdv = 0.8292061;
  Na_i = 12.97243;
  INaK_kmnai = 10;
  INaK_kmko = 1.5;
  INaK_ibarnak = 0.61875;
  INaCa_KmCa = 0.000125;
  INaCa_NCXmax = 4.05;
  INaCa_ksat = 0.27;
  INaCa_eta = 0.35;
  INaCa_KmNai = 12.3;
  INaCa_KmNao = 87.5;
  INaCa_KmCai = 0.0036;
  INaCa_KmCao = 1.3;
  IpCa_ibarpca = 0.0575;
  IpCa_kmpca = 0.0005;
  Cl_i = 15.59207;
  Ito2_PCl = 4e-7;
  Ito2_AA = 0.000816605172;
  Ito2_Kmto2 = 0.1502;
  IClb_GClb = 0.000225;
  INal_GNaL = 0.0065;
  INal_mL = 0.001356538;
  INal_hL = 0.2613071;
  K_i = 135.4695;
  reversal_potentials_prnak = 0.01833;
  Ca_jsr = 1.737581;
  Irel_dtau_rel_max = 10;
  Irel_CaMK0 = 0.05;
  Irel_Km = 0.0015;
  KmCaMK = 0.15;
  Irel_CaMKtrap = 0.0211237;
  Irel_ro = 0;
  Irel_ri = 0.8626667;
  Iup_Ileak_dKmPLBmax = 0.00017;
  Iup_Ileak_dJupmax = 0.75;
  Iup_Ileak_iupmax = 0.004375;
  Iup_Ileak_Kmup = 0.00092;
  Iup_Ileak_nsrmax = 15;
  Ca_nsr = 1.832822;
  Na_CTNaClmax = 9.8443e-6;
  K_CTKClmax = 7.0756e-6;
  Ca_kmt = 0.0005;
  Ca_kmc = 0.00238;
  Ca_tbar = 0.07;
  Ca_cbar = 0.05;
  Ca_kmcsqn = 0.8;
  Ca_csqnbar = 10;
  Ca_BSRmax = 0.047;
  Ca_KmBSR = 0.00087;
  Ca_BSLmax = 1.124;
  Ca_KmBSL = 0.0087;
  time_ = ;

  // Assignment rules:
  INa0 := INa_gNa*(V - ENa);
  ICaL0 := ;
  IK10 := 0.5*sqrt(K_o/5.4)*IK1_ak1/(IK1_ak1 + IK1_bk1)*(V - EK);
  IKp0 := 0.00276*(V - EK)/(1 + exp((7.488 - V)/5.98));
  IKs0 := IKs_gks*IKs_xs1*IKs_xs2*(V - EKs);
  IKr0 := IKr_gkr*IKr_xr*IKr_r*(V - EK);
  IpCa0 := IpCa_ibarpca*Ca_i/(IpCa_kmpca + Ca_i);
  ICab0 := 1.995084e-7*4*V*F*FonRT*(Ca_i*exp(2*V*FonRT) - 0.341*Ca_o)/(exp(2*V*FonRT) - 1);
  INaCa0 := INaCa_NCXmax*INaCa_allo*INaCa_num/(INaCa_denom1*(INaCa_denom2 + INaCa_denom3));
  INaK0 := INaK_ibarnak*INaK_fnak*1/(1 + (INaK_kmnai/Na_i)^2)*K_o/(K_o + INaK_kmko);
  Ito0 := Ito_gitodv*Ito_ydv^3*Ito_ydv2*Ito_zdv*Ito_rv*(V - EK);
  Ito20 := Ito2_Ito2_max*Ito2_AA;
  IClb0 := IClb_GClb*(V - ECl);
  INal0 := INal_GNaL*INal_mL^3*INal_hL*(V - ENa);
  cell_caiont := ICaL0 + ICab0 + IpCa0 - 2*INaCa0;
  naiont := INa0 + 3*INaCa0 + 3*INaK0 + INal0;
  kiont := IKr0 + IKs0 + IK10 + IKp0 - 2*INaK0 + Ito0 + 0.5*i_Stim;
  clont := IClb0 + Ito20 + 0.5*i_Stim;
  cell_vcell := 1000*pi*cell_a*cell_a*cell_l;
  cell_ageo := 2*pi*cell_a*cell_a + 2*pi*cell_a*cell_l;
  cell_Acap := cell_ageo*2;
  vmyo := cell_vcell*0.68;
  cell_vmito := cell_vcell*0.26;
  vsr := cell_vcell*0.06;
  vnsr := cell_vcell*0.0552;
  vjsr := cell_vcell*0.0048;
  vss := cell_vcell*0.02;
  AF := cell_Acap/F;
  i_Stim := ;
  cell_past := floor(time_/cell_stim_period)*cell_stim_period;
  ENa := ln(Na_o/Na_i)/FonRT;
  INa_GNa := ;
  INa_gNa := INa_GNa*INa_m*INa_m*INa_m*INa_H*INa_J;
  INa_am := 0.32*1*(V + 47.13)/(1 - exp(-0.1*(V + 47.13)));
  INa_bm := 0.08*exp(-V/11);
  INa_ah := ;
  INa_bh := ;
  INa_aj := ;
  INa_bj := ;
  CaMKactive := Irel_CaMKbound + Irel_CaMKtrap;
  ibarca := ICaL_pca*4*(V - 15)*F*FonRT*(ICaL_gacai*Ca_ss*exp(2*(V - 15)*FonRT) - ICaL_gacao*Ca_o)/(exp(2*(V - 15)*FonRT) - 1);
  ICaL_dss := 1/(1 + exp(-(V - 4)/6.74));
  ICaL_taud := 0.59 + 0.8*exp(0.052*(V + 13))/(1 + exp(0.132*(V + 13)));
  ICaL_fss := 0.7/(1 + exp((V + 17.12)/7)) + 0.3;
  ICaL_f2ss := 0.77/(1 + exp((V + 17.12)/7)) + 0.23;
  ICaL_tauf := 1/(0.2411*exp(-(0.045*(V - 9.6914))^2) + 0.0529);
  ICaL_tauf2 := 1/(0.0423*exp(-(0.059*(V - 18.5726))^2) + 0.0054);
  ICaL_dpss := 9 - 8/(1 + exp(-(V + 65)/3.4));
  ICaL_fcass := 0.3/(1 - ICaL0/0.05) + 0.55/(1 + Ca_ss/0.003) + 0.15;
  ICaL_fca2ss := 1/(1 - ICaL0/0.01);
  ICaL_taufca := 10*CaMKactive/(0.15 + CaMKactive) + 1/(1 + Ca_ss/0.003) + 0.5;
  ICaL_taufca2 := 300/(1 + exp((-ICaL0 - 0.175)/0.04)) + 125;
  EK := ln(K_o/K_i)/FonRT;
  IK1_ak1 := 1.02/(1 + exp(0.2385*(V - EK - 59.215)));
  IK1_bk1 := (0.49124*exp(0.08032*(V - EK + 5.476)) + 1*exp(0.06175*(V - EK - 594.31)))/(1 + exp(-0.5143*(V - EK + 4.753)));
  IKr_gkr := 0.0138542*sqrt(K_o/5.4);
  IKr_r := 1/(1 + exp((V + 10)/15.4));
  IKr_xrss := 1/(1 + exp(-(V + 10.085)/4.25));
  IKr_tauxr := 1/(6e-4*(V - 1.7384)/(1 - exp(-0.136*(V - 1.7384))) + 3e-4*(V + 38.3608)/(exp(0.1522*(V + 38.3608)) - 1));
  IKs_gks := 0.0224077*(1 + 0.6/(1 + (3.8e-5/Ca_i)^1.4));
  EKs := ln((K_o + reversal_potentials_prnak*Na_o)/(K_i + reversal_potentials_prnak*Na_i))/FonRT;
  IKs_xss := 1/(1 + exp(-(V - 10.5)/24.7));
  IKs_tauxs := 1/(7.61e-5*(V + 44.6)/(1 - exp(-9.97*(V + 44.6))) + 3.6e-4*(V - 0.55)/(exp(0.128*(V - 0.55)) - 1));
  Ito_rv := exp(V/300);
  Ito_ay := 25*exp((V - 40)/25)/(1 + exp((V - 40)/25));
  Ito_by := 25*exp(-(V + 90)/25)/(1 + exp(-(V + 90)/25));
  Ito_ay2 := 0.03/(1 + exp((V + 60)/5));
  Ito_by2 := 0.2*exp((V + 25)/5)/(1 + exp((V + 25)/5));
  Ito_ay3 := 0.0026/(1 + exp((V + 61)/5));
  Ito_by3 := 0.1*exp((V + 25)/5)/(1 + exp((V + 25)/5));
  INaK_sigma := (exp(Na_o/67.3) - 1)/7;
  INaK_fnak := 1/(1 + 0.1245*exp(-0.1*V*FonRT) + 0.0365*INaK_sigma*exp(-V*FonRT));
  INaCa_ca_i_NaCa := 1.5*Ca_i;
  INaCa_allo := 1/(1 + (INaCa_KmCa/INaCa_ca_i_NaCa)^2);
  INaCa_num := Na_i^3*Ca_o*exp(INaCa_eta*V*FonRT) - Na_o^3*INaCa_ca_i_NaCa*exp((INaCa_eta - 1)*V*FonRT);
  INaCa_denom1 := 1 + INaCa_ksat*exp((INaCa_eta - 1)*V*FonRT);
  INaCa_denom2 := INaCa_KmCao*Na_i^3 + INaCa_KmNao^3*INaCa_ca_i_NaCa + INaCa_KmNai^3*Ca_o*(1 + INaCa_ca_i_NaCa/INaCa_KmCai);
  INaCa_denom3 := INaCa_KmCai*Na_o^3*(1 + (Na_i/INaCa_KmNai)^3) + Na_i^3*Ca_o + Na_o^3*INaCa_ca_i_NaCa;
  Ito2_Ito2_max := Ito2_PCl*V*F*FonRT*(Cl_i - Cl_o*exp(V*FonRT))/(1 - exp(V*FonRT));
  Ito2_AAss := 1/(1 + Ito2_Kmto2/Ca_ss);
  ECl := -ln(Cl_o/Cl_i)/FonRT;
  INal_amL := 0.32*1*(V + 47.13)/(1 - exp(-0.1*(V + 47.13)));
  INal_bmL := 0.08*exp(-V/11);
  INal_hLss := 1/(1 + exp((V + 91)/6.1));
  Irel_Grel := 3000*Irel_vg;
  Irel_dro_inf := Ca_jsr^1.9/(Ca_jsr^1.9 + (49.28*Ca_ss/(Ca_ss + 0.0028))^1.9);
  Irel_dtau_rel := Irel_dtau_rel_max*CaMKactive/(KmCaMK + CaMKactive);
  Irel_ross := Irel_dro_inf/((1/ICaL0)^2 + 1);
  Irel_riss := 1/(1 + exp((Ca_ss - 4e-4 + 0.002*Irel_cafac)/2.5e-5));
  Irel_tauri := 3 + Irel_dtau_rel + (350 - Irel_dtau_rel)/(1 + exp((Ca_ss - 0.003 + 0.003*Irel_cafac)/2e-4));
  irelcicr := Irel_Grel*Irel_ro*Irel_ri*(Ca_jsr - Ca_ss);
  Irel_CaMKbound := Irel_CaMK0*(1 - Irel_CaMKtrap)/(1 + Irel_Km/Ca_ss);
  Irel_vg := ;
  Irel_cafac := 1/(1 + exp((ICaL0 + 0.05)/0.015));
  Iup_Ileak_dKmPLB := Iup_Ileak_dKmPLBmax*CaMKactive/(KmCaMK + CaMKactive);
  Iup_Ileak_dJup := Iup_Ileak_dJupmax*CaMKactive/(KmCaMK + CaMKactive);
  iup := (Iup_Ileak_dJup + 1)*Iup_Ileak_iupmax*Ca_i/(Ca_i + Iup_Ileak_Kmup - Iup_Ileak_dKmPLB);
  ileak := Iup_Ileak_iupmax*Ca_nsr/Iup_Ileak_nsrmax;
  idiff := (Ca_ss - Ca_i)/0.2;
  itr := (Ca_nsr - Ca_jsr)/120;
  CTNaCl := Na_CTNaClmax*(ENa - ECl)^4/((ENa - ECl)^4 + 87.8251^4);
  CTKCl := K_CTKClmax*(EK - ECl)/(EK - ECl + 87.8251);
  Ca_bcsqn := 1/(1 + Ca_kmcsqn*Ca_csqnbar/(Ca_jsr + Ca_kmcsqn)^2);
  Ca_bmyo := 1/(1 + Ca_cbar*Ca_kmc/(Ca_i + Ca_kmc)^2 + Ca_kmt*Ca_tbar/(Ca_i + Ca_kmt)^2);
  Ca_bss := 1/(1 + Ca_BSRmax*Ca_KmBSR/(Ca_KmBSR + Ca_ss)^2 + Ca_BSLmax*Ca_KmBSL/(Ca_KmBSL + Ca_ss)^2);

  // Rate rules:
  V' = -(naiont + kiont + cell_caiont + clont);
  INa_H' = INa_ah*(1 - INa_H) - INa_bh*INa_H;
  INa_m' = INa_am*(1 - INa_m) - INa_bm*INa_m;
  INa_J' = INa_aj*(1 - INa_J) - INa_bj*INa_J;
  Ca_ss' = Ca_bss*(-ICaL0*AF/(vss*2) + irelcicr*vjsr/vss - idiff);
  ICaL_d' = (ICaL_dss - ICaL_d)/ICaL_taud;
  ICaL_dp' = (ICaL_dpss - ICaL_dp)/10;
  ICaL_f' = (ICaL_fss - ICaL_f)/ICaL_tauf;
  ICaL_fca' = (ICaL_fcass - ICaL_fca)/ICaL_taufca;
  ICaL_fca2' = (ICaL_fca2ss - ICaL_fca2)/ICaL_taufca2;
  ICaL_f2' = (ICaL_f2ss - ICaL_f2)/ICaL_tauf2;
  IKr_xr' = (IKr_xrss - IKr_xr)/IKr_tauxr;
  Ca_i' = Ca_bmyo*(-(ICab0 + IpCa0 - 2*INaCa0)*AF/(vmyo*2) + (ileak - iup)*vnsr/vmyo + idiff*vss/vmyo);
  IKs_xs1' = (IKs_xss - IKs_xs1)/IKs_tauxs;
  IKs_xs2' = (IKs_xss - IKs_xs2)/IKs_tauxs/2;
  Ito_ydv' = Ito_ay*(1 - Ito_ydv) - Ito_by*Ito_ydv;
  Ito_ydv2' = Ito_ay2*(1 - Ito_ydv2) - Ito_by2*Ito_ydv2;
  Ito_zdv' = Ito_ay3*(1 - Ito_zdv) - Ito_by3*Ito_zdv;
  Na_i' = -naiont*AF/vmyo + CTNaCl;
  Cl_i' = clont*AF/vmyo + CTNaCl + CTKCl;
  Ito2_AA' = (Ito2_AAss - Ito2_AA)/1;
  INal_mL' = INal_amL*(1 - INal_mL) - INal_bmL*INal_mL;
  INal_hL' = (INal_hLss - INal_hL)/600;
  K_i' = -kiont*AF/vmyo + CTKCl;
  Ca_jsr' = Ca_bcsqn*(itr - irelcicr);
  Irel_CaMKtrap' = 0.05*CaMKactive*(CaMKactive - Irel_CaMKtrap) - 6.8e-4*Irel_CaMKtrap;
  Irel_ro' = (Irel_ross - Irel_ro)/3;
  Irel_ri' = (Irel_riss - Irel_ri)/Irel_tauri;
  Ca_nsr' = iup - itr*vjsr/vnsr - ileak;
end
