// SBML level 2 version 4

model bental_A_2005____main()
  // Originally created by libAntimony v1.3 (using libSBML 4.1.0-b2)

  // Compartments:
  compartment default_compartment = 1;

  // Parameters:
  PluralPressureFunction_P_m = 760;
  PluralPressureFunction_omega = 1.256637;
  PluralPressureFunction_V_T = 0.41;
  PluralPressureFunction_E = 2.5;
  lungMechanics_P_m = 760;
  V_A = 1;
  lungMechanics_E = 2.5;
  P_A = 760;
  lungMechanics_R = 1;
  D_o = 1.56e-5;
  f_o = 0.1368;
  D_c = 3.16e-5;
  gasExchange_f_c = 0.05263;
  P_w = 47;
  p_o = 40;
  gasExchange_f_om = 0.21;
  gasExchange_f_cm = 0;
  p_c = 46;
  gasExchange_V_D = 0.151;
  gasExchange_V_T = 0.41;
  gasTransport_L = 171200000;
  gasTransport_K_T = 10000;
  gasTransport_K_R = 3600000;
  gasTransport_sigma = 1.4e-6;
  gasTransport_V_c = 0.071;
  gasTransport_T_h = 0.002;
  gasTransport_l_2 = 164000;
  gasTransport_r_2 = 0.12;
  gasTransport_sigma_c = 3.3e-5;
  gasTransport_z = 4.4219e-7;
  time_ = ;

  // Assignment rules:
  P_L := PluralPressureFunction_P_m - PluralPressureFunction_R*PluralPressureFunction_omega*PluralPressureFunction_V_T/2*sin(PluralPressureFunction_omega*time_/1) - PluralPressureFunction_E*(2.5 - PluralPressureFunction_V_T*1/2*cos(PluralPressureFunction_omega*time_/1));
  dP_Ldt := -PluralPressureFunction_R*PluralPressureFunction_omega^2*PluralPressureFunction_V_T/(2*1)*cos(PluralPressureFunction_omega*time_/1) - PluralPressureFunction_E*(2.5 - PluralPressureFunction_V_T/2*sin(PluralPressureFunction_omega*time_/1));
  PluralPressureFunction_R := 2*pi*1/5;
  Q_A := q + 1*D_c*(p_c - p_ac) + 1*D_o*(p_o - gasExchange_p_ao);
  q := (lungMechanics_P_m - P_A)/lungMechanics_R;
  gasExchange_f_oi := ;
  gasExchange_f_ci := ;
  gasExchange_p_ao := f_o*(P_A - P_w);
  p_ac := gasExchange_f_c*(P_A - P_w);
  gasTransport_df_satdp := ((gasTransport_L*(1 + gasTransport_K_T*gasTransport_sigma*p_o)^4 + (1 + gasTransport_K_R*gasTransport_sigma*p_o)^4)*(3*gasTransport_L*gasTransport_K_T^2*gasTransport_sigma^2*p_o*1*(1 + gasTransport_K_T*gasTransport_sigma*p_o)^2 + gasTransport_L*gasTransport_K_T*gasTransport_sigma*1*(1 + gasTransport_K_T*gasTransport_sigma*p_o)^3 + 3*gasTransport_K_R^2*gasTransport_sigma^2*p_o*1*(1 + gasTransport_K_R*gasTransport_sigma*p_o)^2 + gasTransport_K_R*gasTransport_sigma*1*(1 + gasTransport_K_R*gasTransport_sigma*p_o)^3) - (gasTransport_L*gasTransport_K_T*gasTransport_sigma*p_o*(1 + gasTransport_K_T*gasTransport_sigma*p_o)^3 + gasTransport_K_R*gasTransport_sigma*p_o*(1 + gasTransport_K_R*gasTransport_sigma*p_o)^3)*(4*gasTransport_L*gasTransport_K_T*gasTransport_sigma*1*(1 + gasTransport_K_T*gasTransport_sigma*p_o)^3 + 4*gasTransport_K_R*gasTransport_sigma*1*(1 + gasTransport_K_R*gasTransport_sigma*p_o)^3))/(gasTransport_L*(1 + gasTransport_K_T*gasTransport_sigma*p_o)^4 + (1 + gasTransport_K_R*gasTransport_sigma*p_o)^4)^2;
  gasTransport_delta := 10^1.9;
  gasTransport_h := 1*10^(-7.4);

  // Rate rules:
  V_A' = (lungMechanics_P_m - P_L - V_A*lungMechanics_E/1)/lungMechanics_R;
  P_A' = lungMechanics_P_m*lungMechanics_E*Q_A/(P_A*1) + dP_Ldt;
  f_o' = 1/V_A*(1*D_o*(p_o - gasExchange_p_ao) + (gasExchange_f_oi - f_o)*q - f_o*(1*D_c*(p_c - p_ac) + 1*D_o*(p_o - gasExchange_p_ao)));
  gasExchange_f_c' = 1/V_A*(1*D_c*(p_c - p_ac) + (gasExchange_f_ci - gasExchange_f_c)*q - gasExchange_f_c*(1*D_o*(p_o - gasExchange_p_ao) + 1*D_c*(p_c - p_ac)));
  p_o' = D_o/(gasTransport_sigma*gasTransport_V_c)*(1 + 4*gasTransport_T_h/gasTransport_sigma*gasTransport_df_satdp)^(-1)*(f_o*(P_A - P_w) - p_o);
  p_c' = D_c/(gasTransport_sigma_c*gasTransport_V_c)*(p_ac - p_c) + 1*gasTransport_delta*gasTransport_l_2/gasTransport_sigma_c*gasTransport_h*gasTransport_z - gasTransport_delta*gasTransport_r_2*p_c;
  gasTransport_z' = gasTransport_delta*gasTransport_r_2*gasTransport_sigma_c*p_c/1 - gasTransport_delta*gasTransport_l_2*gasTransport_h*gasTransport_z;
end
