// SBML level 2 version 4

model bental_C_2005____main()
  // Originally created by libAntimony v1.3 (using libSBML 4.1.0-b2)

  // Compartments:
  compartment default_compartment = 1;

  // Parameters:
  equations_PA = 760;
  equations_Pm = 760;
  equations_R = 1;
  equations_E = 2.5;
  equations_Do = 3.5e-4;
  equations_Dc = 7.08e-4;
  equations_pc = 46;
  equations_pao = 97.5;
  equations_po = 40;
  equations_pac = 37.5;
  equations_q = 0;
  equations_fo = 0.1368;
  equations_fom = 0.21;
  equations_fcm = 0;
  equations_VD = 0.15;
  equations_VT = 0.4;
  equations_fc = 0.05263;
  time_ = ;
  equations_VA = ;
  equations_delta_PL = ;
  equations_qi = ;

  // Assignment rules:
  equations_QA := equations_q + equations_Dc*(equations_pc - equations_pac) + equations_Do*(equations_po - equations_pao);
  equations_PL := equations_Pm - (equations_R*equations_omega*(equations_VT/2)*sin(time_*equations_omega) + equations_E*(2.5 - equations_VT/2*cos(time_*equations_omega)));
  equations_foi := ;
  equations_fci := ;
  equations_omega := 2*3.141/5;

  // Rate rules:
  equations_PA' = equations_Pm*equations_E/equations_PA*equations_QA + equations_delta_PL;
  equations_fo' = 1/equations_VA*(equations_Do*(equations_po - equations_pao) + equations_qi*(equations_foi - equations_fo) - equations_fo*(equations_Dc*(equations_pc - equations_pac) + equations_Do*(equations_po - equations_pao)));
  equations_fc' = 1/equations_VA*(equations_Dc*(equations_pc - equations_pac) + equations_qi*(equations_fci - equations_fc) - equations_fc*(equations_Do*(equations_po - equations_pao) + equations_Dc*(equations_pc - equations_pac)));
end
