// SBML level 2 version 4

model bernus_wilders_zemlin_verschelde_panfilov_2002_version01____main()
  // Originally created by libAntimony v1.3 (using libSBML 4.1.0-b2)

  // Compartments:
  compartment default_compartment = 1;

  // Parameters:
  V = -90.2;
  R = 8314;
  T = 310;
  F = 96845;
  membrane_Cm = 153.4;
  membrane_x = 100;
  membrane_y = 22;
  membrane_rho_x = 180;
  membrane_rho_y = 180;
  membrane_S = 0.2;
  sodium_current_g_Na = 16;
  Na_i = 10;
  Na_e = 138;
  m = ;
  v = ;
  calcium_current_g_Ca = 0.064;
  Ca_e = 2;
  Ca_i = 0.0004;
  f = ;
  transient_outward_current_g_to = 0.4;
  K_i = 140;
  K_e = 4;
  to = ;
  transient_outward_current_transient_outward_current_to_gate_V_shift = 0;
  transient_outward_current_transient_outward_current_to_gate_p = 1;
  delayed_rectifier_potassium_current_g_K = 0.019;
  X = ;
  inward_rectifier_potassium_current_g_K1 = 3.9;
  calcium_background_current_g_b_Ca = 0.00085;
  sodium_background_current_g_b_Na = 0.001;
  sodium_potassium_pump_g_NaK = 1.3;
  sodium_calcium_pump_g_NaCa = 1000;
  time_ = ;
  membrane_V_x2 = ;
  membrane_V_y2 = ;

  // Assignment rules:
  i_Na := sodium_current_g_Na*m^3*v^2*(V - E_Na);
  i_Ca := calcium_current_g_Ca*d_infinity*f*f_Ca*(V - E_Ca);
  i_to := transient_outward_current_g_to*r_infinity*to*(V - transient_outward_current_E_to);
  i_K := delayed_rectifier_potassium_current_g_K*X^2*(V - E_K);
  i_K1 := inward_rectifier_potassium_current_g_K1*K1_infinity*(V - E_K);
  i_b_Na := sodium_background_current_g_b_Na*(V - E_Na);
  i_b_Ca := calcium_background_current_g_b_Ca*(V - E_Ca);
  i_NaK := sodium_potassium_pump_g_NaK*sodium_potassium_pump_f_NaK*sodium_potassium_pump_f_NaK_a;
  i_NaCa := sodium_calcium_pump_g_NaCa*sodium_calcium_pump_f_NaCa;
  E_Na := R*T/F*ln(Na_e/Na_i);
  sodium_current_sodium_current_m_gate_alpha_m := 0.32*(V + 47.13)/(1 - exp(-0.1*(V + 47.13)));
  sodium_current_sodium_current_m_gate_beta_m := 0.08*exp(-V/11);
  sodium_current_sodium_current_v_gate_v_infinity := 0.5*(1 - tanh(7.74 + V*0.12));
  sodium_current_sodium_current_v_gate_tau_v := 0.25 + 2.24*((1 - tanh(7.74 + V*0.12))/(1 - tanh(0.07*(V + 92.4))));
  E_Ca := R*T/(2*F)*ln(Ca_e/Ca_i);
  d_infinity := calcium_current_calcium_current_d_gate_alpha_d/(calcium_current_calcium_current_d_gate_alpha_d + calcium_current_calcium_current_d_gate_beta_d);
  f_Ca := 1/(1 + Ca_i/0.0006);
  calcium_current_calcium_current_d_gate_alpha_d := 14.98*exp(-0.5*((V - 22.36)/16.68)^2)/(16.68*sqrt(2*pi));
  calcium_current_calcium_current_d_gate_beta_d := 0.1471 - 5.3*exp(-0.5*((V - 6.27)/14.93)^2)/(14.93*sqrt(2*pi));
  calcium_current_calcium_current_f_gate_alpha_f := 6.87e-3/(1 + exp(-(6.1546 - V)/6.12));
  calcium_current_calcium_current_f_gate_beta_f := (0.069*exp(-11*(V + 9.825)) + 0.011)/(1 + exp(-0.278*(V + 9.825))) + 5.75e-4;
  transient_outward_current_E_to := R*T/F*ln((0.043*Na_e + K_e)/(0.043*Na_i + K_i));
  r_infinity := transient_outward_current_transient_outward_current_r_gate_alpha_r/(transient_outward_current_transient_outward_current_r_gate_alpha_r + transient_outward_current_transient_outward_current_r_gate_beta_r);
  transient_outward_current_transient_outward_current_r_gate_alpha_r := 0.5266*exp(-0.0166*(V - 42.2912))/(1 + exp(-0.0943*(V - 42.2912)));
  transient_outward_current_transient_outward_current_r_gate_beta_r := (5.186e-5*V + 0.5149*exp(-0.1344*(V - 5.0027)))/(1 + exp(-0.1348*(V - 5.186e-5)));
  transient_outward_current_transient_outward_current_to_gate_alpha_to := (5.612e-5*V + 0.0721*exp(-0.173*(V + 34.2531)))/(1 + exp(-0.1732*(V + 34.2531)));
  transient_outward_current_transient_outward_current_to_gate_beta_to := (1.215e-4*V + 0.0767*exp(-1.66e-9*(V + 34.0235)))/(1 + exp(-0.1604*(V + 34.0235)));
  transient_outward_current_transient_outward_current_to_gate_to_infinity := transient_outward_current_transient_outward_current_to_gate_alpha_to*(V - transient_outward_current_transient_outward_current_to_gate_V_shift)/(transient_outward_current_transient_outward_current_to_gate_alpha_to*(V - transient_outward_current_transient_outward_current_to_gate_V_shift) + transient_outward_current_transient_outward_current_to_gate_beta_to*(V - transient_outward_current_transient_outward_current_to_gate_V_shift));
  transient_outward_current_transient_outward_current_to_gate_tau_to := 1/(transient_outward_current_transient_outward_current_to_gate_p*transient_outward_current_transient_outward_current_to_gate_alpha_to*V + transient_outward_current_transient_outward_current_to_gate_p*transient_outward_current_transient_outward_current_to_gate_beta_to*V);
  E_K := R*T/F*ln(K_e/K_i);
  delayed_rectifier_potassium_current_delayed_rectifier_potassium_current_X_gate_X_infinity := 0.988/(1 + exp(-0.861 - V*0.062));
  delayed_rectifier_potassium_current_delayed_rectifier_potassium_current_X_gate_tau_X := 240*exp(-(25.5 + V)^2/156) + 182*(1 + tanh(0.154 + 0.0116*V)) + delayed_rectifier_potassium_current_delayed_rectifier_potassium_current_X_gate_tau_X_a;
  delayed_rectifier_potassium_current_delayed_rectifier_potassium_current_X_gate_tau_X_a := 40*(1 - tanh(160 + 2*V));
  K1_infinity := inward_rectifier_potassium_current_inward_rectifier_potassium_current_K1_gate_alpha_K1/(inward_rectifier_potassium_current_inward_rectifier_potassium_current_K1_gate_alpha_K1 + inward_rectifier_potassium_current_inward_rectifier_potassium_current_K1_gate_beta_K1);
  inward_rectifier_potassium_current_inward_rectifier_potassium_current_K1_gate_alpha_K1 := 0.1/(1 + exp(0.06*(V - (E_K + 200))));
  inward_rectifier_potassium_current_inward_rectifier_potassium_current_K1_gate_beta_K1 := (3*exp(2e-4*(V + 100 + (-E_K))) + exp(0.1*(V - (10 + E_K))))/(1 + exp(-0.5*(V - E_K)));
  sodium_potassium_pump_f_NaK := 1/(1 + 0.1245*exp(-0.0037*V) + 0.0365*sodium_potassium_pump_sigma*exp(-0.037*V));
  sodium_potassium_pump_f_NaK_a := 1/(1 + (10/Na_i)^1.5)*(K_e/(K_e + 1.5));
  sodium_potassium_pump_sigma := 0.1428*(exp(Na_e/67.3) - 1);
  sodium_calcium_pump_f_NaCa := (87.5^3 + Na_e^3)^(-1)*(1.38 + Ca_e)^(-1)*(1 + 0.1*exp(-0.024*V))^(-1)*(Na_i^3*Ca_e*exp(0.013*V) - Na_e^3*Ca_i*exp(-0.024*V));

  // Rate rules:
  V' = (-(i_Na + i_Ca + i_to + i_K + i_K1 + i_b_Na + i_b_Ca + i_NaCa + i_NaK) + (membrane_rho_x*membrane_S)^(-1)*membrane_V_x2 + (membrane_rho_y*membrane_S)^(-1)*membrane_V_y2)/membrane_Cm;
  m' = sodium_current_sodium_current_m_gate_alpha_m*(1 - m) - sodium_current_sodium_current_m_gate_beta_m*m;
  v' = (sodium_current_sodium_current_v_gate_v_infinity - v)/sodium_current_sodium_current_v_gate_tau_v;
  f' = calcium_current_calcium_current_f_gate_alpha_f*(1 - f) - calcium_current_calcium_current_f_gate_beta_f*f;
  to' = transient_outward_current_transient_outward_current_to_gate_alpha_to*(1 - to) - transient_outward_current_transient_outward_current_to_gate_beta_to*to;
  X' = (delayed_rectifier_potassium_current_delayed_rectifier_potassium_current_X_gate_X_infinity - X)/delayed_rectifier_potassium_current_delayed_rectifier_potassium_current_X_gate_tau_X;
end
