// SBML level 2 version 4

model bertram_2002____main()
  // Originally created by libAntimony v1.3 (using libSBML 4.1.0-b2)

  // Compartments:
  compartment default_compartment = 1;

  // Parameters:
  R_gas_const = 8314.41;
  Temp = 310;
  F = 96485;
  transmitter_release_R = 0;
  transmitter_release_kr_plus = 0.15;
  transmitter_release_kr_minus = 2.5;
  transmitter_release_T_bar = 4000;
  calcium_concentration_Ca_ex = 2000;
  calcium_concentration_Dc = 220;
  calcium_concentration_r = 10;
  calcium_concentration_g_Ca = 1.2;
  calcium_concentration_P = 0.006;
  V_post = -65;
  b = 0;
  rate_constants_kb_plus = 2000;
  rate_constants_kb_minus = 1;
  kG_minus = 0.00025;
  kG2_minus = 0.016;
  kG3_minus = 1.024;
  C10 = 1;
  C20 = 0;
  C_G10 = 0;
  C30 = 0;
  C_G20 = 0;
  C40 = 0;
  C_G30 = 0;
  membrane_post_Cm = 1;
  synaptic_current_g_syn = 0.2;
  synaptic_current_V_syn = 0;
  n_post = 0;
  time_ = ;

  // Assignment rules:
  Ca := O0*calcium_concentration_Ca_open + 0.1;
  T := transmitter_release_T_bar*transmitter_release_R;
  calcium_concentration_Ca_open := calcium_concentration_sigma/(2*calcium_concentration_Dc*calcium_concentration_r*pi);
  calcium_concentration_sigma := -5.182*calcium_concentration_i_V;
  calcium_concentration_i_V := calcium_concentration_g_Ca*calcium_concentration_P*2*F*V_post/(R_gas_const*Temp)*calcium_concentration_Ca_ex/(1 - exp(2*F*V_post/(R_gas_const*Temp)));
  O0 := 1 - C10 - C20 - C30 - C40 - C_G10 - C_G20 - C_G30;
  alpha := 0.45*exp(V_post/22);
  alpha_ := alpha/8;
  beta := 0.015*exp(-V_post/14);
  beta_ := beta*8;
  kG_plus := 3*b/(680 + 320*b);
  O_C_G := C_G10 + C_G20 + C_G30;
  i_syn := synaptic_current_g_syn*b*(V_post - synaptic_current_V_syn);
  i_Na_post := 120*sodium_current_post_x_infinity^3*(1 - n_post)*(V_post - 120);
  i_K_post := 36*n_post^4*(V_post + 77);
  i_leak_post := 0.3*(V_post + 54);
  sodium_current_post_x_infinity := sodium_current_post_alpha_x/(sodium_current_post_alpha_x + sodium_current_post_beta_x);
  sodium_current_post_alpha_x := 0.2*(V_post + 40)/(1 - 1*exp(-(V_post + 40)/10));
  sodium_current_post_beta_x := 8*exp(1/(-(V_post + 65/18)));
  potassium_current_n_gate_post_alpha_n := 0.02*(V_post + 55)/(1 - exp(-(V_post + 55)/10));
  potassium_current_n_gate_post_beta_n := 0.25*exp(-(V_post + 65)/80);

  // Rate rules:
  transmitter_release_R' = transmitter_release_kr_plus*Ca*(1 - transmitter_release_R) - transmitter_release_kr_minus*transmitter_release_R;
  V_post' = -(i_Na_post + i_K_post + i_leak_post + i_syn)/membrane_post_Cm;
  b' = rate_constants_kb_plus*T*(1 - b) - rate_constants_kb_minus*b;
  C10' = beta*C20 + kG_minus*C_G10 - C10*(4*alpha + kG_plus);
  C20' = 4*alpha*C10 + 2*beta*C30 + kG2_minus*C_G20 - C20*(beta + 3*alpha + kG_plus);
  C_G10' = beta_*C_G20 + kG_plus*C10 - C_G10*(4*alpha_ + kG_minus);
  C30' = 3*alpha*C20 + 3*beta*C40 + kG3_minus*C_G30 - C30*(2*beta + 2*alpha + kG_plus);
  C_G20' = 4*alpha_*C_G10 + 2*beta_*C_G30 + kG_plus*C20 - C_G20*(beta_ + 3*alpha_ + kG2_minus);
  C40' = 2*alpha*C30 + 4*beta*O0 - C40*(3*beta + alpha);
  C_G30' = 3*alpha_*C_G20 + kG_plus*C30 - C_G30*(2*beta_ + kG3_minus);
  n_post' = potassium_current_n_gate_post_alpha_n*(1 - n_post) - potassium_current_n_gate_post_beta_n*n_post;
end
