// SBML level 2 version 4

model bertram_2006____main()
  // Originally created by libAntimony v1.4 (using libSBML 4.1.0-b2)

  // Compartments:
  compartment default_compartment = 1;

  // Parameters:
  NADHm = 0.6;
  Mitochondrial_variables_gamma = 0.001;
  ADPm = 7.4;
  PSIm = 93;
  Cam = 0.1;
  Mitochondrial_variables_NADtot = 10;
  Mitochondrial_variables_fm = 0.01;
  Mitochondrial_variables_Cmito = 1.8;
  Mitochondrial_variables_Amtot = 15;
  c = 0.1;
  Cytosol_ADPc = 1850;
  Cytosol_Ac_tot = 2500;
  Cytosol_khyd = 5e-5;
  Cytosol_Jhydbas = 5e-5;
  FBP = 0.5;
  Clamp_protocol_Clamp_parameters_Fhold = 1;
  Clamp_protocol_Clamp_parameters_Ftest = 5;
  Clamp_protocol_Clamp_parameters_Fton = 90000;
  Clamp_protocol_Clamp_parameters_Ftoff = 330000;
  Clamp_protocol_Clamp_parameters_Chold = 0.1;
  Clamp_protocol_Clamp_parameters_Ctest = 0.1;
  Clamp_protocol_Clamp_parameters_Cton1 = 120000;
  Clamp_protocol_Clamp_parameters_Cton2 = 180000;
  Clamp_protocol_Clamp_parameters_Cton3 = 240000;
  Clamp_protocol_Clamp_parameters_Ctoff1 = 150000;
  Clamp_protocol_Clamp_parameters_Ctoff2 = 210000;
  Clamp_protocol_Clamp_parameters_Ctoff3 = 270000;
  p1 = 400;
  p2 = 1;
  p3 = 0.01;
  p21 = 0.01;
  p22 = 1.1;
  p23 = 0.001;
  p24 = 0.016;
  p4 = 0.6;
  p5 = 0.1;
  p6 = 177;
  p7 = 5;
  p8 = 7;
  p9 = 0.1;
  p10 = 177;
  p11 = 5;
  p12 = 120;
  p13 = 10;
  p14 = 190;
  p15 = 8.5;
  p16 = 35;
  p17 = 0.002;
  p18 = -0.03;
  p19 = 0.35;
  p20 = 2;
  J_variables_FRT = 0.037;
  J_variables_kgpdh = 0.0005;
  time_ = ;

  // Assignment rules:
  Jpdh := p1/(p2 + NADHm/NADm)*(Cam/(p3 + Cam))*J_variables_Jgpdh;
  Jo := J_variables_MM1/(1 + exp((PSIm - p6)/p7));
  NADm := Mitochondrial_variables_NADtot - NADHm;
  ATPm := Mitochondrial_variables_Amtot - ADPm;
  RATm := ATPm/ADPm;
  Jant := p19*RATm/(RATm + p20)/exp(-0.5*J_variables_FRT*PSIm);
  Jf1f0 := J_variables_b2/(1 + exp((p14 - PSIm)/p15));
  Jh_res := J_variables_MM2/(1 + exp((PSIm - p10)/p11));
  Jh_atp := J_variables_b13/(1 + exp((p14 - PSIm)/p15));
  Jh_leak := p17*PSIm + p18;
  Jnaca := p23*Cam/c*exp(p24*PSIm);
  Juni := (p21*PSIm - p22)*c^2;
  Jmito := Jnaca - Juni;
  ATPc := Cytosol_Ac_tot - Cytosol_ADPc;
  Cytosol_Jh_yd := (Cytosol_khyd*c + Cytosol_Jhydbas)*ATPc/1;
  Cytosol_delta := 3.9/53.2;
  Fproto := Clamp_protocol_Clamp_parameters_Fhold + (Clamp_protocol_Clamp_parameters_Ftest - Clamp_protocol_Clamp_parameters_Fhold)*(Clamp_protocol_Clamp_parameters_heav_on - Clamp_protocol_Clamp_parameters_heav_off);
  Cproto := Clamp_protocol_Clamp_parameters_Chold + Clamp_protocol_Clamp_parameters_pulse1 + Clamp_protocol_Clamp_parameters_pulse2 + Clamp_protocol_Clamp_parameters_pulse3;
  Clamp_protocol_Clamp_parameters_pulse1 := (Clamp_protocol_Clamp_parameters_Ctest - Clamp_protocol_Clamp_parameters_Chold)*(Clamp_protocol_Clamp_parameters_heav_Cton1 - Clamp_protocol_Clamp_parameters_heav_Ctoff1);
  Clamp_protocol_Clamp_parameters_pulse2 := (Clamp_protocol_Clamp_parameters_Ctest - Clamp_protocol_Clamp_parameters_Chold)*(Clamp_protocol_Clamp_parameters_heav_Cton2 - Clamp_protocol_Clamp_parameters_heav_Ctoff2);
  Clamp_protocol_Clamp_parameters_pulse3 := (Clamp_protocol_Clamp_parameters_Ctest - Clamp_protocol_Clamp_parameters_Chold)*(Clamp_protocol_Clamp_parameters_heav_Cton3 - Clamp_protocol_Clamp_parameters_heav_Ctoff3);
  Clamp_protocol_Clamp_parameters_heav_on := ;
  Clamp_protocol_Clamp_parameters_heav_off := ;
  Clamp_protocol_Clamp_parameters_heav_Cton1 := ;
  Clamp_protocol_Clamp_parameters_heav_Cton2 := ;
  Clamp_protocol_Clamp_parameters_heav_Cton3 := ;
  Clamp_protocol_Clamp_parameters_heav_Ctoff1 := ;
  Clamp_protocol_Clamp_parameters_heav_Ctoff2 := ;
  Clamp_protocol_Clamp_parameters_heav_Ctoff3 := ;
  J_variables_Jgpdh := J_variables_kgpdh*sqrt(FBP/1);
  J_variables_MM1 := p4*NADHm/(p5 + NADHm);
  J_variables_MM2 := p8*NADHm/(p9 + NADHm);
  J_variables_b13 := p12*p13/(p13 + ATPm);
  J_variables_b2 := p16*p13/(p13 + ATPm);

  // Rate rules:
  NADHm' = Mitochondrial_variables_gamma*(Jpdh - Jo);
  ADPm' = Mitochondrial_variables_gamma*(Jant - Jf1f0);
  PSIm' = (Jh_res - Jh_atp - Jant - Jh_leak - Jnaca - Juni*2)/Mitochondrial_variables_Cmito;
  Cam' = -Mitochondrial_variables_fm*Jmito;
  c' = (Cproto - c)/0.1;
  Cytosol_ADPc' = -Cytosol_delta*Jant + Cytosol_Jh_yd*1;
  FBP' = (Fproto - FBP)/0.1;
end
