// SBML level 2 version 4

model bertram_satin_zhang_smolen_sherman_2004_version01____main()
  // Originally created by libAntimony v1.3 (using libSBML 4.1.0-b2)

  // Compartments:
  compartment default_compartment = 1;

  // Parameters:
  V = -60;
  membrane_Cm = 5300;
  membrane_gK = 2700;
  VK = -75;
  membrane_n = 0;
  membrane_gKCa = 600;
  membrane_kd = 0.5;
  c = 0.25;
  membrane_gCa = 1000;
  membrane_VCa = 25;
  membrane_taun = 20;
  cer = 185;
  calcium_handling_fcyt = 0.01;
  calcium_handling_fer = 0.01;
  calcium_handling_sigmaV = 31;
  calcium_handling_pleak = 0.0002;
  calcium_handling_Kserca = 0.4;
  calcium_handling_lambdaer = 1;
  calcium_handling_epser = 1;
  calcium_handling_alpha = 4.5e-6;
  calcium_handling_kpmca = 0.2;
  glycolysis_Rgk = 0.2;
  atot = 3000;
  pfkbas = 0.06;
  glycolysis_lambda_ = 0.005;
  glycolysis_g6p = 200;
  fbp = 40;
  pfk_bottom1 = 1;
  pfk_topa1 = 0;
  pfk_k1 = 30;
  pfk_k2 = 1;
  pfk_k3 = 50000;
  pfk_k4 = 1000;
  pfk_cat = 2;
  pfk_famp = 0.02;
  pfk_fatp = 20;
  pfk_ffbp = 0.2;
  pfk_fbt = 20;
  pfk_fmt = 20;
  KATP_gkatpbar = 25000;
  adp = 780;
  KATP_kdd = 17;
  KATP_ktd = 26;
  KATP_ktt = 1;
  nucleotides_taua = 300000;
  nucleotides_r1 = 0.35;
  nucleotides_r = 1;
  nucleotides_vg = 2.2;
  nucleotides_kg = 10;
  time_ = ;

  // Assignment rules:
  membrane_IK := membrane_gK*membrane_n*(V - VK);
  ICa := membrane_gCa*membrane_minf*(V - membrane_VCa);
  membrane_IKCa := membrane_gKCa/(1 + (membrane_kd/c)^2)*(V - VK);
  IKATP := KATP_gkatpbar*KATP_katpo*(V - VK);
  membrane_minf := 1/(1 + exp(-(20 + V/1)/12));
  membrane_ninf := 1/(1 + exp(-(16 + V/1)/5));
  calcium_handling_Jmem := -(calcium_handling_alpha*ICa + calcium_handling_kpmca*c);
  calcium_handling_Jer := calcium_handling_epser*(calcium_handling_Jleak - calcium_handling_Jserca)/calcium_handling_lambdaer;
  calcium_handling_Jserca := calcium_handling_Kserca*c;
  calcium_handling_Jleak := calcium_handling_pleak*(cer - c);
  rgpdh := 0.2*sqrt(abs(fbp*1/1^2));
  f6p := 0.3*glycolysis_g6p;
  pfk0 := 1*((pfkbas*pfk_cat*pfk_topa16 + pfk_cat*pfk_topb)/pfk_bottom16);
  atp := 0.5*(atot - adp + nucleotides_rad*1);
  pfk_weight2 := atp^2/(pfk_k4*1);
  pfk_topa2 := pfk_topa1;
  pfk_bottom2 := pfk_bottom1 + pfk_weight2;
  pfk_topa3 := pfk_topa2 + pfk_weight3;
  pfk_weight3 := f6p^2/(pfk_k3*1);
  pfk_bottom3 := pfk_bottom2 + pfk_weight3;
  pfk_weight4 := (f6p*atp)^2/(pfk_fatp*pfk_k3*pfk_k4*1^2);
  pfk_topa4 := pfk_topa3 + pfk_weight4;
  pfk_bottom4 := pfk_bottom3 + pfk_weight4;
  pfk_weight5 := fbp/pfk_k2;
  pfk_topa5 := pfk_topa4;
  pfk_bottom5 := pfk_bottom4 + pfk_weight5;
  pfk_weight6 := fbp*atp^2/(pfk_k2*pfk_k4*pfk_fbt*1);
  pfk_topa6 := pfk_topa5;
  pfk_bottom6 := pfk_bottom5 + pfk_weight6;
  pfk_weight7 := fbp*f6p^2/(pfk_k2*pfk_k3*pfk_ffbp*1);
  pfk_topa7 := pfk_topa6 + pfk_weight7;
  pfk_bottom7 := pfk_bottom6 + pfk_weight7;
  pfk_weight8 := fbp*f6p^2*atp^2/(pfk_k2*pfk_k3*pfk_k4*pfk_ffbp*pfk_fbt*pfk_fatp*1^2);
  pfk_topa8 := pfk_topa7 + pfk_weight8;
  pfk_bottom8 := pfk_bottom7 + pfk_weight8;
  pfk_weight9 := amp/pfk_k1;
  pfk_topa9 := pfk_topa8;
  pfk_bottom9 := pfk_bottom8 + pfk_weight9;
  pfk_weight10 := amp*atp^2/(pfk_k1*pfk_k4*pfk_fmt*1);
  pfk_topa10 := pfk_topa9;
  pfk_bottom10 := pfk_bottom9 + pfk_weight10;
  pfk_weight11 := amp*f6p^2/(pfk_k1*pfk_k3*pfk_famp*1);
  pfk_topa11 := pfk_topa10 + pfk_weight11;
  pfk_bottom11 := pfk_bottom10 + pfk_weight11;
  pfk_weight12 := amp*f6p^2*atp^2/(pfk_k1*pfk_k3*pfk_k4*pfk_famp*pfk_fmt*pfk_fatp*1^2);
  pfk_topa12 := pfk_topa11 + pfk_weight12;
  pfk_bottom12 := pfk_bottom11 + pfk_weight12;
  pfk_weight13 := amp*fbp/(pfk_k1*pfk_k2);
  pfk_topa13 := pfk_topa12;
  pfk_bottom13 := pfk_bottom12 + pfk_weight13;
  pfk_weight14 := amp*fbp*atp^2/(pfk_k1*pfk_k2*pfk_k4*pfk_fbt*pfk_fmt*1);
  pfk_topa14 := pfk_topa13;
  pfk_bottom14 := pfk_bottom13 + pfk_weight14;
  pfk_weight15 := amp*fbp*f6p^2/(pfk_k1*pfk_k2*pfk_k3*pfk_ffbp*pfk_famp*1);
  pfk_topa15 := pfk_topa14;
  pfk_bottom15 := pfk_bottom14 + pfk_weight15;
  pfk_weight16 := amp*fbp*f6p^2*atp^2/(pfk_k1*pfk_k2*pfk_k3*pfk_k4*pfk_ffbp*pfk_famp*pfk_fbt*pfk_fmt*pfk_fatp*1^2);
  pfk_topa16 := pfk_topa15 + pfk_weight16;
  pfk_bottom16 := pfk_bottom15 + pfk_weight16;
  pfk_topb := pfk_weight15;
  amp := adp*adp/atp;
  KATP_mgadp := 0.165*adp;
  KATP_adp3m := 0.135*adp;
  KATP_atp4m := 0.05*atp;
  KATP_topo := 0.08*(1 + 2*KATP_mgadp/(KATP_kdd*1)) + 0.89*(KATP_mgadp/(KATP_kdd*1))^2;
  KATP_bottomo := (1 + KATP_mgadp/(KATP_kdd*1))^2*(1 + KATP_adp3m/(KATP_ktd*1) + KATP_atp4m/(KATP_ktt*1));
  KATP_katpo := KATP_topo/KATP_bottomo;
  nucleotides_fback := nucleotides_r + nucleotides_y;
  nucleotides_y := nucleotides_vg*(rgpdh/(nucleotides_kg + rgpdh));
  nucleotides_rad := sqrt(abs((adp - atot)^2 - 4*adp^2))/1;
  nucleotides_ratio := atp/adp;

  // Rate rules:
  V' = -(membrane_IK + ICa + membrane_IKCa + IKATP)/membrane_Cm;
  membrane_n' = (membrane_ninf - membrane_n)/membrane_taun;
  c' = calcium_handling_fcyt*(calcium_handling_Jmem + calcium_handling_Jer);
  cer' = -calcium_handling_fer*calcium_handling_sigmaV*calcium_handling_Jer;
  glycolysis_g6p' = glycolysis_lambda_*(glycolysis_Rgk*1 - pfk0/1);
  fbp' = glycolysis_lambda_*(pfk0/1 - 0.5*rgpdh);
  adp' = (atp - adp*exp(nucleotides_fback*(1 - c/nucleotides_r1)))/(nucleotides_taua*1);
end
