// SBML level 2 version 4

model bi_model_1999_version01____main()
  // Originally created by libAntimony v1.4 (using libSBML 4.1.0-b2)

  // Compartments:
  compartment default_compartment = 1;

  // Parameters:
  EGF_EGFRtoEGFEGFR_kf1 = 7e-6;
  EGF_EGFRtoEGFEGFR_kb1 = 0.25;
  EGF_EGFRtoEGFEGFR_kf2 = 0.002;
  EGF_EGFRtoEGFEGFR_kb2 = 0.00033;
  EGF = 0.16667;
  EGFR = 0.16667;
  EGF_EGFR = 0;
  EGF_EGFR_INTERNAL = 0;
  SHCtoSHCStar_km3 = 0.8333333;
  SHCtoSHCStar_kf4 = 0.0016667;
  SHCtoSHCStar_kb4 = 0;
  SHCtoSHCStar_kf5 = 4.1667e-8;
  SHCtoSHCStar_kb5 = 0.0168;
  SHCtoSHCStar_kf6 = 8.333e-7;
  SHCtoSHCStar_kb6 = 0.1;
  SHCtoSHCStar_kf8 = 0.001;
  SHCtoSHCStar_kb8 = 0;
  SHCtoSHCStar_kf10 = 4.1667e-8;
  SHCtoSHCStar_kb10 = 0.0168;
  SHCtoSHCStar_km7 = 0.40404;
  SHCtoSHCStar_km9 = 2.564167;
  SHCtoSHCStar_Vmax7 = 0.02;
  SHCtoSHCStar_Vmax3 = 0.2;
  SHCtoSHCStar_Vmax9 = 10;
  SHCtoSHCStar_SHC = 0.5;
  SHCstar = 0;
  SHCstar_SOS_GRB2 = 0;
  SHCtoSHCStar_SOS_GRB2 = 0;
  SHCtoSHCStar_SOS = 0.1;
  SHCtoSHCStar_GRB2 = 1;
  SHCtoSHCStar_MAPK = 0.36;
  SHCtoSHCStar_SOSstar = 0;
  SOSstar_GRB2 = 0;
  GDPrasToGTPras_km7 = 0.50505;
  GDPrasToGTPras_Vmax7 = 0.02;
  GDPrasToGTPras_GDP_ras = 1;
  GDPrasToGTPras_GTP_ras = 0;
  t = ;

  // Rate rules:
  EGF' = -EGF_EGFRtoEGFEGFR_kf1*EGF*EGFR + EGF_EGFRtoEGFEGFR_kb1*EGF_EGFR;
  EGFR' = -EGF_EGFRtoEGFEGFR_kf1*EGF*EGFR + EGF_EGFRtoEGFEGFR_kb1*EGF_EGFR;
  EGF_EGFR' = EGF_EGFRtoEGFEGFR_kf1*EGF*EGFR - EGF_EGFRtoEGFEGFR_kb1*EGF_EGFR - EGF_EGFRtoEGFEGFR_kf2*EGF_EGFR + EGF_EGFRtoEGFEGFR_kb2*EGF_EGFR_INTERNAL;
  EGF_EGFR_INTERNAL' = EGF_EGFRtoEGFEGFR_kf2*EGF_EGFR - EGF_EGFRtoEGFEGFR_kb2*EGF_EGFR_INTERNAL;
  SHCtoSHCStar_SHC' = SHCtoSHCStar_kf4*SHCstar - SHCtoSHCStar_kb4*SHCtoSHCStar_SHC - EGF_EGFR*SHCtoSHCStar_Vmax3*SHCtoSHCStar_SHC/(SHCtoSHCStar_km3 + SHCtoSHCStar_SHC);
  SHCstar' = EGF_EGFR*SHCtoSHCStar_Vmax3*SHCtoSHCStar_SHC/(SHCtoSHCStar_km3 + SHCtoSHCStar_SHC) - SHCtoSHCStar_kf6*SHCstar*SHCtoSHCStar_SOS_GRB2 + SHCtoSHCStar_kb6*SHCstar_SOS_GRB2;
  SHCstar_SOS_GRB2' = SHCtoSHCStar_kf6*SHCstar*SHCtoSHCStar_SOS_GRB2 - SHCtoSHCStar_kb6*SHCstar_SOS_GRB2;
  SHCtoSHCStar_SOS_GRB2' = -SHCtoSHCStar_kf6*SHCstar*SHCtoSHCStar_SOS_GRB2 + SHCtoSHCStar_kb6*SHCstar_SOS_GRB2 - SHCtoSHCStar_kb5*SHCtoSHCStar_SOS_GRB2 + SHCtoSHCStar_kf5*SHCtoSHCStar_SOS*SHCtoSHCStar_GRB2;
  SHCtoSHCStar_SOS' = SHCtoSHCStar_kf8*SHCtoSHCStar_SOSstar - SHCtoSHCStar_kb8*SHCtoSHCStar_SOS - SHCtoSHCStar_MAPK*SHCtoSHCStar_Vmax9*SHCtoSHCStar_SOS/(SHCtoSHCStar_km9 + SHCtoSHCStar_SOS);
  SHCtoSHCStar_SOSstar' = -SHCtoSHCStar_kf8*SHCtoSHCStar_SOSstar + SHCtoSHCStar_kb8*SHCtoSHCStar_SOS + SHCtoSHCStar_MAPK*SHCtoSHCStar_Vmax9*SHCtoSHCStar_SOS/(SHCtoSHCStar_km9 + SHCtoSHCStar_SOS) - SHCtoSHCStar_kf10*SHCtoSHCStar_SOSstar*SHCtoSHCStar_GRB2 + SHCtoSHCStar_kb10*SOSstar_GRB2;
  SOSstar_GRB2' = SHCtoSHCStar_kf10*SHCtoSHCStar_SOSstar*SHCtoSHCStar_GRB2 - SHCtoSHCStar_kb10*SOSstar_GRB2;
  GDPrasToGTPras_GDP_ras' = -SOSstar_GRB2*GDPrasToGTPras_Vmax7*GDPrasToGTPras_GDP_ras/(GDPrasToGTPras_km7 + GDPrasToGTPras_GDP_ras);
  GDPrasToGTPras_GTP_ras' = SOSstar_GRB2*GDPrasToGTPras_Vmax7*GDPrasToGTPras_GDP_ras/(GDPrasToGTPras_km7 + GDPrasToGTPras_GDP_ras);
end
