// SBML level 2 version 4

model bi_model_1999_version01____main()
  // Originally created by libAntimony v1.3 (using libSBML 4.1.0-b2)

  // Compartments:
  compartment default_compartment = 1;

  // Parameters:
  RAF_kf5 = 4e-5;
  RAF_kb5 = 0.5;
  RAF_km1 = 66.66667;
  RAF_km2 = 25.64167;
  RAF_km3 = 15.6565;
  RAF_km4 = 15.6565;
  RAF_Vmax1 = 4;
  RAF_Vmax2 = 10;
  RAF_Vmax3 = 6;
  RAF_Vmax4 = 6;
  PKC = 0.1;
  RAF_PP2A = 0.224;
  MAPK_star = 0;
  RAF_Raf = 0.1;
  RAF_Raf_star = 0;
  RAF_Raf_star_star = 0;
  RAF_GTPRas = 0.1;
  GTPRasRaf_star = 0;
  MAPKK_km6 = 0.159091667;
  MAPKK_km7 = 0.159091667;
  MAPKK_km8 = 15.6565;
  MAPKK_km9 = 15.6565;
  MAPKK_Vmax6 = 0.105;
  MAPKK_Vmax7 = 0.105;
  MAPKK_Vmax8 = 6;
  MAPKK_Vmax9 = 6;
  MAPKK_PP2A = 0.224;
  MAPKK_MAPKK = 0.18;
  MAPKK_MAPKK_star = 0;
  MAPKK_star_star = 0;
  MAPK_km10 = 0.046296667;
  MAPK_km11 = 0.046296667;
  MAPK_km12 = 0.066666667;
  MAPK_km13 = 0.066666667;
  MAPK_Vmax10 = 0.15;
  MAPK_Vmax11 = 0.15;
  MAPK_Vmax12 = 1;
  MAPK_Vmax13 = 1;
  MAPK_MAPK = 0.36;
  MAPK_MAPK_tyr = 0;
  MAPK_MKP1 = 0.032;
  t = ;

  // Rate rules:
  MAPK_star' = MAPK_MAPK_tyr*MAPK_Vmax11*MAPKK_star_star/(MAPK_km11 + MAPK_MAPK_tyr) - MAPK_star*MAPK_Vmax13*MAPK_MKP1/(MAPK_km13 + MAPK_star);
  RAF_Raf' = -PKC*RAF_Raf*RAF_Vmax1/(RAF_km1 + RAF_Raf) + RAF_Raf_star*RAF_PP2A*RAF_Vmax3/(RAF_km3 + RAF_Raf_star);
  RAF_Raf_star' = PKC*RAF_Raf*RAF_Vmax1/(RAF_km1 + RAF_Raf) - RAF_Raf_star*RAF_PP2A*RAF_Vmax3/(RAF_km3 + RAF_Raf_star) - RAF_Raf_star*MAPK_star*RAF_Vmax2/(RAF_km2 + RAF_Raf_star) + RAF_Raf_star_star*RAF_PP2A*RAF_Vmax4/(RAF_km4 + RAF_Raf_star_star);
  RAF_Raf_star_star' = RAF_Raf_star*MAPK_star*RAF_Vmax2/(RAF_km2 + RAF_Raf_star) - RAF_Raf_star_star*RAF_PP2A*RAF_Vmax4/(RAF_km4 + RAF_Raf_star_star);
  RAF_GTPRas' = -RAF_GTPRas*RAF_Raf_star*RAF_kf5 + GTPRasRaf_star*RAF_kb5;
  GTPRasRaf_star' = RAF_GTPRas*RAF_Raf_star*RAF_kf5 - GTPRasRaf_star*RAF_kb5;
  MAPKK_MAPKK' = -MAPKK_MAPKK*MAPKK_Vmax6*GTPRasRaf_star/(MAPKK_km6 + MAPKK_MAPKK) + MAPKK_MAPKK_star*MAPKK_Vmax8*MAPKK_PP2A/(MAPKK_km8 + MAPKK_MAPKK_star);
  MAPKK_MAPKK_star' = MAPKK_MAPKK*MAPKK_Vmax6*GTPRasRaf_star/(MAPKK_km6 + MAPKK_MAPKK) - MAPKK_MAPKK_star*MAPKK_Vmax8*MAPKK_PP2A/(MAPKK_km8 + MAPKK_MAPKK_star) - MAPKK_MAPKK_star*MAPKK_Vmax7*GTPRasRaf_star/(MAPKK_km7 + MAPKK_MAPKK_star) + MAPKK_star_star*MAPKK_Vmax9*MAPKK_PP2A/(MAPKK_km9 + MAPKK_star_star);
  MAPKK_star_star' = MAPKK_MAPKK_star*MAPKK_Vmax7*GTPRasRaf_star/(MAPKK_km7 + MAPKK_MAPKK_star) - MAPKK_star_star*MAPKK_Vmax9*MAPKK_PP2A/(MAPKK_km9 + MAPKK_star_star);
  MAPK_MAPK' = -MAPK_MAPK*MAPK_Vmax10*MAPKK_star_star/(MAPK_km10 + MAPK_MAPK) + MAPK_MAPK_tyr*MAPK_Vmax12*MAPK_MKP1/(MAPK_km12 + MAPK_MAPK_tyr);
  MAPK_MAPK_tyr' = MAPK_MAPK*MAPK_Vmax10*MAPKK_star_star/(MAPK_km10 + MAPK_MAPK) - MAPK_MAPK_tyr*MAPK_Vmax12*MAPK_MKP1/(MAPK_km12 + MAPK_MAPK_tyr) - MAPK_MAPK_tyr*MAPK_Vmax11*MAPKK_star_star/(MAPK_km11 + MAPK_MAPK_tyr) + MAPK_star*MAPK_Vmax13*MAPK_MKP1/(MAPK_km13 + MAPK_star);
end
