// SBML level 2 version 4

model bi_model_1999_version01____main()
  // Originally created by libAntimony v1.3 (using libSBML 4.1.0-b2)

  // Compartments:
  compartment default_compartment = 1;

  // Parameters:
  PKC_kf1 = 1;
  PKC_kb1 = 50;
  PKC_kf2 = 2e-10;
  PKC_kb2 = 0.1;
  PKC_kf3 = 1.2705;
  PKC_kb3 = 3.5026;
  PKC_kf4 = 2e-9;
  PKC_kb4 = 0.1;
  PKC_kf5 = 1;
  PKC_kb5 = 0.1;
  PKC_kf6 = 2;
  PKC_kb6 = 0.2;
  PKC_kf7 = 1e-6;
  PKC_kb7 = 0.5;
  PKC_kf8 = 1.3333e-8;
  PKC_kb8 = 8.6348;
  PKC_kf9 = 1e-9;
  PKC_kb9 = 0.1;
  PKC_kf10 = 3e-8;
  PKC_kb10 = 2;
  PKC_PKC_i = 1;
  PKC_AA = 1;
  PKC_DAG = 0.1;
  PKC_Ca = 0.1;
  PKC_DAGPKC = 0;
  PKC_AADAGPKC = 0;
  PKC_DAGCaPKC = 0;
  PKC_CaPKC = 0;
  PKC_PKC_a = 0;
  t = ;

  // Rate rules:
  PKC_PKC_i' = -PKC_PKC_i*PKC_kf1 + PKC_PKC_a*PKC_kb1 - PKC_PKC_i*PKC_AA*PKC_kf2 + PKC_PKC_a*PKC_kb2 - PKC_PKC_i*PKC_DAG*PKC_kf9 + PKC_DAGPKC*PKC_kb9 - PKC_PKC_i*PKC_Ca*PKC_kf7 + PKC_CaPKC*PKC_kb7;
  PKC_AA' = -PKC_PKC_i*PKC_AA*PKC_kf2 + PKC_PKC_a*PKC_kb2 - PKC_CaPKC*PKC_AA*PKC_kf4 + PKC_PKC_a*PKC_kb4 - PKC_DAGPKC*PKC_AA*PKC_kf10 + PKC_AADAGPKC*PKC_kb10;
  PKC_DAG' = -PKC_PKC_i*PKC_DAG*PKC_kf9 + PKC_DAGPKC*PKC_kb9 - PKC_DAG*PKC_CaPKC*PKC_kf8 + PKC_DAGCaPKC*PKC_kb8;
  PKC_Ca' = -PKC_PKC_i*PKC_Ca*PKC_kf7 + PKC_CaPKC*PKC_kb7;
  PKC_DAGPKC' = PKC_PKC_i*PKC_DAG*PKC_kf9 - PKC_DAGPKC*PKC_kb9 - PKC_DAGPKC*PKC_AA*PKC_kf10 + PKC_AADAGPKC*PKC_kb10;
  PKC_AADAGPKC' = PKC_DAGPKC*PKC_AA*PKC_kf10 - PKC_AADAGPKC*PKC_kb10 - PKC_AADAGPKC*PKC_kf6 + PKC_PKC_a*PKC_kb6;
  PKC_DAGCaPKC' = PKC_DAG*PKC_CaPKC*PKC_kf8 - PKC_DAGCaPKC*PKC_kb8 - PKC_DAGCaPKC*PKC_kf5 + PKC_PKC_a*PKC_kb5;
  PKC_CaPKC' = PKC_PKC_i*PKC_Ca*PKC_kf7 - PKC_CaPKC*PKC_kb7 - PKC_CaPKC*PKC_kf3 + PKC_PKC_a*PKC_kb3 - PKC_CaPKC*PKC_AA*PKC_kf4 + PKC_PKC_a*PKC_kb4 - PKC_DAG*PKC_CaPKC*PKC_kf8 + PKC_DAGCaPKC*PKC_kb8;
  PKC_PKC_a' = PKC_PKC_i*PKC_kf1 - PKC_PKC_a*PKC_kb1 + PKC_PKC_i*PKC_AA*PKC_kf2 - PKC_PKC_a*PKC_kb2 + PKC_CaPKC*PKC_kf3 - PKC_PKC_a*PKC_kb3 + PKC_CaPKC*PKC_AA*PKC_kf4 - PKC_PKC_a*PKC_kb4 + PKC_DAGCaPKC*PKC_kf5 - PKC_PKC_a*PKC_kb5 + PKC_AADAGPKC*PKC_kf6 - PKC_PKC_a*PKC_kb6;
end
