// SBML level 2 version 4

model bi_model_1999_version01____main()
  // Originally created by libAntimony v1.4 (using libSBML 4.1.0-b2)

  // Compartments:
  compartment default_compartment = 1;

  // Parameters:
  PLA2_kf1 = 2e-9;
  PLA2_kb1 = 0.5;
  PLA2_kf3 = 1.6667e-7;
  PLA2_kb3 = 0.1;
  PLA2_kf5 = 2e-8;
  PLA2_kb5 = 0.1;
  PLA2_kf7 = 5e-9;
  PLA2_kb7 = 4;
  PLA2_kf10 = 0.17;
  PLA2_kb10 = 0;
  PLA2_kf11 = 1e-5;
  PLA2_kb11 = 0.1;
  PLA2_km9 = 25.64167;
  PLA2_Vmax9 = 20;
  PLA2_PIP2_star = 2.5;
  PLA2_PLA2_cyt = 0.4;
  PLA2_MAPK = 0.1;
  PLA2_PLA2_star = 0;
  PLA2_Ca = 0.1;
  CaPLA2 = 0;
  PLA2_DAG = 0.01;
  PIP2CaPLA2 = 0;
  PIP2PLA2 = 0;
  DAGCaPLA2 = 0;
  CaPLA2_star = 0;
  AA_kf13 = 0.4;
  AA_kb13 = 0;
  AA_km2 = 20;
  AA_km4 = 20;
  AA_km6 = 20;
  AA_km8 = 20;
  AA_km12 = 20;
  AA_Vmax2 = 11.04;
  AA_Vmax4 = 5.4;
  AA_Vmax6 = 36;
  AA_Vmax8 = 60;
  AA_Vmax12 = 120;
  AA_AA = 0;
  AA_APC = 30;
  t = ;

  // Rate rules:
  PLA2_PIP2_star' = -PLA2_PIP2_star*CaPLA2*PLA2_kf5 + PIP2CaPLA2*PLA2_kb5;
  PLA2_PLA2_cyt' = PLA2_PLA2_star*PLA2_kf10 - PLA2_PIP2_star*PLA2_PLA2_cyt*PLA2_kf1 + PIP2PLA2*PLA2_kb1 - PLA2_Ca*PLA2_PLA2_cyt*PLA2_kf3 + CaPLA2*PLA2_kb3 - PLA2_MAPK*PLA2_Vmax9*PLA2_PLA2_cyt/(PLA2_km9 + PLA2_PLA2_cyt);
  PLA2_PLA2_star' = -PLA2_PLA2_star*PLA2_kf10 + PLA2_MAPK*PLA2_Vmax9*PLA2_PLA2_cyt/(PLA2_km9 + PLA2_PLA2_cyt) - PLA2_Ca*PLA2_PLA2_star*PLA2_kf11 + CaPLA2_star*PLA2_kb11;
  PLA2_Ca' = -PLA2_Ca*PLA2_PLA2_star*PLA2_kf11 + CaPLA2_star*PLA2_kb11 - PLA2_Ca*PLA2_PLA2_cyt*PLA2_kf3 + CaPLA2*PLA2_kb3;
  CaPLA2' = PLA2_Ca*PLA2_PLA2_cyt*PLA2_kf3 - CaPLA2*PLA2_kb3 - PLA2_DAG*CaPLA2*PLA2_kf7 + DAGCaPLA2*PLA2_kb7 - PLA2_PIP2_star*CaPLA2*PLA2_kf5 + PIP2CaPLA2*PLA2_kb5;
  PLA2_DAG' = -PLA2_DAG*CaPLA2*PLA2_kf7 + DAGCaPLA2*PLA2_kb7;
  PIP2CaPLA2' = PLA2_PIP2_star*CaPLA2*PLA2_kf5 - PIP2CaPLA2*PLA2_kb5;
  PIP2PLA2' = PLA2_PIP2_star*PLA2_PLA2_cyt*PLA2_kf1 - PIP2PLA2*PLA2_kb1;
  DAGCaPLA2' = PLA2_DAG*CaPLA2*PLA2_kf7 - DAGCaPLA2*PLA2_kb7;
  CaPLA2_star' = PLA2_Ca*PLA2_PLA2_star*PLA2_kf11 - CaPLA2_star*PLA2_kb11;
  AA_AA' = -AA_AA*AA_kf13 + CaPLA2_star*AA_Vmax12*AA_APC/(AA_km12 + AA_APC) + CaPLA2*AA_Vmax4*AA_APC/(AA_km4 + AA_APC) + DAGCaPLA2*AA_Vmax8*AA_APC/(AA_km8 + AA_APC) + PIP2CaPLA2*AA_Vmax6*AA_APC/(AA_km6 + AA_APC) + PIP2PLA2*AA_Vmax2*AA_APC/(AA_km2 + AA_APC);
  AA_APC' = AA_AA*AA_kf13 - (CaPLA2_star*AA_Vmax12*AA_APC/(AA_km12 + AA_APC) + CaPLA2*AA_Vmax4*AA_APC/(AA_km4 + AA_APC) + DAGCaPLA2*AA_Vmax8*AA_APC/(AA_km8 + AA_APC) + PIP2CaPLA2*AA_Vmax6*AA_APC/(AA_km6 + AA_APC) + PIP2PLA2*AA_Vmax2*AA_APC/(AA_km2 + AA_APC));
end
