// SBML level 2 version 4

model bi_model_1999_version01____main()
  // Originally created by libAntimony v1.3 (using libSBML 4.1.0-b2)

  // Compartments:
  compartment default_compartment = 1;

  // Parameters:
  PIPtoDAG_km2 = 97;
  PIPtoDAG_km6 = 19.79167;
  PIPtoDAG_Vmax2 = 14;
  PIPtoDAG_Vmax6 = 57;
  PIPtoDAG_PIP2 = 10;
  PIPtoDAG_DAG = 0;
  PIPtoDAG_IP3 = 0;
  CaPLCg = 0;
  CaPLCg_star = 0;
  PLC_kf1 = 0.0003;
  PLC_kb1 = 10;
  PLC_kf3 = 0.05;
  PLC_kf5 = 2e-5;
  PLC_kb5 = 10;
  PLC_km4 = 0.3333333;
  PLC_Vmax4 = 0.2;
  PLC_PLCg = 0.82;
  PLC_PLCg_star = 0;
  EGF_EGFR = 0.1;
  PLC_Ca = 0.1;
  t = ;

  // Rate rules:
  PIPtoDAG_PIP2' = -CaPLCg*PIPtoDAG_Vmax2*PIPtoDAG_PIP2/(PIPtoDAG_km2 + PIPtoDAG_PIP2) - CaPLCg_star*PIPtoDAG_Vmax6*PIPtoDAG_PIP2/(PIPtoDAG_km6 + PIPtoDAG_PIP2);
  PIPtoDAG_DAG' = CaPLCg*PIPtoDAG_Vmax2*PIPtoDAG_PIP2/(PIPtoDAG_km2 + PIPtoDAG_PIP2) + CaPLCg_star*PIPtoDAG_Vmax6*PIPtoDAG_PIP2/(PIPtoDAG_km6 + PIPtoDAG_PIP2);
  PIPtoDAG_IP3' = CaPLCg*PIPtoDAG_Vmax2*PIPtoDAG_PIP2/(PIPtoDAG_km2 + PIPtoDAG_PIP2) + CaPLCg_star*PIPtoDAG_Vmax6*PIPtoDAG_PIP2/(PIPtoDAG_km6 + PIPtoDAG_PIP2);
  CaPLCg' = -(-PLC_Ca*PLC_PLCg*PLC_kf1 + CaPLCg*PLC_kb1) + PLC_kf3*CaPLCg_star - PLC_Vmax4*EGF_EGFR*CaPLCg/(PLC_km4 + CaPLCg);
  CaPLCg_star' = -(PLC_kf3*CaPLCg_star - PLC_Vmax4*EGF_EGFR*CaPLCg/(PLC_km4 + CaPLCg)) + PLC_Ca*PLC_PLCg_star*PLC_kf5 - PLC_kb5*CaPLCg_star;
  PLC_PLCg' = -PLC_Ca*PLC_PLCg*PLC_kf1 + CaPLCg*PLC_kb1;
  PLC_PLCg_star' = -PLC_Ca*PLC_PLCg_star*PLC_kf5 + PLC_kb5*CaPLCg_star;
  PLC_Ca' = -PLC_Ca*PLC_PLCg*PLC_kf1 + CaPLCg*PLC_kb1 + PLC_kb5*CaPLCg_star - PLC_Ca*PLC_PLCg_star*PLC_kf5;
end
