// SBML level 2 version 4

model bi_model_1999_version01____main()
  // Originally created by libAntimony v1.4 (using libSBML 4.1.0-b2)

  // Compartments:
  compartment default_compartment = 1;

  // Parameters:
  GEF_kf2 = 1;
  GEF_kb2 = 0;
  GEF_kf5 = 0.0001;
  GEF_kb5 = 1;
  GEF_kf7 = 1;
  GEF_kb7 = 0;
  GEF_kf8 = 1e-5;
  GEF_kb8 = 1;
  GEF_km1 = 7.5;
  GEF_Vmax1 = 9;
  GEF_km6 = 3.333333;
  GEF_Vmax6 = 4;
  GEF_inact = 0.1;
  GEF_GEF = 0;
  PKA = 1;
  GEF_Ca4CAM = 1;
  PKC = 1;
  GEF_Gby = 1;
  CaM_GEF = 0;
  Gby_GEF = 0;
  GTPRAS_kf12 = 0.0001;
  GTPRAS_kb12 = 0;
  GTPRAS_km9 = 0.50505;
  GTPRAS_Vmax9 = 0.02;
  GTPRAS_km10 = 0.50505;
  GTPRAS_Vmax10 = 0.02;
  GTPRAS_km11 = 0.50505;
  GTPRAS_Vmax11 = 0.02;
  GTPRAS_km13 = 1.0104;
  GTPRAS_Vmax13 = 10;
  GTPRAS_GTP_RAS = 0;
  GTPRAS_GDP_RAS = 0.2;
  GAP0 = 0.002;
  GAP_kf4 = 0.1;
  GAP_kb4 = 0;
  GAP_km3 = 3.333333;
  GAP_Vmax3 = 4;
  GAP_GAPstar = 0;
  Ca4CAM = 1;
  Gby = 1;
  t = ;

  // Rate rules:
  GEF_inact' = PKA*GEF_Vmax1*GEF_GEF/(GEF_km1 + GEF_GEF) + PKC*GEF_Vmax6*GEF_GEF/(GEF_km6 + GEF_GEF) - GEF_kf2*GEF_inact - GEF_kf7*GEF_inact;
  GEF_GEF' = -(PKA*GEF_Vmax1*GEF_GEF/(GEF_km1 + GEF_GEF) + PKC*GEF_Vmax6*GEF_GEF/(GEF_km6 + GEF_GEF) - GEF_kf2*GEF_inact - GEF_kf7*GEF_inact) - GEF_kf5*GEF_Ca4CAM*GEF_GEF + GEF_kb5*CaM_GEF - GEF_kf8*GEF_GEF*GEF_Gby + GEF_kb8*Gby_GEF;
  GEF_Ca4CAM' = -(-GEF_kb5*CaM_GEF + GEF_kf5*GEF_GEF*GEF_Ca4CAM);
  GEF_Gby' = -GEF_kf8*GEF_GEF*GEF_Gby + GEF_kb8*Gby_GEF;
  CaM_GEF' = -GEF_kb5*CaM_GEF + GEF_kf5*GEF_GEF*GEF_Ca4CAM;
  Gby_GEF' = -(-GEF_kf8*GEF_GEF*GEF_Gby + GEF_kb8*Gby_GEF);
  GTPRAS_GTP_RAS' = -GAP0*GTPRAS_Vmax13*GTPRAS_GTP_RAS/(GTPRAS_km13 + GTPRAS_GTP_RAS) - GTPRAS_kf12*GTPRAS_GTP_RAS + GEF_inact*GTPRAS_Vmax10*GTPRAS_GDP_RAS/(GTPRAS_km10 + GTPRAS_GDP_RAS) + Gby_GEF*GTPRAS_Vmax11*GTPRAS_GDP_RAS/(GTPRAS_km11 + GTPRAS_GDP_RAS) + CaM_GEF*GTPRAS_Vmax9*GTPRAS_GDP_RAS/(GTPRAS_km9 + GTPRAS_GDP_RAS);
  GTPRAS_GDP_RAS' = -(-GAP0*GTPRAS_Vmax13*GTPRAS_GTP_RAS/(GTPRAS_km13 + GTPRAS_GTP_RAS) - GTPRAS_kf12*GTPRAS_GTP_RAS + GEF_inact*GTPRAS_Vmax10*GTPRAS_GDP_RAS/(GTPRAS_km10 + GTPRAS_GDP_RAS) + Gby_GEF*GTPRAS_Vmax11*GTPRAS_GDP_RAS/(GTPRAS_km11 + GTPRAS_GDP_RAS) + CaM_GEF*GTPRAS_Vmax9*GTPRAS_GDP_RAS/(GTPRAS_km9 + GTPRAS_GDP_RAS));
  GAP0' = -PKC*GAP_Vmax3*GAP0/(GAP_km3 + GAP0) + GAP_kf4*GAP_GAPstar;
  GAP_GAPstar' = PKC*GAP_Vmax3*GAP0/(GAP_km3 + GAP0) - GAP_kf4*GAP_GAPstar;
end
