// SBML level 2 version 4

model bindschadler_sneyd_2001____main()
  // Originally created by libAntimony v1.3 (using libSBML 4.1.0-b2)

  // Compartments:
  compartment default_compartment = 1;

  // Parameters:
  h10 = 0.8;
  p = 0.2778;
  h20 = 0.1;
  r2 = 100;
  R1 = 6;
  k1 = 44;
  R3 = 50;
  k2 = 26.5;
  r4 = 20;
  k3 = 1.6;
  R5 = 1.6;
  c10 = 0.3;
  c20 = 0.1;
  Vp = 1.2;
  Kp = 0.18;
  kf = 28;
  D = 0.01;
  j_leak = 0.2;
  time_ = ;

  // Assignment rules:
  phi3_c1 := k3/(R5 + c10);
  phi1_c1 := r2*c10/(R1 + c10);
  phi2_c1 := (k2 + r4*c10)/(R3 + c10);
  phi_1_c1 := k1/(R3 + c10);
  phi3_c2 := k3/(R5 + c20);
  phi1_c2 := r2*c20/(R1 + c20);
  phi2_c2 := (k2 + r4*c20)/(R3 + c20);
  phi_1_c2 := k1/(R3 + c20);
  j_pump_c1 := Vp*c10^2/(Kp^2 + c10^2);
  j_pump_c2 := Vp*c20^2/(Kp^2 + c20^2);
  j_receptor_c1 := kf*(p*h10*phi1_c1/(phi1_c1*p + phi_1_c1))^4;
  j_receptor_c2 := kf*(p*h20*phi1_c2/(phi1_c2*p + phi_1_c2))^4;
  j_diffusion0 := D*(c20 - c10);

  // Rate rules:
  h10' = phi3_c1*(1 - h10) - phi1_c1*phi2_c1*h10*p/(phi1_c1*p + phi_1_c1);
  h20' = phi3_c2*(1 - h20) - phi1_c2*phi2_c2*h20*p/(phi1_c2*p + phi_1_c2);
  c10' = j_receptor_c1 - j_pump_c1 + j_leak + j_diffusion0;
  c20' = j_receptor_c2 - j_pump_c2 + j_leak + j_diffusion0;
end
