// SBML level 2 version 4

model bondarenko_szigeti_bett_kim_rasmusson_2004_version04_variant02____main()
  // Originally created by libAntimony v1.3 (using libSBML 4.1.0-b2)

  // Compartments:
  compartment default_compartment = 1;

  // Parameters:
  V = -82.4202;
  Cm = 1;
  Vmyo = 2.584e-5;
  VJSR = 1.2e-7;
  VNSR = 2.098e-6;
  Vss = 1.485e-9;
  Acap = 0.0001534;
  Ko = 5400;
  Nao = 140000;
  Cao = 1800;
  R = 8.314;
  T = 298;
  F = 96.5;
  Cai = 0.115001;
  Cass = 0.115001;
  CaJSR = 1299.5;
  CaNSR = 1299.5;
  calcium_concentration_CMDN_tot = 50;
  calcium_concentration_CSQN_tot = 15000;
  calcium_concentration_Km_CMDN = 0.238;
  calcium_concentration_Km_CSQN = 800;
  k_plus_htrpn = 0.00237;
  k_minus_htrpn = 3.2e-5;
  k_plus_ltrpn = 0.0327;
  k_minus_ltrpn = 0.0196;
  calcium_fluxes_P_RyR = 0;
  calcium_fluxes_v1 = 4.5;
  calcium_fluxes_tau_tr = 20;
  calcium_fluxes_v2 = 1.74e-5;
  calcium_fluxes_tau_xfer = 8;
  calcium_fluxes_v3 = 0.45;
  calcium_fluxes_Km_up = 0.5;
  LTRPN_tot = 70;
  HTRPN_tot = 140;
  LTRPN_Ca = 11.2684;
  HTRPN_Ca = 125.29;
  i_CaL_max = 7;
  P_O1 = 1.49102e-5;
  P_O2 = 9.51726e-11;
  P_C2 = 0.00016774;
  ryanodine_receptors_k_plus_a = 0.006075;
  ryanodine_receptors_k_minus_a = 0.07125;
  ryanodine_receptors_k_plus_b = 0.00405;
  ryanodine_receptors_k_minus_b = 0.965;
  ryanodine_receptors_k_plus_c = 0.009;
  ryanodine_receptors_k_minus_c = 0.0008;
  ryanodine_receptors_m = 3;
  ryanodine_receptors_n = 4;
  E_CaL = 63;
  L_type_calcium_current_g_CaL = 0.1729;
  L_type_calcium_current_O = 9.30308e-19;
  L_type_calcium_current_C2 = 0.000124216;
  L_type_calcium_current_C3 = 5.78679e-9;
  L_type_calcium_current_C4 = 1.19816e-13;
  L_type_calcium_current_I1 = 4.97923e-19;
  L_type_calcium_current_I2 = 3.45847e-14;
  L_type_calcium_current_I3 = 1.85106e-14;
  L_type_calcium_current_Kpcb = 0.0005;
  L_type_calcium_current_Kpc_max = 0.23324;
  L_type_calcium_current_Kpc_half = 20;
  calcium_pump_current_i_pCa_max = 1;
  calcium_pump_current_Km_pCa = 0.5;
  sodium_calcium_exchange_current_k_NaCa = 292.8;
  sodium_calcium_exchange_current_K_mNa = 87500;
  sodium_calcium_exchange_current_K_mCa = 1380;
  sodium_calcium_exchange_current_k_sat = 0.1;
  sodium_calcium_exchange_current_eta = 0.35;
  Nai = 14237.1;
  calcium_background_current_g_Cab = 0.000367;
  fast_sodium_current_g_Na = 13;
  fast_sodium_current_O_Na = 7.13483e-7;
  fast_sodium_current_C_Na1 = 0.000279132;
  fast_sodium_current_C_Na2 = 0.020752;
  fast_sodium_current_I1_Na = 6.73345e-7;
  fast_sodium_current_I2_Na = 1.55787e-9;
  fast_sodium_current_IF_Na = 0.000153176;
  fast_sodium_current_IC_Na2 = 0.0113879;
  fast_sodium_current_IC_Na3 = 0.34278;
  Ki = 143720;
  sodium_background_current_g_Nab = 0.0026;
  fast_transient_outward_potassium_current_g_Kto_f = 0.4067;
  fast_transient_outward_potassium_current_ato_f = 0.00265563;
  fast_transient_outward_potassium_current_ito_f = 0.999977;
  slow_transient_outward_potassium_current_g_Kto_s = 0;
  slow_transient_outward_potassium_current_ato_s = 0.000417069;
  slow_transient_outward_potassium_current_ito_s = 0.998543;
  slow_delayed_rectifier_potassium_current_g_Ks = 0.00575;
  slow_delayed_rectifier_potassium_current_nKs = 0.000262753;
  ultra_rapidly_activating_delayed_rectifier_potassium_current_g_Kur = 0.16;
  ultra_rapidly_activating_delayed_rectifier_potassium_current_aur = 0.000417069;
  ultra_rapidly_activating_delayed_rectifier_potassium_current_iur = 0.998543;
  non_inactivating_steady_state_potassium_current_g_Kss = 0.05;
  non_inactivating_steady_state_potassium_current_aKss = 0.000417069;
  non_inactivating_steady_state_potassium_current_iKss = 1;
  rapid_delayed_rectifier_potassium_current_g_Kr = 0.078;
  rapid_delayed_rectifier_potassium_current_O_K = 0.000175298;
  rapid_delayed_rectifier_potassium_current_C_K1 = 0.000992513;
  rapid_delayed_rectifier_potassium_current_C_K2 = 0.000641229;
  rapid_delayed_rectifier_potassium_current_I_K = 3.19129e-5;
  rapid_delayed_rectifier_potassium_current_kb = 0.036778;
  rapid_delayed_rectifier_potassium_current_kf = 0.023761;
  sodium_potassium_pump_current_i_NaK_max = 0.88;
  sodium_potassium_pump_current_Km_Nai = 21000;
  sodium_potassium_pump_current_Km_Ko = 1500;
  calcium_activated_chloride_current_g_ClCa = 10;
  calcium_activated_chloride_current_E_Cl = -40;
  calcium_activated_chloride_current_Km_Cl = 10;
  stimulus_protocol_IstimStart = 10;
  stimulus_protocol_IstimEnd = 50000;
  stimulus_protocol_IstimAmplitude = -80;
  stimulus_protocol_IstimPeriod = 200;
  stimulus_protocol_IstimPulseDuration = 0.5;
  time_ = ;

  // Assignment rules:
  i_stim := ;
  i_CaL := L_type_calcium_current_g_CaL*L_type_calcium_current_O*(V - E_CaL);
  i_pCa := calcium_pump_current_i_pCa_max*Cai^2/(calcium_pump_current_Km_pCa^2 + Cai^2);
  i_NaCa := sodium_calcium_exchange_current_k_NaCa*1/(sodium_calcium_exchange_current_K_mNa^3 + Nao^3)*1/(sodium_calcium_exchange_current_K_mCa + Cao)*1/(1 + sodium_calcium_exchange_current_k_sat*exp((sodium_calcium_exchange_current_eta - 1)*V*F/(R*T)))*(exp(sodium_calcium_exchange_current_eta*V*F/(R*T))*Nai^3*Cao - exp((sodium_calcium_exchange_current_eta - 1)*V*F/(R*T))*Nao^3*Cai);
  i_Cab := calcium_background_current_g_Cab*(V - calcium_background_current_E_CaN);
  i_Na := fast_sodium_current_g_Na*fast_sodium_current_O_Na*(V - E_Na);
  i_Nab := sodium_background_current_g_Nab*(V - E_Na);
  i_NaK := sodium_potassium_pump_current_i_NaK_max*sodium_potassium_pump_current_f_NaK*1/(1 + (sodium_potassium_pump_current_Km_Nai/Nai)^1.5)*Ko/(Ko + sodium_potassium_pump_current_Km_Ko);
  i_Kto_f := fast_transient_outward_potassium_current_g_Kto_f*fast_transient_outward_potassium_current_ato_f^3*fast_transient_outward_potassium_current_ito_f*(V - E_K);
  i_Kto_s := slow_transient_outward_potassium_current_g_Kto_s*slow_transient_outward_potassium_current_ato_s*slow_transient_outward_potassium_current_ito_s*(V - E_K);
  i_K1 := 0.2938*Ko/(Ko + 210)*(V - E_K)/(1 + exp(0.0896*(V - E_K)));
  i_Ks := slow_delayed_rectifier_potassium_current_g_Ks*slow_delayed_rectifier_potassium_current_nKs^2*(V - E_K);
  i_Kur := ultra_rapidly_activating_delayed_rectifier_potassium_current_g_Kur*ultra_rapidly_activating_delayed_rectifier_potassium_current_aur*ultra_rapidly_activating_delayed_rectifier_potassium_current_iur*(V - E_K);
  i_Kss := non_inactivating_steady_state_potassium_current_g_Kss*non_inactivating_steady_state_potassium_current_aKss*non_inactivating_steady_state_potassium_current_iKss*(V - E_K);
  i_ClCa := calcium_activated_chloride_current_g_ClCa*calcium_activated_chloride_current_O_ClCa*Cai/(Cai + calcium_activated_chloride_current_Km_Cl)*(V - calcium_activated_chloride_current_E_Cl);
  i_Kr := rapid_delayed_rectifier_potassium_current_g_Kr*rapid_delayed_rectifier_potassium_current_O_K*(V - R*T/F*ln((0.98*Ko + 0.02*Nao)/(0.98*Ki + 0.02*Nai)));
  calcium_concentration_Bi := (1 + calcium_concentration_CMDN_tot*calcium_concentration_Km_CMDN/(calcium_concentration_Km_CMDN + Cai)^2)^(-1);
  calcium_concentration_Bss := (1 + calcium_concentration_CMDN_tot*calcium_concentration_Km_CMDN/(calcium_concentration_Km_CMDN + Cass)^2)^(-1);
  calcium_concentration_BJSR := (1 + calcium_concentration_CSQN_tot*calcium_concentration_Km_CSQN/(calcium_concentration_Km_CSQN + CaJSR)^2)^(-1);
  J_leak := calcium_fluxes_v2*(CaNSR - Cai);
  J_rel := calcium_fluxes_v1*(P_O1 + P_O2)*(CaJSR - Cass)*calcium_fluxes_P_RyR;
  J_up := calcium_fluxes_v3*Cai^2/(calcium_fluxes_Km_up^2 + Cai^2);
  J_tr := (CaNSR - CaJSR)/calcium_fluxes_tau_tr;
  J_trpn := k_plus_htrpn*Cai*(HTRPN_tot - HTRPN_Ca) + k_plus_ltrpn*Cai*(LTRPN_tot - LTRPN_Ca) - (k_minus_htrpn*HTRPN_Ca + k_minus_ltrpn*LTRPN_Ca);
  J_xfer := (Cass - Cai)/calcium_fluxes_tau_xfer;
  P_C1 := 1 - (P_C2 + P_O1 + P_O2);
  L_type_calcium_current_C1 := 1 - (L_type_calcium_current_O + L_type_calcium_current_C2 + L_type_calcium_current_C2 + L_type_calcium_current_C3 + L_type_calcium_current_C4 + L_type_calcium_current_I1 + L_type_calcium_current_I2 + L_type_calcium_current_I3);
  L_type_calcium_current_alpha := 0.4*exp((V + 12)/10)*(1 + 0.7*exp(-(V + 40)^2/10) - 0.75*exp(-(V + 20)^2/400))/(1 + 0.12*exp((V + 12)/10));
  L_type_calcium_current_beta := 0.05*exp(-(V + 12)/13);
  L_type_calcium_current_gamma := L_type_calcium_current_Kpc_max*Cass/(L_type_calcium_current_Kpc_half + Cass);
  L_type_calcium_current_Kpcf := 13*(1 - exp(-(V + 14.5)^2/100));
  calcium_background_current_E_CaN := R*T/(2*F)*ln(Cao/Cai);
  E_Na := R*T/F*ln((0.9*Nao + 0.1*Ko)/(0.9*Nai + 0.1*Ki));
  fast_sodium_current_C_Na3 := 1 - (fast_sodium_current_O_Na + fast_sodium_current_C_Na1 + fast_sodium_current_C_Na2 + fast_sodium_current_IF_Na + fast_sodium_current_I1_Na + fast_sodium_current_I2_Na + fast_sodium_current_IC_Na2 + fast_sodium_current_IC_Na3);
  fast_sodium_current_alpha_Na11 := 3.802/(0.1027*exp(-(V + 2.5)/17) + 0.2*exp(-(V + 2.5)/150));
  fast_sodium_current_beta_Na11 := 0.1917*exp(-(V + 2.5)/20.3);
  fast_sodium_current_alpha_Na12 := 3.802/(0.1027*exp(-(V + 2.5)/15) + 0.23*exp(-(V + 2.5)/150));
  fast_sodium_current_beta_Na12 := 0.2*exp(-(V - 2.5)/20.3);
  fast_sodium_current_alpha_Na13 := 3.802/(0.1027*exp(-(V + 2.5)/12) + 0.25*exp(-(V + 2.5)/150));
  fast_sodium_current_beta_Na13 := 0.22*exp(-(V - 7.5)/20.3);
  fast_sodium_current_alpha_Na3 := 7e-7*exp(-(V + 7)/7.7);
  fast_sodium_current_beta_Na3 := 0.0084 + 2e-5*(V + 7);
  fast_sodium_current_alpha_Na2 := 1/(0.188495*exp(-(V + 7)/16.6) + 0.393956);
  fast_sodium_current_beta_Na2 := fast_sodium_current_alpha_Na13*fast_sodium_current_alpha_Na2*fast_sodium_current_alpha_Na3/(fast_sodium_current_beta_Na13*fast_sodium_current_beta_Na3);
  fast_sodium_current_alpha_Na4 := fast_sodium_current_alpha_Na2/1000;
  fast_sodium_current_beta_Na4 := fast_sodium_current_alpha_Na3;
  fast_sodium_current_alpha_Na5 := fast_sodium_current_alpha_Na2/95000;
  fast_sodium_current_beta_Na5 := fast_sodium_current_alpha_Na3/50;
  E_K := R*T/F*ln(Ko/Ki);
  fast_transient_outward_potassium_current_alpha_a := 0.18064*exp(0.03577*(V + 30));
  fast_transient_outward_potassium_current_beta_a := 0.3956*exp(-0.06237*(V + 30));
  fast_transient_outward_potassium_current_alpha_i := 0.000152*exp(-(V + 13.5)/7)/(0.0067083*exp(-(V + 33.5)/7) + 1);
  fast_transient_outward_potassium_current_beta_i := 0.00095*exp((V + 33.5)/7)/(0.051335*exp((V + 33.5)/7) + 1);
  ass := 1/(1 + exp(-(V + 22.5)/7.7));
  iss := 1/(1 + exp((V + 45.2)/5.7));
  slow_transient_outward_potassium_current_tau_ta_s := 0.493*exp(-0.0629*V) + 2.058;
  slow_transient_outward_potassium_current_tau_ti_s := 270 + 1050/(1 + exp((V + 45.2)/5.7));
  slow_delayed_rectifier_potassium_current_alpha_n := 4.81333e-6*(V + 26.5)*(1 - exp(-0.128*(V + 26.5)));
  slow_delayed_rectifier_potassium_current_beta_n := 9.53333e-5*exp(-0.038*(V + 26.5));
  ultra_rapidly_activating_delayed_rectifier_potassium_current_tau_aur := 0.493*exp(-0.0629*V) + 2.058;
  ultra_rapidly_activating_delayed_rectifier_potassium_current_tau_iur := 1200 - 170/(1 + exp((V + 45.2)/5.7));
  non_inactivating_steady_state_potassium_current_tau_Kss := 39.3*exp(-0.0862*V) + 13.17;
  rapid_delayed_rectifier_potassium_current_C_K0 := 1 - (rapid_delayed_rectifier_potassium_current_C_K1 + rapid_delayed_rectifier_potassium_current_C_K2 + rapid_delayed_rectifier_potassium_current_O_K + rapid_delayed_rectifier_potassium_current_I_K);
  rapid_delayed_rectifier_potassium_current_alpha_a0 := 0.022348*exp(0.01176*V);
  rapid_delayed_rectifier_potassium_current_beta_a0 := 0.047002*exp(-0.0631*V);
  rapid_delayed_rectifier_potassium_current_alpha_a1 := 0.013733*exp(0.038198*V);
  rapid_delayed_rectifier_potassium_current_beta_a1 := 6.89e-5*exp(-0.04178*V);
  rapid_delayed_rectifier_potassium_current_alpha_i := 0.090821*exp(0.023391*(V + 5));
  rapid_delayed_rectifier_potassium_current_beta_i := 0.006497*exp(-0.03268*(V + 5));
  sodium_potassium_pump_current_f_NaK := 1/(1 + 0.1245*exp(-0.1*V*F/(R*T)) + 0.0365*sodium_potassium_pump_current_sigma*exp(-V*F/(R*T)));
  sodium_potassium_pump_current_sigma := 1/7*(exp(Nao/67300) - 1);
  calcium_activated_chloride_current_O_ClCa := 0.2/(1 + exp(-(V - 46.7)/7.8));

  // Rate rules:
  V' = -(i_CaL + i_pCa + i_NaCa + i_Cab + i_Na + i_Nab + i_NaK + i_Kto_f + i_Kto_s + i_K1 + i_Ks + i_Kur + i_Kss + i_Kr + i_ClCa + i_stim)/Cm;
  Cai' = calcium_concentration_Bi*(J_leak + J_xfer - (J_up + J_trpn + (i_Cab + i_pCa - 2*i_NaCa)*Acap*Cm/(2*Vmyo*F)));
  Cass' = calcium_concentration_Bss*(J_rel*VJSR/Vss - (J_xfer*Vmyo/Vss + i_CaL*Acap*Cm/(2*Vss*F)));
  CaJSR' = calcium_concentration_BJSR*(J_tr - J_rel);
  CaNSR' = (J_up - J_leak)*Vmyo/VNSR - J_tr*VJSR/VNSR;
  calcium_fluxes_P_RyR' = -0.04*calcium_fluxes_P_RyR - 0.1*i_CaL/i_CaL_max*exp(-(V - 5)^2/648);
  LTRPN_Ca' = k_plus_ltrpn*Cai*(LTRPN_tot - LTRPN_Ca) - k_minus_ltrpn*LTRPN_Ca;
  HTRPN_Ca' = k_plus_htrpn*Cai*(HTRPN_tot - HTRPN_Ca) - k_minus_htrpn*HTRPN_Ca;
  P_O1' = ryanodine_receptors_k_plus_a*Cass^ryanodine_receptors_n*P_C1 + ryanodine_receptors_k_minus_b*P_O2 + ryanodine_receptors_k_minus_c*P_C2 - (ryanodine_receptors_k_minus_a*P_O1 + ryanodine_receptors_k_plus_b*Cass^ryanodine_receptors_m*P_O1 + ryanodine_receptors_k_plus_c*P_O1);
  P_O2' = ryanodine_receptors_k_plus_b*Cass^ryanodine_receptors_m*P_O1 - ryanodine_receptors_k_minus_b*P_O2;
  P_C2' = ryanodine_receptors_k_plus_c*P_O1 - ryanodine_receptors_k_minus_c*P_C2;
  L_type_calcium_current_O' = L_type_calcium_current_alpha*L_type_calcium_current_C4 + L_type_calcium_current_Kpcb*L_type_calcium_current_I1 + 0.001*(L_type_calcium_current_alpha*L_type_calcium_current_I2 - L_type_calcium_current_Kpcf*L_type_calcium_current_O) - (4*L_type_calcium_current_beta*L_type_calcium_current_O + L_type_calcium_current_gamma*L_type_calcium_current_O);
  L_type_calcium_current_C2' = 4*L_type_calcium_current_alpha*L_type_calcium_current_C1 + 2*L_type_calcium_current_beta*L_type_calcium_current_C3 - (L_type_calcium_current_beta*L_type_calcium_current_C2 + 3*L_type_calcium_current_alpha*L_type_calcium_current_C2);
  L_type_calcium_current_C3' = 3*L_type_calcium_current_alpha*L_type_calcium_current_C2 + 3*L_type_calcium_current_beta*L_type_calcium_current_C4 - (2*L_type_calcium_current_beta*L_type_calcium_current_C3 + 2*L_type_calcium_current_alpha*L_type_calcium_current_C3);
  L_type_calcium_current_C4' = 2*L_type_calcium_current_alpha*L_type_calcium_current_C3 + 4*L_type_calcium_current_beta*L_type_calcium_current_O + 0.01*(4*L_type_calcium_current_Kpcb*L_type_calcium_current_beta*L_type_calcium_current_I1 - L_type_calcium_current_alpha*L_type_calcium_current_gamma*L_type_calcium_current_C4) + 0.002*(4*L_type_calcium_current_beta*L_type_calcium_current_I2 - L_type_calcium_current_Kpcf*L_type_calcium_current_C4) + 4*L_type_calcium_current_beta*L_type_calcium_current_Kpcb*L_type_calcium_current_I3 - (3*L_type_calcium_current_beta*L_type_calcium_current_C4 + L_type_calcium_current_alpha*L_type_calcium_current_C4 + L_type_calcium_current_gamma*L_type_calcium_current_Kpcf*L_type_calcium_current_C4);
  L_type_calcium_current_I1' = L_type_calcium_current_gamma*L_type_calcium_current_O + 0.001*(L_type_calcium_current_alpha*L_type_calcium_current_I3 - L_type_calcium_current_Kpcf*L_type_calcium_current_I1) + 0.01*(L_type_calcium_current_alpha*L_type_calcium_current_gamma*L_type_calcium_current_C4 - 4*L_type_calcium_current_beta*L_type_calcium_current_Kpcf*L_type_calcium_current_I1) - L_type_calcium_current_Kpcb*L_type_calcium_current_I1;
  L_type_calcium_current_I2' = 0.001*(L_type_calcium_current_Kpcf*L_type_calcium_current_O - L_type_calcium_current_alpha*L_type_calcium_current_I2) + L_type_calcium_current_Kpcb*L_type_calcium_current_I3 + 0.002*(L_type_calcium_current_Kpcf*L_type_calcium_current_C4 - 4*L_type_calcium_current_beta*L_type_calcium_current_I2) - L_type_calcium_current_gamma*L_type_calcium_current_I2;
  L_type_calcium_current_I3' = 0.001*(L_type_calcium_current_Kpcf*L_type_calcium_current_I1 - L_type_calcium_current_alpha*L_type_calcium_current_I3) + L_type_calcium_current_gamma*L_type_calcium_current_I2 + L_type_calcium_current_gamma*L_type_calcium_current_Kpcf*L_type_calcium_current_C4 - (4*L_type_calcium_current_beta*L_type_calcium_current_Kpcb*L_type_calcium_current_I3 + L_type_calcium_current_Kpcb*L_type_calcium_current_I3);
  Nai' = -(i_Na + i_Nab + 3*i_NaK + 3*i_NaCa)*Acap*Cm/(Vmyo*F);
  fast_sodium_current_O_Na' = fast_sodium_current_alpha_Na13*fast_sodium_current_C_Na1 + fast_sodium_current_beta_Na2*fast_sodium_current_IF_Na - (fast_sodium_current_beta_Na13*fast_sodium_current_O_Na + fast_sodium_current_alpha_Na2*fast_sodium_current_O_Na);
  fast_sodium_current_C_Na1' = fast_sodium_current_alpha_Na12*fast_sodium_current_C_Na2 + fast_sodium_current_beta_Na13*fast_sodium_current_O_Na + fast_sodium_current_alpha_Na3*fast_sodium_current_IF_Na - (fast_sodium_current_beta_Na12*fast_sodium_current_C_Na1 + fast_sodium_current_alpha_Na13*fast_sodium_current_C_Na1 + fast_sodium_current_beta_Na3*fast_sodium_current_C_Na1);
  fast_sodium_current_C_Na2' = fast_sodium_current_alpha_Na11*fast_sodium_current_C_Na3 + fast_sodium_current_beta_Na12*fast_sodium_current_C_Na1 + fast_sodium_current_alpha_Na3*fast_sodium_current_IC_Na2 - (fast_sodium_current_beta_Na11*fast_sodium_current_C_Na2 + fast_sodium_current_alpha_Na12*fast_sodium_current_C_Na2 + fast_sodium_current_beta_Na3*fast_sodium_current_C_Na2);
  fast_sodium_current_I1_Na' = fast_sodium_current_alpha_Na4*fast_sodium_current_IF_Na + fast_sodium_current_beta_Na5*fast_sodium_current_I2_Na - (fast_sodium_current_beta_Na4*fast_sodium_current_I1_Na + fast_sodium_current_alpha_Na5*fast_sodium_current_I1_Na);
  fast_sodium_current_I2_Na' = fast_sodium_current_alpha_Na5*fast_sodium_current_I1_Na - fast_sodium_current_beta_Na5*fast_sodium_current_I2_Na;
  fast_sodium_current_IF_Na' = fast_sodium_current_alpha_Na2*fast_sodium_current_O_Na + fast_sodium_current_beta_Na3*fast_sodium_current_C_Na1 + fast_sodium_current_beta_Na4*fast_sodium_current_I1_Na + fast_sodium_current_alpha_Na12*fast_sodium_current_IC_Na2 - (fast_sodium_current_beta_Na2*fast_sodium_current_IF_Na + fast_sodium_current_alpha_Na3*fast_sodium_current_IF_Na + fast_sodium_current_alpha_Na4*fast_sodium_current_IF_Na + fast_sodium_current_beta_Na12*fast_sodium_current_IF_Na);
  fast_sodium_current_IC_Na2' = fast_sodium_current_alpha_Na11*fast_sodium_current_IC_Na3 + fast_sodium_current_beta_Na12*fast_sodium_current_IF_Na + fast_sodium_current_beta_Na3*fast_sodium_current_IC_Na2 - (fast_sodium_current_beta_Na11*fast_sodium_current_IC_Na2 + fast_sodium_current_alpha_Na12*fast_sodium_current_IC_Na2 + fast_sodium_current_alpha_Na3*fast_sodium_current_IC_Na2);
  fast_sodium_current_IC_Na3' = fast_sodium_current_beta_Na11*fast_sodium_current_IC_Na2 + fast_sodium_current_beta_Na3*fast_sodium_current_C_Na3 - (fast_sodium_current_alpha_Na11*fast_sodium_current_IC_Na3 + fast_sodium_current_alpha_Na3*fast_sodium_current_IC_Na3);
  Ki' = -(i_Kto_f + i_Kto_s + i_K1 + i_Ks + i_Kss + i_Kur + i_Kr - 2*i_NaK)*Acap*Cm/(Vmyo*F);
  fast_transient_outward_potassium_current_ato_f' = fast_transient_outward_potassium_current_alpha_a*(1 - fast_transient_outward_potassium_current_ato_f) - fast_transient_outward_potassium_current_beta_a*fast_transient_outward_potassium_current_ato_f;
  fast_transient_outward_potassium_current_ito_f' = fast_transient_outward_potassium_current_alpha_i*(1 - fast_transient_outward_potassium_current_ito_f) - fast_transient_outward_potassium_current_beta_i*fast_transient_outward_potassium_current_ito_f;
  slow_transient_outward_potassium_current_ato_s' = (ass - slow_transient_outward_potassium_current_ato_s)/slow_transient_outward_potassium_current_tau_ta_s;
  slow_transient_outward_potassium_current_ito_s' = (iss - slow_transient_outward_potassium_current_ito_s)/slow_transient_outward_potassium_current_tau_ti_s;
  slow_delayed_rectifier_potassium_current_nKs' = slow_delayed_rectifier_potassium_current_alpha_n*(1 - slow_delayed_rectifier_potassium_current_nKs) - slow_delayed_rectifier_potassium_current_beta_n*slow_delayed_rectifier_potassium_current_nKs;
  ultra_rapidly_activating_delayed_rectifier_potassium_current_aur' = (ass - ultra_rapidly_activating_delayed_rectifier_potassium_current_aur)/ultra_rapidly_activating_delayed_rectifier_potassium_current_tau_aur;
  ultra_rapidly_activating_delayed_rectifier_potassium_current_iur' = (iss - ultra_rapidly_activating_delayed_rectifier_potassium_current_iur)/ultra_rapidly_activating_delayed_rectifier_potassium_current_tau_iur;
  non_inactivating_steady_state_potassium_current_aKss' = (ass - non_inactivating_steady_state_potassium_current_aKss)/non_inactivating_steady_state_potassium_current_tau_Kss;
  non_inactivating_steady_state_potassium_current_iKss' = 0;
  rapid_delayed_rectifier_potassium_current_O_K' = rapid_delayed_rectifier_potassium_current_alpha_a1*rapid_delayed_rectifier_potassium_current_C_K2 + rapid_delayed_rectifier_potassium_current_beta_i*rapid_delayed_rectifier_potassium_current_I_K - (rapid_delayed_rectifier_potassium_current_beta_a1*rapid_delayed_rectifier_potassium_current_O_K + rapid_delayed_rectifier_potassium_current_alpha_i*rapid_delayed_rectifier_potassium_current_O_K);
  rapid_delayed_rectifier_potassium_current_C_K1' = rapid_delayed_rectifier_potassium_current_alpha_a0*rapid_delayed_rectifier_potassium_current_C_K0 + rapid_delayed_rectifier_potassium_current_kb*rapid_delayed_rectifier_potassium_current_C_K2 - (rapid_delayed_rectifier_potassium_current_beta_a0*rapid_delayed_rectifier_potassium_current_C_K1 + rapid_delayed_rectifier_potassium_current_kf*rapid_delayed_rectifier_potassium_current_C_K1);
  rapid_delayed_rectifier_potassium_current_C_K2' = rapid_delayed_rectifier_potassium_current_kf*rapid_delayed_rectifier_potassium_current_C_K1 + rapid_delayed_rectifier_potassium_current_beta_a1*rapid_delayed_rectifier_potassium_current_O_K - (rapid_delayed_rectifier_potassium_current_kb*rapid_delayed_rectifier_potassium_current_C_K2 + rapid_delayed_rectifier_potassium_current_alpha_a1*rapid_delayed_rectifier_potassium_current_C_K2);
  rapid_delayed_rectifier_potassium_current_I_K' = rapid_delayed_rectifier_potassium_current_alpha_i*rapid_delayed_rectifier_potassium_current_O_K - rapid_delayed_rectifier_potassium_current_beta_i*rapid_delayed_rectifier_potassium_current_I_K;
end
