// SBML level 2 version 4

model borghans_model_1997a____main()
  // Originally created by libAntimony v1.3 (using libSBML 4.1.0-b2)

  // Compartments:
  compartment default_compartment = 1;

  // Parameters:
  Z = 0.3;
  Y = 2.7;
  Ca_K_f = 1;
  Ca_K = 10;
  Ca_beta = 1;
  Ca_Ca_flux_V_in_mod_v_0 = 1;
  Ca_Ca_flux_V_in_mod_v_1 = 1;
  Ca_Ca_flux_V_2_mod_V_M2 = 6.5;
  Ca_Ca_flux_V_2_mod_K_2 = 0.1;
  Ca_Ca_flux_V_3_mod_K_y = 0.2;
  Ca_Ca_flux_V_3_mod_V_M3 = 50;
  Ca_Ca_flux_V_3_mod_Ca_channels_rho = 0.2;
  Ca_Ca_flux_V_3_mod_Ca_channels_k_d = 5000;
  Ca_Ca_flux_V_3_mod_Ca_channels_k_r = 5;
  Ca_Ca_flux_V_3_mod_Ca_channels_gamma_mod_a = 10000;
  Ca_Ca_flux_V_3_mod_Ca_channels_gamma_mod_d = 100;
  time_ = ;

  // Assignment rules:
  V_in := Ca_Ca_flux_V_in_mod_v_0 + Ca_Ca_flux_V_in_mod_v_1*Ca_beta;
  V_2 := Ca_Ca_flux_V_2_mod_V_M2*(Z^2/(Ca_Ca_flux_V_2_mod_K_2^2 + Z^2));
  V_3 := Ca_beta*Ca_Ca_flux_R_plus*Ca_Ca_flux_V_3_mod_V_M3*(Y^2/(Ca_Ca_flux_V_3_mod_K_y^2 + Y^2));
  Ca_Ca_flux_R_plus := Ca_Ca_flux_V_3_mod_gamma*(Ca_Ca_flux_V_3_mod_Ca_channels_rho/(1 + Ca_Ca_flux_V_3_mod_gamma));
  Ca_Ca_flux_V_3_mod_gamma := Ca_Ca_flux_V_3_mod_Ca_channels_gamma_mod_a/Ca_Ca_flux_V_3_mod_Ca_channels_gamma_mod_d*Z^4*1;

  // Rate rules:
  Z' = V_in - V_2 + V_3 + (Ca_K_f*Y - Ca_K*Z);
  Y' = V_2 - V_3 - Ca_K_f*Y;
  Ca_Ca_flux_V_3_mod_Ca_channels_rho' = -(Ca_Ca_flux_V_3_mod_Ca_channels_k_d*Z^4*Ca_Ca_flux_V_3_mod_Ca_channels_rho*1) + Ca_Ca_flux_V_3_mod_Ca_channels_k_r*(1 - Ca_Ca_flux_V_3_mod_Ca_channels_rho);
end
