// SBML level 2 version 4

model bornheimer_2004____main()
  // Originally created by libAntimony v1.4 (using libSBML 4.1.0-b2)

  // Compartments:
  compartment default_compartment = 1;

  // Parameters:
  A = 0;
  G = 0;
  GA = 0;
  T = 0.000468;
  R = 1e-6;
  GT_ = 0;
  GD = 1e-8;
  Pi_ = 0.0044;
  D = 0.000149;
  RG = 0;
  RGT = 0;
  GAT = 0;
  GAD = 0;
  RGD = 0;
  RGA = 0;
  RGAT = 0;
  RGAD = 0;
  output_G_tot = 1e-8;
  k1 = 0.013;
  k10 = 25;
  k11 = 0.013;
  k12 = 25;
  A1_k1 = 8780000;
  A1_k2 = 8;
  T1_k1 = 529000;
  T1_k2 = 8.38e-6;
  R1_k1 = 636000000;
  R1_k2 = 0.0179;
  P1_k2 = 9.03e-7;
  D1_k1 = 0.0001;
  D1_k2 = 62.3;
  T3_k1 = 853000;
  T3_k2 = 0.00468;
  R2_k1 = 132000000;
  R2_k2 = 1.28;
  A2_k1 = 386000;
  A2_k2 = 0.0408;
  A3_k1 = 64100;
  A3_k2 = 0.95;
  R3_k1 = 94700000;
  R3_k2 = 0.00227;
  P3_k2 = 2.22e-9;
  D3_k1 = 2;
  D3_k2 = 1470000;
  T2_k1 = 44700;
  T2_k2 = 8.32e-8;
  P2_k2 = 0.244;
  D2_k1 = 0.0001;
  D2_k2 = 3.83;
  A4_k1 = 74300;
  A4_k2 = 0.00572;
  R4_k1 = 22800000;
  R4_k2 = 5.43e-5;
  T4_k1 = 1620000;
  T4_k2 = 0.00875;
  R5_k1 = 6200000;
  R5_k2 = 0.0433;
  A5_k1 = 6300000;
  A5_k2 = 0.478;
  P4_k2 = 0.00297;
  A6_k1 = 13000;
  A6_k2 = 0.685;
  R6_k1 = 49400000;
  R6_k2 = 0.00421;
  D4_k1 = 2.75;
  D4_k2 = 2940;
  time_ = ;

  // Assignment rules:
  A10 := A1_k1*G*A - A1_k2*GA;
  A20 := A2_k1*GT_*A - A2_k2*GAT;
  A30 := A3_k1*GD*A - A3_k2*GAD;
  A40 := A4_k1*RG*A - A4_k2*RGA;
  A50 := A5_k1*RGT*A - A5_k2*RGAT;
  A60 := A6_k1*RGD*A - A6_k2*RGAD;
  R10 := R1_k1*G*R - R1_k2*RG;
  R20 := R2_k1*GT_*R - R2_k2*RGT;
  R30 := R3_k1*GD*R - R3_k2*RGD;
  R40 := R4_k1*GA*R - R4_k2*RGA;
  R50 := R5_k1*GAT*R - R5_k2*RGAT;
  R60 := R6_k1*GAD*R - R6_k2*RGAD;
  T10 := T1_k1*G*T - T1_k2*GT_;
  T20 := T2_k1*GA*T - T2_k2*GAT;
  T30 := T3_k1*RG*T - T3_k2*RGT;
  T40 := T4_k1*RGA*T - T4_k2*RGAT;
  P10 := k1*GT_ - P1_k2*GD*Pi_;
  P20 := k10*GAT - P2_k2*GAD*Pi_;
  P30 := k11*RGT - P3_k2*RGD*Pi_;
  P40 := k12*RGAT - P4_k2*RGAD*Pi_;
  D10 := D1_k1*GD - D1_k2*G*D;
  D20 := D2_k1*GAD - D2_k2*GA*D;
  D30 := D3_k1*RGD - D3_k2*RG*D;
  D40 := D4_k1*RGAD - D4_k2*RGA*D;
  output_Z := (GT_ + RGT + RGAT + GAT)/output_G_tot;
  output_v := (k12*RGAT + k10*GAT + k11*RGT + k1*GT_)/output_G_tot;

  // Rate rules:
  A' = -(A10 + A20 + A30 + A40 + A50 + A60);
  G' = D10 - (A10 + T10 + R10);
  GA' = A10 - T20 + D20 - R40;
  T' = -(T10 + T30 + T20 + T40);
  R' = -(R10 + R20 + R30 + R40 + R50 + R60);
  GT_' = T10 - P10 - R20 - A20;
  GD' = P10 - D10 - A30 - R30;
  Pi_' = P10 + P30 + P20 + P40;
  D' = D10 + D30 + D20 + D40;
  RG' = R10 - T30 + D30 - A40;
  RGT' = T30 + R20 - P30 - A50;
  GAT' = A20 + T20 - P20 - R50;
  GAD' = A30 + P20 - D20 - R60;
  RGD' = R30 + P30 - D30 - A60;
  RGA' = A40 + R40 - T40 + D40;
  RGAT' = T40 + R50 + A50 - P40;
  RGAD' = P40 + A60 + R60 - D40;
end
