// SBML level 2 version 4

model boyett_zhang_garny_holden_2001_version01____main()
  // Originally created by libAntimony v1.3 (using libSBML 4.1.0-b2)

  // Compartments:
  compartment default_compartment = 1;

  // Parameters:
  V = -63.25;
  R = 8314;
  T = 310;
  F = 96845;
  membrane_C = 65;
  sodium_current_g_Na = 1.2e-6;
  Na_o = 140;
  m = 0.135;
  sodium_current_sodium_current_h_gate_h1 = 0.03123;
  sodium_current_sodium_current_h_gate_h2 = 4.894;
  L_type_Ca_channel_g_Ca_L = 0.0659;
  L_type_Ca_channel_E_Ca_L = 46.4;
  d_L = 0.02248;
  f_L = 0.531;
  T_type_Ca_channel_g_Ca_T = 0.0139;
  T_type_Ca_channel_E_Ca_T = 45;
  d_T = 0.02217;
  f_T = 0.06274;
  four_AP_sensitive_currents_g_to = 0.003649;
  four_AP_sensitive_currents_g_sus = 0.0114;
  q = 0.06609;
  r = 0.05733;
  rapid_delayed_rectifying_potassium_current_g_K_r = 0.016;
  P_af = 0.66;
  P_as = 0.359;
  P_i = 0.976;
  rapid_delayed_rectifying_potassium_current_rapid_delayed_rectifying_potassium_current_P_i_gate_tau_P_i = 0.002;
  slow_delayed_rectifying_potassium_current_g_K_s = 0.0104;
  xs = ;
  hyperpolarisation_activated_current_g_f_Na = 0.0069;
  hyperpolarisation_activated_current_g_f_K = 0.0069;
  y = 0.007645;
  sodium_background_current_g_b_Na = 0.000189;
  potassium_background_current_g_b_K = 8.19e-5;
  calcium_background_current_g_b_Ca = 4.3e-5;
  sodium_calcium_pump_K_NaCa = 4.4e-5;
  sodium_calcium_pump_d_NaCa = 0.0001;
  sodium_calcium_pump_gamma_NaCa = 0.5;
  Na_i = 8;
  Ca_i = 0.0001;
  Ca_o = 2;
  sodium_potassium_pump_K_m_Na = 5.64;
  sodium_potassium_pump_K_m_K = 0.621;
  sodium_potassium_pump_i_p_max = 0.16;
  K_o = 5.4;
  sustained_inward_current_g_st = 0.00214;
  d_s = 0.23;
  f_s = 0.283;
  intracellular_calcium_handling_i_Ca_P_max = 0.24;
  intracellular_calcium_handling_J_Ca_u_max = 9.6e-10;
  intracellular_calcium_handling_Ca_d = 0.001544;
  intracellular_calcium_handling_Ca_s = 0.05487;
  intracellular_calcium_handling_Ca_u = 6.983;
  intracellular_calcium_handling_Ca_r = 4.909;
  intracellular_calcium_handling_B_d = 0.4;
  intracellular_calcium_handling_B_s = 0.2;
  intracellular_calcium_handling_Vol_c = 8e-12;
  intracellular_calcium_handling_K_m_b = 0.002;
  intracellular_calcium_handling_K_m_r = 0.001;
  intracellular_calcium_handling_K_m_u = 0.005;
  intracellular_calcium_handling_f_d = 0.1;
  intracellular_calcium_handling_f_r = 0.3;
  intracellular_calcium_handling_f_u = 0.06;
  intracellular_calcium_handling_alpha_ds = 3300;
  intracellular_calcium_handling_alpha_fR = 6670;
  intracellular_calcium_handling_alpha_1 = 0.172;
  intracellular_calcium_handling_alpha_r = 333.5;
  intracellular_calcium_handling_alpha_ur = 533.6;
  intracellular_calcium_handling_beta_fR = 2;
  intracellular_calcium_handling_f_R = 0.188;
  K_i = 140;
  time_ = ;
  sodium_current_sodium_current_h_gate_F_Na = ;
  rapid_delayed_rectifying_potassium_current_F_K_r = ;
  intracellular_calcium_handling_J_Ca_P_max = ;
  reversal_and_equilibrium_potentials_z = ;

  // Assignment rules:
  i_Na := sodium_current_g_Na*m^3*h*Na_o*(F^2/(R*T))*((exp((V - E_Na)*F/(R*T)) - 1)/(exp(V*F/(R*T)) - 1))*V;
  i_Ca_L := L_type_Ca_channel_g_Ca_L*(f_L*d_L + 0.006/(1 + exp(-(V + 14.1)/6)))*(V - L_type_Ca_channel_E_Ca_L);
  i_Ca_T := T_type_Ca_channel_g_Ca_T*d_T*f_T*(V - T_type_Ca_channel_E_Ca_T);
  i_to := four_AP_sensitive_currents_g_to*q*r*(V - E_K);
  i_sus := four_AP_sensitive_currents_g_sus*r*(V - E_K);
  i_K_r := rapid_delayed_rectifying_potassium_current_g_K_r*rapid_delayed_rectifying_potassium_current_P_a*P_i*(V - E_K);
  i_K_s := slow_delayed_rectifying_potassium_current_g_K_s*xs^2*(V - E_K_s);
  i_f := hyperpolarisation_activated_current_i_f_Na + hyperpolarisation_activated_current_i_f_K;
  i_b_Na := sodium_background_current_g_b_Na*(V - E_Na);
  i_b_Ca := calcium_background_current_g_b_Ca*(V - E_Ca);
  i_b_K := potassium_background_current_g_b_K*(V - E_K);
  i_NaCa := sodium_calcium_pump_K_NaCa*((Na_i^3*Ca_o*exp(0.03743*V*sodium_calcium_pump_gamma_NaCa) - Na_o^3*Ca_i*exp(0.0374*V*(sodium_calcium_pump_gamma_NaCa - 1)))/(1 + sodium_calcium_pump_d_NaCa*(Ca_i*Na_o^3 + Ca_o*Na_i^3)));
  i_p := sodium_potassium_pump_i_p_max*(Na_i/(sodium_potassium_pump_K_m_Na + Na_i))^3*(K_o/(sodium_potassium_pump_K_m_K + K_o))^2*(1.6/(1.5 + exp(-(V + 60)/40)));
  i_st := sustained_inward_current_g_st*d_s*f_s*(V - 18);
  i_Ca_P := intracellular_calcium_handling_i_Ca_P_max*(intracellular_calcium_handling_Ca_s/(intracellular_calcium_handling_Ca_s + 0.0004));
  E_Na := R*T/(reversal_and_equilibrium_potentials_z*F)*ln(Na_o/Na_i);
  h := (1 - sodium_current_sodium_current_h_gate_F_Na)*sodium_current_sodium_current_h_gate_h1 + sodium_current_sodium_current_h_gate_F_Na*sodium_current_sodium_current_h_gate_h2;
  sodium_current_sodium_current_m_gate_m_infinity := (1/(1 + exp(-V/5.46)))^(1/3);
  sodium_current_sodium_current_m_gate_tau_m := 0.6247e-3/(0.832*exp(-0.335*(V + 56.7)) + 0.627*exp(0.082*(V + 65.01))) + 4e-5;
  sodium_current_sodium_current_h_gate_h1_infinity := 1/(1 + exp((V + 66.1)/6.4));
  sodium_current_sodium_current_h_gate_h2_infinity := sodium_current_sodium_current_h_gate_h1_infinity;
  sodium_current_sodium_current_h_gate_tau_h1 := 3.171e-6*exp(-0.2815*(V + 17.11))/(1 + 0.003732*exp(-0.3426*(V + 37.76))) + 0.0005977;
  sodium_current_sodium_current_h_gate_tau_h2 := 3.186e-8*exp(-0.6219*(V + 18.8))/(1 + 7.189e-5*exp(-0.6683*(V + 34.07))) + 0.003556;
  L_type_Ca_channel_L_type_Ca_channel_d_gate_alpha_d_L := -14.19*((V + 35)/(exp(-(V + 35)/2.5) - 1)) - 42.45*V/(exp(-0.208*V) - 1);
  L_type_Ca_channel_L_type_Ca_channel_d_gate_beta_d_L := 5.71*(V - 5)/(exp(0.4*(V - 5)) - 1);
  L_type_Ca_channel_L_type_Ca_channel_d_gate_d_L_infinity := 1/(1 + exp(-(V + 23.1)/6));
  L_type_Ca_channel_L_type_Ca_channel_d_gate_tau_d_L := 1/(L_type_Ca_channel_L_type_Ca_channel_d_gate_alpha_d_L + L_type_Ca_channel_L_type_Ca_channel_d_gate_beta_d_L);
  L_type_Ca_channel_L_type_Ca_channel_f_gate_alpha_f_L := 3.12*(V + 28)/(exp((V + 28)/4) - 1);
  L_type_Ca_channel_L_type_Ca_channel_f_gate_beta_f_L := 25/(1 + exp(-(V + 28)/4));
  L_type_Ca_channel_L_type_Ca_channel_f_gate_f_L_infinity := 1/(1 + exp((V + 45)/5));
  L_type_Ca_channel_L_type_Ca_channel_f_gate_tau_f_L := 1/(L_type_Ca_channel_L_type_Ca_channel_f_gate_alpha_f_L + L_type_Ca_channel_L_type_Ca_channel_f_gate_beta_f_L);
  T_type_Ca_channel_T_type_Ca_channel_d_gate_alpha_d_T := 1068*exp((V + 26.3)/30);
  T_type_Ca_channel_T_type_Ca_channel_d_gate_beta_d_T := 1068*exp(-(V + 26.3)/30);
  T_type_Ca_channel_T_type_Ca_channel_d_gate_d_T_infinity := 1/(1 + exp(-(V + 37)/6.8));
  T_type_Ca_channel_T_type_Ca_channel_d_gate_tau_d_T := 1/(T_type_Ca_channel_T_type_Ca_channel_d_gate_alpha_d_T + T_type_Ca_channel_T_type_Ca_channel_d_gate_beta_d_T);
  T_type_Ca_channel_T_type_Ca_channel_f_gate_alpha_f_T := 15.3*exp(-(V + 71.7)/83.3);
  T_type_Ca_channel_T_type_Ca_channel_f_gate_beta_f_T := 15*exp((V + 71.7)/15.38);
  T_type_Ca_channel_T_type_Ca_channel_f_gate_f_T_infinity := 1/(1 + exp((V + 71)/9));
  T_type_Ca_channel_T_type_Ca_channel_f_gate_tau_f_T := 1/(T_type_Ca_channel_T_type_Ca_channel_f_gate_alpha_f_T + T_type_Ca_channel_T_type_Ca_channel_f_gate_beta_f_T);
  E_K := R*T/(reversal_and_equilibrium_potentials_z*F)*ln(K_o/K_i);
  four_AP_sensitive_currents_four_AP_sensitive_currents_q_gate_q_infinity := 1/(1 + exp((V + 59.37)/13.1));
  four_AP_sensitive_currents_four_AP_sensitive_currents_q_gate_tau_q := 10.1e-3 + 0.006517/(0.57*exp(-0.08*(V + 49))) + 2.4e-5*exp(0.1*(V + 50.93));
  four_AP_sensitive_currents_four_AP_sensitive_currents_r_gate_r_infinity := 1/(1 + exp(-(V - 10.93)/19.7));
  four_AP_sensitive_currents_four_AP_sensitive_currents_r_gate_tau_r := 0.00298 + 0.001559/(1.037*exp(0.09*(V + 30.61)) + 0.369*exp(-0.12*(V + 23.84)));
  rapid_delayed_rectifying_potassium_current_P_a := (1 - rapid_delayed_rectifying_potassium_current_F_K_r)*P_af + rapid_delayed_rectifying_potassium_current_F_K_r*P_as;
  rapid_delayed_rectifying_potassium_current_P_af_infinity := 1/(1 + exp(-(V + 14.2)/10.6));
  rapid_delayed_rectifying_potassium_current_rapid_delayed_rectifying_potassium_current_P_af_gate_tau_P_af := 1/(37.2*exp((V - 9)/15.9) + 0.96*exp(-(V - 9)/22.5));
  rapid_delayed_rectifying_potassium_current_rapid_delayed_rectifying_potassium_current_P_as_gate_P_as_infinity := rapid_delayed_rectifying_potassium_current_P_af_infinity;
  rapid_delayed_rectifying_potassium_current_rapid_delayed_rectifying_potassium_current_P_as_gate_tau_P_as := 1/(4.2*exp((V - 9)/17) + 0.15*exp(-(V - 9)/21.6));
  rapid_delayed_rectifying_potassium_current_rapid_delayed_rectifying_potassium_current_P_i_gate_P_i_infinity := 1/(1 + exp((V + 18.6)/10.1));
  E_K_s := R*T/F*ln((K_o + 0.12*Na_o)/(K_i + 0.12*Na_i));
  slow_delayed_rectifying_potassium_current_slow_delayed_rectifying_potassium_current_xs_gate_alpha_xs := 14/(1 + exp(-(V - 40)/9));
  slow_delayed_rectifying_potassium_current_slow_delayed_rectifying_potassium_current_xs_gate_beta_xs := exp(-V/45);
  slow_delayed_rectifying_potassium_current_slow_delayed_rectifying_potassium_current_xs_gate_xs_infinity := slow_delayed_rectifying_potassium_current_slow_delayed_rectifying_potassium_current_xs_gate_alpha_xs/(slow_delayed_rectifying_potassium_current_slow_delayed_rectifying_potassium_current_xs_gate_alpha_xs + slow_delayed_rectifying_potassium_current_slow_delayed_rectifying_potassium_current_xs_gate_beta_xs);
  slow_delayed_rectifying_potassium_current_slow_delayed_rectifying_potassium_current_xs_gate_tau_xs := 1/(slow_delayed_rectifying_potassium_current_slow_delayed_rectifying_potassium_current_xs_gate_alpha_xs + slow_delayed_rectifying_potassium_current_slow_delayed_rectifying_potassium_current_xs_gate_beta_xs);
  hyperpolarisation_activated_current_i_f_Na := hyperpolarisation_activated_current_g_f_Na*y*(V - E_Na);
  hyperpolarisation_activated_current_i_f_K := hyperpolarisation_activated_current_g_f_K*y*(V - E_K);
  hyperpolarisation_activated_current_hyperpolarisation_activated_current_y_gate_alpha_y := exp(-(V + 78.91)/26.62);
  hyperpolarisation_activated_current_hyperpolarisation_activated_current_y_gate_beta_y := exp((V + 75.13)/21.25);
  hyperpolarisation_activated_current_hyperpolarisation_activated_current_y_gate_y_infinity := hyperpolarisation_activated_current_hyperpolarisation_activated_current_y_gate_alpha_y/(hyperpolarisation_activated_current_hyperpolarisation_activated_current_y_gate_alpha_y + hyperpolarisation_activated_current_hyperpolarisation_activated_current_y_gate_beta_y);
  hyperpolarisation_activated_current_hyperpolarisation_activated_current_y_gate_tau_y := 1/(hyperpolarisation_activated_current_hyperpolarisation_activated_current_y_gate_alpha_y + hyperpolarisation_activated_current_hyperpolarisation_activated_current_y_gate_beta_y);
  E_Ca := R*T/(reversal_and_equilibrium_potentials_z*F)*ln(Ca_o/Ca_i);
  sustained_inward_current_sustained_inward_current_d_gate_alpha_d_s := 1000/(0.15*exp(-V/11) + 0.2*exp(-V/700));
  sustained_inward_current_sustained_inward_current_d_gate_beta_d_s := 1000/(16*exp(V/8) + 0.2*exp(V/50));
  sustained_inward_current_sustained_inward_current_d_gate_d_s_infinity := sustained_inward_current_sustained_inward_current_d_gate_alpha_d_s/(sustained_inward_current_sustained_inward_current_d_gate_alpha_d_s + sustained_inward_current_sustained_inward_current_d_gate_beta_d_s);
  sustained_inward_current_sustained_inward_current_d_gate_tau_d_s := 1/(sustained_inward_current_sustained_inward_current_d_gate_alpha_d_s + sustained_inward_current_sustained_inward_current_d_gate_beta_d_s);
  sustained_inward_current_sustained_inward_current_f_gate_alpha_f_s := 1000/(3100*exp(-V/13) + 700*exp(-V/70));
  sustained_inward_current_sustained_inward_current_f_gate_beta_f_s := 1000/(16*exp(V/8) + 0.2*exp(V/50));
  sustained_inward_current_sustained_inward_current_f_gate_f_s_infinity := sustained_inward_current_sustained_inward_current_f_gate_alpha_f_s/(sustained_inward_current_sustained_inward_current_f_gate_alpha_f_s + sustained_inward_current_sustained_inward_current_f_gate_beta_f_s);
  sustained_inward_current_sustained_inward_current_f_gate_tau_f_s := 1/(sustained_inward_current_sustained_inward_current_f_gate_alpha_f_s + sustained_inward_current_sustained_inward_current_f_gate_beta_f_s);
  intracellular_calcium_handling_U_d := 1 - intracellular_calcium_handling_B_d/(intracellular_calcium_handling_K_m_b + intracellular_calcium_handling_Ca_d + intracellular_calcium_handling_B_d);
  intracellular_calcium_handling_U_s := 1 - intracellular_calcium_handling_B_s/(intracellular_calcium_handling_K_m_b + intracellular_calcium_handling_Ca_s + intracellular_calcium_handling_B_s);
  intracellular_calcium_handling_J_Ca_ds := intracellular_calcium_handling_alpha_ds*intracellular_calcium_handling_Vol_d*(intracellular_calcium_handling_Ca_d - intracellular_calcium_handling_Ca_s);
  intracellular_calcium_handling_J_Ca_r := intracellular_calcium_handling_alpha_r*intracellular_calcium_handling_f_R*(intracellular_calcium_handling_Ca_d^2/(intracellular_calcium_handling_K_m_r^2 + intracellular_calcium_handling_Ca_d^2))*intracellular_calcium_handling_Vol_r*intracellular_calcium_handling_Ca_r;
  intracellular_calcium_handling_J_Ca_P := intracellular_calcium_handling_J_Ca_P_max*(intracellular_calcium_handling_Ca_s/(intracellular_calcium_handling_Ca_s + 0.0004));
  intracellular_calcium_handling_J_Ca_u := intracellular_calcium_handling_J_Ca_u_max*(intracellular_calcium_handling_Ca_s^2/(intracellular_calcium_handling_K_m_u^2 + intracellular_calcium_handling_Ca_s^2));
  intracellular_calcium_handling_J_Ca_ur := intracellular_calcium_handling_alpha_ur*intracellular_calcium_handling_Vol_u*(intracellular_calcium_handling_Ca_u - intracellular_calcium_handling_Ca_r);
  intracellular_calcium_handling_J_Ca_1 := intracellular_calcium_handling_alpha_1*intracellular_calcium_handling_Vol_u*intracellular_calcium_handling_Ca_u;
  intracellular_calcium_handling_Vol_u := intracellular_calcium_handling_f_u*intracellular_calcium_handling_Vol_c;
  intracellular_calcium_handling_Vol_r := intracellular_calcium_handling_f_r*intracellular_calcium_handling_Vol_c;
  intracellular_calcium_handling_Vol_d := intracellular_calcium_handling_f_d*intracellular_calcium_handling_Vol_c;
  intracellular_calcium_handling_Vol_s := intracellular_calcium_handling_Vol_c - (intracellular_calcium_handling_Vol_u + intracellular_calcium_handling_Vol_d);
  intracellular_calcium_handling_i_Ca := i_Ca_L + i_Ca_T;

  // Rate rules:
  V' = -1/membrane_C*(i_Na + i_Ca_L + i_Ca_T + i_to + i_sus + i_K_r + i_K_s + i_f + i_b_Na + i_b_Ca + i_b_K + i_NaCa + i_p + i_st + i_Ca_P);
  m' = (sodium_current_sodium_current_m_gate_m_infinity - m)/sodium_current_sodium_current_m_gate_tau_m;
  sodium_current_sodium_current_h_gate_h1' = (sodium_current_sodium_current_h_gate_h1_infinity - sodium_current_sodium_current_h_gate_h1)/sodium_current_sodium_current_h_gate_tau_h1;
  sodium_current_sodium_current_h_gate_h2' = (sodium_current_sodium_current_h_gate_h2_infinity - sodium_current_sodium_current_h_gate_h2)/sodium_current_sodium_current_h_gate_tau_h2;
  d_L' = (L_type_Ca_channel_L_type_Ca_channel_d_gate_d_L_infinity - d_L)/L_type_Ca_channel_L_type_Ca_channel_d_gate_tau_d_L;
  f_L' = (L_type_Ca_channel_L_type_Ca_channel_f_gate_f_L_infinity - f_L)/L_type_Ca_channel_L_type_Ca_channel_f_gate_tau_f_L;
  d_T' = (T_type_Ca_channel_T_type_Ca_channel_d_gate_d_T_infinity - d_T)/T_type_Ca_channel_T_type_Ca_channel_d_gate_tau_d_T;
  f_T' = (T_type_Ca_channel_T_type_Ca_channel_f_gate_f_T_infinity - f_T)/T_type_Ca_channel_T_type_Ca_channel_f_gate_tau_f_T;
  q' = (four_AP_sensitive_currents_four_AP_sensitive_currents_q_gate_q_infinity - q)/four_AP_sensitive_currents_four_AP_sensitive_currents_q_gate_tau_q;
  r' = (four_AP_sensitive_currents_four_AP_sensitive_currents_r_gate_r_infinity - r)/four_AP_sensitive_currents_four_AP_sensitive_currents_r_gate_tau_r;
  P_af' = (rapid_delayed_rectifying_potassium_current_P_af_infinity - P_af)/rapid_delayed_rectifying_potassium_current_rapid_delayed_rectifying_potassium_current_P_af_gate_tau_P_af;
  P_as' = (rapid_delayed_rectifying_potassium_current_rapid_delayed_rectifying_potassium_current_P_as_gate_P_as_infinity - P_as)/rapid_delayed_rectifying_potassium_current_rapid_delayed_rectifying_potassium_current_P_as_gate_tau_P_as;
  P_i' = (rapid_delayed_rectifying_potassium_current_rapid_delayed_rectifying_potassium_current_P_i_gate_P_i_infinity - P_i)/rapid_delayed_rectifying_potassium_current_rapid_delayed_rectifying_potassium_current_P_i_gate_tau_P_i;
  xs' = (slow_delayed_rectifying_potassium_current_slow_delayed_rectifying_potassium_current_xs_gate_xs_infinity - xs)/slow_delayed_rectifying_potassium_current_slow_delayed_rectifying_potassium_current_xs_gate_tau_xs;
  y' = (hyperpolarisation_activated_current_hyperpolarisation_activated_current_y_gate_y_infinity - y)/hyperpolarisation_activated_current_hyperpolarisation_activated_current_y_gate_tau_y;
  d_s' = (sustained_inward_current_sustained_inward_current_d_gate_d_s_infinity - d_s)/sustained_inward_current_sustained_inward_current_d_gate_tau_d_s;
  f_s' = (sustained_inward_current_sustained_inward_current_f_gate_f_s_infinity - f_s)/sustained_inward_current_sustained_inward_current_f_gate_tau_f_s;
  intracellular_calcium_handling_Ca_d' = intracellular_calcium_handling_U_d/intracellular_calcium_handling_Vol_d*(intracellular_calcium_handling_J_Ca_ds - 0.95*intracellular_calcium_handling_i_Ca/(2*F));
  intracellular_calcium_handling_Ca_s' = intracellular_calcium_handling_U_s/intracellular_calcium_handling_Vol_s*(intracellular_calcium_handling_J_Ca_ds - ((0.05*intracellular_calcium_handling_i_Ca - 2*i_NaCa + i_b_Ca)/(2*F) + intracellular_calcium_handling_J_Ca_u) + intracellular_calcium_handling_J_Ca_r + intracellular_calcium_handling_J_Ca_1);
  intracellular_calcium_handling_Ca_u' = (intracellular_calcium_handling_J_Ca_u - (intracellular_calcium_handling_J_Ca_1 + intracellular_calcium_handling_J_Ca_ur))/intracellular_calcium_handling_Vol_u;
  intracellular_calcium_handling_Ca_r' = (intracellular_calcium_handling_J_Ca_ur - intracellular_calcium_handling_J_Ca_r)/intracellular_calcium_handling_Vol_r;
  intracellular_calcium_handling_f_R' = -intracellular_calcium_handling_alpha_fR*intracellular_calcium_handling_Ca_d*intracellular_calcium_handling_f_R + intracellular_calcium_handling_beta_fR*(1 - intracellular_calcium_handling_f_R);
end
