// SBML level 2 version 4

model brown_model_1997____main()
  // Originally created by libAntimony v1.3 (using libSBML 4.1.0-b2)

  // Compartments:
  compartment default_compartment = 1;

  // Parameters:
  H10 = 0.05;
  H20 = 1;
  A_t_on = 1316;
  A_t_off = 1792;
  A_A_max = 6.51;
  model_parameters_tau_I = 2.82;
  model_parameters_tau_C = 23.67;
  model_parameters_tau_alpha = 25.92;
  model_parameters_tau_lamda = 24.04;
  time_ = ;

  // Assignment rules:
  A0 := ;
  beta_I := ln(2)/model_parameters_tau_I;
  beta_C := ln(2)/model_parameters_tau_C;
  alpha := ln(2)/model_parameters_tau_alpha;
  lamda := ln(2)/model_parameters_tau_lamda;

  // Rate rules:
  H10' = -(beta_I*H10) + A0;
  H20' = beta_I*H10 - beta_C*H20;
end
