// SBML level 2 version 4

model bueno_2007____main()
  // Originally created by libAntimony v1.4 (using libSBML 4.1.0-b2)

  // Compartments:
  compartment default_compartment = 1;

  // Parameters:
  epi = 1;
  endo = 0;
  mcell = 0;
  u = 0;
  membrane_V_0 = -83;
  membrane_V_fi = 2.7;
  u_m = 0.3;
  u_p = 0.13;
  v = 1;
  fast_inward_current_fast_inward_current_v_gate_tau_v_plus = 1.45;
  w = 1;
  s = 0;
  slow_inward_current_slow_inward_current_s_gate_tau_s1 = 2.7342;
  slow_inward_current_slow_inward_current_s_gate_k_s = 2.0994;
  slow_inward_current_slow_inward_current_s_gate_u_s = 0.9087;
  time_ = ;

  // Assignment rules:
  membrane_Vm := membrane_V_0 + u*(membrane_V_fi - membrane_V_0);
  J_fi := -m0*v*(u - u_m)*(fast_inward_current_u_u - u)/fast_inward_current_tau_fi;
  J_so := u*(1 - p0)/slow_outward_current_tau_o + p0/slow_outward_current_tau_so;
  J_si := -p0*w*s/slow_inward_current_tau_si;
  membrane_J_stim := ;
  m0 := ;
  p0 := ;
  q0 := ;
  u_q := ;
  r0 := ;
  r_u_r := ;
  fast_inward_current_tau_fi := ;
  fast_inward_current_u_u := ;
  fast_inward_current_fast_inward_current_v_gate_v_inf := ;
  fast_inward_current_fast_inward_current_v_gate_tau_v_minus := q0*fast_inward_current_fast_inward_current_v_gate_tau_v2_minus + (1 - q0)*fast_inward_current_fast_inward_current_v_gate_tau_v1_minus;
  fast_inward_current_fast_inward_current_v_gate_tau_v1_minus := ;
  fast_inward_current_fast_inward_current_v_gate_tau_v2_minus := ;
  slow_outward_current_tau_o := (1 - r0)*slow_outward_current_tau_o1 + r0*slow_outward_current_tau_o2;
  slow_outward_current_tau_o1 := ;
  slow_outward_current_tau_o2 := ;
  slow_outward_current_tau_so := slow_outward_current_tau_so1 + (slow_outward_current_tau_so2 - slow_outward_current_tau_so1)*(1 + tanh(slow_outward_current_k_so*(u - slow_outward_current_u_so)))/2;
  slow_outward_current_tau_so1 := ;
  slow_outward_current_tau_so2 := ;
  slow_outward_current_k_so := ;
  slow_outward_current_u_so := ;
  slow_inward_current_tau_si := ;
  slow_inward_current_slow_inward_current_w_gate_w_inf := (1 - r0)*(1 - u*1/slow_inward_current_slow_inward_current_w_gate_tau_winf) + r0*slow_inward_current_slow_inward_current_w_gate_wstar_inf;
  slow_inward_current_slow_inward_current_w_gate_tau_winf := ;
  slow_inward_current_slow_inward_current_w_gate_wstar_inf := ;
  slow_inward_current_slow_inward_current_w_gate_tau_w_minus := slow_inward_current_slow_inward_current_w_gate_tau_w1_minus + (slow_inward_current_slow_inward_current_w_gate_tau_w2_minus - slow_inward_current_slow_inward_current_w_gate_tau_w1_minus)*(1 + tanh(slow_inward_current_slow_inward_current_w_gate_k_w_minus*(u - slow_inward_current_slow_inward_current_w_gate_u_w_minus)))/2;
  slow_inward_current_slow_inward_current_w_gate_tau_w1_minus := ;
  slow_inward_current_slow_inward_current_w_gate_tau_w2_minus := ;
  slow_inward_current_slow_inward_current_w_gate_k_w_minus := ;
  slow_inward_current_slow_inward_current_w_gate_u_w_minus := ;
  slow_inward_current_slow_inward_current_w_gate_tau_w_plus := ;
  slow_inward_current_slow_inward_current_s_gate_tau_s := (1 - p0)*slow_inward_current_slow_inward_current_s_gate_tau_s1 + p0*slow_inward_current_slow_inward_current_s_gate_tau_s2;
  slow_inward_current_slow_inward_current_s_gate_tau_s2 := ;

  // Rate rules:
  u' = -(J_fi + J_so + J_si + membrane_J_stim);
  v' = (1 - m0)*(fast_inward_current_fast_inward_current_v_gate_v_inf - v)/fast_inward_current_fast_inward_current_v_gate_tau_v_minus - m0*v/fast_inward_current_fast_inward_current_v_gate_tau_v_plus;
  w' = (1 - r0)*(slow_inward_current_slow_inward_current_w_gate_w_inf - w)/slow_inward_current_slow_inward_current_w_gate_tau_w_minus - r0*w/slow_inward_current_slow_inward_current_w_gate_tau_w_plus;
  s' = ((1 + tanh(slow_inward_current_slow_inward_current_s_gate_k_s*(u - slow_inward_current_slow_inward_current_s_gate_u_s)))/2 - s)/slow_inward_current_slow_inward_current_s_gate_tau_s;
end
