// SBML level 2 version 4

model cambell_chandra_2006____main()
  // Originally created by libAntimony v1.3 (using libSBML 4.1.0-b2)

  // Compartments:
  compartment default_compartment = 1;

  // Parameters:
  equations_R_on = 1;
  equations_A = 0;
  equations_alpha = 0.1;
  equations_k_a = 0;
  equations_x = 1;
  x_0 = 1;
  epsilon = 1;
  beta = 2;
  g = 1;
  f = 1;
  k_off = 1;
  k_on = 1;
  L = 2.12;
  L_0 = 2.12;
  time_ = ;

  // Assignment rules:
  equations_F := equations_A*epsilon*equations_x;
  equations_D := 1 - equations_A;
  equations_k_XB := equations_k_a*equations_A;
  dL_dt := ;

  // Rate rules:
  equations_R_on' = -((k_off + equations_k_XB + equations_alpha*k_on)/(1 + equations_alpha) + f*equations_D)*equations_R_on + (g - (equations_k_XB + equations_alpha*k_on)/(1 + equations_alpha))*equations_A + (equations_k_XB + equations_alpha*k_on/(1 + equations_alpha))*beta*(L - L_0);
  equations_A' = f*equations_D*equations_R_on - g*equations_A;
  equations_x' = -g*(equations_x - x_0) + dL_dt;
  L' = dL_dt;
end
