// SBML level 2 version 4

model ModelSysT____main()
  // Originally created by libAntimony v1.4 (using libSBML 4.1.0-b2)

  // Compartments:
  compartment default_compartment = 1;

  // Parameters:
  Pi_ = ModelSysT_P0;
  ModelSysT_P0 = 100;
  ModelSysT_Qi1 = ModelSysT_Q0;
  ModelSysT_Q0 = 0;
  ModelSysT_R = 0.003;
  ModelSysT_C = 0.08;
  ModelSysT_L = 6.2e-5;
  ModelSysT_Pi_0 = ModelSysT_P00;
  ModelSysT_P00 = 100;
  ModelSysT_Qi2 = ModelSysT_Q00;
  ModelSysT_Q00 = 0;
  ModelSysT_R0 = 0.05;
  ModelSysT_C0 = 1.6;
  ModelSysT_L0 = 0.0017;
  ModelSysT_R1 = 0.5;
  ModelSysT_Pi_3 = ModelSysT_P01;
  ModelSysT_R2 = 0.52;
  ModelSysT_P01 = 0;
  ModelSysT_R3 = 0.075;
  ModelSysT_C1 = 20.5;
  Po = ;
  Qi = ;
  Qm = ;
  t = ;

  // Assignment rules:
  Qo := (ModelSysT_Pi_3 - Po)/ModelSysT_R3;
  Pm := ModelSysT_Pi_0;
  ModelSysT_Qi0 := ModelSysT_Qi1 + Qm;
  ModelSysT_Pi_1 := ModelSysT_Pi_2 + ModelSysT_R1*ModelSysT_Qi2;
  ModelSysT_Pi_2 := ModelSysT_Pi_3 + ModelSysT_R2*ModelSysT_Qi3;
  ModelSysT_Qi3 := ModelSysT_Qi2;
  ModelSysT_Qi4 := ModelSysT_Qi3;

  // Rate rules:
  Pi_' = (Qi - ModelSysT_Qi1)/ModelSysT_C;
  ModelSysT_Qi1' = (Pi_ - Pm - ModelSysT_R*ModelSysT_Qi1)/ModelSysT_L;
  ModelSysT_Pi_0' = (ModelSysT_Qi0 - ModelSysT_Qi2)/ModelSysT_C0;
  ModelSysT_Qi2' = (ModelSysT_Pi_0 - ModelSysT_Pi_1 - ModelSysT_R0*ModelSysT_Qi2)/ModelSysT_L0;
  ModelSysT_Pi_3' = (ModelSysT_Qi4 - Qo)/ModelSysT_C1;
end
