// SBML level 2 version 4

model MainIPump____main()
  // Originally created by libAntimony v1.4 (using libSBML 4.1.0-b2)

  // Compartments:
  compartment default_compartment = 1;

  // Parameters:
  Pi_ = Vessel_P0;
  LHeart_CV0 = 350;
  LHeart_LV_V = LHeart_V00;
  LHeart_V00 = 500;
  LHeart_Pini0 = 1;
  LHeart_Vini0 = 5;
  LHeart_CV = 400;
  LHeart_LA_V = LHeart_V0;
  LHeart_V0 = 20;
  LHeart_Pini = 1;
  LHeart_Vini = 4;
  LHeart_Emax0 = 0.5;
  LHeart_Emin0 = 0.1;
  LHeart_T = 1;
  LHeart_Ts1 = 0.3;
  LHeart_Ts2 = 0.45;
  LHeart_Emax = 0.25;
  LHeart_Emin = 0.15;
  LHeart_Tpwb = 0.92;
  LHeart_Tpww = 0.09;
  Vessel_P0 = 100;
  Vessel_Qi1 = Vessel_Q0;
  Vessel_Q0 = 0;
  Vessel_R = 0.003;
  Vessel_C = 0.08;
  Vessel_L = 6.2e-5;
  Vessel_Pi_0 = Vessel_P00;
  Vessel_P00 = 100;
  Vessel_Qi2 = Vessel_Q00;
  Vessel_Q00 = 0;
  Vessel_R0 = 0.05;
  Vessel_C0 = 1.6;
  Vessel_L0 = 0.0017;
  Vessel_R1 = 0.5;
  Vessel_Pi_3 = Vessel_P01;
  Vessel_R2 = 0.52;
  Vessel_P01 = 0;
  Vessel_R3 = 0.075;
  Vessel_C1 = 20.5;
  Vad_Ts2 = 0.45;
  Vad_T = 1;
  Vad_Kp0 = 19.5184;
  Vad_Kp1 = -0.0030361;
  Vad_Kp2 = -1.23045;
  Vad_Kp3 = 0.000578974;
  Vad_Kp4 = -5.8777e-8;
  Vad_Kp5 = -1.27539e-6;
  Vad_Kp6 = 2.04834e-10;
  Vad_Wi = 3600;
  Vad_ElaMax = 0.25;
  Vad_ElaMin = 0.15;
  Vad_PlaIni = 1;
  Vad_VlaIni = 4;
  Vad_ElvMax = 0.5;
  Vad_ElvMin = 0.1;
  Vad_PlvIni = 1;
  Vad_VlvIni = 5;
  Vad_Tpwb = 0.92;
  Vad_Tpww = 0.09;
  Vad_Ts1 = 0.3;
  Vad_CVao = 350;
  Vad_CVmi = 400;
  Vad_Vlv0 = 500;
  Vad_Vla0 = 20;
  t = ;

  // Assignment rules:
  Po := LHeart_Pini + LHeart_E*(LHeart_LA_V - LHeart_Vini);
  Qo := (Vessel_Pi_3 - Po)/Vessel_R3;
  Qm := -1*Qm0;
  Qi := ;
  Pm := LHeart_Pi_0;
  LHeart_Pi_0 := LHeart_Pini0 + LHeart_E0*(LHeart_LV_V - LHeart_Vini0);
  LHeart_Qi0 := LHeart_Qi1 + Qm;
  LHeart_E0 := LHeart_Emin0 + LHeart_Elv_et*(LHeart_Emax0 - LHeart_Emin0)/2;
  LHeart_LV_Tao := ;
  LHeart_Qi1 := ;
  LHeart_E := LHeart_Emin + LHeart_Ela_et*(LHeart_Emax - LHeart_Emin)/2;
  LHeart_Tao := ;
  LHeart_Elv_mt := t - LHeart_T*floor(t/LHeart_T);
  LHeart_Elv_et := ;
  LHeart_Ela_mt := t - LHeart_T*floor(t/LHeart_T);
  LHeart_Ela_et := ;
  Qm0 := (Vad_Kp0 + Vad_Kp1*Vad_Wn + Vad_Kp2*Vad_IPump_dPv + Vad_Kp3*Vad_Wn*Vad_IPump_dPv + Vad_Kp4*Vad_Wn^2*Vad_IPump_dPv + Vad_Kp5*Vad_Wn*Vad_IPump_dPv^2 + Vad_Kp6*Vad_Wn^2*Vad_IPump_dPv^2)*16.6667;
  Pm0 := Vessel_Pi_0;
  Vessel_Qi0 := Vessel_Qi1 + Qm0;
  Vessel_Pi_1 := Vessel_Pi_2 + Vessel_R1*Vessel_Qi2;
  Vessel_Pi_2 := Vessel_Pi_3 + Vessel_R2*Vessel_Qi3;
  Vessel_Qi3 := Vessel_Qi2;
  Vessel_Qi4 := Vessel_Qi3;
  Vad_Wn := 1*Vad_Wi;
  Vad_IPump_dPv := Pm0 - Pm;

  // Rate rules:
  Pi_' = (Qi - Vessel_Qi1)/Vessel_C;
  LHeart_LV_V' = LHeart_Qi0 - Qi;
  LHeart_LA_V' = Qo - LHeart_Qi1;
  Vessel_Qi1' = (Pi_ - Pm0 - Vessel_R*Vessel_Qi1)/Vessel_L;
  Vessel_Pi_0' = (Vessel_Qi0 - Vessel_Qi2)/Vessel_C0;
  Vessel_Qi2' = (Vessel_Pi_0 - Vessel_Pi_1 - Vessel_R0*Vessel_Qi2)/Vessel_L0;
  Vessel_Pi_3' = (Vessel_Qi4 - Qo)/Vessel_C1;
end
