// SBML level 2 version 4

model ModelSys____main()
  // Originally created by libAntimony v1.4 (using libSBML 4.1.0-b2)

  // Compartments:
  compartment default_compartment = 1;

  // Parameters:
  Pi_ = ModelSys_P0;
  ModelSys_P0 = 100;
  ModelSys_Pi_0 = ModelSys_P00;
  ModelSys_Qi0 = ModelSys_Q0;
  ModelSys_Q0 = 0;
  ModelSys_R = 0.003;
  ModelSys_C = 0.08;
  ModelSys_L = 6.2e-5;
  ModelSys_P00 = 100;
  ModelSys_Qi1 = ModelSys_Q00;
  ModelSys_Q00 = 0;
  ModelSys_R0 = 0.05;
  ModelSys_C0 = 1.6;
  ModelSys_L0 = 0.0017;
  ModelSys_R1 = 0.5;
  ModelSys_Pi_3 = ModelSys_P01;
  ModelSys_R2 = 0.52;
  ModelSys_P01 = 0;
  ModelSys_R3 = 0.075;
  ModelSys_C1 = 20.5;
  Po = ;
  Qi = ;
  t = ;

  // Assignment rules:
  Qo := (ModelSys_Pi_3 - Po)/ModelSys_R3;
  ModelSys_Pi_1 := ModelSys_Pi_2 + ModelSys_R1*ModelSys_Qi1;
  ModelSys_Pi_2 := ModelSys_Pi_3 + ModelSys_R2*ModelSys_Qi2;
  ModelSys_Qi2 := ModelSys_Qi1;
  ModelSys_Qi3 := ModelSys_Qi2;

  // Rate rules:
  Pi_' = (Qi - ModelSys_Qi0)/ModelSys_C;
  ModelSys_Pi_0' = (ModelSys_Qi0 - ModelSys_Qi1)/ModelSys_C0;
  ModelSys_Qi0' = (Pi_ - ModelSys_Pi_0 - ModelSys_R*ModelSys_Qi0)/ModelSys_L;
  ModelSys_Qi1' = (ModelSys_Pi_0 - ModelSys_Pi_1 - ModelSys_R0*ModelSys_Qi1)/ModelSys_L0;
  ModelSys_Pi_3' = (ModelSys_Qi3 - Qo)/ModelSys_C1;
end
