// SBML level 2 version 4

model MainWestkessel____main()
  // Originally created by libAntimony v1.4 (using libSBML 4.1.0-b2)

  // Compartments:
  compartment default_compartment = 1;

  // Parameters:
  LEFTHeart_CV0 = 350;
  LEFTHeart_LV_V = LEFTHeart_V00;
  LEFTHeart_V00 = 500;
  LEFTHeart_Pini0 = 1;
  LEFTHeart_Vini0 = 5;
  LEFTHeart_CV = 400;
  LEFTHeart_LA_V = LEFTHeart_V0;
  LEFTHeart_V0 = 20;
  LEFTHeart_Pini = 1;
  LEFTHeart_Vini = 4;
  LEFTHeart_Emax0 = 2.5;
  LEFTHeart_Emin0 = 0.1;
  LEFTHeart_T = 1;
  LEFTHeart_Ts1 = 0.3;
  LEFTHeart_Ts2 = 0.45;
  LEFTHeart_Emax = 0.25;
  LEFTHeart_Emin = 0.15;
  LEFTHeart_Tpwb = 0.92;
  LEFTHeart_Tpww = 0.09;
  Vessel_Pi_0 = Vessel_P0;
  Vessel_R = 0.005;
  Vessel_P0 = 0;
  Vessel_R0 = 0.65;
  Vessel_C = 2.6;
  t = ;
  Vessel_Zc_Qi = ;

  // Assignment rules:
  Po := LEFTHeart_Pini + LEFTHeart_E*(LEFTHeart_LA_V - LEFTHeart_Vini);
  Pi_ := Vessel_Pi_0 + Vessel_R*Vessel_Zc_Qi;
  Qo := (Vessel_Pi_0 - Po)/Vessel_R0;
  Qi := ;
  LEFTHeart_Pi_0 := LEFTHeart_Pini0 + LEFTHeart_E0*(LEFTHeart_LV_V - LEFTHeart_Vini0);
  LEFTHeart_Qi0 := ;
  LEFTHeart_E0 := LEFTHeart_Emin0 + LEFTHeart_Elv_et*(LEFTHeart_Emax0 - LEFTHeart_Emin0)/2;
  LEFTHeart_LV_Tao := ;
  LEFTHeart_E := LEFTHeart_Emin + LEFTHeart_Ela_et*(LEFTHeart_Emax - LEFTHeart_Emin)/2;
  LEFTHeart_Tao := ;
  LEFTHeart_Elv_mt := t - LEFTHeart_T*floor(t/LEFTHeart_T);
  LEFTHeart_Elv_et := ;
  LEFTHeart_Ela_mt := t - LEFTHeart_T*floor(t/LEFTHeart_T);
  LEFTHeart_Ela_et := ;
  Vessel_Qi0 := Vessel_Zc_Qi;

  // Rate rules:
  LEFTHeart_LV_V' = LEFTHeart_Qi0 - Qi;
  LEFTHeart_LA_V' = Qo - LEFTHeart_Qi0;
  Vessel_Pi_0' = (Vessel_Qi0 - Qo)/Vessel_C;
end
