// SBML level 2 version 4

model chang_fujita_2001_version01____main()
  // Originally created by libAntimony v1.3 (using libSBML 4.1.0-b2)

  // Compartments:
  compartment default_compartment = 1;

  // Parameters:
  E_e0 = 1;
  E_i0 = 1;
  Cl_e0 = 1;
  Cl_i0 = 1;
  ECl_e0 = 1;
  J_Cl_influx_Ki_Cl = 0.528;
  J_Cl_influx_Ki_HCO3 = 0.423;
  HCO3_i0 = 1;
  ECl_i0 = 1;
  HCO3_e0 = 1;
  EHCO3_e0 = 1;
  EHCO3_i0 = 1;
  reaction0_k0 = 1e8;
  reaction0_k0_ = 7870000;
  reaction1_k1 = 1e8;
  reaction1_k1_ = 8280000;
  reaction2_k2 = 1e8;
  reaction2_k2_ = 7870000;
  reaction3_k3 = 1e8;
  reaction3_k3_ = 8280000;
  reaction4_k4 = 514000;
  reaction4_k4_ = 92600;
  reaction5_k5 = 324000;
  reaction5_k5_ = 58300;
  time_ = ;
  delta_E_e_rxn0 = ;
  delta_E_e_rxn1 = ;
  delta_E_i_rxn2 = ;
  delta_E_i_rxn3 = ;
  delta_Cl_e_rxn0 = ;
  delta_Cl_i_rxn2 = ;
  delta_ECl_e_rxn0 = ;
  delta_ECl_e_rxn4 = ;
  delta_ECl_i_rxn4 = ;
  delta_ECl_i_rxn2 = ;
  delta_HCO3_e_rxn1 = ;
  delta_EHCO3_e_rxn1 = ;
  delta_EHCO3_e_rxn5 = ;
  delta_HCO3_i_rxn3 = ;
  delta_EHCO3_i_rxn3 = ;
  delta_EHCO3_i_rxn5 = ;
  reaction0_rate = ;
  reaction1_rate = ;
  reaction2_rate = ;
  reaction3_rate = ;
  reaction4_rate = ;
  reaction5_rate = ;

  // Assignment rules:
  J_Cl_influx0 := (delta_ECl_i_rxn4 + delta_ECl_e_rxn4)*(1 + Cl_i0/J_Cl_influx_Ki_Cl + HCO3_i0/J_Cl_influx_Ki_HCO3)^(-1);

  // Rate rules:
  E_e0' = delta_E_e_rxn0 + delta_E_e_rxn1;
  E_i0' = delta_E_i_rxn2 + delta_E_i_rxn3;
  Cl_e0' = delta_Cl_e_rxn0;
  Cl_i0' = delta_Cl_i_rxn2;
  ECl_e0' = delta_ECl_e_rxn0 + delta_ECl_e_rxn4;
  HCO3_i0' = delta_HCO3_i_rxn3;
  ECl_i0' = delta_ECl_i_rxn2 + delta_ECl_i_rxn4;
  HCO3_e0' = delta_HCO3_e_rxn1;
  EHCO3_e0' = delta_EHCO3_e_rxn1 + delta_EHCO3_e_rxn5;
  EHCO3_i0' = delta_EHCO3_i_rxn3 + delta_EHCO3_i_rxn5;
end
