// SBML level 2 version 4

model chang_fujita_2001_version03____main()
  // Originally created by libAntimony v1.3 (using libSBML 4.1.0-b2)

  // Compartments:
  compartment default_compartment = 1;

  // Parameters:
  E0 = ;
  k1 = 1e8;
  k2 = 3.27e6;
  k3 = 1e8;
  k4 = 3.52;
  k5 = 1e8;
  k6 = 7.13e5;
  ENa0 = ;
  ENH40 = ;
  EH0 = ;
  H = 1;
  Na = 1;
  NH4 = 1;
  ENa_0 = ;
  EH_0 = ;
  ENH4_0 = ;
  E_0 = ;
  k7 = 1e8;
  k8 = 3.27e6;
  k9 = 1e8;
  k10 = 3.52;
  k11 = 1e8;
  k12 = 7.13e5;
  H_ = 1;
  Na_ = 9.5;
  NH4_ = 1.3;
  reaction_constants_KH = 1;
  time_ = ;

  // Assignment rules:
  k13 := 2.41*reaction_constants_W;
  k14 := 2.41*reaction_constants_W;
  k15 := 4.8e-1*reaction_constants_W;
  k16 := 4.8e-1*reaction_constants_W;
  k17 := 2.41*reaction_constants_W;
  k18 := 2.41*reaction_constants_W;
  reaction_constants_W := H_/(H_ + reaction_constants_KH);

  // Rate rules:
  E0' = k2*ENa0 + k4*EH0 + k6*ENH40 - (k1*Na*E0 + k3*H*E0 + k5*NH4*E0);
  ENa0' = k1*E0*Na + k14*ENa_0 - (k2*ENa0 + k13*ENa0);
  ENH40' = k5*NH4*E0 + k18*ENH4_0 - (k6*ENH40 + k17*ENH40);
  EH0' = k3*H*E0 + k16*EH_0 - (k4*EH0 + k15*EH0);
  ENa_0' = k7*E_0*Na_ + k13*ENa0 - (k8*ENa_0 + k14*ENa_0);
  EH_0' = k9*H_*E_0 + k15*EH0 - (k10*EH_0 + k16*EH_0);
  ENH4_0' = k11*NH4_*E_0 + k17*ENH40 - (k12*ENH4_0 + k18*ENH4_0);
  E_0' = k8*ENa_0 + k10*EH_0 + k12*ENH4_0 - (k7*Na_*E_0 + k9*H_*E_0 + k11*NH4_*E_0);
end
