// SBML level 2 version 4

model chang_fujita_2001_version03____main()
  // Originally created by libAntimony v1.3 (using libSBML 4.1.0-b2)

  // Compartments:
  compartment default_compartment = 1;

  // Parameters:
  E0 = ;
  k1 = 1e8;
  k2 = 7.87e6;
  k3 = 1e8;
  k4 = 8.28e6;
  ECl0 = ;
  EHCO30 = ;
  HCO3 = 1;
  Cl = 1;
  k9 = 5.14e5;
  k10 = 9.26e4;
  ECl_0 = ;
  k11 = 3.24e5;
  k12 = 5.83e4;
  EHCO3_0 = ;
  E_0 = ;
  k5 = 1e8;
  k6 = 7.87e6;
  k7 = 1e8;
  k8 = 8.28e6;
  HCO3_ = 1;
  Cl_ = 1;
  J_Cl_influx_Ki_Cl = 0.528;
  J_Cl_influx_Ki_HCO3 = 0.423;
  time_ = ;

  // Assignment rules:
  J_Cl_influx0 := (k9*ECl0 - k10*ECl_0)*(1 + Cl_/J_Cl_influx_Ki_Cl + HCO3_/J_Cl_influx_Ki_HCO3)^(-1);

  // Rate rules:
  E0' = k2*ECl0 + k4*EHCO30 - (k1*Cl*E0 + k3*HCO3*E0);
  ECl0' = k1*Cl*E0 + k10*ECl_0 - (k2*ECl0 + k9*ECl0);
  EHCO30' = k3*HCO3*E0 + k12*EHCO3_0 - (k4*EHCO30 + k11*EHCO30);
  ECl_0' = k5*Cl_*E_0 + k9*ECl0 - (k6*ECl_0 + k10*ECl_0);
  EHCO3_0' = k7*HCO3_*E_0 + k11*EHCO30 - (k8*EHCO3_0 + k12*EHCO3_0);
  E_0' = k6*ECl_0 + k8*EHCO3_0 - (k5*Cl_*E_0 + k7*HCO3_*E_0);
end
