// SBML level 2 version 4

model chang_1999____main()
  // Originally created by libAntimony v1.3 (using libSBML 4.1.0-b2)

  // Compartments:
  compartment default_compartment = 1;

  // Parameters:
  C_m_Imp = 0.1033;
  C_c_Imp = 0.1124;
  psi_m = -28;
  psi_c = -86.4;
  imported_variables_RT = 2.579;
  imported_variables_F = 96.48;
  imported_variables_C_s_Imp = 4.525e-2;
  imported_variables_psi_s = 0;
  imported_variables_C_m_Na = 0.05;
  imported_variables_C_m_K = 0.002;
  imported_variables_C_m_Cl = 0.03;
  imported_variables_C_c_Na = 0.0164;
  imported_variables_C_c_K = 0.1637;
  imported_variables_C_c_Cl = 0.0203;
  imported_variables_C_s_Na = 1.438e-1;
  imported_variables_C_s_K = 4.25e-3;
  imported_variables_C_s_Cl = 1.12e-1;
  imported_variables_mc_sodium_flux_P_mc_Na = 3.27e-6;
  imported_variables_mc_sodium_flux_J_mc_NaCl_max = 3.21e-5;
  imported_variables_mc_sodium_flux_K_mc_Na_NaCl = 5.11e-2;
  imported_variables_mc_sodium_flux_K_mc_Cl_NaCl = 1.92e-2;
  imported_variables_mc_potassium_flux_J_mc_KCl_max = 6.31e-8;
  imported_variables_mc_potassium_flux_K_mc_K_KCl = 5.3e-2;
  imported_variables_mc_potassium_flux_K_mc_Cl_KCl = 2.13e-2;
  imported_variables_mc_potassium_flux_P_mc_K = 4.9e-7;
  imported_variables_mc_chloride_flux_P_mc_Cl = 1.43e-6;
  imported_variables_sc_sodium_flux_J_a_max = 2.69e-6;
  imported_variables_sc_sodium_flux_K_Na_ATPase = 1.2e-2;
  imported_variables_sc_potassium_flux_P_sc_K = 4.74e-4;
  imported_variables_sc_chloride_flux_P_sc_Cl = 9.16e-5;
  imported_variables_ms_sodium_flux_P_ms_Na = 4.8e-6;
  imported_variables_ms_potassium_flux_P_ms_K = 4.8e-6;
  imported_variables_ms_chloride_flux_P_ms_Cl = 2.4e-6;
  imported_variables_mc_transepithelial_volume_flux_L_mc_v = 5.22e-9;
  imported_variables_ms_transepithelial_volume_flux_L_ms_v = 0;
  imported_variables_sc_transepithelial_volume_flux_L_sc_v = 5.22e-7;
  imported_variables_time_ = ;

  // Assignment rules:
  imported_variables_J_mc_Na := imported_variables_J_mc_NaCl + imported_variables_mc_sodium_flux_G_mc_Na;
  imported_variables_J_ms_Na := imported_variables_ms_sodium_flux_G_ms_Na;
  imported_variables_J_sc_Na := -3*imported_variables_J_a;
  imported_variables_J_mc_K := imported_variables_J_mc_KCl + imported_variables_mc_potassium_flux_G_mc_K;
  imported_variables_J_ms_K := imported_variables_ms_potassium_flux_G_ms_K;
  imported_variables_J_sc_K := 2*imported_variables_J_a + imported_variables_sc_potassium_flux_G_sc_K;
  imported_variables_J_mc_Cl := imported_variables_J_mc_NaCl + imported_variables_J_mc_KCl + imported_variables_mc_chloride_flux_G_mc_Cl;
  imported_variables_J_ms_Cl := imported_variables_ms_chloride_flux_G_ms_Cl;
  imported_variables_J_sc_Cl := imported_variables_sc_chloride_flux_G_sc_Cl;
  imported_variables_Osm_m := imported_variables_C_m_Na + imported_variables_C_m_K + imported_variables_C_m_Cl + C_m_Imp;
  imported_variables_Osm_c := imported_variables_C_c_Na + imported_variables_C_c_K + imported_variables_C_c_Cl + C_c_Imp;
  imported_variables_Osm_s := imported_variables_C_s_Na + imported_variables_C_s_K + imported_variables_C_s_Cl + imported_variables_C_s_Imp;
  imported_variables_J_mc_NaCl := imported_variables_mc_sodium_flux_J_mc_NaCl_max*((imported_variables_C_m_Na/imported_variables_mc_sodium_flux_K_mc_Na_NaCl*(imported_variables_C_m_Cl/imported_variables_mc_sodium_flux_K_mc_Cl_NaCl) - imported_variables_C_c_Na/imported_variables_mc_sodium_flux_K_mc_Na_NaCl*(imported_variables_C_c_Cl/imported_variables_mc_sodium_flux_K_mc_Cl_NaCl))/((1 + imported_variables_C_m_Na/imported_variables_mc_sodium_flux_K_mc_Na_NaCl*(imported_variables_C_m_Cl/imported_variables_mc_sodium_flux_K_mc_Cl_NaCl))*(1 + imported_variables_C_c_Na/imported_variables_mc_sodium_flux_K_mc_Na_NaCl)*(1 + imported_variables_C_c_Cl/imported_variables_mc_sodium_flux_K_mc_Cl_NaCl) + (1 + imported_variables_C_c_Na/imported_variables_mc_sodium_flux_K_mc_Na_NaCl*(imported_variables_C_c_Cl/imported_variables_mc_sodium_flux_K_mc_Cl_NaCl))*(1 + imported_variables_C_m_Na/imported_variables_mc_sodium_flux_K_mc_Na_NaCl)*(1 + imported_variables_C_m_Cl/imported_variables_mc_sodium_flux_K_mc_Cl_NaCl)));
  imported_variables_mc_sodium_flux_G_mc_Na := imported_variables_mc_sodium_flux_P_mc_Na*(imported_variables_F*(psi_m - psi_c)/imported_variables_RT)*((imported_variables_C_m_Na - imported_variables_C_c_Na*exp(-(imported_variables_F/imported_variables_RT)*(psi_m - psi_c)))/(1 - exp(-(imported_variables_F/imported_variables_RT)*(psi_m - psi_c))));
  imported_variables_J_mc_KCl := imported_variables_mc_potassium_flux_J_mc_KCl_max*((imported_variables_C_m_K/imported_variables_mc_potassium_flux_K_mc_K_KCl*(imported_variables_C_m_Cl/imported_variables_mc_potassium_flux_K_mc_Cl_KCl) - imported_variables_C_c_K/imported_variables_mc_potassium_flux_K_mc_K_KCl*(imported_variables_C_c_Cl/imported_variables_mc_potassium_flux_K_mc_Cl_KCl))/((1 + imported_variables_C_m_K/imported_variables_mc_potassium_flux_K_mc_K_KCl*(imported_variables_C_m_Cl/imported_variables_mc_potassium_flux_K_mc_Cl_KCl))*(1 + imported_variables_C_c_K/imported_variables_mc_potassium_flux_K_mc_K_KCl)*(1 + imported_variables_C_c_Cl/imported_variables_mc_potassium_flux_K_mc_Cl_KCl) + (1 + imported_variables_C_c_K/imported_variables_mc_potassium_flux_K_mc_K_KCl*(imported_variables_C_c_Cl/imported_variables_mc_potassium_flux_K_mc_Cl_KCl))*(1 + imported_variables_C_m_K/imported_variables_mc_potassium_flux_K_mc_K_KCl)*(1 + imported_variables_C_m_Cl/imported_variables_mc_potassium_flux_K_mc_Cl_KCl)));
  imported_variables_mc_potassium_flux_G_mc_K := imported_variables_mc_potassium_flux_P_mc_K*(imported_variables_F*(psi_m - psi_c)/imported_variables_RT)*((imported_variables_C_m_K - imported_variables_C_c_K*exp(-(imported_variables_F/imported_variables_RT)*(psi_m - psi_c)))/(1 - exp(-(imported_variables_F/imported_variables_RT)*(psi_m - psi_c))));
  imported_variables_mc_chloride_flux_G_mc_Cl := imported_variables_mc_chloride_flux_P_mc_Cl*(-1*imported_variables_F*(psi_m - psi_c)/imported_variables_RT)*((imported_variables_C_m_Cl - imported_variables_C_c_Cl*exp(-(-1*imported_variables_F/imported_variables_RT)*(psi_m - psi_c)))/(1 - exp(-(-1*imported_variables_F/imported_variables_RT)*(psi_m - psi_c))));
  imported_variables_J_a := imported_variables_sc_sodium_flux_J_a_max*(1/(1 + (imported_variables_sc_sodium_flux_K_Na_ATPase/imported_variables_C_c_Na)^3));
  imported_variables_sc_potassium_flux_G_sc_K := imported_variables_sc_potassium_flux_P_sc_K*(imported_variables_F*(imported_variables_psi_s - psi_c)/imported_variables_RT)*((imported_variables_C_s_K - imported_variables_C_c_K*exp(-(imported_variables_F/imported_variables_RT)*(imported_variables_psi_s - psi_c)))/(1 - exp(-(imported_variables_F/imported_variables_RT)*(imported_variables_psi_s - psi_c))));
  imported_variables_sc_chloride_flux_G_sc_Cl := imported_variables_sc_chloride_flux_P_sc_Cl*(-1*imported_variables_F*(imported_variables_psi_s - psi_c)/imported_variables_RT)*((imported_variables_C_s_Cl - imported_variables_C_c_Cl*exp(-(-1*imported_variables_F/imported_variables_RT)*(imported_variables_psi_s - psi_c)))/(1 - exp(-(-1*imported_variables_F/imported_variables_RT)*(imported_variables_psi_s - psi_c))));
  imported_variables_ms_sodium_flux_G_ms_Na := imported_variables_ms_sodium_flux_P_ms_Na*(imported_variables_F*(psi_m - imported_variables_psi_s)/imported_variables_RT)*((imported_variables_C_m_Na - imported_variables_C_s_Na*exp(-(imported_variables_F/imported_variables_RT)*(psi_m - imported_variables_psi_s)))/(1 - exp(-(imported_variables_F/imported_variables_RT)*(psi_m - imported_variables_psi_s))));
  imported_variables_ms_potassium_flux_G_ms_K := imported_variables_ms_potassium_flux_P_ms_K*(imported_variables_F*(psi_m - imported_variables_psi_s)/imported_variables_RT)*((imported_variables_C_m_K - imported_variables_C_s_K*exp(-(imported_variables_F/imported_variables_RT)*(psi_m - imported_variables_psi_s)))/(1 - exp(-(imported_variables_F/imported_variables_RT)*(psi_m - imported_variables_psi_s))));
  imported_variables_ms_chloride_flux_G_ms_Cl := imported_variables_ms_chloride_flux_P_ms_Cl*(-1*imported_variables_F*(psi_m - imported_variables_psi_s)/imported_variables_RT)*((imported_variables_C_m_Cl - imported_variables_C_s_Cl*exp(-(-1*imported_variables_F/imported_variables_RT)*(psi_m - imported_variables_psi_s)))/(1 - exp(-(-1*imported_variables_F/imported_variables_RT)*(psi_m - imported_variables_psi_s))));
  imported_variables_total_transepithelial_sodium_flux_J_Na := imported_variables_J_mc_Na + imported_variables_J_ms_Na;
  imported_variables_total_transepithelial_potassium_flux_J_K := imported_variables_J_mc_K + imported_variables_J_ms_K;
  imported_variables_total_transepithelial_chloride_flux_J_Cl := imported_variables_J_mc_Cl + imported_variables_J_ms_Cl;
  imported_variables_J_mc_v := imported_variables_mc_transepithelial_volume_flux_L_mc_v*imported_variables_RT*(imported_variables_Osm_m - imported_variables_Osm_c);
  imported_variables_J_ms_v := imported_variables_ms_transepithelial_volume_flux_L_ms_v*imported_variables_RT*(imported_variables_Osm_m - imported_variables_Osm_s);
  imported_variables_sc_transepithelial_volume_flux_J_sc_v := imported_variables_sc_transepithelial_volume_flux_L_sc_v*imported_variables_RT*(imported_variables_Osm_s - imported_variables_Osm_c);
  imported_variables_total_transepithelial_volume_flux_J_v := imported_variables_J_mc_v + imported_variables_J_ms_v;

  // Rate rules:
  imported_variables_C_m_Na' = -(imported_variables_J_mc_Na + imported_variables_J_ms_Na);
  imported_variables_C_m_K' = -(imported_variables_J_mc_K + imported_variables_J_ms_K);
  imported_variables_C_m_Cl' = -(imported_variables_J_mc_Cl + imported_variables_J_ms_Cl);
  imported_variables_C_c_Na' = imported_variables_J_mc_Na + imported_variables_J_sc_Na;
  imported_variables_C_c_K' = imported_variables_J_mc_K + imported_variables_J_sc_K;
  imported_variables_C_c_Cl' = imported_variables_J_mc_Cl + imported_variables_J_sc_Cl;
  imported_variables_C_s_Na' = imported_variables_J_ms_Na - imported_variables_J_sc_Na;
  imported_variables_C_s_K' = imported_variables_J_ms_K - imported_variables_J_sc_K;
  imported_variables_C_s_Cl' = imported_variables_J_ms_Cl - imported_variables_J_sc_Cl;
end
