// SBML level 2 version 4

model chassagnole_rais_quentin_fell_mazat_2001_version01____main()
  // Originally created by libAntimony v1.3 (using libSBML 4.1.0-b2)

  // Compartments:
  compartment default_compartment = 1;

  // Parameters:
  Asp0 = ;
  aspp0 = ;
  ASA0 = ;
  hs0 = ;
  hsp0 = ;
  Thr0 = ;
  ATP0 = ;
  ADP0 = ;
  NADPH0 = ;
  NADP0 = ;
  Pi_0 = ;
  Lys0 = ;
  vAKI_K_asp = 0.97;
  vAKI_K_ATP = 0.98;
  vAKI_K_aspp = 0.017;
  vAKI_K_ADP = 0.25;
  vAKI_K_iThr = 0.167;
  vAKI_alpha = 2.47;
  vAKI_h_Thr = 4.09;
  vAKI_K_eq = 0.00064;
  vAKI_V_max_AK_I = 463;
  vASD_K_aspp = 0.022;
  vASD_K_NADPH = 0.029;
  vASD_K_ASA = 0.11;
  vASD_K_NADP = 0.144;
  vASD_K_Pi = 10.2;
  vASD_K_eq = 284000;
  vASD_V_max_ASD = 598;
  vHDH_K_ASA = 0.24;
  vHDH_K_NADPH = 0.037;
  vHDH_K_hs = 3.39;
  vHDH_K_NADP = 0.067;
  vHDH_K_iThr = 0.097;
  vHDH_alpha = 3.93;
  vHDH_h = 1.41;
  vHDH_K_eq = 100000000000;
  vHDH_V_max_HDH = 2585;
  vHK_K_hs = 0.11;
  vHK_K_ATP = 0.072;
  vHK_K_iThr = 1.09;
  vHK_K_iLys = 9.45;
  vHK_K_ihs = 4.7;
  vHK_K_iATP = 4.35;
  vHK_V_max_HK = 483;
  vTS_K_hsp = 0.31;
  vTS_V_max_TS = 208;
  vAKIII_K_asp = 0.32;
  vAKIII_K_ATP = 0.22;
  vAKIII_K_aspp = 0.017;
  vAKIII_K_ADP = 0.25;
  vAKIII_K_iLys = 0.391;
  vAKIII_h_Lys = 2.8;
  vAKIII_K_eq = 0.00064;
  vAKIII_V_max_AK_III = 299;
  time_ = ;

  // Assignment rules:
  vAKI0 := vAKI_V_max_AK_I*(Asp0*ATP0 - aspp0*ADP0/vAKI_K_eq)/((vAKI_K_asp*((1 + (Thr0/vAKI_K_iThr)^vAKI_h_Thr)/(1 + (Thr0/(vAKI_K_iThr*vAKI_alpha))^vAKI_h_Thr)) + aspp0*(vAKI_K_asp/vAKI_K_aspp) + Asp0)*(vAKI_K_ATP*(1 + ADP0/vAKI_K_ADP) + ATP0));
  vAKIII0 := vAKIII_V_max_AK_III*(Asp0*ATP0 - aspp0*ADP0/vAKIII_K_eq)/((1 + (Lys0/vAKIII_K_iLys)^vAKIII_h_Lys)*(vAKIII_K_asp*(1 + aspp0/vAKIII_K_aspp) + Asp0)*(vAKIII_K_ATP*(1 + ADP0/vAKIII_K_ADP) + ATP0));
  vASD0 := vASD_V_max_ASD*(aspp0*NADPH0 - ASA0*NADP0*Pi_0/vASD_K_eq)/((vASD_K_aspp*(1 + ASA0/vASD_K_ASA)*(1 + Pi_0/vASD_K_Pi) + aspp0)*(vASD_K_NADPH*(1 + NADP0/vASD_K_NADP) + NADPH0));
  vHDH0 := vHDH_V_max_HDH*(ASA0*NADPH0 - hs0*NADP0/vHDH_K_eq)/((1 + (Thr0/vHDH_K_iThr)^vHDH_h)/(1 + (Thr0/(vHDH_alpha*vHDH_K_iThr))^vHDH_h)*(vHDH_K_ASA + hs0*(vHDH_K_ASA/vHDH_K_hs) + ASA0)*(vHDH_K_NADPH*(1 + NADP0/vHDH_K_NADP) + NADPH0));
  vHK0 := vHK_V_max_HK*hs0*ATP0/((vHK_K_hs*((1 + ATP0/vHK_K_iATP)/(1 + Thr0/vHK_K_iThr)) + hs0)*(vHK_K_ATP*(1 + hs0/vHK_K_ihs) + ATP0)*(1 + Lys0/vHK_K_iLys));
  vTS0 := vTS_V_max_TS*hsp0/(vTS_K_hsp + hsp0);

  // Rate rules:
  Asp0' = vAKI0 + vAKIII0;
  aspp0' = vAKI0 + vAKIII0 + vASD0;
  ASA0' = vASD0 + vHDH0;
  hs0' = vHDH0 + vHK0;
  hsp0' = vTS0;
  Thr0' = vAKI0 + vHDH0 + vHK0;
  ATP0' = vAKI0 + vAKIII0 + vHK0;
  ADP0' = vAKI0 + vAKIII0;
  NADPH0' = vASD0 + vHDH0;
  NADP0' = vASD0 + vHDH0;
  Pi_0' = vASD0;
  Lys0' = vAKIII0 + vHK0;
end
