// SBML level 2 version 4

model chay_1997____main()
  // Originally created by libAntimony v1.3 (using libSBML 4.1.0-b2)

  // Compartments:
  compartment default_compartment = 1;

  // Parameters:
  V = -38.34146;
  R = 8314;
  T = 310;
  F = 96485;
  membrane_Cm = 1;
  fast_current_g_fast = 600;
  fast_current_V_fast = 80;
  h = 0.214723;
  fast_current_fast_current_m_gate_Vm = -25;
  fast_current_fast_current_m_gate_Sm = 9;
  fast_current_fast_current_h_gate_lamda_h = 12.5;
  fast_current_fast_current_h_gate_Vh = -48;
  fast_current_fast_current_h_gate_Sh = -7;
  K_Ca = 1;
  calcium_current_P_Ca = 2;
  calcium_current_Ca_o = 2500;
  Ca_i = 0.6959466;
  d = 0.0031711238;
  calcium_current_calcium_current_d_gate_lamda_d = 2.5;
  calcium_current_calcium_current_d_gate_Vd = -10;
  calcium_current_calcium_current_d_gate_Sd = 5;
  cationic_nonselective_inward_current_g_NS = 5;
  cationic_nonselective_inward_current_K_NS = 50;
  cationic_nonselective_inward_current_VNS = -20;
  Ca_lum = 102.686;
  V_K = -75;
  delayed_rectifier_K_channel_current_g_K_dr = 600;
  n = 0.1836403;
  delayed_rectifier_K_channel_current_delayed_rectifier_K_channel_current_n_gate_lamda_n = 12.5;
  delayed_rectifier_K_channel_current_delayed_rectifier_K_channel_current_n_gate_Vn = -18;
  delayed_rectifier_K_channel_current_delayed_rectifier_K_channel_current_n_gate_Sn = 14;
  Ca_sensitive_K_current_g_K_Ca = 5;
  ATP_sensitive_K_current_g_K_ATP = 2;
  Na_leak_current_g_NaL = 0.3;
  Na_leak_current_V_Na = 80;
  cytosolic_calcium_k_rel = 0.2;
  cytosolic_calcium_k_Ca = 7;
  cytosolic_calcium_k_pump = 30;
  cytosolic_calcium_omega = 0.2;
  time_ = ;

  // Assignment rules:
  i_K_dr := delayed_rectifier_K_channel_current_g_K_dr*n^4*(V - V_K);
  i_K_Ca := Ca_sensitive_K_current_g_K_Ca*Ca_i^3/(K_Ca^3 + Ca_i^3)*(V - V_K);
  i_K_ATP := ATP_sensitive_K_current_g_K_ATP*(V - V_K);
  i_fast := fast_current_g_fast*m_infinity^3*h*(V - fast_current_V_fast);
  i_Ca := calcium_current_P_Ca*d*f_infinity*2*F*V/(R*T)*(calcium_current_Ca_o - Ca_i*exp(2*F*V/(R*T)))/(1 - exp(2*F*V/(R*T)));
  i_NS := cationic_nonselective_inward_current_g_NS*cationic_nonselective_inward_current_K_NS^2/(cationic_nonselective_inward_current_K_NS^2 + Ca_lum^2)*((V - cationic_nonselective_inward_current_VNS)/(1 - exp(0.1*(cationic_nonselective_inward_current_VNS - V))) - 10);
  i_NaL := Na_leak_current_g_NaL*(V - Na_leak_current_V_Na);
  m_infinity := 1/(1 + exp((fast_current_fast_current_m_gate_Vm - V)/fast_current_fast_current_m_gate_Sm));
  fast_current_fast_current_h_gate_tau_h := 1/(fast_current_fast_current_h_gate_lamda_h*(exp((fast_current_fast_current_h_gate_Vh - V)/(2*fast_current_fast_current_h_gate_Sh)) + exp((V - fast_current_fast_current_h_gate_Vh)/(2*fast_current_fast_current_h_gate_Sh))));
  fast_current_fast_current_h_gate_h_infinity := 1/(1 + exp((fast_current_fast_current_h_gate_Vh - V)/fast_current_fast_current_h_gate_Sh));
  f_infinity := K_Ca/(K_Ca + Ca_i);
  calcium_current_calcium_current_d_gate_tau_d := 1/(calcium_current_calcium_current_d_gate_lamda_d*(exp((calcium_current_calcium_current_d_gate_Vd - V)/(2*calcium_current_calcium_current_d_gate_Sd)) + exp((V - calcium_current_calcium_current_d_gate_Vd)/(2*calcium_current_calcium_current_d_gate_Sd))));
  calcium_current_calcium_current_d_gate_d_infinity := 1/(1 + exp((calcium_current_calcium_current_d_gate_Vd - V)/calcium_current_calcium_current_d_gate_Sd));
  delayed_rectifier_K_channel_current_delayed_rectifier_K_channel_current_n_gate_n_infinity := 1/(1 + exp((delayed_rectifier_K_channel_current_delayed_rectifier_K_channel_current_n_gate_Vn - V)/delayed_rectifier_K_channel_current_delayed_rectifier_K_channel_current_n_gate_Sn));
  delayed_rectifier_K_channel_current_delayed_rectifier_K_channel_current_n_gate_tau_n := 1/(delayed_rectifier_K_channel_current_delayed_rectifier_K_channel_current_n_gate_lamda_n*(exp((delayed_rectifier_K_channel_current_delayed_rectifier_K_channel_current_n_gate_Vn - V)/(2*delayed_rectifier_K_channel_current_delayed_rectifier_K_channel_current_n_gate_Sn)) + exp((V - delayed_rectifier_K_channel_current_delayed_rectifier_K_channel_current_n_gate_Vn)/(2*delayed_rectifier_K_channel_current_delayed_rectifier_K_channel_current_n_gate_Sn))));

  // Rate rules:
  V' = -(i_K_dr + i_K_Ca + i_K_ATP + i_fast + i_Ca + i_NS + i_NaL)/membrane_Cm;
  h' = (fast_current_fast_current_h_gate_h_infinity - h)/fast_current_fast_current_h_gate_tau_h;
  Ca_i' = cytosolic_calcium_k_rel*(Ca_lum - Ca_i) - (cytosolic_calcium_omega*i_Ca + cytosolic_calcium_k_Ca*Ca_i + cytosolic_calcium_k_pump*Ca_i);
  d' = (calcium_current_calcium_current_d_gate_d_infinity - d)/calcium_current_calcium_current_d_gate_tau_d;
  Ca_lum' = -cytosolic_calcium_k_rel*(Ca_lum - Ca_i) + cytosolic_calcium_k_pump*Ca_i;
  n' = (delayed_rectifier_K_channel_current_delayed_rectifier_K_channel_current_n_gate_n_infinity - n)/delayed_rectifier_K_channel_current_delayed_rectifier_K_channel_current_n_gate_tau_n;
end
