// SBML level 2 version 4

model chen_calzone_csikasznagy_cross_novak_tyson_2004_version01____main()
  // Originally created by libAntimony v1.4 (using libSBML 4.1.0-b2)

  // Compartments:
  compartment default_compartment = 1;

  // Parameters:
  mass0 = 1.206;
  kg = 0.007702;
  Cln20 = 0.0652;
  ks_n2_ = 0;
  ks_n2__ = 0.15;
  kd_n2 = 0.12;
  Clb50 = 0.0518;
  ks_b5_ = 0.0008;
  ks_b5__ = 0.005;
  kdi_f5 = 0.01;
  kdi_b5 = 0.06;
  kas_b5 = 50;
  kas_f5 = 0.01;
  kd3_f6 = 1;
  kd3_c1 = 1;
  C5P0 = 0.0069;
  C50 = 0.0701;
  F5P0 = 7.9e-6;
  F50 = 7.2e-5;
  Sic10 = 0.0229;
  Cdc60 = 0.1076;
  Clb20 = 0.1469;
  ks_b2_ = 0.001;
  ks_b2__ = 0.04;
  kdi_b2 = 0.05;
  kdi_f2 = 0.5;
  kas_b2 = 50;
  kas_f2 = 15;
  C2P0 = 0.024;
  C20 = 0.2384;
  F2P0 = 0.0274;
  F20 = 0.2361;
  ks_c1_ = 0.012;
  ks_c1__ = 0.12;
  kpp_c1 = 4;
  Swi50 = 0.9562;
  Cdc140 = 0.4683;
  Sic1P0 = 0.0064;
  ks_f6_ = 0.024;
  ks_f6__ = 0.12;
  ks_f6___ = 0.004;
  kpp_f6 = 4;
  Cdc6P0 = 0.0155;
  Pds10 = 0.0256;
  ks_pds_ = 0;
  ks1_pds__ = 0.03;
  ks2_pds__ = 0.055;
  kdi_esp = 0.5;
  kas_esp = 50;
  Esp10 = 0.3013;
  ORI0 = 0.0009;
  ks_ori = 2;
  kd_ori = 0.06;
  epsilon_ori_b5 = 0.9;
  epsilon_ori_b2 = 0.45;
  BUD0 = 0.0085;
  ks_bud = 0.2;
  kd_bud = 0.06;
  epsilon_bud_n2 = 0.25;
  epsilon_bud_n3 = 0.05;
  epsilon_bud_b5 = 1;
  SPN0 = 0.0305;
  ks_spn = 0.1;
  kd_spn = 0.06;
  Jspn = 0.14;
  Ji_sbf = 0.01;
  Ja_sbf = 0.01;
  Ji_mcm = 0.1;
  Ja_mcm = 0.1;
  ki_mcm = 0.15;
  ka_mcm = 1;
  C0 = 0.4;
  Dn3 = 1;
  Jn3 = 6;
  B0 = 0.054;
  Swi5_T0 = 0.9765;
  ks_swi_ = 0.005;
  ks_swi__ = 0.08;
  kd_swi = 0.08;
  ka_swi = 2;
  ki_swi = 0.05;
  APC_P0 = 0.1015;
  ka_apc = 0.1;
  ki_apc = 0.15;
  Ja_apc = 0.1;
  Ji_apc = 0.1;
  Cdc20_T0 = 1.9163;
  ks_20_ = 0.006;
  ks_20__ = 0.6;
  kd_20 = 0.3;
  Cdc20_A0 = 0.4443;
  ka_20_ = 0.05;
  ka_20__ = 0.2;
  Cdh1_T0 = 1;
  ks_cdh = 0.01;
  kd_cdh = 0.01;
  Cdh10 = 0.9305;
  Ja_cdh = 0.03;
  Ji_cdh = 0.03;
  Tem10 = 0.9039;
  Ja_tem = 0.1;
  Ji_tem = 0.1;
  Tem1_T = 1;
  Cdc150 = 0.6565;
  ka_15_ = 0.002;
  ka_15__ = 1;
  ka_15___ = 0.001;
  ki_15 = 0.5;
  Cdc15_T = 1;
  Cdc14_T0 = 2;
  ks_14 = 0.2;
  kd_14 = 0.1;
  kd_net = 0.03;
  kdi_rent = 1;
  kdi_rentp = 2;
  kas_rent = 200;
  kas_rentp = 1;
  RENT0 = 1.0495;
  Net10 = 0.0186;
  Net1_T0 = 2.8;
  ks_net = 0.084;
  Esp1_T = 1;
  kd_b5_ = 0.01;
  kd_b5__ = 0.16;
  kd_b2_ = 0.003;
  kd_b2__ = 0.4;
  kd_b2p = 0.15;
  ka_sbf = 0.38;
  epsilon_sbf_n2 = 2;
  epsilon_sbf_n3 = 10;
  epsilon_sbf_b5 = 2;
  ki_sbf_ = 0.6;
  ki_sbf__ = 8;
  kd1_c1 = 0.01;
  kd2_c1 = 1;
  Jd2_c1 = 0.05;
  epsilon_c1_n2 = 0.06;
  epsilon_c1_n3 = 0.3;
  epsilon_c1_k2 = 0.03;
  epsilon_c1_b5 = 0.1;
  epsilon_c1_b2 = 0.45;
  Jd2_f6 = 0.05;
  kd1_f6 = 0.01;
  kd2_f6 = 1;
  epsilon_f6_n2 = 0.06;
  epsilon_f6_n3 = 0.3;
  epsilon_f6_k2 = 0.03;
  epsilon_f6_b5 = 0.1;
  epsilon_f6_b2 = 0.55;
  ka_cdh_ = 0.01;
  ka_cdh__ = 0.8;
  ki_cdh_ = 0.001;
  ki_cdh__ = 0.08;
  epsilon_cdh_n2 = 0.4;
  epsilon_cdh_n3 = 0.25;
  epsilon_cdh_b5 = 8;
  epsilon_cdh_b2 = 1.2;
  kpp_net_ = 0.05;
  kpp_net__ = 3;
  PPX0 = 0.1232;
  kkp_net_ = 0.01;
  kkp_net__ = 0.6;
  ks_ppx = 0.1;
  kd_ppx_ = 0.17;
  kd_ppx__ = 2;
  Jpds = 0.04;
  J20_ppx = 0.15;
  kd1_pds_ = 0.01;
  kd2_pds__ = 0.2;
  kd3_pds__ = 0.04;
  Kez = 0.3;
  Kez2 = 0.2;
  time_ = ;

  // Assignment rules:
  SBF := MBF;
  Vd_b50 := kd_b5_ + kd_b5__*Cdc20_A0;
  MBF := G_sbf0;
  Vd_b20 := kd_b2_ + kd_b2__*Cdh10 + kd_b2p*Cdc20_A0;
  Mcm10 := G_mcm0;
  Vkp_c10 := kd1_c1 + kd2_c1*(epsilon_c1_n3*Cln30 + epsilon_c1_k2*Bck20 + epsilon_c1_n2*Cln20 + epsilon_c1_b5*Clb50 + epsilon_c1_b2*Clb20)/(Jd2_c1 + Sic1_T0);
  Vkp_f60 := kd1_f6 + kd2_f6*(epsilon_f6_n3*Cln30 + epsilon_f6_k2*Bck20 + epsilon_f6_n2*Cln20 + epsilon_f6_b5*Clb50 + epsilon_f6_b2*Clb20)/(Jd2_f6 + Cdc6_T0);
  Vd_pds0 := kd1_pds_ + kd2_pds__*Cdc20_A0 + kd3_pds__*Cdh10;
  PE0 := Esp1_T - Esp10;
  Cln30 := C0*Dn3*mass0/(Jn3 + Dn3*mass0);
  G_sbf0 := 2*Ji_sbf*Va_sbf0/(Vi_sbf0 + Ja_sbf*Vi_sbf0 + Ji_sbf*Va_sbf0 + sqrt((Vi_sbf0 + Ja_sbf*Vi_sbf0 + Ji_sbf*Va_sbf0 - Va_sbf0)^2 - 4*(Vi_sbf0 - Va_sbf0)*Ji_sbf*Va_sbf0) - Va_sbf0);
  Vi_sbf0 := ki_sbf_ + ki_sbf__*Clb20;
  Va_sbf0 := ka_sbf*(epsilon_sbf_n2*Cln20 + epsilon_sbf_n3*(Cln30 + Bck20) + epsilon_sbf_b5*Clb50);
  G_mcm0 := 2*Ji_mcm*ka_mcm*Clb20/(ki_mcm + Ja_mcm*ki_mcm + Ji_mcm*ka_mcm*Clb20 + sqrt((ki_mcm + Ja_mcm*ki_mcm + Ji_mcm*ka_mcm*Clb20 - ka_mcm*Clb20)^2 - 4*(ki_mcm - ka_mcm*Clb20)*Ji_mcm*ka_mcm*Clb20) - ka_mcm*Clb20);
  Bck20 := B0*mass0;
  Clb5_T0 := Clb50 + C50 + C5P0 + F50 + F5P0;
  Clb2_T0 := Clb20 + C20 + C2P0 + F20 + F2P0;
  Sic1_T0 := Sic10 + Sic1P0 + C20 + C2P0 + C50 + C5P0;
  kmad2 := ;
  Va_cdh0 := ka_cdh_ + ka_cdh__*Cdc140;
  Vi_cdh0 := ki_cdh_ + ki_cdh__*(epsilon_cdh_n3*Cln30 + epsilon_cdh_n2*Cln20 + epsilon_cdh_b5*Clb50 + epsilon_cdh_b2*Clb20);
  kbub2 := ;
  klte1 := ;
  RENTP0 := Cdc14_T0 - (RENT0 + Cdc140);
  Net1P0 := Net1_T0 + Cdc140 - (Net10 + Cdc14_T0);
  Cdc6_T0 := Cdc60 + Cdc6P0 + F20 + F2P0 + F50 + F5P0;
  CKI_T0 := Sic1_T0 + Cdc6_T0;
  Vpp_net0 := kpp_net_ + kpp_net__*PPX0;
  Vkp_net0 := (kkp_net_ + kkp_net__*Cdc150)*mass0;
  Vd_ppx0 := kd_ppx_ + kd_ppx__*(J20_ppx + Cdc20_A0)*Jpds/(Jpds + Pds10);

  // Rate rules:
  mass0' = mass0*kg;
  Cln20' = (ks_n2_ + ks_n2__*SBF)*mass0 - kd_n2*Cln20;
  Clb50' = (ks_b5_ + ks_b5__*MBF)*mass0 + kd3_c1*C5P0 + kdi_b5*C50 + kd3_f6*F5P0 + kdi_f5*F50 - (Vd_b50 + kas_b5*Sic10 + kas_f5*Cdc60)*Clb50;
  C5P0' = Vkp_c10*C50 - (kpp_c1*Cdc140 + kd3_c1 + Vd_b50)*C5P0;
  C50' = kas_b5*Clb50*Sic10 + kpp_c1*Cdc140*C5P0 - (kdi_b5 + Vd_b50 + Vkp_c10)*C50;
  F5P0' = Vkp_f60*F50 - (kpp_f6*Cdc140 + kd3_f6 + Vd_b50)*F5P0;
  F50' = kas_f5*Clb50*Cdc60 + kpp_f6*Cdc140*F5P0 - (kdi_f5 + Vd_b50 + Vkp_f60)*F50;
  Sic10' = ks_c1_ + ks_c1__*Swi50 + (Vd_b20 + kdi_b2)*C20 + (Vd_b50 + kdi_b5)*C50 + kpp_c1*Cdc140*Sic1P0 - (kas_b2*Clb20 + kas_b5*Clb50 + Vkp_c10)*Sic10;
  Cdc60' = ks_f6_ + ks_f6__*Swi50 + ks_f6___*SBF + (Vd_b20 + kdi_f2)*F20 + (Vd_b50 + kdi_f5)*F50 + kpp_f6*Cdc140*Cdc6P0 - (kas_f2*Clb20 + kas_f5*Clb50 + Vkp_f60)*Cdc60;
  Clb20' = (ks_b2_ + ks_b2__*Mcm10)*mass0 + kd3_c1*C2P0 + kdi_b2*C20 + kd3_f6*F2P0 + kdi_f2*F20 - (Vd_b20 + kas_b2*Sic10 + kas_f2*Cdc60)*Clb20;
  C2P0' = Vkp_c10*C20 - (kpp_c1*Cdc140 + kd3_c1 + Vd_b20)*C2P0;
  C20' = kas_b2*Clb20*Sic10 + kpp_c1*Cdc140*C2P0 - (kdi_b2 + Vd_b20 + Vkp_c10)*C20;
  F2P0' = Vkp_f60*F20 - (kpp_f6*Cdc140 + kd3_f6 + Vd_b20)*F2P0;
  F20' = kas_f2*Clb20*Cdc60 + kpp_f6*Cdc140*F2P0 - (kdi_f2 + Vd_b20 + Vkp_f60)*F20;
  Swi50' = ks_swi_ + ks_swi__*Mcm10 + ka_swi*Cdc140*(Swi5_T0 - Swi50) - (kd_swi + ki_swi*Clb20)*Swi50;
  Cdc140' = ks_14 + kd_net*(RENT0 + RENTP0) + kdi_rent*RENT0 + kdi_rentp*RENTP0 - (kd_14*Cdc140 + (kas_rent*Net10 + kas_rentp*Net1P0)*Cdc140);
  Sic1P0' = Vkp_c10*Sic10 - (kpp_c1*Cdc140 + kd3_c1)*Sic1P0 + Vd_b20*C2P0 + Vd_b50*C5P0;
  Cdc6P0' = Vkp_f60*Cdc60 - (kpp_f6*Cdc140 + kd3_f6)*Cdc6P0 + Vd_b20*F2P0 + Vd_b50*F5P0;
  Pds10' = ks_pds_ + ks1_pds__*SBF + ks2_pds__*Mcm10 + kdi_esp*PE0 - (Vd_pds0 + kas_esp*Esp10)*Pds10;
  Esp10' = -kas_esp*Pds10*Esp10 + (kdi_esp + Vd_pds0)*PE0;
  ORI0' = ks_ori*(epsilon_ori_b5*Clb50 + epsilon_ori_b2*Clb20) - kd_ori*ORI0;
  BUD0' = ks_bud*(epsilon_bud_n2*Cln20 + epsilon_bud_n3*Cln30 + epsilon_bud_b5*Clb50) - kd_bud*BUD0;
  SPN0' = ks_spn*Clb20/(Jspn + Clb20) - kd_spn*SPN0;
  Swi5_T0' = ks_swi_ + ks_swi__*Mcm10 - kd_swi*Swi5_T0;
  APC_P0' = ka_apc*Clb20*(1 - APC_P0)/(Ja_apc + 1 - APC_P0) - ki_apc*APC_P0/(Ji_apc + APC_P0);
  Cdc20_T0' = ks_20_ + ks_20__*Mcm10 - kd_20*Cdc20_T0;
  Cdc20_A0' = (ka_20_ + ka_20__*APC_P0)*(Cdc20_T0 - Cdc20_A0) - (kmad2 + kd_20)*Cdc20_A0;
  Cdh1_T0' = ks_cdh - kd_cdh*Cdh1_T0;
  Cdh10' = ks_cdh + Va_cdh0*(Cdh1_T0 - Cdh10)/(Ja_cdh + Cdh1_T0 - Cdh10) - (kd_cdh*Cdh10 + Vi_cdh0*Cdh10/(Ji_cdh + Cdh10));
  Tem10' = klte1*(Tem1_T - Tem10)/(Ja_tem + Tem1_T - Tem10) - kbub2*Tem10/(Ji_tem + Tem10);
  Cdc150' = (ka_15_*(Tem1_T - Tem10) + ka_15__*Tem10 + ka_15___*Cdc140)*(Cdc15_T - Cdc150) - ki_15*Cdc150;
  Cdc14_T0' = ks_14 - kd_14*Cdc14_T0;
  RENT0' = kas_rent*Cdc140*Net10 + Vpp_net0*RENTP0 - ((kd_14 + kd_net)*RENT0 + kdi_rent*RENT0 + Vkp_net0*RENT0);
  Net10' = ks_net + kd_14*RENT0 + kdi_rent*RENT0 + Vpp_net0*Net1P0 - (kd_net*Net10 + kas_rent*Cdc140*Net10 + Vkp_net0*Net10);
  Net1_T0' = ks_net - kd_net*Net1_T0;
  PPX0' = ks_ppx - Vd_ppx0*PPX0;
end
