// SBML level 2 version 4

model chen_popel_model_2007_version01____main()
  // Originally created by libAntimony v1.3 (using libSBML 4.1.0-b2)

  // Compartments:
  compartment default_compartment = 1;

  // Parameters:
  Fe30 = 0.6;
  Arg = 100;
  Fe3_Arg0 = 0;
  Fe3_NO0 = 0;
  Fe2_NO0 = 0;
  O2 = 100;
  k1 = 6.6;
  k_1 = 6.6;
  k2 = 20.8;
  k13 = 39.9;
  k12 = 0.01;
  k3 = 20.8;
  Fe20 = 0;
  Fe2_Arg0 = 0;
  k_4 = 6.6;
  k4 = 6.6;
  Fe3_O2_Arg0 = 0;
  k5 = 8.5;
  k_5 = 215.6;
  k6 = 175.6;
  Fe3_NOHA0 = 0;
  k7 = 20.8;
  Fe2_NOHA0 = 0;
  NOHA0 = 0;
  Fe3_O2_NOHA0 = 0;
  k9 = 8.6;
  k_9 = 399.2;
  k_8 = 13.2;
  k8 = 13.2;
  k10 = 39.1;
  k11 = 20.8;
  NO_NO = 0;
  citrulline_citrulline = 0;
  NO3_NO3 = 0;
  time_ = ;
  NO_dNOdt = ;

  // Rate rules:
  Fe30' = k_1*Fe3_Arg0 + k13*Fe3_NO0 + k12*Fe2_NO0*O2 - (k1*Arg*Fe30 + k2*Fe30);
  Fe3_Arg0' = k1*Fe30*Arg - (k_1*Fe3_Arg0 + k3*Fe3_Arg0);
  Fe3_NO0' = k10*Fe3_O2_NOHA0 - (k13*Fe3_NO0 + k11*Fe3_NO0);
  Fe2_NO0' = k11*Fe3_NO0 - k12*Fe2_NO0*O2;
  Fe20' = k2*Fe30 + k_4*Fe2_Arg0 - k4*Fe20*Arg;
  Fe2_Arg0' = k3*Fe3_Arg0 + k_5*Fe3_O2_Arg0 + k4*Fe20*Arg - (k5*Fe2_Arg0*O2 + k_4*Fe2_Arg0);
  Fe3_O2_Arg0' = k5*Fe2_Arg0*O2 - (k6*Fe3_O2_Arg0 + k_5*Fe3_O2_Arg0);
  Fe3_NOHA0' = k6*Fe3_O2_Arg0 - k7*Fe3_NOHA0;
  Fe2_NOHA0' = k7*Fe3_NOHA0 + k_9*Fe3_O2_NOHA0 + k8*Fe20*NOHA0 - (k_8*Fe2_NOHA0 + k9*Fe2_NOHA0*O2);
  NOHA0' = k_8*Fe2_NOHA0 - k8*Fe20*NOHA0;
  Fe3_O2_NOHA0' = k9*Fe2_NOHA0*O2 - (k10*Fe3_O2_NOHA0 + k_9*Fe3_O2_NOHA0);
  NO_NO' = NO_dNOdt;
  citrulline_citrulline' = k10*Fe3_O2_NOHA0;
  NO3_NO3' = k12*Fe2_NO0*O2;
end
