// SBML level 2 version 4

model cheng_model_2000____main()
  // Originally created by libAntimony v1.3 (using libSBML 4.1.0-b2)

  // Compartments:
  compartment default_compartment = 1;

  // Parameters:
  F_SE_cT = 27.8;
  F_SE_kT = 0.0047;
  F_SE_LT_r = 0.964;
  LT_ = 0.02;
  F_max = 23;
  F_PE1_c1 = 23;
  F_PE1_k1 = 0.046;
  F_PE1_L_r1 = 1.17;
  F_PE1_eta = 0.001;
  L1 = 0.15;
  L_max = 0.13;
  V1 = 0.09314;
  F_PE2_c2 = 23;
  F_PE2_k2 = 0.046;
  F_PE2_L_r2 = 1.17;
  FL_beta = 1.55;
  FL_omega = 0.75;
  FL_rho = 2.12;
  FV_av0 = -1.53;
  FV_av1 = 0;
  FV_av2 = 0;
  FV_cv0 = -5.7;
  FV_cv1 = 9.18;
  FV_bv = 0.69;
  FV_V_max = -9.15;
  Af_af = 0.56;
  Af_nf0 = 2.1;
  Af_nf1 = 3.3;
  Af_nf = 1;
  Y0 = 1;
  S0 = 1;
  f_eff = 0;
  L_eff0 = 0.1497;
  L_eff_T_L = 0.088;
  S_T_s = 43;
  S_as1 = 1.76;
  S_as2 = 0.96;
  Y_c_Y = 0.35;
  Y_V_Y = 0.1;
  Y_T_Y = 200;
  f_int = 0;
  rise_and_fall_time_T_f1 = 0.35;
  rise_and_fall_time_T_f2 = 0.1;
  rise_and_fall_time_T_f3 = 200;
  rise_and_fall_time_T_f4 = 200;
  f_env = 1;
  V_mass = 0.005;
  time_ = ;
  rise_and_fall_time_T_f = ;

  // Assignment rules:
  F_SE0 := F_SE_cT*F_max*F_SE_kT*ln(exp((LT_ - F_SE_LT_r)/F_SE_kT) + 1);
  F_PE10 := F_PE1_c1*F_PE1_k1*ln(exp((L1/L_max - F_PE1_L_r1)/F_PE1_k1) + 1) + F_PE1_eta*V1;
  F_PE20 := F_PE2_c2*(exp(F_PE2_k2*(L1 - F_PE2_L_r2)) - 1);
  FL0 := exp(-abs((L1^FL_beta - 1)/FL_omega)^FL_rho);
  FV0 := ;
  Af0 := 1 - exp(-(Y0*S0*f_eff/(Af_af*Af_nf))^Af_nf);
  F00 := Af0*(FL0 + FV0 + F_PE20) + F_PE10;
  F_CE0 := F00*F_max;
  F_total0 := F_SE0 - F_CE0;
  S_as_ := ;
  rise_and_fall_time_df_eff_dt := (f_int - f_eff)/rise_and_fall_time_T_f;
  V00 := V1/L_max;
  L00 := L1/L_max;

  // Rate rules:
  L1' = V1;
  V1' = F_total0/V_mass;
  Y0' = (1 - (Y_c_Y*(1 - exp(-abs(V1)/Y_V_Y)) + Y0))/Y_T_Y;
  S0' = (S_as_ - S0)/S_T_s;
  f_eff' = rise_and_fall_time_df_eff_dt;
  L_eff0' = (L1 - L_eff0)^3/(L_eff_T_L*(1 - Af0));
  f_int' = (f_env - f_int)/rise_and_fall_time_T_f;
end
