// SBML level 2 version 4

model ciliberto_petrus_tyson_sible_2003_version01____main()
  // Originally created by libAntimony v1.3 (using libSBML 4.1.0-b2)

  // Compartments:
  compartment default_compartment = 1;

  // Parameters:
  Cdk2_CycE0 = 0.06;
  kwee = 1.5;
  kon = 0.02;
  k25A = 0.1;
  koff = 0.0001;
  kassoc = 0.1;
  kdissoc = 0.001;
  Wee1_a0 = 1.02;
  PCdk2_CycE0 = 0.94;
  Xic0 = 3;
  Cdk2_CycErem0 = 0;
  Xic_Cdk2_CycE0 = 0;
  PCdk2_CycErem0 = 0;
  Xic_PCdk2_CycE0 = 0;
  Wee1_a_Jwact = 0.01;
  Wee1_a_Jwinact = 0.01;
  Wee1_a_Wee1_total = 8;
  Wee1_a_kwact = 0.75;
  Wee1_a_kwinact = 1.5;
  Kin_a0 = 0.6;
  Kin_a_Jiact = 0.01;
  Kin_a_Jiinact = 0.01;
  Kin_a_kiact = 0.15;
  Kin_a_kiinact = 0.6;
  kedeg = 0.017;
  kxdeg = 0.01;
  Deg_a0 = 0;
  Xic_Cdk2_CycErem0 = 0;
  Xic_PCdk2_CycErem0 = 0;
  Deg_a_kdact = 0.023;
  Deg_a_theta = 0.3;
  Deg = 0;
  Xicrem0 = 0;
  kinetic_parameters_epsilon = 0.001;
  kinetic_parameters_n = 4;
  kinetic_parameters_L = 0.4;
  time_ = ;

  // Assignment rules:
  phi := (kinetic_parameters_epsilon + pool^kinetic_parameters_n)/(kinetic_parameters_L^kinetic_parameters_n + pool^kinetic_parameters_n);
  Deg_a_Heav := ;
  Deg_a_x := Cdk2_CycErem0 - Deg_a_theta;
  Cyc_total0 := Xic_PCdk2_CycE0 + Xic_Cdk2_CycE0 + Xic_PCdk2_CycErem0 + Xic_Cdk2_CycErem0 + PCdk2_CycErem0 + Cdk2_CycErem0 + Cdk2_CycE0 + PCdk2_CycE0;
  Xic_total0 := (Xic0 + Xic_PCdk2_CycE0 + Xic_Cdk2_CycE0 + Xic_PCdk2_CycErem0 + Xic_Cdk2_CycErem0 + Xicrem0)/3;
  pool := Cdk2_CycErem0 + PCdk2_CycErem0 + Xic_Cdk2_CycErem0 + Xic_PCdk2_CycErem0;

  // Rate rules:
  Cdk2_CycE0' = k25A*PCdk2_CycE0 + koff*Cdk2_CycErem0 + kdissoc*Xic_Cdk2_CycE0 - (kwee*Wee1_a0*Cdk2_CycE0 + kon*phi*Cdk2_CycE0 + kassoc*Xic0*Cdk2_CycE0);
  Wee1_a0' = Wee1_a_kwact*(Wee1_a_Wee1_total - Wee1_a0)/(Wee1_a_Jwact + Wee1_a_Wee1_total - Wee1_a0) - Wee1_a_kwinact*Kin_a0*Wee1_a0/(Wee1_a_Jwinact + Wee1_a0);
  PCdk2_CycE0' = kwee*Wee1_a0*Cdk2_CycE0 + koff*PCdk2_CycErem0 + kdissoc*Xic_PCdk2_CycE0 - (k25A*PCdk2_CycE0 + kon*phi*PCdk2_CycE0 + kassoc*Xic0*PCdk2_CycE0);
  Xic0' = kdissoc*(Xic_Cdk2_CycE0 + Xic_PCdk2_CycE0 + Xic_Cdk2_CycErem0 + Xic_PCdk2_CycErem0) - kassoc*Xic0*(Cdk2_CycE0 + PCdk2_CycE0 + Cdk2_CycErem0 + PCdk2_CycErem0);
  Cdk2_CycErem0' = kon*phi*Cdk2_CycE0 + kxdeg*Xic_Cdk2_CycErem0 + kdissoc*Xic_Cdk2_CycErem0 - (koff*Cdk2_CycErem0 + kedeg*Deg_a0*Cdk2_CycErem0 + kassoc*Xic0*Cdk2_CycErem0);
  Xic_Cdk2_CycE0' = kassoc*Xic0*Cdk2_CycE0 + koff*Xic_Cdk2_CycErem0 + k25A*Xic_PCdk2_CycE0 - (kdissoc*Xic_Cdk2_CycE0 + kon*phi*Xic_Cdk2_CycE0 + kwee*Wee1_a0*Xic_Cdk2_CycE0);
  PCdk2_CycErem0' = kon*phi*PCdk2_CycE0 + kxdeg*Xic_PCdk2_CycErem0 + kdissoc*Xic_PCdk2_CycErem0 - (koff*PCdk2_CycErem0 + kedeg*Deg_a0*PCdk2_CycErem0 + kassoc*Xic0*PCdk2_CycErem0);
  Xic_PCdk2_CycE0' = kassoc*Xic0*PCdk2_CycE0 + koff*Xic_PCdk2_CycErem0 + kwee*Wee1_a0*Xic_Cdk2_CycE0 - (kdissoc*Xic_PCdk2_CycE0 + kon*phi*Xic_PCdk2_CycE0 + k25A*Xic_PCdk2_CycE0);
  Kin_a0' = Kin_a_kiact*(1 - Kin_a0)/(Kin_a_Jiact + 1 - Kin_a0) - Kin_a_kiinact*Cdk2_CycE0*Kin_a0/(Kin_a_Jiinact + Kin_a0);
  Deg_a0' = Deg_a_kdact*Deg_a_Heav;
  Xic_Cdk2_CycErem0' = kassoc*Xic0*Cdk2_CycErem0 + kon*phi*Xic_Cdk2_CycE0 - (kdissoc*Xic_Cdk2_CycErem0 + koff*Xic_Cdk2_CycErem0 + kedeg*Deg_a0*Xic_Cdk2_CycErem0 + kxdeg*Xic_Cdk2_CycErem0);
  Xic_PCdk2_CycErem0' = kassoc*Xic0*PCdk2_CycErem0 + kon*phi*Xic_PCdk2_CycE0 - (kdissoc*Xic_PCdk2_CycErem0 + koff*Xic_PCdk2_CycErem0 + kedeg*Deg*Xic_PCdk2_CycErem0 + kxdeg*Xic_PCdk2_CycErem0);
  Xicrem0' = kedeg*Deg_a0*Xic_Cdk2_CycErem0 + kedeg*Deg_a0*Xic_PCdk2_CycErem0 - kxdeg*Xicrem0;
end
