// SBML level 2 version 4

model ciliberto_tyson_2000_version01____main()
  // Originally created by libAntimony v1.4 (using libSBML 4.1.0-b2)

  // Compartments:
  compartment default_compartment = 1;

  // Parameters:
  Y0 = 0.01577552;
  Y_k1 = 0.024;
  k3 = 1.15;
  M0 = 0.0142077;
  preMPF0 = 0.02541723;
  Cdc25P0 = 0.4844362;
  Cdc25P_k25 = 18;
  Cdc25P_Km25 = 0.1;
  Cdc25P_k25r = 0.8;
  Cdc25P_Km25r = 1;
  Wee10 = 0.5155638;
  Wee1_kw = 18;
  Wee1_Kmw = 0.1;
  Wee1_kwr = 0.8;
  Wee1_Kmwr = 1;
  IEP0 = 0.002287817;
  IEP_kie = 4.5;
  IEP_Kmie = 0.01;
  IEP_kier = 0.34;
  IEP_Kmier = 0.01;
  APC_0 = 0.5051103;
  APC__kap = 0.3;
  APC__Kmap = 0.01;
  APC__kapr = 0.3;
  APC__Kmapr = 1;
  C_Cdc2tot = 1;
  Cdc25_Cdc25tot = 1;
  Wee1P_Wee1tot = 1;
  IE_IEtot = 1;
  APC_APCtot = 1;
  p_R = 1;
  p_s = 0.021;
  p_q = 1;
  kinetic_parameters_V2 = 0.01;
  kinetic_parameters_V2_ = 0.6;
  kinetic_parameters_V25 = 0.04;
  kinetic_parameters_V25_ = 0.4;
  kinetic_parameters_Vwee = 0.025;
  kinetic_parameters_Vwee_ = 2.5;
  time_ = ;

  // Assignment rules:
  k2 := kinetic_parameters_V2*APC0 + kinetic_parameters_V2_*APC_0;
  C0 := C_Cdc2tot - (M0 + preMPF0);
  kwee := kinetic_parameters_Vwee*Wee1P0 + kinetic_parameters_Vwee_*Wee10;
  kcdc25 := kinetic_parameters_V25*Cdc250 + kinetic_parameters_V25_*Cdc25P0;
  Cdc25P_k25ro := Cdc25P_k25r/p0;
  p0 := p_s*p_R + p_q;
  Cdc250 := Cdc25_Cdc25tot - Cdc25P0;
  Wee1_kwro := Wee1_kwr/p0;
  Wee1P0 := Wee1P_Wee1tot - Wee10;
  IE0 := IE_IEtot - IEP0;
  APC0 := APC_APCtot - APC_0;

  // Rate rules:
  Y0' = Y_k1 - (k2*Y0 + k3*Y0*C0);
  M0' = kcdc25*preMPF0 + k3*Y0*C0 - (k2*M0 + kwee*M0);
  preMPF0' = kwee*M0 - (k2*preMPF0 + kcdc25*preMPF0);
  Cdc25P0' = Cdc25P_k25*M0*Cdc250/(Cdc25P_Km25 + Cdc250) - Cdc25P_k25r*Cdc25P0/(Cdc25P_Km25r + Cdc25P0);
  Wee10' = -Wee1_kw*M0*Wee10/(Wee1_Kmw + Wee10) + Wee1_kwr*Wee1P0/(Wee1_Kmwr + Wee1P0);
  IEP0' = IEP_kie*M0*IE0/(IEP_Kmie + IE0) - IEP_kier*IEP0/(IEP_Kmier + IEP0);
  APC_0' = APC__kap*IEP0*APC0/(APC__Kmap + APC0) - APC__kapr*APC_0/(APC__Kmapr + APC_0);
end
