// SBML level 2 version 4

model colegrove_albrecht_friel_2000_version01____main()
  // Originally created by libAntimony v1.4 (using libSBML 4.1.0-b2)

  // Compartments:
  compartment default_compartment = 1;

  // Parameters:
  Ca_extrusion_across_the_plasma_membrane_k_leak = 3.7e-7;
  Ca_extrusion_across_the_plasma_membrane_Vmax_extru = 28.3;
  Ca_extrusion_across_the_plasma_membrane_EC50_extru = 378.8;
  Ca_extrusion_across_the_plasma_membrane_n_extru = 1.8;
  Ca_extrusion_across_the_plasma_membrane_Ca_o = 0.002;
  Ca_i = ;
  mitochondrial_Ca_uptake_kuni_max = 75.9;
  mitochondrial_Ca_uptake_EC50_uni = 10;
  mitochondrial_Ca_uptake_n_uni = 2;
  mitochondrial_Ca_release_Vmax_NaCa = -35;
  mitochondrial_Ca_release_EC50_NaCa = 307;
  mitochondrial_Ca_release_n_inhib = 6;
  mitochondrial_Ca_release_k_inhib = 500;
  Ca_m = ;
  time_ = ;
  mitochondrial_calcium_v_m = ;
  mitochondrial_calcium_k_m = ;
  mitochondrial_calcium_v_i = ;
  mitochondrial_calcium_k_i = ;

  // Assignment rules:
  J_pm := Ca_extrusion_across_the_plasma_membrane_J_leak + Ca_extrusion_across_the_plasma_membrane_J_extru;
  Ca_extrusion_across_the_plasma_membrane_J_leak := Ca_extrusion_across_the_plasma_membrane_k_leak*(Ca_i - Ca_extrusion_across_the_plasma_membrane_Ca_o);
  Ca_extrusion_across_the_plasma_membrane_J_extru := Ca_extrusion_across_the_plasma_membrane_Vmax_extru/(1 + (Ca_extrusion_across_the_plasma_membrane_EC50_extru/Ca_i)^Ca_extrusion_across_the_plasma_membrane_n_extru);
  J_uni := mitochondrial_Ca_uptake_kuni_max*Ca_i/(1 + (mitochondrial_Ca_uptake_EC50_uni/Ca_i)^mitochondrial_Ca_uptake_n_uni);
  J_NaCa := -mitochondrial_Ca_release_Vmax_NaCa/(1 + mitochondrial_Ca_release_EC50_NaCa/Ca_m);
  Ca_inhibited_J_NaCa := -(mitochondrial_Ca_release_delta_Ca_i*mitochondrial_Ca_release_Vmax_NaCa)/(1 + mitochondrial_Ca_release_EC50_NaCa/Ca_i);
  J_mito := J_uni + J_NaCa;
  mitochondrial_Ca_release_delta_Ca_i := 1 - 1/(1 - (mitochondrial_Ca_release_k_inhib/Ca_i)^mitochondrial_Ca_release_n_inhib);
  mitochondrial_calcium_gamma := mitochondrial_calcium_v_m*mitochondrial_calcium_k_m/(mitochondrial_calcium_v_i*mitochondrial_calcium_k_i);

  // Rate rules:
  Ca_i' = -(J_pm + J_mito);
  Ca_m' = J_mito/mitochondrial_calcium_gamma;
end
