// SBML level 2 version 4

model GPCR_Cycle____main()
  // Originally created by libAntimony v1.3 (using libSBML 4.1.0-b2)

  // Compartments:
  compartment default_compartment = 1;

  // Parameters:
  GPCR_Cycle_kf1 = 0.0003;
  GPCR_Cycle_Kd1 = 3e-5;
  GPCR_Cycle_kf2 = 2.75e-4;
  GPCR_Cycle_Kd2 = 27500;
  GPCR_Cycle_kf3 = 1;
  GPCR_Cycle_kr3 = 0.001;
  GPCR_Cycle_kf4 = 0.3;
  GPCR_Cycle_Kd4 = 3e-5;
  GPCR_Cycle_kf5 = 0.0004;
  GPCR_Cycle_kf6 = 1;
  GPCR_Cycle_R = 13.9;
  GPCR_Cycle_Rl = 0;
  GPCR_Cycle_Rg = 5.06;
  GPCR_Cycle_Rlg = 0;
  GPCR_Cycle_Rlgp = 0;
  t = ;
  L = ;
  Gd = ;

  // Assignment rules:
  J2 := GPCR_Cycle_kf2*GPCR_Cycle_R*Gd - GPCR_Cycle_kr2*GPCR_Cycle_Rg;
  J3 := GPCR_Cycle_kf3*GPCR_Cycle_Rl*Gd - GPCR_Cycle_kr3*GPCR_Cycle_Rlg;
  J6 := GPCR_Cycle_kf6*GPCR_Cycle_Rlg;
  GPCR_Cycle_J1 := GPCR_Cycle_kf1*GPCR_Cycle_R*L - GPCR_Cycle_kr1*GPCR_Cycle_Rl;
  GPCR_Cycle_kr1 := GPCR_Cycle_kf1*GPCR_Cycle_Kd1;
  GPCR_Cycle_kr2 := GPCR_Cycle_kf2*GPCR_Cycle_Kd2;
  GPCR_Cycle_J4 := GPCR_Cycle_kf4*L*GPCR_Cycle_Rg - GPCR_Cycle_kr4*GPCR_Cycle_Rlg;
  GPCR_Cycle_kr4 := GPCR_Cycle_kf4*GPCR_Cycle_Kd4;
  GPCR_Cycle_J5 := GPCR_Cycle_kf5*GPCR_Cycle_Rlg;

  // Rate rules:
  GPCR_Cycle_R' = -1*GPCR_Cycle_J1 - J2;
  GPCR_Cycle_Rl' = GPCR_Cycle_J1 + J6 - J3;
  GPCR_Cycle_Rg' = J2 - GPCR_Cycle_J4;
  GPCR_Cycle_Rlg' = J3 - GPCR_Cycle_J5 + (GPCR_Cycle_J4 - J6);
  GPCR_Cycle_Rlgp' = GPCR_Cycle_J5;
end
