// SBML level 2 version 4

model SM_model____main()
  // Originally created by libAntimony v1.4 (using libSBML 4.1.0-b2)

  // Compartments:
  compartment default_compartment = 1;

  // Parameters:
  Ach = 1e-5;
  Gcouple = 1.3;
  T = 310;
  T_exp = 297;
  F = 96486;
  R = 8314.4;
  Q10Ca = 2.1;
  Q10K = 1.365;
  Q10Na = 2.45;
  Ca_o = 2.5;
  Na_o = 137;
  K_o = 5.9;
  Cl_o = 134;
  SM_Membrane_Cm_SM = 77;
  Vol_SM = 3500;
  Vm_SM = -69.75;
  Ca_i = 8e-5;
  Na_i = 10;
  K_i = 164;
  SM_Membrane_I_Na_SM_mod_G_max_Na_SM = 3;
  SM_Membrane_h_Na_SM = 0.05787;
  SM_Membrane_m_Na_SM = 0.005;
  SM_Membrane_I_Ltype_SM_mod_G_max_Ltype = 65;
  SM_Membrane_f_Ltype_SM = 0.95;
  SM_Membrane_d_Ltype_SM = 0;
  SM_Membrane_f_ca_Ltype_SM = 1;
  SM_Membrane_I_LVA_SM_mod_G_max_LVA = 0.18;
  SM_Membrane_f_LVA_SM = 0.99;
  SM_Membrane_d_LVA_SM = 0.02;
  SM_Membrane_I_BK_SM_mod_G_max_BK = 45.7;
  SM_Membrane_I_kr_SM_mod_G_max_kr_SM = 35;
  SM_Membrane_xr1_SM = 0;
  SM_Membrane_xr2_SM = 0.82;
  SM_Membrane_I_ka_SM_mod_G_max_ka_SM = 9;
  SM_Membrane_xa1_SM = 0.00414;
  SM_Membrane_xa2_SM = 0.72;
  SM_Membrane_I_bk_SM_mod_G_max_bk = 0.0144;
  SM_Membrane_I_NSCC_SM_mod_E_NSCC = -28;
  SM_Membrane_I_NSCC_SM_mod_G_max_NSCC_SM = 50;
  SM_Membrane_m_NSCC_SM = 0;
  SM_Membrane_J_CaSR_SM_mod_J_max_CaSR = 0.31705;
  I_stim_period = 20000;
  I_stim_delta_VICC = 59;
  I_stim_t_ICCpeak = 98;
  I_stim_t_ICCplateau = 7582;
  I_stim_t_ICC_stimulus = 10000;
  I_stim_V_decay = 37.25;
  time_ = ;

  // Assignment rules:
  T_correction_Na := Q10Na^((T - T_exp)/10);
  T_correction_K := Q10K^((T - T_exp)/10);
  T_correction_Ca := Q10Ca^((T - T_exp)/10);
  T_correction_BK := 1.1*(T - T_exp);
  FoRT := F/(R*T);
  RToF := R*T/F;
  I_Na_SM := SM_Membrane_I_Na_SM_mod_G_max_Na_SM*SM_Membrane_h_Na_SM*SM_Membrane_m_Na_SM*(Vm_SM - SM_Membrane_I_Na_SM_mod_E_Na);
  I_Ltype_SM := SM_Membrane_I_Ltype_SM_mod_G_max_Ltype*SM_Membrane_f_Ltype_SM*SM_Membrane_d_Ltype_SM*SM_Membrane_f_ca_Ltype_SM*(Vm_SM - SM_Membrane_I_Ltype_SM_mod_E_Ca);
  I_LVA_SM := SM_Membrane_I_LVA_SM_mod_G_max_LVA*SM_Membrane_f_LVA_SM*SM_Membrane_d_LVA_SM*(Vm_SM - SM_Membrane_I_LVA_SM_mod_E_Ca);
  I_kr_SM := SM_Membrane_I_kr_SM_mod_G_max_kr_SM*SM_Membrane_xr1_SM*SM_Membrane_xr2_SM*(Vm_SM - SM_Membrane_I_kr_SM_mod_E_K);
  I_ka_SM := SM_Membrane_I_ka_SM_mod_G_max_ka_SM*SM_Membrane_xa1_SM*SM_Membrane_xa2_SM*(Vm_SM - SM_Membrane_I_ka_SM_mod_E_K);
  I_BK_SM := (SM_Membrane_I_BK_SM_mod_G_max_BK + T_correction_BK)*SM_Membrane_d_BK_SM*(Vm_SM - SM_Membrane_I_BK_SM_mod_E_K);
  I_NSCC_SM := SM_Membrane_I_NSCC_SM_mod_G_max_NSCC_SM*SM_Membrane_m_NSCC_SM*SM_Membrane_I_NSCC_SM_mod_f_ca_NSCC_SM*SM_Membrane_I_NSCC_SM_mod_rach_NSCC_SM*(Vm_SM - SM_Membrane_I_NSCC_SM_mod_E_NSCC);
  I_bk_SM := SM_Membrane_I_bk_SM_mod_G_max_bk*(Vm_SM - SM_Membrane_I_bk_SM_mod_E_K);
  J_CaSR_SM := SM_Membrane_J_CaSR_SM_mod_J_max_CaSR*(Ca_i*1)^1.34;
  I_stim0 := ;
  SM_Membrane_I_Na_SM_mod_E_Na := RToF*ln(Na_o/Na_i);
  SM_Membrane_I_Na_SM_mod_m_Na_SM_mod_m_inf_Na := 1/(1 + exp((Vm_SM + 47)/(-4.8)));
  SM_Membrane_I_Na_SM_mod_m_Na_SM_mod_tau_m_Na := T_correction_Na*(Vm_SM*(-0.017)*1 + 0.44);
  SM_Membrane_I_Na_SM_mod_h_Na_SM_mod_h_inf_Na := 1/(1 + exp((Vm_SM + 78)/3));
  SM_Membrane_I_Na_SM_mod_h_Na_SM_mod_tau_h_Na := T_correction_Na*(Vm_SM*(-0.25)*1 + 5.5);
  SM_Membrane_I_Ltype_SM_mod_E_Ca := 0.5*RToF*ln(Ca_o/Ca_i);
  SM_Membrane_I_Ltype_SM_mod_d_Ltype_SM_mod_d_inf_Ltype_SM := 1/(1 + exp((Vm_SM + 17)/(-4.3)));
  SM_Membrane_I_Ltype_SM_mod_d_Ltype_SM_mod_tau_d_Ltype_SM := T_correction_Ca*0.47;
  SM_Membrane_I_Ltype_SM_mod_f_Ltype_SM_mod_f_inf_Ltype_SM := 1/(1 + exp((Vm_SM + 43)/8.9));
  SM_Membrane_I_Ltype_SM_mod_f_Ltype_SM_mod_tau_f_Ltype_SM := T_correction_Ca*86;
  SM_Membrane_I_Ltype_SM_mod_f_ca_Ltype_SM_mod_f_ca_inf_Ltype_SM := 1 - 1/(1 + exp((Ca_i - 8.999e-5 - 0.000214)/(-1.31e-5)));
  SM_Membrane_I_Ltype_SM_mod_f_ca_Ltype_SM_mod_tau_f_ca_Ltype_SM := T_correction_Ca*2;
  SM_Membrane_I_LVA_SM_mod_E_Ca := 0.5*RToF*ln(Ca_o/Ca_i);
  SM_Membrane_I_LVA_SM_mod_d_LVA_SM_mod_d_inf_LVA_SM := 1/(1 + exp((Vm_SM + 27.5)/(-10.9)));
  SM_Membrane_I_LVA_SM_mod_d_LVA_SM_mod_tau_d_LVA_SM := T_correction_Ca*3;
  SM_Membrane_I_LVA_SM_mod_f_LVA_SM_mod_f_inf_LVA_SM := 1/(1 + exp((Vm_SM + 15.8)/7));
  SM_Membrane_I_LVA_SM_mod_f_LVA_SM_mod_tau_f_LVA_SM := T_correction_Ca*7.58*exp(Vm_SM*0.00817);
  SM_Membrane_I_BK_SM_mod_E_K := RToF*ln(K_o/K_i);
  SM_Membrane_d_BK_SM := 1/(1 + exp(Vm_SM/(-17) - 2*ln(Ca_i/0.001)));
  SM_Membrane_I_kr_SM_mod_E_K := RToF*ln(K_o/K_i);
  SM_Membrane_I_kr_SM_mod_xr1_SM_mod_xr1_inf_SM := 1/(1 + exp((Vm_SM + 27)/(-5)));
  SM_Membrane_I_kr_SM_mod_xr1_SM_mod_tau_xr1_SM := T_correction_K*80;
  SM_Membrane_I_kr_SM_mod_xr2_SM_mod_xr2_inf_SM := 0.2 + 0.8/(1 + exp((Vm_SM + 58)/10));
  SM_Membrane_I_kr_SM_mod_xr2_SM_mod_tau_xr2_SM := T_correction_K*(-707 + 1481*exp((Vm_SM + 36)/95));
  SM_Membrane_I_ka_SM_mod_E_K := RToF*ln(K_o/K_i);
  SM_Membrane_I_ka_SM_mod_xa1_SM_mod_xa1_inf_SM := 1/(1 + exp((Vm_SM + 26.5)/(-7.9)));
  SM_Membrane_I_ka_SM_mod_xa1_SM_mod_tau_xa1_SM := T_correction_K*(31.8 + 175*exp(-0.5*((Vm_SM + 44.4)/22.3)^2));
  SM_Membrane_I_ka_SM_mod_xa2_SM_mod_xa2_inf_SM := 0.1 + 0.9/(1 + exp((Vm_SM + 65)/6.2));
  SM_Membrane_I_ka_SM_mod_xa2_SM_mod_tau_xa2_SM := T_correction_K*90;
  SM_Membrane_I_bk_SM_mod_E_K := RToF*ln(K_o/K_i);
  SM_Membrane_I_NSCC_SM_mod_f_ca_NSCC_SM := 1/(1 + (Ca_i/0.0002)^(-4));
  SM_Membrane_I_NSCC_SM_mod_rach_NSCC_SM := 1/(1 + 0.01/Ach);
  SM_Membrane_I_NSCC_SM_mod_m_NSCC_SM_mod_m_inf_NSCC_SM := 1/(1 + exp((Vm_SM + 25)/(-20)));
  SM_Membrane_I_NSCC_SM_mod_m_NSCC_SM_mod_tau_m_NSCC_SM := 1/(1 + exp((Vm_SM + 66)/(-26)))*150;
  I_stim_local_time := time_ - (I_stim_stim_start + I_stim_t_ICCpeak);
  I_stim_stim_start := ;

  // Rate rules:
  Vm_SM' = -1*(1/SM_Membrane_Cm_SM)*(I_Na_SM + I_Ltype_SM + I_LVA_SM + I_kr_SM + I_ka_SM + I_BK_SM + I_NSCC_SM + I_bk_SM + (-1*I_stim0));
  Ca_i' = (-1*I_Ltype_SM + (-1*I_LVA_SM))/(2*0.001*F*Vol_SM) + (-1*J_CaSR_SM);
  SM_Membrane_h_Na_SM' = (SM_Membrane_I_Na_SM_mod_h_Na_SM_mod_h_inf_Na - SM_Membrane_h_Na_SM)/SM_Membrane_I_Na_SM_mod_h_Na_SM_mod_tau_h_Na;
  SM_Membrane_m_Na_SM' = (SM_Membrane_I_Na_SM_mod_m_Na_SM_mod_m_inf_Na - SM_Membrane_m_Na_SM)/SM_Membrane_I_Na_SM_mod_m_Na_SM_mod_tau_m_Na;
  SM_Membrane_f_Ltype_SM' = (SM_Membrane_I_Ltype_SM_mod_f_Ltype_SM_mod_f_inf_Ltype_SM - SM_Membrane_f_Ltype_SM)/SM_Membrane_I_Ltype_SM_mod_f_Ltype_SM_mod_tau_f_Ltype_SM;
  SM_Membrane_d_Ltype_SM' = (SM_Membrane_I_Ltype_SM_mod_d_Ltype_SM_mod_d_inf_Ltype_SM - SM_Membrane_d_Ltype_SM)/SM_Membrane_I_Ltype_SM_mod_d_Ltype_SM_mod_tau_d_Ltype_SM;
  SM_Membrane_f_ca_Ltype_SM' = (SM_Membrane_I_Ltype_SM_mod_f_ca_Ltype_SM_mod_f_ca_inf_Ltype_SM - SM_Membrane_f_ca_Ltype_SM)/SM_Membrane_I_Ltype_SM_mod_f_ca_Ltype_SM_mod_tau_f_ca_Ltype_SM;
  SM_Membrane_f_LVA_SM' = (SM_Membrane_I_LVA_SM_mod_f_LVA_SM_mod_f_inf_LVA_SM - SM_Membrane_f_LVA_SM)/SM_Membrane_I_LVA_SM_mod_f_LVA_SM_mod_tau_f_LVA_SM;
  SM_Membrane_d_LVA_SM' = (SM_Membrane_I_LVA_SM_mod_d_LVA_SM_mod_d_inf_LVA_SM - SM_Membrane_d_LVA_SM)/SM_Membrane_I_LVA_SM_mod_d_LVA_SM_mod_tau_d_LVA_SM;
  SM_Membrane_xr1_SM' = (SM_Membrane_I_kr_SM_mod_xr1_SM_mod_xr1_inf_SM - SM_Membrane_xr1_SM)/SM_Membrane_I_kr_SM_mod_xr1_SM_mod_tau_xr1_SM;
  SM_Membrane_xr2_SM' = (SM_Membrane_I_kr_SM_mod_xr2_SM_mod_xr2_inf_SM - SM_Membrane_xr2_SM)/SM_Membrane_I_kr_SM_mod_xr2_SM_mod_tau_xr2_SM;
  SM_Membrane_xa1_SM' = (SM_Membrane_I_ka_SM_mod_xa1_SM_mod_xa1_inf_SM - SM_Membrane_xa1_SM)/SM_Membrane_I_ka_SM_mod_xa1_SM_mod_tau_xa1_SM;
  SM_Membrane_xa2_SM' = (SM_Membrane_I_ka_SM_mod_xa2_SM_mod_xa2_inf_SM - SM_Membrane_xa2_SM)/SM_Membrane_I_ka_SM_mod_xa2_SM_mod_tau_xa2_SM;
  SM_Membrane_m_NSCC_SM' = (SM_Membrane_I_NSCC_SM_mod_m_NSCC_SM_mod_m_inf_NSCC_SM - SM_Membrane_m_NSCC_SM)/SM_Membrane_I_NSCC_SM_mod_m_NSCC_SM_mod_tau_m_NSCC_SM;
end
