// SBML level 2 version 4

model ICC_model____main()
  // Originally created by libAntimony v1.3 (using libSBML 4.1.0-b2)

  // Compartments:
  compartment default_compartment = 1;

  // Parameters:
  T = 310;
  T_exp = 297;
  F = 96.4846;
  R = 8.3144;
  Q10Ca = 2.1;
  Q10K = 1.5;
  Q10Na = 2.45;
  Ca_o = 2.5;
  Na_o = 137;
  K_o = 7;
  Cl_o = 134;
  ICC_Membrane_Cm = 0.025;
  Vol = 1e-12;
  P_cyto = 0.7;
  fc = 0.01;
  Vm = -67;
  Ca_i = 9.93087e-6;
  Na_i = 30;
  K_i = 120;
  Cl_i = 88;
  ICC_Membrane_I_Na_mod_G_max_Na = 20;
  ICC_Membrane_f_Na = 1;
  ICC_Membrane_d_Na = 0;
  ICC_Membrane_I_Ltype_mod_G_max_Ltype = 2;
  ICC_Membrane_f_Ltype = 1;
  ICC_Membrane_d_Ltype = 0;
  ICC_Membrane_f_ca_Ltype = 1;
  ICC_Membrane_I_VDDR_mod_G_max_VDDR = 3;
  ICC_Membrane_f_VDDR = 1;
  ICC_Membrane_d_VDDR = 0;
  ICC_Membrane_I_BK_mod_G_max_BK = 23;
  ICC_Membrane_I_CaCl_mod_G_max_CaCl = 10.1;
  ICC_Membrane_d_CaCl = 0;
  ICC_Membrane_I_CaCl_mod_d_CaCl_mod_tau_d_CaCl = 0.03;
  ICC_Membrane_I_kv11_mod_G_max_kv11 = 6.3;
  ICC_Membrane_f_kv11 = 1;
  ICC_Membrane_d_kv11 = 0;
  ICC_Membrane_I_ERG_mod_G_max_ERG = 2.5;
  ICC_Membrane_d_ERG = 0;
  ICC_Membrane_I_bk_mod_G_max_bk = 0.15;
  ICC_Membrane_I_NSCC_mod_G_max_NSCC = 12.15;
  ICC_Membrane_d_NSCC = 0;
  ICC_Membrane_I_NSCC_mod_NaPerm_o_Kperm = 1.056075;
  ICC_Membrane_Ca_PU = 9.02e-5;
  ICC_Membrane_I_NSCC_mod_d_NSCC_mod_tau_d_NSCC = 0.35;
  ICC_Membrane_J_PMCA_mod_J_max_PMCA = 0.088464;
  ICC_Membrane_PU_unit_P_PU = 0.001;
  ICC_Membrane_PU_unit_P_mito = 0.12871;
  ICC_Membrane_PU_unit_P_ER = 0.1;
  ICC_Membrane_PU_unit_fe = 0.01;
  ICC_Membrane_PU_unit_fm = 0.0003;
  ICC_Membrane_PU_unit_Ca_m = 0.000136;
  ICC_Membrane_PU_unit_Ca_ER = 0.007299;
  ICC_Membrane_PU_unit_ADP_m = 2.60093454;
  ICC_Membrane_PU_unit_ADP_i = 0.0077282;
  ICC_Membrane_PU_unit_NADH_m = 0.101476;
  ICC_Membrane_PU_unit_h = 0.9397;
  ICC_Membrane_PU_unit_IP3 = 0.0006;
  ICC_Membrane_PU_unit_deltaPsi = 164.000044;
  ICC_Membrane_PU_unit_deltapH = -0.4;
  ICC_Membrane_PU_unit_Cmito = 0.006995;
  ICC_Membrane_PU_unit_K_res = 1.35e18;
  ICC_Membrane_PU_unit_r1 = 2.077e-18;
  ICC_Membrane_PU_unit_r2 = 1.728e-9;
  ICC_Membrane_PU_unit_r3 = 1.059e-26;
  ICC_Membrane_PU_unit_ra = 6.394e-10;
  ICC_Membrane_PU_unit_rb = 1.762e-13;
  ICC_Membrane_PU_unit_rc1 = 2.656e-19;
  ICC_Membrane_PU_unit_rc2 = 8.632e-27;
  ICC_Membrane_PU_unit_deltaPsi_B = 50;
  ICC_Membrane_PU_unit_g = 0.85;
  ICC_Membrane_PU_unit_K_F1 = 1710000000;
  ICC_Membrane_PU_unit_Pi_m = 20;
  ICC_Membrane_PU_unit_p1 = 1.346e-8;
  ICC_Membrane_PU_unit_p2 = 7.739e-7;
  ICC_Membrane_PU_unit_p3 = 6.65e-15;
  ICC_Membrane_PU_unit_pa = 1.656e-5;
  ICC_Membrane_PU_unit_pb = 3.373e-7;
  ICC_Membrane_PU_unit_pc1 = 9.651e-14;
  ICC_Membrane_PU_unit_pc2 = 4.845e-19;
  ICC_Membrane_PU_unit_frac = 0.5;
  ICC_Membrane_PU_unit_K_act = 0.00038;
  ICC_Membrane_PU_unit_na = 2.8;
  ICC_Membrane_PU_unit_deltaPsi_star = 91;
  ICC_Membrane_PU_unit_K_Na = 9.4;
  ICC_Membrane_PU_unit_K_Ca = 0.003;
  ICC_Membrane_PU_unit_K_trans = 0.006;
  ICC_Membrane_PU_unit_L = 50;
  ICC_Membrane_PU_unit_b = 0.5;
  ICC_Membrane_PU_unit_beta_max = 2.055;
  ICC_Membrane_PU_unit_beta1 = 1.66;
  ICC_Membrane_PU_unit_beta2 = 0.0249;
  ICC_Membrane_PU_unit_beta3 = 4;
  ICC_Membrane_PU_unit_beta4 = 2.83;
  ICC_Membrane_PU_unit_beta5 = 1.3;
  ICC_Membrane_PU_unit_beta6 = 2.66;
  ICC_Membrane_PU_unit_beta7 = 0.16;
  ICC_Membrane_PU_unit_KCa_PDH = 5e-5;
  ICC_Membrane_PU_unit_u1 = 15;
  ICC_Membrane_PU_unit_u2 = 1.1;
  ICC_Membrane_PU_unit_n = 2;
  ICC_Membrane_PU_unit_K_Glc = 8.7;
  ICC_Membrane_PU_unit_nhyd = 2.7;
  ICC_Membrane_PU_unit_K_hyd = 0.05125;
  ICC_Membrane_PU_unit_J_ERleak = 1.666667;
  ICC_Membrane_PU_unit_Jmax_IP3 = 50000;
  ICC_Membrane_PU_unit_d_IP3 = 0.00025;
  ICC_Membrane_PU_unit_d_ACT = 0.001;
  ICC_Membrane_PU_unit_d_INH = 0.0014;
  ICC_Membrane_PU_unit_tauh = 4;
  ICC_Membrane_PU_unit_Jmax_serca = 1.8333;
  ICC_Membrane_PU_unit_k_serca = 0.00042;
  ICC_Membrane_PU_unit_conc = 0.001;
  ICC_Membrane_PU_unit_Jmax_uni = 5000;
  ICC_Membrane_PU_unit_Jmax_NaCa = 0.05;
  ICC_Membrane_PU_unit_J_max_leak = 0.01;
  ICC_Membrane_PU_unit_rho_res = 0.4;
  ICC_Membrane_PU_unit_rho_F1 = 0.7;
  ICC_Membrane_PU_unit_g_H = 0.0033333;
  ICC_Membrane_PU_unit_J_red_basal = 0.3333;
  ICC_Membrane_PU_unit_Jmax_ANT = 15;
  ICC_Membrane_PU_unit_J_hyd_max = 0.037625;
  ICC_Membrane_PU_unit_Glc = 1;
  ICC_Membrane_PU_unit_total_NAD_m = 8;
  ICC_Membrane_PU_unit_total_ANP_m = 12;
  ICC_Membrane_PU_unit_total_ANP_i = 2;
  time_ = ;

  // Assignment rules:
  T_correction_Na := Q10Na^((T - T_exp)/10);
  T_correction_K := Q10K^((T - T_exp)/10);
  T_correction_Ca := Q10Ca^((T - T_exp)/10);
  T_correction_BK := 1.1*(T - T_exp);
  FoRT := F/(R*T);
  RToF := R*T/F;
  V_cyto := Vol*P_cyto;
  J_leak := ICC_Membrane_PU_unit_J_max_leak*(ICC_Membrane_Ca_PU - Ca_i);
  I_Na := ICC_Membrane_I_Na_mod_G_max_Na*ICC_Membrane_f_Na*ICC_Membrane_d_Na*(Vm - ICC_Membrane_I_Na_mod_E_Na);
  I_Ltype := ICC_Membrane_I_Ltype_mod_G_max_Ltype*ICC_Membrane_f_Ltype*ICC_Membrane_d_Ltype*ICC_Membrane_f_ca_Ltype*(Vm - ICC_Membrane_I_Ltype_mod_E_Ca);
  I_VDDR := ICC_Membrane_I_VDDR_mod_G_max_VDDR*ICC_Membrane_f_VDDR*ICC_Membrane_d_VDDR*(Vm - ICC_Membrane_I_VDDR_mod_E_Ca);
  I_kv11 := ICC_Membrane_I_kv11_mod_G_max_kv11*ICC_Membrane_f_kv11*ICC_Membrane_d_kv11*(Vm - ICC_Membrane_I_kv11_mod_E_K);
  I_BK := (ICC_Membrane_I_BK_mod_G_max_BK + T_correction_BK)*ICC_Membrane_d_BK*(Vm - ICC_Membrane_I_BK_mod_E_K);
  I_ERG := ICC_Membrane_I_ERG_mod_G_max_ERG*ICC_Membrane_d_ERG*(Vm - ICC_Membrane_I_ERG_mod_E_K);
  I_CaCl := ICC_Membrane_I_CaCl_mod_G_max_CaCl*ICC_Membrane_d_CaCl*(Vm - ICC_Membrane_I_CaCl_mod_E_Cl);
  I_NSCC := ICC_Membrane_I_NSCC_mod_G_max_NSCC*ICC_Membrane_d_NSCC*(Vm - ICC_Membrane_I_NSCC_mod_E_NSCC);
  I_bk := ICC_Membrane_I_bk_mod_G_max_bk*(Vm - ICC_Membrane_I_bk_mod_E_K);
  J_PMCA := ICC_Membrane_J_PMCA_mod_J_max_PMCA*1/(1 + 0.000298/Ca_i);
  ICC_Membrane_I_Na_mod_E_Na := RToF*ln(Na_o/Na_i);
  ICC_Membrane_I_Na_mod_d_Na_mod_d_inf_Na := 1/(1 + exp((Vm + 47)/(-4.8)));
  ICC_Membrane_I_Na_mod_d_Na_mod_tau_d_Na := T_correction_Na*0.003;
  ICC_Membrane_I_Na_mod_f_Na_mod_f_inf_Na := 1/(1 + exp((Vm + 78)/7));
  ICC_Membrane_I_Na_mod_f_Na_mod_tau_f_Na := T_correction_Na*0.0016;
  ICC_Membrane_I_Ltype_mod_E_Ca := 0.5*RToF*ln(Ca_o/Ca_i);
  ICC_Membrane_I_Ltype_mod_d_Ltype_mod_d_inf_Ltype := 1/(1 + exp((Vm + 17)/(-4.3)));
  ICC_Membrane_I_Ltype_mod_d_Ltype_mod_tau_d_Ltype := T_correction_Ca*0.001;
  ICC_Membrane_I_Ltype_mod_f_Ltype_mod_f_inf_Ltype := 1/(1 + exp((Vm + 43)/8.9));
  ICC_Membrane_I_Ltype_mod_f_Ltype_mod_tau_f_Ltype := T_correction_Ca*0.086;
  ICC_Membrane_I_Ltype_mod_f_ca_Ltype_mod_f_ca_inf_Ltype := 1 - 1/(1 + exp((Ca_i - 0.0001 - 0.000214)/(-1.31e-5)));
  ICC_Membrane_I_Ltype_mod_f_ca_Ltype_mod_tau_f_ca_Ltype := T_correction_Ca*0.002;
  ICC_Membrane_I_VDDR_mod_E_Ca := 0.5*RToF*ln(Ca_o/Ca_i);
  ICC_Membrane_I_VDDR_mod_d_VDDR_mod_d_inf_VDDR := 1/(1 + exp((Vm + 26)/(-6)));
  ICC_Membrane_I_VDDR_mod_d_VDDR_mod_tau_d_VDDR := T_correction_Ca*0.006;
  ICC_Membrane_I_VDDR_mod_f_VDDR_mod_f_inf_VDDR := 1/(1 + exp((Vm + 66)/6));
  ICC_Membrane_I_VDDR_mod_f_VDDR_mod_tau_f_VDDR := T_correction_Ca*0.04;
  ICC_Membrane_I_BK_mod_E_K := RToF*ln(K_o/K_i);
  ICC_Membrane_d_BK := 1/(1 + exp(Vm/(-17) - 2*ln(Ca_i/0.001)));
  ICC_Membrane_I_CaCl_mod_E_Cl := RToF*ln(Cl_i/Cl_o);
  ICC_Membrane_I_CaCl_mod_d_CaCl_mod_d_inf_CaCl := 1/(1 + (0.00014/Ca_i)^3);
  ICC_Membrane_I_kv11_mod_E_K := RToF*ln(K_o/K_i);
  ICC_Membrane_I_kv11_mod_d_kv11_mod_d_inf_kv11 := 1/(1 + exp((Vm + 25)/(-7.7)));
  ICC_Membrane_I_kv11_mod_d_kv11_mod_tau_d_kv11 := T_correction_K*0.005;
  ICC_Membrane_I_kv11_mod_f_kv11_mod_f_inf_kv11 := 0.5 + 0.5/(1 + exp((Vm + 44.8)/4.4));
  ICC_Membrane_I_kv11_mod_f_kv11_mod_tau_f_kv11 := T_correction_K*0.005;
  ICC_Membrane_I_ERG_mod_E_K := RToF*ln(K_o/K_i);
  ICC_Membrane_I_ERG_mod_d_ERG_mod_d_inf_ERG := 0.2 + 0.8/(1 + exp((Vm + 20)/(-1.8)));
  ICC_Membrane_I_ERG_mod_d_ERG_mod_tau_d_ERG := T_correction_K*0.003;
  ICC_Membrane_I_bk_mod_E_K := RToF*ln(K_o/K_i);
  ICC_Membrane_I_NSCC_mod_E_NSCC := RToF*ln((K_o + Na_o*ICC_Membrane_I_NSCC_mod_NaPerm_o_Kperm)/(K_i + Na_i*ICC_Membrane_I_NSCC_mod_NaPerm_o_Kperm));
  ICC_Membrane_I_NSCC_mod_d_NSCC_mod_d_inf_NSCC := 1/(1 + (7.45e-5/ICC_Membrane_Ca_PU)^(-85));
  ICC_Membrane_PU_unit_V_MITO := Vol*ICC_Membrane_PU_unit_P_mito;
  ICC_Membrane_PU_unit_V_ER := Vol*ICC_Membrane_PU_unit_P_ER;
  ICC_Membrane_PU_unit_V_PU := Vol*ICC_Membrane_PU_unit_P_PU;
  ICC_Membrane_PU_unit_NAD_m := ICC_Membrane_PU_unit_total_NAD_m - ICC_Membrane_PU_unit_NADH_m;
  ICC_Membrane_PU_unit_ATP_m := ICC_Membrane_PU_unit_total_ANP_m - ICC_Membrane_PU_unit_ADP_m;
  ICC_Membrane_PU_unit_ADP_mfree := 0.8*ICC_Membrane_PU_unit_ADP_m;
  ICC_Membrane_PU_unit_ADP3_m := 0.45*ICC_Membrane_PU_unit_ADP_mfree;
  ICC_Membrane_PU_unit_ATP4_m := 0.05*ICC_Membrane_PU_unit_ATP_m;
  ICC_Membrane_PU_unit_ATP_i := ICC_Membrane_PU_unit_total_ANP_i - ICC_Membrane_PU_unit_ADP_i;
  ICC_Membrane_PU_unit_ADP_ifree := 0.3*ICC_Membrane_PU_unit_ADP_i;
  ICC_Membrane_PU_unit_ADP3_i := 0.45*ICC_Membrane_PU_unit_ADP_ifree;
  ICC_Membrane_PU_unit_MgADP_i := 0.55*ICC_Membrane_PU_unit_ADP_ifree;
  ICC_Membrane_PU_unit_ATP4_i := 0.05*ICC_Membrane_PU_unit_ATP_i;
  ICC_Membrane_PU_unit_J_ERout := (ICC_Membrane_PU_unit_Jmax_IP3*(ICC_Membrane_PU_unit_IP3/(ICC_Membrane_PU_unit_IP3 + ICC_Membrane_PU_unit_d_IP3))^3*(ICC_Membrane_Ca_PU/(ICC_Membrane_Ca_PU + ICC_Membrane_PU_unit_d_ACT))^3*ICC_Membrane_PU_unit_h^3 + ICC_Membrane_PU_unit_J_ERleak)*(ICC_Membrane_PU_unit_Ca_ER - ICC_Membrane_Ca_PU);
  ICC_Membrane_PU_unit_J_SERCA := ICC_Membrane_PU_unit_Jmax_serca*ICC_Membrane_Ca_PU^2/(ICC_Membrane_PU_unit_k_serca^2 + ICC_Membrane_Ca_PU^2);
  ICC_Membrane_PU_unit_MWC := ICC_Membrane_PU_unit_conc*ICC_Membrane_Ca_PU/ICC_Membrane_PU_unit_K_trans*(1 + ICC_Membrane_Ca_PU/ICC_Membrane_PU_unit_K_trans)^3/((1 + ICC_Membrane_Ca_PU/ICC_Membrane_PU_unit_K_trans)^4 + ICC_Membrane_PU_unit_L/(1 + ICC_Membrane_Ca_PU/ICC_Membrane_PU_unit_K_act)^ICC_Membrane_PU_unit_na);
  ICC_Membrane_PU_unit_J_uni := ICC_Membrane_PU_unit_Jmax_uni*(ICC_Membrane_PU_unit_MWC - ICC_Membrane_PU_unit_Ca_m*exp(-2*FoRT*(ICC_Membrane_PU_unit_deltaPsi - ICC_Membrane_PU_unit_deltaPsi_star)))*2*FoRT*(ICC_Membrane_PU_unit_deltaPsi - ICC_Membrane_PU_unit_deltaPsi_star)/(1 - exp(-2*FoRT*(ICC_Membrane_PU_unit_deltaPsi - ICC_Membrane_PU_unit_deltaPsi_star)));
  ICC_Membrane_PU_unit_J_NaCa := ICC_Membrane_PU_unit_Jmax_NaCa*exp(ICC_Membrane_PU_unit_b*FoRT*(ICC_Membrane_PU_unit_deltaPsi - ICC_Membrane_PU_unit_deltaPsi_star))/((1 + (ICC_Membrane_PU_unit_K_Na/Na_i)^ICC_Membrane_PU_unit_n)*(1 + ICC_Membrane_PU_unit_K_Ca/ICC_Membrane_PU_unit_Ca_m));
  ICC_Membrane_PU_unit_J_red := ICC_Membrane_PU_unit_J_red_basal + 6.3944*ICC_Membrane_PU_unit_f_PDHa*ICC_Membrane_PU_unit_J_glyTotal;
  ICC_Membrane_PU_unit_J_pTCA := ICC_Membrane_PU_unit_J_red_basal/3 + 0.84*ICC_Membrane_PU_unit_f_PDHa*ICC_Membrane_PU_unit_J_glyTotal;
  ICC_Membrane_PU_unit_A_F1 := RToF*ln(ICC_Membrane_PU_unit_K_F1*ICC_Membrane_PU_unit_ATP_m/(ICC_Membrane_PU_unit_ADP_mfree*ICC_Membrane_PU_unit_Pi_m));
  ICC_Membrane_PU_unit_J_pF1 := ICC_Membrane_PU_unit_rho_F1*(-1)*((ICC_Membrane_PU_unit_pa*10^(3*ICC_Membrane_PU_unit_deltapH) + ICC_Membrane_PU_unit_pc1*exp(3*FoRT*ICC_Membrane_PU_unit_deltaPsi_B))*exp(FoRT*ICC_Membrane_PU_unit_A_F1) + (-1*ICC_Membrane_PU_unit_pa*exp(3*FoRT*ICC_Membrane_PU_unit_deltaPsi)) + ICC_Membrane_PU_unit_pc2*exp(FoRT*ICC_Membrane_PU_unit_A_F1)*exp(3*FoRT*ICC_Membrane_PU_unit_deltaPsi))/((1 + ICC_Membrane_PU_unit_p1*exp(FoRT*ICC_Membrane_PU_unit_A_F1))*exp(3*FoRT*ICC_Membrane_PU_unit_deltaPsi_B) + (ICC_Membrane_PU_unit_p2 + ICC_Membrane_PU_unit_p3*exp(FoRT*ICC_Membrane_PU_unit_A_F1))*exp(3*FoRT*ICC_Membrane_PU_unit_deltaPsi));
  ICC_Membrane_PU_unit_J_HF1 := -1*ICC_Membrane_PU_unit_rho_F1*3*(ICC_Membrane_PU_unit_pa*10^(3*ICC_Membrane_PU_unit_deltapH)*exp(FoRT*ICC_Membrane_PU_unit_A_F1) + ICC_Membrane_PU_unit_pb*10^(3*ICC_Membrane_PU_unit_deltapH) + (-1*(ICC_Membrane_PU_unit_pa + ICC_Membrane_PU_unit_pb)*exp(3*FoRT*ICC_Membrane_PU_unit_deltaPsi)))/((1 + ICC_Membrane_PU_unit_p1*exp(FoRT*ICC_Membrane_PU_unit_A_F1))*exp(3*FoRT*ICC_Membrane_PU_unit_deltaPsi_B) + (ICC_Membrane_PU_unit_p2 + ICC_Membrane_PU_unit_p3*exp(FoRT*ICC_Membrane_PU_unit_A_F1))*exp(3*FoRT*ICC_Membrane_PU_unit_deltaPsi));
  ICC_Membrane_PU_unit_A_res := RToF*ln(ICC_Membrane_PU_unit_K_res*sqrt(ICC_Membrane_PU_unit_NADH_m)/sqrt(ICC_Membrane_PU_unit_NAD_m));
  ICC_Membrane_PU_unit_J_o := ICC_Membrane_PU_unit_rho_res*0.5*((ICC_Membrane_PU_unit_ra*10^(6*ICC_Membrane_PU_unit_deltapH) + ICC_Membrane_PU_unit_rc1*exp(6*ICC_Membrane_PU_unit_deltaPsi_B*FoRT))*exp(ICC_Membrane_PU_unit_A_res*FoRT) + (-1*ICC_Membrane_PU_unit_ra*exp(ICC_Membrane_PU_unit_g*6*FoRT*ICC_Membrane_PU_unit_deltaPsi)) + ICC_Membrane_PU_unit_rc2*exp(FoRT*ICC_Membrane_PU_unit_A_res)*exp(FoRT*ICC_Membrane_PU_unit_deltaPsi*6*ICC_Membrane_PU_unit_g))/((1 + ICC_Membrane_PU_unit_r1*exp(FoRT*ICC_Membrane_PU_unit_A_res))*exp(FoRT*ICC_Membrane_PU_unit_deltaPsi_B*6) + (ICC_Membrane_PU_unit_r2 + ICC_Membrane_PU_unit_r3*exp(FoRT*ICC_Membrane_PU_unit_A_res))*exp(FoRT*ICC_Membrane_PU_unit_deltaPsi*ICC_Membrane_PU_unit_g*6));
  ICC_Membrane_PU_unit_J_glyTotal := ICC_Membrane_PU_unit_beta_max*(1 + ICC_Membrane_PU_unit_beta1*ICC_Membrane_PU_unit_Glc)*ICC_Membrane_PU_unit_beta2*ICC_Membrane_PU_unit_Glc*ICC_Membrane_PU_unit_ATP_i/(1 + ICC_Membrane_PU_unit_beta3*ICC_Membrane_PU_unit_ATP_i + (1 + ICC_Membrane_PU_unit_beta4*ICC_Membrane_PU_unit_ATP_i)*ICC_Membrane_PU_unit_beta5*ICC_Membrane_PU_unit_Glc + (1 + ICC_Membrane_PU_unit_beta6*ICC_Membrane_PU_unit_ATP_i)*ICC_Membrane_PU_unit_beta7*ICC_Membrane_PU_unit_Glc);
  ICC_Membrane_PU_unit_f_PDHa := 1/(1 + ICC_Membrane_PU_unit_u2*(1 + ICC_Membrane_PU_unit_u1/(1 + ICC_Membrane_PU_unit_Ca_m/ICC_Membrane_PU_unit_KCa_PDH)^2));
  ICC_Membrane_PU_unit_J_Hres := ICC_Membrane_PU_unit_rho_res*3.966*(ICC_Membrane_PU_unit_ra*10^(6*ICC_Membrane_PU_unit_deltapH)*exp(FoRT*ICC_Membrane_PU_unit_A_res) + ICC_Membrane_PU_unit_rb*10^(6*ICC_Membrane_PU_unit_deltapH) + (-1*(ICC_Membrane_PU_unit_ra + ICC_Membrane_PU_unit_rb)*exp(ICC_Membrane_PU_unit_g*FoRT*ICC_Membrane_PU_unit_deltaPsi*6)))/((1 + ICC_Membrane_PU_unit_r1*exp(FoRT*ICC_Membrane_PU_unit_A_res))*exp(6*FoRT*ICC_Membrane_PU_unit_deltaPsi_B) + (ICC_Membrane_PU_unit_r2 + ICC_Membrane_PU_unit_r3*exp(FoRT*ICC_Membrane_PU_unit_A_res))*exp(ICC_Membrane_PU_unit_g*6*FoRT*ICC_Membrane_PU_unit_deltaPsi));
  ICC_Membrane_PU_unit_J_ANT := ICC_Membrane_PU_unit_Jmax_ANT*(1 - ICC_Membrane_PU_unit_ATP4_i*ICC_Membrane_PU_unit_ADP3_m/(ICC_Membrane_PU_unit_ADP3_i*ICC_Membrane_PU_unit_ATP4_m)*exp(-1*FoRT*ICC_Membrane_PU_unit_deltaPsi))/((1 + ICC_Membrane_PU_unit_ATP4_i/ICC_Membrane_PU_unit_ADP3_i*exp(-1*ICC_Membrane_PU_unit_frac*FoRT*ICC_Membrane_PU_unit_deltaPsi))*(1 + ICC_Membrane_PU_unit_ADP3_m/ICC_Membrane_PU_unit_ATP4_m));
  ICC_Membrane_PU_unit_PMF := ICC_Membrane_PU_unit_deltaPsi - 2.303*RToF*ICC_Membrane_PU_unit_deltapH;
  ICC_Membrane_PU_unit_J_Hleak := ICC_Membrane_PU_unit_g_H*ICC_Membrane_PU_unit_PMF;
  ICC_Membrane_PU_unit_J_pGly := 0.15*ICC_Membrane_PU_unit_J_glyTotal;
  ICC_Membrane_PU_unit_J_hydSS := ICC_Membrane_PU_unit_J_hyd_max/(1 + (ICC_Membrane_PU_unit_K_Glc/ICC_Membrane_PU_unit_Glc)^ICC_Membrane_PU_unit_nhyd);
  ICC_Membrane_PU_unit_J_hyd := ICC_Membrane_PU_unit_K_hyd*ICC_Membrane_PU_unit_ATP_i + ICC_Membrane_PU_unit_J_hydSS;

  // Rate rules:
  Vm' = -1*1/ICC_Membrane_Cm*(I_Na + I_Ltype + I_VDDR + I_kv11 + I_ERG + I_BK + I_CaCl + I_NSCC + I_bk + J_PMCA*2*1000000*1000000*F*V_cyto);
  Ca_i' = fc*((-1*I_Ltype + (-1*I_VDDR))/(2*1000000*1000000*F*V_cyto) + J_leak + (-1*J_PMCA));
  ICC_Membrane_f_Na' = (ICC_Membrane_I_Na_mod_f_Na_mod_f_inf_Na - ICC_Membrane_f_Na)/ICC_Membrane_I_Na_mod_f_Na_mod_tau_f_Na;
  ICC_Membrane_d_Na' = (ICC_Membrane_I_Na_mod_d_Na_mod_d_inf_Na - ICC_Membrane_d_Na)/ICC_Membrane_I_Na_mod_d_Na_mod_tau_d_Na;
  ICC_Membrane_f_Ltype' = (ICC_Membrane_I_Ltype_mod_f_Ltype_mod_f_inf_Ltype - ICC_Membrane_f_Ltype)/ICC_Membrane_I_Ltype_mod_f_Ltype_mod_tau_f_Ltype;
  ICC_Membrane_d_Ltype' = (ICC_Membrane_I_Ltype_mod_d_Ltype_mod_d_inf_Ltype - ICC_Membrane_d_Ltype)/ICC_Membrane_I_Ltype_mod_d_Ltype_mod_tau_d_Ltype;
  ICC_Membrane_f_ca_Ltype' = (ICC_Membrane_I_Ltype_mod_f_ca_Ltype_mod_f_ca_inf_Ltype - ICC_Membrane_f_ca_Ltype)/ICC_Membrane_I_Ltype_mod_f_ca_Ltype_mod_tau_f_ca_Ltype;
  ICC_Membrane_f_VDDR' = (ICC_Membrane_I_VDDR_mod_f_VDDR_mod_f_inf_VDDR - ICC_Membrane_f_VDDR)/ICC_Membrane_I_VDDR_mod_f_VDDR_mod_tau_f_VDDR;
  ICC_Membrane_d_VDDR' = (ICC_Membrane_I_VDDR_mod_d_VDDR_mod_d_inf_VDDR - ICC_Membrane_d_VDDR)/ICC_Membrane_I_VDDR_mod_d_VDDR_mod_tau_d_VDDR;
  ICC_Membrane_d_CaCl' = (ICC_Membrane_I_CaCl_mod_d_CaCl_mod_d_inf_CaCl - ICC_Membrane_d_CaCl)/ICC_Membrane_I_CaCl_mod_d_CaCl_mod_tau_d_CaCl;
  ICC_Membrane_f_kv11' = (ICC_Membrane_I_kv11_mod_f_kv11_mod_f_inf_kv11 - ICC_Membrane_f_kv11)/ICC_Membrane_I_kv11_mod_f_kv11_mod_tau_f_kv11;
  ICC_Membrane_d_kv11' = (ICC_Membrane_I_kv11_mod_d_kv11_mod_d_inf_kv11 - ICC_Membrane_d_kv11)/ICC_Membrane_I_kv11_mod_d_kv11_mod_tau_d_kv11;
  ICC_Membrane_d_ERG' = (ICC_Membrane_I_ERG_mod_d_ERG_mod_d_inf_ERG - ICC_Membrane_d_ERG)/ICC_Membrane_I_ERG_mod_d_ERG_mod_tau_d_ERG;
  ICC_Membrane_d_NSCC' = (ICC_Membrane_I_NSCC_mod_d_NSCC_mod_d_inf_NSCC - ICC_Membrane_d_NSCC)/ICC_Membrane_I_NSCC_mod_d_NSCC_mod_tau_d_NSCC;
  ICC_Membrane_Ca_PU' = fc*((ICC_Membrane_PU_unit_J_NaCa - ICC_Membrane_PU_unit_J_uni)*ICC_Membrane_PU_unit_V_MITO/ICC_Membrane_PU_unit_V_PU + (ICC_Membrane_PU_unit_J_ERout - ICC_Membrane_PU_unit_J_SERCA)*ICC_Membrane_PU_unit_V_ER/ICC_Membrane_PU_unit_V_PU + (-1*J_leak*V_cyto/ICC_Membrane_PU_unit_V_PU));
  ICC_Membrane_PU_unit_Ca_m' = ICC_Membrane_PU_unit_fm*(ICC_Membrane_PU_unit_J_uni - ICC_Membrane_PU_unit_J_NaCa);
  ICC_Membrane_PU_unit_Ca_ER' = ICC_Membrane_PU_unit_fe*(ICC_Membrane_PU_unit_J_SERCA - ICC_Membrane_PU_unit_J_ERout);
  ICC_Membrane_PU_unit_ADP_m' = ICC_Membrane_PU_unit_J_ANT + (-1*ICC_Membrane_PU_unit_J_pTCA) + (-1*ICC_Membrane_PU_unit_J_pF1);
  ICC_Membrane_PU_unit_ADP_i' = -1*ICC_Membrane_PU_unit_J_ANT*ICC_Membrane_PU_unit_V_MITO/V_cyto + ICC_Membrane_PU_unit_J_hyd + (-1*ICC_Membrane_PU_unit_J_pGly);
  ICC_Membrane_PU_unit_NADH_m' = ICC_Membrane_PU_unit_J_red - ICC_Membrane_PU_unit_J_o;
  ICC_Membrane_PU_unit_h' = 1*(ICC_Membrane_PU_unit_d_INH - ICC_Membrane_PU_unit_h*(ICC_Membrane_Ca_PU + ICC_Membrane_PU_unit_d_INH))/ICC_Membrane_PU_unit_tauh;
  ICC_Membrane_PU_unit_deltaPsi' = -1*F*ICC_Membrane_PU_unit_V_MITO*1000000*1/ICC_Membrane_PU_unit_Cmito*(ICC_Membrane_PU_unit_J_Hleak + (-1*ICC_Membrane_PU_unit_J_Hres) + ICC_Membrane_PU_unit_J_ANT + ICC_Membrane_PU_unit_J_HF1 + 2*ICC_Membrane_PU_unit_J_uni);
end
