// SBML level 2 version 4

model courtemanche_1998____main()
  // Originally created by libAntimony v1.3 (using libSBML 4.1.0-b2)

  // Compartments:
  compartment default_compartment = 1;

  // Parameters:
  V = -81.18;
  R = 8.3143;
  T = 310;
  F = 96.4867;
  Cm = 100;
  membrane_stim_start = 50;
  membrane_stim_end = 50000;
  membrane_stim_period = 1000;
  membrane_stim_duration = 2;
  membrane_stim_amplitude = -2000;
  fast_sodium_current_g_Na = 7.8;
  Na_i = 11.17;
  Na_o = 140;
  m = 0.002908;
  h = 0.9649;
  j = 0.9775;
  time_independent_potassium_current_g_K1 = 0.09;
  K_o = 5.4;
  K_i = 139;
  K_Q10 = 3;
  transient_outward_K_current_g_to = 0.1652;
  oa = 0.03043;
  oi = 0.9992;
  ua = 0.004966;
  ui = 0.9986;
  rapid_delayed_rectifier_K_current_g_Kr = 0.029411765;
  xr = 3.296e-5;
  slow_delayed_rectifier_K_current_g_Ks = 0.12941176;
  xs = 0.01869;
  L_type_Ca_channel_g_Ca_L = 0.12375;
  Ca_i = 0.0001013;
  d = 0.0001367;
  f = 0.9996;
  f_Ca = 0.7755;
  sodium_potassium_pump_Km_Na_i = 10;
  sodium_potassium_pump_Km_K_o = 1.5;
  sodium_potassium_pump_i_NaK_max = 0.59933874;
  background_currents_g_B_Na = 0.0006744375;
  background_currents_g_B_Ca = 0.001131;
  background_currents_g_B_K = 0;
  Ca_o = 1.8;
  Na_Ca_exchanger_current_I_NaCa_max = 1600;
  Na_Ca_exchanger_current_K_mNa = 87.5;
  Na_Ca_exchanger_current_K_mCa = 1.38;
  Na_Ca_exchanger_current_K_sat = 0.1;
  Na_Ca_exchanger_current_gamma = 0.35;
  sarcolemmal_calcium_pump_current_i_CaP_max = 0.275;
  Ca_release_current_from_JSR_K_rel = 30;
  Ca_rel = 1.488;
  u = 2.35e-112;
  v = 1;
  w = 0.9992;
  transfer_current_from_NSR_to_JSR_tau_tr = 180;
  Ca_up = 1.488;
  I_up_max = 0.005;
  Ca_uptake_current_by_the_NSR_K_up = 0.00092;
  Ca_leak_current_by_the_NSR_Ca_up_max = 15;
  CMDN_max = 0.05;
  TRPN_max = 0.07;
  CSQN_max = 10;
  Km_CMDN = 0.00238;
  Km_TRPN = 0.0005;
  Km_CSQN = 0.8;
  intracellular_ion_concentrations_V_cell = 20100;
  time_ = ;

  // Assignment rules:
  membrane_i_st := ;
  i_Na := Cm*fast_sodium_current_g_Na*m^3*h*j*(V - E_Na);
  i_K1 := Cm*time_independent_potassium_current_g_K1*(V - E_K)/(1 + exp(0.07*(V + 80)));
  i_to := Cm*transient_outward_K_current_g_to*oa^3*oi*(V - E_K);
  i_Kur := Cm*ultrarapid_delayed_rectifier_K_current_g_Kur*ua^3*ui*(V - E_K);
  i_Kr := Cm*rapid_delayed_rectifier_K_current_g_Kr*xr*(V - E_K)/(1 + exp((V + 15)/22.4));
  i_Ks := Cm*slow_delayed_rectifier_K_current_g_Ks*xs^2*(V - E_K);
  i_Ca_L := Cm*L_type_Ca_channel_g_Ca_L*d*f*f_Ca*(V - 65);
  i_CaP := Cm*sarcolemmal_calcium_pump_current_i_CaP_max*Ca_i/(0.0005 + Ca_i);
  i_NaK := Cm*sodium_potassium_pump_i_NaK_max*sodium_potassium_pump_f_NaK*1/(1 + (sodium_potassium_pump_Km_Na_i/Na_i)^1.5)*K_o/(K_o + sodium_potassium_pump_Km_K_o);
  i_NaCa := Cm*Na_Ca_exchanger_current_I_NaCa_max*(exp(Na_Ca_exchanger_current_gamma*F*V/(R*T))*Na_i^3*Ca_o - exp((Na_Ca_exchanger_current_gamma - 1)*F*V/(R*T))*Na_o^3*Ca_i)/((Na_Ca_exchanger_current_K_mNa^3 + Na_o^3)*(Na_Ca_exchanger_current_K_mCa + Ca_o)*(1 + Na_Ca_exchanger_current_K_sat*exp((Na_Ca_exchanger_current_gamma - 1)*V*F/(R*T))));
  i_B_Na := Cm*background_currents_g_B_Na*(V - E_Na);
  i_B_Ca := Cm*background_currents_g_B_Ca*(V - background_currents_E_Ca);
  E_Na := R*T/F*ln(Na_o/Na_i);
  fast_sodium_current_fast_sodium_current_m_gate_alpha_m := ;
  fast_sodium_current_fast_sodium_current_m_gate_beta_m := 0.08*exp(-V/11);
  fast_sodium_current_fast_sodium_current_m_gate_m_inf := fast_sodium_current_fast_sodium_current_m_gate_alpha_m/(fast_sodium_current_fast_sodium_current_m_gate_alpha_m + fast_sodium_current_fast_sodium_current_m_gate_beta_m);
  fast_sodium_current_fast_sodium_current_m_gate_tau_m := 1/(fast_sodium_current_fast_sodium_current_m_gate_alpha_m + fast_sodium_current_fast_sodium_current_m_gate_beta_m);
  fast_sodium_current_fast_sodium_current_h_gate_alpha_h := ;
  fast_sodium_current_fast_sodium_current_h_gate_beta_h := ;
  fast_sodium_current_fast_sodium_current_h_gate_h_inf := fast_sodium_current_fast_sodium_current_h_gate_alpha_h/(fast_sodium_current_fast_sodium_current_h_gate_alpha_h + fast_sodium_current_fast_sodium_current_h_gate_beta_h);
  fast_sodium_current_fast_sodium_current_h_gate_tau_h := 1/(fast_sodium_current_fast_sodium_current_h_gate_alpha_h + fast_sodium_current_fast_sodium_current_h_gate_beta_h);
  fast_sodium_current_fast_sodium_current_j_gate_alpha_j := ;
  fast_sodium_current_fast_sodium_current_j_gate_beta_j := ;
  fast_sodium_current_fast_sodium_current_j_gate_j_inf := fast_sodium_current_fast_sodium_current_j_gate_alpha_j/(fast_sodium_current_fast_sodium_current_j_gate_alpha_j + fast_sodium_current_fast_sodium_current_j_gate_beta_j);
  fast_sodium_current_fast_sodium_current_j_gate_tau_j := 1/(fast_sodium_current_fast_sodium_current_j_gate_alpha_j + fast_sodium_current_fast_sodium_current_j_gate_beta_j);
  E_K := R*T/F*ln(K_o/K_i);
  transient_outward_K_current_transient_outward_K_current_oa_gate_alpha_oa := 0.65*(exp((V - (-10))/(-8.5)) + exp((V - (-10) - 40)/(-59)))^(-1);
  transient_outward_K_current_transient_outward_K_current_oa_gate_beta_oa := 0.65*(2.5 + exp((V - (-10) + 72)/17))^(-1);
  transient_outward_K_current_transient_outward_K_current_oa_gate_tau_oa := (transient_outward_K_current_transient_outward_K_current_oa_gate_alpha_oa + transient_outward_K_current_transient_outward_K_current_oa_gate_beta_oa)^(-1)/K_Q10;
  transient_outward_K_current_transient_outward_K_current_oa_gate_oa_infinity := (1 + exp((V - (-10) + 10.47)/(-17.54)))^(-1);
  transient_outward_K_current_transient_outward_K_current_oi_gate_alpha_oi := (18.53 + 1*exp((V - (-10) + 103.7)/10.95))^(-1);
  transient_outward_K_current_transient_outward_K_current_oi_gate_beta_oi := (35.56 + 1*exp((V - (-10) - 8.74)/(-7.44)))^(-1);
  transient_outward_K_current_transient_outward_K_current_oi_gate_tau_oi := (transient_outward_K_current_transient_outward_K_current_oi_gate_alpha_oi + transient_outward_K_current_transient_outward_K_current_oi_gate_beta_oi)^(-1)/K_Q10;
  transient_outward_K_current_transient_outward_K_current_oi_gate_oi_infinity := (1 + exp((V - (-10) + 33.1)/5.3))^(-1);
  ultrarapid_delayed_rectifier_K_current_g_Kur := 0.005 + 0.05/(1 + exp((V - 15)/(-13)));
  ultrarapid_delayed_rectifier_K_current_ultrarapid_delayed_rectifier_K_current_ua_gate_alpha_ua := 0.65*(exp((V - (-10))/(-8.5)) + exp((V - (-10) - 40)/(-59)))^(-1);
  ultrarapid_delayed_rectifier_K_current_ultrarapid_delayed_rectifier_K_current_ua_gate_beta_ua := 0.65*(2.5 + exp((V - (-10) + 72)/17))^(-1);
  ultrarapid_delayed_rectifier_K_current_ultrarapid_delayed_rectifier_K_current_ua_gate_tau_ua := (ultrarapid_delayed_rectifier_K_current_ultrarapid_delayed_rectifier_K_current_ua_gate_alpha_ua + ultrarapid_delayed_rectifier_K_current_ultrarapid_delayed_rectifier_K_current_ua_gate_beta_ua)^(-1)/K_Q10;
  ultrarapid_delayed_rectifier_K_current_ultrarapid_delayed_rectifier_K_current_ua_gate_ua_infinity := (1 + exp((V - (-10) + 20.3)/(-9.6)))^(-1);
  ultrarapid_delayed_rectifier_K_current_ultrarapid_delayed_rectifier_K_current_ui_gate_alpha_ui := (21 + 1*exp((V - (-10) - 195)/(-28)))^(-1);
  ultrarapid_delayed_rectifier_K_current_ultrarapid_delayed_rectifier_K_current_ui_gate_beta_ui := 1/exp((V - (-10) - 168)/(-16));
  ultrarapid_delayed_rectifier_K_current_ultrarapid_delayed_rectifier_K_current_ui_gate_tau_ui := (ultrarapid_delayed_rectifier_K_current_ultrarapid_delayed_rectifier_K_current_ui_gate_alpha_ui + ultrarapid_delayed_rectifier_K_current_ultrarapid_delayed_rectifier_K_current_ui_gate_beta_ui)^(-1)/K_Q10;
  ultrarapid_delayed_rectifier_K_current_ultrarapid_delayed_rectifier_K_current_ui_gate_ui_infinity := (1 + exp((V - (-10) - 109.45)/27.48))^(-1);
  rapid_delayed_rectifier_K_current_rapid_delayed_rectifier_K_current_xr_gate_alpha_xr := ;
  rapid_delayed_rectifier_K_current_rapid_delayed_rectifier_K_current_xr_gate_beta_xr := ;
  rapid_delayed_rectifier_K_current_rapid_delayed_rectifier_K_current_xr_gate_tau_xr := (rapid_delayed_rectifier_K_current_rapid_delayed_rectifier_K_current_xr_gate_alpha_xr + rapid_delayed_rectifier_K_current_rapid_delayed_rectifier_K_current_xr_gate_beta_xr)^(-1);
  rapid_delayed_rectifier_K_current_rapid_delayed_rectifier_K_current_xr_gate_xr_infinity := (1 + exp((V + 14.1)/(-6.5)))^(-1);
  slow_delayed_rectifier_K_current_slow_delayed_rectifier_K_current_xs_gate_alpha_xs := ;
  slow_delayed_rectifier_K_current_slow_delayed_rectifier_K_current_xs_gate_beta_xs := ;
  slow_delayed_rectifier_K_current_slow_delayed_rectifier_K_current_xs_gate_tau_xs := 0.5*(slow_delayed_rectifier_K_current_slow_delayed_rectifier_K_current_xs_gate_alpha_xs + slow_delayed_rectifier_K_current_slow_delayed_rectifier_K_current_xs_gate_beta_xs)^(-1);
  slow_delayed_rectifier_K_current_slow_delayed_rectifier_K_current_xs_gate_xs_infinity := (1 + exp((V - 19.9)/(-12.7)))^(-0.5);
  L_type_Ca_channel_L_type_Ca_channel_d_gate_d_infinity := (1 + exp((V + 10)/(-8)))^(-1);
  L_type_Ca_channel_L_type_Ca_channel_d_gate_tau_d := ;
  L_type_Ca_channel_L_type_Ca_channel_f_gate_f_infinity := exp(-(V + 28)/6.9)/(1 + exp(-(V + 28)/6.9));
  L_type_Ca_channel_L_type_Ca_channel_f_gate_tau_f := 9*(0.0197*exp(-0.0337^2*(V + 10)^2) + 0.02)^(-1);
  L_type_Ca_channel_L_type_Ca_channel_f_Ca_gate_f_Ca_infinity := (1 + Ca_i/0.00035)^(-1);
  L_type_Ca_channel_L_type_Ca_channel_f_Ca_gate_tau_f_Ca := 2;
  sodium_potassium_pump_f_NaK := (1 + 0.1245*exp(-0.1*F*V/(R*T)) + 0.0365*sodium_potassium_pump_sigma*exp(-F*V/(R*T)))^(-1);
  sodium_potassium_pump_sigma := 1/7*(exp(Na_o/67.3) - 1);
  i_B_K := Cm*background_currents_g_B_K*(V - E_K);
  background_currents_E_Ca := R*T/(2*F)*ln(Ca_o/Ca_i);
  i_rel := Ca_release_current_from_JSR_K_rel*u^2*v*w*(Ca_rel - Ca_i);
  Fn := 1e3*(1e-15*V_rel*i_rel - 1e-15/(2*F)*(0.5*i_Ca_L - 0.2*i_NaCa));
  V_rel := 0.0048*intracellular_ion_concentrations_V_cell;
  Ca_release_current_from_JSR_Ca_release_current_from_JSR_u_gate_tau_u := 8;
  Ca_release_current_from_JSR_Ca_release_current_from_JSR_u_gate_u_infinity := (1 + exp(-(Fn - 3.4175e-13)/13.67e-16))^(-1);
  Ca_release_current_from_JSR_Ca_release_current_from_JSR_v_gate_tau_v := 1.91 + 2.09*(1 + exp(-(Fn - 3.4175e-13)/13.67e-16))^(-1);
  Ca_release_current_from_JSR_Ca_release_current_from_JSR_v_gate_v_infinity := 1 - (1 + exp(-(Fn - 6.835e-14)/13.67e-16))^(-1);
  Ca_release_current_from_JSR_Ca_release_current_from_JSR_w_gate_tau_w := ;
  Ca_release_current_from_JSR_Ca_release_current_from_JSR_w_gate_w_infinity := 1 - (1 + exp(-(V - 40)/17))^(-1);
  i_tr := (Ca_up - Ca_rel)/transfer_current_from_NSR_to_JSR_tau_tr;
  i_up := I_up_max/(1 + Ca_uptake_current_by_the_NSR_K_up/Ca_i);
  i_up_leak := I_up_max*Ca_up/Ca_leak_current_by_the_NSR_Ca_up_max;
  Ca_buffers_Ca_CMDN := CMDN_max*Ca_i/(Ca_i + Km_CMDN);
  Ca_buffers_Ca_TRPN := TRPN_max*Ca_i/(Ca_i + Km_TRPN);
  Ca_buffers_Ca_CSQN := CSQN_max*Ca_rel/(Ca_rel + Km_CSQN);
  intracellular_ion_concentrations_V_i := intracellular_ion_concentrations_V_cell*0.68;
  intracellular_ion_concentrations_V_up := 0.0552*intracellular_ion_concentrations_V_cell;
  intracellular_ion_concentrations_B1 := (2*i_NaCa - (i_CaP + i_Ca_L + i_B_Ca))/(2*intracellular_ion_concentrations_V_i*F) + (intracellular_ion_concentrations_V_up*(i_up_leak - i_up) + i_rel*V_rel)/intracellular_ion_concentrations_V_i;
  intracellular_ion_concentrations_B2 := 1 + TRPN_max*Km_TRPN/(Ca_i + Km_TRPN)^2 + CMDN_max*Km_CMDN/(Ca_i + Km_CMDN)^2;

  // Rate rules:
  V' = -(i_Na + i_K1 + i_to + i_Kur + i_Kr + i_Ks + i_B_Na + i_B_Ca + i_NaK + i_CaP + i_NaCa + i_Ca_L + membrane_i_st)/Cm;
  Na_i' = (-3*i_NaK - (3*i_NaCa + i_B_Na + i_Na))/(intracellular_ion_concentrations_V_i*F);
  m' = (fast_sodium_current_fast_sodium_current_m_gate_m_inf - m)/fast_sodium_current_fast_sodium_current_m_gate_tau_m;
  h' = (fast_sodium_current_fast_sodium_current_h_gate_h_inf - h)/fast_sodium_current_fast_sodium_current_h_gate_tau_h;
  j' = (fast_sodium_current_fast_sodium_current_j_gate_j_inf - j)/fast_sodium_current_fast_sodium_current_j_gate_tau_j;
  K_i' = (2*i_NaK - (i_K1 + i_to + i_Kur + i_Kr + i_Ks + i_B_K))/(intracellular_ion_concentrations_V_i*F);
  oa' = (transient_outward_K_current_transient_outward_K_current_oa_gate_oa_infinity - oa)/transient_outward_K_current_transient_outward_K_current_oa_gate_tau_oa;
  oi' = (transient_outward_K_current_transient_outward_K_current_oi_gate_oi_infinity - oi)/transient_outward_K_current_transient_outward_K_current_oi_gate_tau_oi;
  ua' = (ultrarapid_delayed_rectifier_K_current_ultrarapid_delayed_rectifier_K_current_ua_gate_ua_infinity - ua)/ultrarapid_delayed_rectifier_K_current_ultrarapid_delayed_rectifier_K_current_ua_gate_tau_ua;
  ui' = (ultrarapid_delayed_rectifier_K_current_ultrarapid_delayed_rectifier_K_current_ui_gate_ui_infinity - ui)/ultrarapid_delayed_rectifier_K_current_ultrarapid_delayed_rectifier_K_current_ui_gate_tau_ui;
  xr' = (rapid_delayed_rectifier_K_current_rapid_delayed_rectifier_K_current_xr_gate_xr_infinity - xr)/rapid_delayed_rectifier_K_current_rapid_delayed_rectifier_K_current_xr_gate_tau_xr;
  xs' = (slow_delayed_rectifier_K_current_slow_delayed_rectifier_K_current_xs_gate_xs_infinity - xs)/slow_delayed_rectifier_K_current_slow_delayed_rectifier_K_current_xs_gate_tau_xs;
  Ca_i' = intracellular_ion_concentrations_B1/intracellular_ion_concentrations_B2;
  d' = (L_type_Ca_channel_L_type_Ca_channel_d_gate_d_infinity - d)/L_type_Ca_channel_L_type_Ca_channel_d_gate_tau_d;
  f' = (L_type_Ca_channel_L_type_Ca_channel_f_gate_f_infinity - f)/L_type_Ca_channel_L_type_Ca_channel_f_gate_tau_f;
  f_Ca' = (L_type_Ca_channel_L_type_Ca_channel_f_Ca_gate_f_Ca_infinity - f_Ca)/L_type_Ca_channel_L_type_Ca_channel_f_Ca_gate_tau_f_Ca;
  Ca_rel' = (i_tr - i_rel)*(1 + CSQN_max*Km_CSQN/(Ca_rel + Km_CSQN)^2)^(-1);
  u' = (Ca_release_current_from_JSR_Ca_release_current_from_JSR_u_gate_u_infinity - u)/Ca_release_current_from_JSR_Ca_release_current_from_JSR_u_gate_tau_u;
  v' = (Ca_release_current_from_JSR_Ca_release_current_from_JSR_v_gate_v_infinity - v)/Ca_release_current_from_JSR_Ca_release_current_from_JSR_v_gate_tau_v;
  w' = (Ca_release_current_from_JSR_Ca_release_current_from_JSR_w_gate_w_infinity - w)/Ca_release_current_from_JSR_Ca_release_current_from_JSR_w_gate_tau_w;
  Ca_up' = i_up - (i_up_leak + i_tr*V_rel/intracellular_ion_concentrations_V_up);
end
