// SBML level 2 version 4

model cronwright_rohwer_prior_2002_version01____main()
  // Originally created by libAntimony v1.3 (using libSBML 4.1.0-b2)

  // Compartments:
  compartment default_compartment = 1;

  // Parameters:
  F16BP0 = 0.5;
  G3P0 = 24;
  DHAP0 = 0.4;
  ATP0 = 0.04;
  ADP0 = 0.4;
  NADH0 = 0.23;
  NAD0 = 0.8;
  Pi_0 = ;
  V_Gpd_p_K_F16BP = 4.8;
  V_Gpd_p_K_ATP = 0.73;
  V_Gpd_p_K_ADP = 2;
  V_Gpd_p_K_NAD = 0.93;
  V_Gpd_p_K_NADH = 0.023;
  V_Gpd_p_K_G3P = 1.2;
  V_Gpd_p_K_DHAP = 0.54;
  V_Gpd_p_K_eq = 1e4;
  V_Gpd_p_Vf = 36;
  V_Gpp_p_K_G3P = 3.5;
  V_Gpp_p_K_Pi = 1;
  V_Gpp_p_V = 18;
  time_ = ;

  // Assignment rules:
  V_Gpd_p0 := V_Gpd_p_Vf/(V_Gpd_p_K_NADH*V_Gpd_p_K_DHAP)*(NADH0*DHAP0 - NAD0*G3P0/V_Gpd_p_K_eq)/((1 + F16BP0/V_Gpd_p_K_F16BP + ATP0/V_Gpd_p_K_ATP + ADP0/V_Gpd_p_K_ADP)*(1 + NADH0/V_Gpd_p_K_NADH + NAD0/V_Gpd_p_K_NAD)*(1 + DHAP0/V_Gpd_p_K_DHAP + G3P0/V_Gpd_p_K_G3P));
  V_Gpp_p0 := V_Gpp_p_V*(G3P0/V_Gpp_p_K_G3P)/((1 + G3P0/V_Gpp_p_K_G3P)*(1 + Pi_0/V_Gpp_p_K_Pi));

  // Rate rules:
  F16BP0' = V_Gpd_p0;
  G3P0' = V_Gpp_p0 + V_Gpd_p0;
  DHAP0' = V_Gpd_p0;
  ATP0' = V_Gpd_p0;
  ADP0' = V_Gpd_p0;
  NADH0' = V_Gpd_p0;
  NAD0' = V_Gpd_p0;
  Pi_0' = V_Gpp_p0;
end
