// SBML level 2 version 4

model cui_kaandorp_2006_version01____main()
  // Originally created by libAntimony v1.4 (using libSBML 4.1.0-b2)

  // Compartments:
  compartment default_compartment = 1;

  // Parameters:
  m0 = 0;
  m_kM_plus = 500;
  m_kM_minus = 100;
  m_CaMtotal = 25;
  x0 = 0;
  z0 = 1e-8;
  z_kN_plus = 5;
  z_kN_minus = 5;
  z_CaNtotal = 25;
  h0 = 0;
  h_d = 0.4;
  h_f = 0.1;
  lamda = 5;
  N = 13;
  x_Vx = 1000;
  x_Kx = 500;
  x_V1 = 30000;
  x_K1 = 4.3;
  x_V2 = 100;
  x_K2 = 0.1;
  x_V3 = 10000;
  x_K3 = 100;
  x_kc = 10;
  x_alpha = 0.006;
  x_Caex = 1;
  time_ = ;

  // Assignment rules:
  m_dmdt := m_kM_plus*(m_CaMtotal - m0)*x0^3 - m_kM_minus*m0;
  z_dzdt := z_kN_plus*(z_CaNtotal - z0)*m0 - z_kN_minus*z0;
  phi0 := 1/(1 + L0*((lamda*y)^(N + 1) - 1)/((lamda*y - 1)*((y - 1)/(y^(N + 1) - 1))));
  L0 := 10^(-(N/2));
  y := 1/z0;
  psi0 := (1 + L0)/((y^(N + 1) - 1)/(y - 1) + L0*(((lamda*y)^(N + 1) - 1)/(lamda*y - 1)));
  x_dxdt := x_Vx*x_Caex/(x_Kx + x_Caex) - (h0*psi0*(1/z0)*(x_V1*x0/(x_K1 + x0)) + h0*psi0*(1/z0)*(x_V2*x0/(x_K2 + x0)) + 1/(1 + x_kc*z0)*(x_V3*x0/(x_K3 + x0)) + x_alpha*x0);

  // Rate rules:
  m0' = m_kM_plus*(m_CaMtotal - m0)*x0^3 - m_kM_minus*m0;
  x0' = x_Vx*x_Caex/(x_Kx + x_Caex) - (h0*psi0*(1/z0)*(x_V1*x0/(x_K1 + x0)) + h0*psi0*(1/z0)*(x_V2*x0/(x_K2 + x0)) + 1/(1 + x_kc*z0)*(x_V3*x0/(x_K3 + x0)) + x_alpha*x0);
  z0' = z_kN_plus*(z_CaNtotal - z0)*m0 - z_kN_minus*z0;
  h0' = h_d*phi0*(1/z0)*(1 - h0) - h_f*(1 - phi0*(1/z0))*h0;
end
