// SBML level 2 version 4

model cui_kaandorp_lloyd_b_2008_version01____main()
  // Originally created by libAntimony v1.3 (using libSBML 4.1.0-b2)

  // Compartments:
  compartment default_compartment = 1;

  // Parameters:
  Py0 = 25;
  Zn0 = 10000;
  Py10 = 0;
  r3 = 4.41e10;
  r4 = 9e-3;
  Dw0 = 4;
  Qw20 = 0;
  k_1 = 0.9;
  k1a = 1;
  Qw10 = 0;
  Rw0 = 50;
  k2 = 0.02;
  k_2 = 0.3;
  Mw0 = 0;
  Px0 = 50;
  Px10 = 0;
  Dz0 = 2;
  Qz40 = 0;
  r1 = 2.73e2;
  r2 = 3.437e-4;
  k1b = 1.253e-2;
  Qz20 = 0;
  k1 = 0.025;
  Tp0 = 10000;
  Tp10 = 0;
  r5 = 3e4;
  r6 = 1.506e-2;
  Qz10 = 0;
  Rz0 = 100;
  k2a = 5e-5;
  Qz30 = 0;
  Qz50 = 0;
  k2b = 0.0002;
  k2c = 0.0037;
  Mz0 = 0;
  model_parameters_td0 = 1800;
  model_parameters_td = 2700;
  time_ = ;

  // Assignment rules:
  k3 := ;

  // Rate rules:
  Py0' = r4*Py10 - r3*Zn0^2*Py0;
  Zn0' = r2*Px10 + r6*Tp10 - (r1*Zn0*Px0 + r5*Zn0*Tp0);
  Py10' = r3*Zn0^2*Py0 + k_1*Qw20 - (r4*Py10 + k1a*Dw0*Py10);
  Dw0' = k_1*Qw20 + k3*Qw10 + k_2*Qw10 - (k1a*Dw0*Py10 + k2*Dw0*Rw0);
  Qw20' = k1a*Dw0*Py10 - k_1*Qw20;
  Qw10' = k2*Dw0*Rw0 - (k3*Qw10 + k_2*Qw10);
  Rw0' = k3*Qw10 + k_2*Qw10 - k2*Dw0*Rw0;
  Mw0' = k3*Qw10;
  Px0' = r2*Px10 + k_1*Qz40 - (r1*Zn0*Px0 + k1b*Dz0*Px0);
  Px10' = r1*Zn0*Px0 + k_1*Qz20 - (r2*Px10 + k1*Dz0*Px10);
  Dz0' = k_1*Qz20 + k3*Qz10 + k_2*Qz10 + k_1*Qz40 - (k1b*Dz0*Px0 + k1*Dz0*Px10 + k2a*Dz0*Rz0);
  Qz40' = k1b*Dz0*Px0 + k3*Qz50 + k_2*Qz50 - (k_1*Qz40 + k2b*Qz40*Rz0);
  Qz20' = k1*Dz0*Px10 + k3*Qz30 + k_2*Qz30 - (k_1*Qz20 + k2c*Qz20*Rz0);
  Tp0' = r6*Tp10 - r5*Zn0*Tp0;
  Tp10' = r5*Zn0*Tp0 - r6*Tp10;
  Qz10' = k2a*Dz0*Rz0 - (k3*Qz10 + k_2*Qz10);
  Rz0' = k3*Qz10 + k_2*Qz10 + k3*Qz30 + k_2*Qz30 + k3*Qz50 + k_2*Qz50 - (k2a*Dz0*Rz0 + k2b*Qz40*Rz0 + k2c*Qz20*Rz0);
  Qz30' = k2c*Qz20*Rz0 - (k3*Qz30 + k_2*Qz30);
  Qz50' = k2b*Qz40*Rz0 - (k3*Qz50 + k_2*Qz50);
  Mz0' = k3*Qz10 + k3*Qz30 + k3*Qz50;
end
