// SBML level 2 version 4

model dawson_lea_irvine_2003_version03____main()
  // Originally created by libAntimony v1.3 (using libSBML 4.1.0-b2)

  // Compartments:
  compartment default_compartment = 1;

  // Parameters:
  R0 = ;
  R__0 = ;
  I0 = ;
  O10 = ;
  O20 = ;
  R_0 = ;
  C10 = ;
  Ca_ER0 = ;
  Ca_cyt0 = ;
  Ca_L0 = ;
  V1_k1 = 1;
  V1_k1_ = 10;
  V2_k2 = 100;
  V2_k2_ = 12000;
  V3_k3 = 100;
  V3_k3_ = 10;
  V4_k4 = 1;
  V4_k4_ = 1;
  V5_k5 = 10;
  V5_k5_ = 1;
  V6_k6 = 2;
  V6_k6_ = 2.4;
  V7_k7 = 10;
  V7_k7_ = 1;
  V8_k8 = 500;
  V9_k9 = 5000;
  V10_k10 = 500;
  time_ = ;

  // Assignment rules:
  V11 := V1_k1_*R_0 - V1_k1*R0;
  V40 := V4_k4_*R__0 - V4_k4*R0*Ca_L0;
  V20 := V2_k2_*O10 - V2_k2*R0*I0;
  V50 := V5_k5_*R__0 - V5_k5*R_0*Ca_L0;
  V60 := V6_k6_*C10 - V6_k6*R_0*I0;
  V70 := V7_k7_*C10 - V7_k7*O10;
  V30 := V3_k3_*O20 - V3_k3*O10*Ca_L0;
  V80 := V8_k8*Ca_ER0;
  V90 := V9_k9*Ca_ER0;
  V100 := V10_k10*Ca_L0;

  // Rate rules:
  R0' = V11 + V40 + V20;
  R__0' = V40 + V50;
  I0' = V20 + V60;
  O10' = V20 + V70 + V30;
  O20' = V30;
  R_0' = V11 + V50 + V60;
  C10' = V60 + V70;
  Ca_ER0' = V80 + V90;
  Ca_cyt0' = V100;
  Ca_L0' = V40 + V50 + V30 + V100 + V80 + V90;
end
