// SBML level 2 version 4

model demir_clark_giles_1999____main()
  // Originally created by libAntimony v1.3 (using libSBML 4.1.0-b2)

  // Compartments:
  compartment default_compartment = 1;

  // Parameters:
  V = -49.54105;
  R = 8314.472;
  T = 310;
  F = 96485.3415;
  membrane_Cm = 5.5e-5;
  sodium_current_P_Na = 0.00344;
  Na_c = 139.9988;
  ACh = 0;
  m = 0.250113;
  h1 = 0.001386897;
  h2 = 0.002065463;
  L_type_Ca_channel_g_Ca_L_cont = 0.02115;
  cAMP = 0.003;
  L_type_Ca_channel_E_Ca_L = 46.4;
  d_L = 0.002572773;
  f_L = 0.98651;
  T_type_Ca_channel_g_Ca_T = 0.02521;
  T_type_Ca_channel_E_Ca_T = 45;
  d_T = 0.02012114;
  f_T = 0.1945111;
  K_b = 5.4;
  P_a = 0.02302278;
  P_i = 0.3777728;
  linear_background_current_g_B_Na = 0.00016;
  linear_background_current_g_B_Ca = 3.64e-5;
  linear_background_current_g_B_K = 6.94e-5;
  hyperpolarisation_activated_current_g_f_Na = 0.0067478;
  hyperpolarisation_activated_current_g_f_K = 0.0128821;
  y = 0.09227776;
  sodium_potassium_pump_K_m_Na = 5.46;
  sodium_potassium_pump_K_m_K = 0.621;
  sodium_potassium_pump_i_NaK_max = 0.2192;
  Na_i = 9.701621;
  K_c = 5.389014;
  Ca_i = 0.0003787018;
  calcium_pump_current_i_Ca_P_max = 0.02869;
  sodium_calcium_pump_K_NaCa = 1.248e-5;
  sodium_calcium_pump_d_NaCa = 0.0001;
  sodium_calcium_pump_gamma = 0.5;
  Ca_c = 2.00474;
  muscarinic_potassium_current_g_K_ACh_base = 0.007833;
  muscarinic_potassium_current_a = 0;
  f_Vagal = 200;
  K_i = 140.7347;
  intracellular_concentrations_and_buffer_equations_Ca_Calmod = 0.1411678;
  intracellular_concentrations_and_buffer_equations_Ca_Trop = 0.07331396;
  intracellular_concentrations_and_buffer_equations_Ca_Mg_Trop = 0.7618549;
  intracellular_concentrations_and_buffer_equations_Mg_Mg_Trop = 0.2097049;
  intracellular_concentrations_and_buffer_equations_Mg_i = 2.5;
  Vol = 3.497e-6;
  cleft_space_equations_Na_b = 140;
  cleft_space_equations_Ca_b = 2;
  cleft_space_equations_tau_p = 0.01;
  SR_Ca_uptake_and_release_Ca_up = 16.95311;
  SR_Ca_uptake_and_release_alpha_up = 0.08;
  SR_Ca_uptake_and_release_beta_up = 0.072;
  SR_Ca_uptake_and_release_Ca_rel = 16.85024;
  SR_Ca_uptake_and_release_alpha_rel = 0.5;
  SR_Ca_uptake_and_release_k_cyca = 5e-5;
  SR_Ca_uptake_and_release_k_xcs = 0.9;
  SR_Ca_uptake_and_release_k_SRCa = 22;
  SR_Ca_uptake_and_release_k_rel = 0.004;
  SR_Ca_uptake_and_release_Ca_Calse = 0.9528726;
  SR_Ca_uptake_and_release_F1 = 0.1133251;
  SR_Ca_uptake_and_release_F2 = 0.0007594214;
  SR_Ca_uptake_and_release_F3 = 0.8859153;
  cAMP_balance_cGMP = 0.002;
  cAMP_balance_Iso = 0;
  cAMP_balance_Km_Iso = 0.00014;
  cAMP_balance_Km_ACh = 0.00014;
  cAMP_balance_K_PDE = 6;
  cAMP_balance_K_ADC = 0.008;
  cAMP_balance_V_PDE = 20;
  cAMP_balance_P_M2_ADC = 0.02;
  time_ = ;

  // Assignment rules:
  i_Na := sodium_current_F_ACh_Na*sodium_current_P_Na*m^3*h1*h2*Na_c*V*F^2/(R*T)*(exp((V - E_Na)*F/(R*T)) - 1)/(exp(V*F/(R*T)) - 1);
  i_Ca_T := T_type_Ca_channel_g_Ca_T*d_T*f_T*(V - T_type_Ca_channel_E_Ca_T);
  i_Ca_L := L_type_Ca_channel_g_Ca_L*(f_L*d_L + 0.095*d_L_infinity)*(V - L_type_Ca_channel_E_Ca_L);
  i_K := delayed_rectifying_potassium_current_g_K*P_a*P_i*(V - E_K);
  i_f := i_f_Na + i_f_K;
  i_B := i_B_Na + i_B_Ca + i_B_K;
  i_NaK := ;
  i_NaCa := sodium_calcium_pump_K_NaCa*(Na_i^3*Ca_c*exp(0.03743*V*sodium_calcium_pump_gamma) - Na_c^3*Ca_i*exp(0.03743*V*(sodium_calcium_pump_gamma - 1)))/(1 + sodium_calcium_pump_d_NaCa*(Ca_i*Na_c^3 + Ca_c*Na_i^3));
  i_Ca_P := calcium_pump_current_i_Ca_P_max*Ca_i/(Ca_i + 0.0004);
  i_K_ACh := muscarinic_potassium_current_a*muscarinic_potassium_current_I_K_ACh;
  E_Na := R*T/F*ln(Na_c/Na_i);
  sodium_current_F_ACh_Na := 1 - ACh/(ACh + 1e-3);
  sodium_current_sodium_current_m_gate_m_infinity := sodium_current_sodium_current_m_gate_alpha_m/(sodium_current_sodium_current_m_gate_alpha_m + sodium_current_sodium_current_m_gate_beta_m);
  sodium_current_sodium_current_m_gate_tau_m := 1/(sodium_current_sodium_current_m_gate_alpha_m + sodium_current_sodium_current_m_gate_beta_m) + 1.5e-5;
  sodium_current_sodium_current_m_gate_alpha_m := -824*(V + 51.9)/(exp((V + 51.9)/(-8.9)) - 1);
  sodium_current_sodium_current_m_gate_beta_m := 32960*exp((V + 51.9)/(-8.9));
  sodium_current_sodium_current_h_gate_h1_infinity := sodium_current_sodium_current_h_gate_alpha_h1/(sodium_current_sodium_current_h_gate_alpha_h1 + sodium_current_sodium_current_h_gate_beta_h1);
  sodium_current_sodium_current_h_gate_h2_infinity := sodium_current_sodium_current_h_gate_h1_infinity;
  sodium_current_sodium_current_h_gate_tau_h1 := 1/(sodium_current_sodium_current_h_gate_alpha_h1 + sodium_current_sodium_current_h_gate_beta_h1);
  sodium_current_sodium_current_h_gate_tau_h2 := 20*sodium_current_sodium_current_h_gate_tau_h1;
  sodium_current_sodium_current_h_gate_alpha_h1 := 165*exp((V + 101.3)/(-12.6));
  sodium_current_sodium_current_h_gate_beta_h1 := 12360/(320*exp((V + 101.3)/(-12.6)) + 1);
  L_type_Ca_channel_g_Ca_L := L_type_Ca_channel_g_Ca_L_cont*L_type_Ca_channel_F_cAMP_CaL;
  L_type_Ca_channel_F_cAMP_CaL := 0.4*(1 + 4.5*cAMP/(cAMP + 6.5e-3)) + 0.03157;
  d_L_infinity := 1/(1 + exp((V + 14.1)/(-6)));
  L_type_Ca_channel_L_type_Ca_channel_d_gate_alpha_d_L := -28.39*(V + 35)/(exp((V + 35)/(-2.5)) - 1) + (-84.9*V/(exp(-0.208*V) - 1));
  L_type_Ca_channel_L_type_Ca_channel_d_gate_beta_d_L := 11.43*(V - 5)/(exp(0.4*(V - 5)) - 1);
  L_type_Ca_channel_L_type_Ca_channel_d_gate_tau_d_L := 1/(L_type_Ca_channel_L_type_Ca_channel_d_gate_alpha_d_L + L_type_Ca_channel_L_type_Ca_channel_d_gate_beta_d_L);
  L_type_Ca_channel_L_type_Ca_channel_f_gate_alpha_f_L := 3.75*(V + 28)/(exp((V + 28)/4) - 1);
  L_type_Ca_channel_L_type_Ca_channel_f_gate_beta_f_L := 30/(1 + exp((V + 28)/(-4)));
  L_type_Ca_channel_L_type_Ca_channel_f_gate_f_L_infinity := 1/(1 + exp((V + 30)/5));
  L_type_Ca_channel_L_type_Ca_channel_f_gate_tau_f_L := 1/(L_type_Ca_channel_L_type_Ca_channel_f_gate_alpha_f_L + L_type_Ca_channel_L_type_Ca_channel_f_gate_beta_f_L);
  T_type_Ca_channel_T_type_Ca_channel_d_gate_alpha_d_T := 1068*exp((V + 26.3)/30);
  T_type_Ca_channel_T_type_Ca_channel_d_gate_beta_d_T := 1068*exp((V + 26.3)/(-30));
  T_type_Ca_channel_T_type_Ca_channel_d_gate_d_T_infinity := 1/(1 + exp((V + 26.3)/(-6)));
  T_type_Ca_channel_T_type_Ca_channel_d_gate_tau_d_T := 1/(T_type_Ca_channel_T_type_Ca_channel_d_gate_alpha_d_T + T_type_Ca_channel_T_type_Ca_channel_d_gate_beta_d_T);
  T_type_Ca_channel_T_type_Ca_channel_f_gate_alpha_f_T := 15.3*exp((V + 61.7)/(-83.3));
  T_type_Ca_channel_T_type_Ca_channel_f_gate_beta_f_T := 15*exp((V + 61.7)/15.38);
  T_type_Ca_channel_T_type_Ca_channel_f_gate_f_T_infinity := 1/(1 + exp((V + 61.7)/5.6));
  T_type_Ca_channel_T_type_Ca_channel_f_gate_tau_f_T := 1/(T_type_Ca_channel_T_type_Ca_channel_f_gate_alpha_f_T + T_type_Ca_channel_T_type_Ca_channel_f_gate_beta_f_T);
  delayed_rectifying_potassium_current_g_K := delayed_rectifying_potassium_current_F_cAMP_K*0.00693*(K_b/1)^0.59;
  delayed_rectifying_potassium_current_F_cAMP_K := 0.62*(1 + 2.6129*cAMP/(cAMP + 9e-3)) - 0.025;
  E_K := R*T/F*ln(K_c/K_i);
  delayed_rectifying_potassium_current_delayed_rectifying_potassium_current_P_a_gate_tau_P_a := 1/(17*exp(0.0398*V) + 2.11*exp(-0.051*V));
  delayed_rectifying_potassium_current_delayed_rectifying_potassium_current_P_a_gate_P_a_infinity := 1/(1 + exp((V + 5.1)/(-7.4)));
  delayed_rectifying_potassium_current_delayed_rectifying_potassium_current_P_i_gate_alpha_P_i := 100*exp(-0.0183*V);
  delayed_rectifying_potassium_current_delayed_rectifying_potassium_current_P_i_gate_beta_P_i := 656*exp(0.00942*V);
  i_B_Na := linear_background_current_F_ACh_bNa*linear_background_current_g_B_Na*(V - E_Na);
  i_B_Ca := linear_background_current_g_B_Ca*(V - E_Ca);
  i_B_K := linear_background_current_g_B_K*(V - E_K);
  E_Ca := 0.5*R*T/F*ln(Ca_c/Ca_i);
  linear_background_current_F_ACh_bNa := 1 - ACh/(ACh + 5e-1);
  i_f_Na := hyperpolarisation_activated_current_g_f_Na*y^2*(V - 75);
  i_f_K := hyperpolarisation_activated_current_g_f_K*y^2*(V + 85);
  hyperpolarisation_activated_current_hyperpolarisation_activated_current_y_gate_y_infinity := 1/(1 + exp((V - hyperpolarisation_activated_current_hyperpolarisation_activated_current_y_gate_V_half)/9));
  hyperpolarisation_activated_current_hyperpolarisation_activated_current_y_gate_V_half := 20.5/(1 + exp((cAMP - 3.4e-3)/(-5e-4))) - 78.56;
  hyperpolarisation_activated_current_hyperpolarisation_activated_current_y_gate_tau_y := 1/(1.6483*exp((V + 54.06)/(-24.33)) + 14.01055/(0.7 + exp((V + 60)/(-5.5))));
  sodium_potassium_pump_F_cAMP_NaK := 1.6/(1 + exp((cAMP - 3.75e-3)/(-1.5e-4))) + 0.99;
  muscarinic_potassium_current_I_K_ACh := muscarinic_potassium_current_g_K_ACh*(V - E_K);
  muscarinic_potassium_current_g_K_ACh := muscarinic_potassium_current_P_M2_KACh*muscarinic_potassium_current_g_K_ACh_base;
  muscarinic_potassium_current_P_M2_KACh := ;
  muscarinic_potassium_current_alpha_a := 17*exp(0.0133*(V + 40));
  muscarinic_potassium_current_beta_a := 12.32/(1 + 0.0042/ACh);
  intracellular_concentrations_and_buffer_equations_phi_C := 129000*Ca_i*(1 - intracellular_concentrations_and_buffer_equations_Ca_Calmod) - 307*intracellular_concentrations_and_buffer_equations_Ca_Calmod;
  intracellular_concentrations_and_buffer_equations_phi_TC := 50500*Ca_i*(1 - intracellular_concentrations_and_buffer_equations_Ca_Trop) - 252*intracellular_concentrations_and_buffer_equations_Ca_Trop;
  intracellular_concentrations_and_buffer_equations_phi_TMgC := 129000*Ca_i*(1 - (intracellular_concentrations_and_buffer_equations_Ca_Mg_Trop + intracellular_concentrations_and_buffer_equations_Mg_Mg_Trop)) - 4.25*intracellular_concentrations_and_buffer_equations_Ca_Mg_Trop;
  intracellular_concentrations_and_buffer_equations_phi_TMgM := 1290*intracellular_concentrations_and_buffer_equations_Mg_i*(1 - (intracellular_concentrations_and_buffer_equations_Ca_Mg_Trop + intracellular_concentrations_and_buffer_equations_Mg_Mg_Trop)) - 429*intracellular_concentrations_and_buffer_equations_Mg_Mg_Trop;
  intracellular_concentrations_and_buffer_equations_phi_B := intracellular_concentrations_and_buffer_equations_F_C + intracellular_concentrations_and_buffer_equations_F_TC + intracellular_concentrations_and_buffer_equations_F_TMgC;
  intracellular_concentrations_and_buffer_equations_F_C := 0.09*intracellular_concentrations_and_buffer_equations_phi_C;
  intracellular_concentrations_and_buffer_equations_F_TC := 0.031*intracellular_concentrations_and_buffer_equations_phi_TC;
  intracellular_concentrations_and_buffer_equations_F_TMgC := 0.062*intracellular_concentrations_and_buffer_equations_phi_TMgC;
  V_i := 0.465*Vol;
  i_up := (SR_Ca_uptake_and_release_alpha_up*Ca_i - SR_Ca_uptake_and_release_beta_up*SR_Ca_uptake_and_release_Ca_up*SR_Ca_uptake_and_release_K1)/SR_Ca_uptake_and_release_K2;
  i_rel := SR_Ca_uptake_and_release_alpha_rel*(SR_Ca_uptake_and_release_F2/(SR_Ca_uptake_and_release_F2 + 0.25))^2*SR_Ca_uptake_and_release_Ca_rel;
  cleft_space_equations_V_c := 0.136*Vol;
  SR_Ca_uptake_and_release_i_tr := (SR_Ca_uptake_and_release_Ca_up - SR_Ca_uptake_and_release_Ca_rel)*2*F*SR_Ca_uptake_and_release_V_up/0.06418;
  SR_Ca_uptake_and_release_K1 := SR_Ca_uptake_and_release_k_cyca*SR_Ca_uptake_and_release_k_xcs/SR_Ca_uptake_and_release_k_SRCa;
  SR_Ca_uptake_and_release_K2 := Ca_i + SR_Ca_uptake_and_release_Ca_up*SR_Ca_uptake_and_release_K1 + SR_Ca_uptake_and_release_k_cyca*SR_Ca_uptake_and_release_k_xcs + SR_Ca_uptake_and_release_k_cyca;
  SR_Ca_uptake_and_release_r_act := 240*exp((V - 40)*0.08) + 240*(Ca_i/(Ca_i + SR_Ca_uptake_and_release_k_rel))^4;
  SR_Ca_uptake_and_release_r_inact := 40 + 240*(Ca_i/(Ca_i + SR_Ca_uptake_and_release_k_rel))^4;
  SR_Ca_uptake_and_release_phi_Calse := 770*SR_Ca_uptake_and_release_Ca_rel*(1 - SR_Ca_uptake_and_release_Ca_Calse) - 641*SR_Ca_uptake_and_release_Ca_Calse;
  SR_Ca_uptake_and_release_V_up := 0.01166*V_i;
  SR_Ca_uptake_and_release_V_rel := 0.001296*V_i;

  // Rate rules:
  V' = -(i_Na + i_Ca_T + i_Ca_L + i_K + i_f + i_B + i_NaK + i_NaCa + i_Ca_P + i_K_ACh)/membrane_Cm;
  Na_c' = (cleft_space_equations_Na_b - Na_c)/cleft_space_equations_tau_p + (i_Na + 3*i_NaCa + 3*i_NaK + i_B_Na + i_f_Na)/(F*cleft_space_equations_V_c);
  m' = (sodium_current_sodium_current_m_gate_m_infinity - m)/sodium_current_sodium_current_m_gate_tau_m;
  h1' = (sodium_current_sodium_current_h_gate_h1_infinity - h1)/sodium_current_sodium_current_h_gate_tau_h1;
  h2' = (sodium_current_sodium_current_h_gate_h2_infinity - h2)/sodium_current_sodium_current_h_gate_tau_h2;
  cAMP' = 1*(cAMP_balance_K_ADC*(1 + cAMP_balance_Iso/(cAMP_balance_Iso + cAMP_balance_Km_Iso) - cAMP_balance_P_M2_ADC*ACh/(cAMP_balance_P_M2_ADC*ACh + cAMP_balance_Km_ACh)) - cAMP_balance_V_PDE*cAMP_balance_cGMP*cAMP/(cAMP + cAMP_balance_K_PDE*cAMP_balance_cGMP));
  d_L' = (d_L_infinity - d_L)/L_type_Ca_channel_L_type_Ca_channel_d_gate_tau_d_L;
  f_L' = (L_type_Ca_channel_L_type_Ca_channel_f_gate_f_L_infinity - f_L)/L_type_Ca_channel_L_type_Ca_channel_f_gate_tau_f_L;
  d_T' = (T_type_Ca_channel_T_type_Ca_channel_d_gate_d_T_infinity - d_T)/T_type_Ca_channel_T_type_Ca_channel_d_gate_tau_d_T;
  f_T' = (T_type_Ca_channel_T_type_Ca_channel_f_gate_f_T_infinity - f_T)/T_type_Ca_channel_T_type_Ca_channel_f_gate_tau_f_T;
  P_a' = (delayed_rectifying_potassium_current_delayed_rectifying_potassium_current_P_a_gate_P_a_infinity - P_a)/delayed_rectifying_potassium_current_delayed_rectifying_potassium_current_P_a_gate_tau_P_a;
  P_i' = delayed_rectifying_potassium_current_delayed_rectifying_potassium_current_P_i_gate_alpha_P_i*(1 - P_i) - delayed_rectifying_potassium_current_delayed_rectifying_potassium_current_P_i_gate_beta_P_i*P_i;
  y' = (hyperpolarisation_activated_current_hyperpolarisation_activated_current_y_gate_y_infinity - y)/hyperpolarisation_activated_current_hyperpolarisation_activated_current_y_gate_tau_y;
  Na_i' = -(3*i_NaK + 3*i_NaCa + i_B_Na + i_f_Na + i_Na)/(F*V_i);
  K_c' = (K_b - K_c)/cleft_space_equations_tau_p + (-2*i_NaK + i_K + i_B_K + i_f_K)/(F*cleft_space_equations_V_c);
  Ca_i' = (2*i_NaCa + i_rel - (i_Ca_L + i_Ca_T + i_Ca_P + i_B_Ca + i_up))/(2*V_i*F) - intracellular_concentrations_and_buffer_equations_phi_B;
  Ca_c' = (cleft_space_equations_Ca_b - Ca_c)/cleft_space_equations_tau_p + (-2*i_NaCa + i_Ca_L + i_Ca_T + i_Ca_P + i_B_Ca)/(2*F*cleft_space_equations_V_c);
  muscarinic_potassium_current_a' = muscarinic_potassium_current_beta_a*(1 - muscarinic_potassium_current_a) - muscarinic_potassium_current_alpha_a*muscarinic_potassium_current_a;
  K_i' = (2*i_NaK - (i_K + i_f_K + i_B_K))/(F*V_i);
  intracellular_concentrations_and_buffer_equations_Ca_Calmod' = intracellular_concentrations_and_buffer_equations_phi_C;
  intracellular_concentrations_and_buffer_equations_Ca_Trop' = intracellular_concentrations_and_buffer_equations_phi_TC;
  intracellular_concentrations_and_buffer_equations_Ca_Mg_Trop' = intracellular_concentrations_and_buffer_equations_phi_TMgC;
  intracellular_concentrations_and_buffer_equations_Mg_Mg_Trop' = intracellular_concentrations_and_buffer_equations_phi_TMgM;
  SR_Ca_uptake_and_release_Ca_up' = (i_up - SR_Ca_uptake_and_release_i_tr)/(2*SR_Ca_uptake_and_release_V_up*F);
  SR_Ca_uptake_and_release_Ca_rel' = (SR_Ca_uptake_and_release_i_tr - i_rel)/(2*SR_Ca_uptake_and_release_V_rel*F) - 11.48*SR_Ca_uptake_and_release_phi_Calse;
  SR_Ca_uptake_and_release_Ca_Calse' = SR_Ca_uptake_and_release_phi_Calse;
  SR_Ca_uptake_and_release_F1' = 0.96*SR_Ca_uptake_and_release_F3 - SR_Ca_uptake_and_release_r_act*SR_Ca_uptake_and_release_F1;
  SR_Ca_uptake_and_release_F2' = SR_Ca_uptake_and_release_r_act*SR_Ca_uptake_and_release_F1 - SR_Ca_uptake_and_release_r_inact*SR_Ca_uptake_and_release_F2;
  SR_Ca_uptake_and_release_F3' = SR_Ca_uptake_and_release_r_inact*SR_Ca_uptake_and_release_F2 - 0.96*SR_Ca_uptake_and_release_F3;
end
