// SBML level 2 version 4

model devries_sherman_2000_version01____main()
  // Originally created by libAntimony v1.3 (using libSBML 4.1.0-b2)

  // Compartments:
  compartment default_compartment = 1;

  // Parameters:
  V = ;
  tau = 20;
  calcium_current_g_Ca = 3.6;
  calcium_current_V_Ca = 25;
  calcium_current_calcium_current_m_gate_V_m = -20;
  calcium_current_calcium_current_m_gate_theta_m = 12;
  V_K = -75;
  potassium_current_g_K = 10;
  n = ;
  potassium_current_potassium_current_n_gate_V_n = -17;
  potassium_current_potassium_current_n_gate_theta_n = 5.6;
  potassium_current_potassium_current_n_gate_lamda = 0.8;
  slow_current_g_s = 4;
  s = ;
  slow_current_slow_current_s_gate_V_s = -22;
  slow_current_slow_current_s_gate_theta_s = 8;
  slow_current_slow_current_s_gate_tau_s = 20000;
  ATP_sensitive_potassium_current_g_K_ATP = 1.2;
  ATP_sensitive_potassium_current_p = 0.5;
  time_ = ;

  // Assignment rules:
  i_K := potassium_current_g_K*n*(V - V_K);
  i_K_ATP := ATP_sensitive_potassium_current_g_K_ATP*ATP_sensitive_potassium_current_p*(V - V_K);
  i_Ca := calcium_current_g_Ca*m_infinity*(V - calcium_current_V_Ca);
  i_s := slow_current_g_s*s*(V - V_K);
  m_infinity := 1/(1 + exp((calcium_current_calcium_current_m_gate_V_m - V)/calcium_current_calcium_current_m_gate_theta_m));
  potassium_current_potassium_current_n_gate_n_infinity := 1/(1 + exp((potassium_current_potassium_current_n_gate_V_n - V)/potassium_current_potassium_current_n_gate_theta_n));
  slow_current_slow_current_s_gate_s_infinity := 1/(1 + exp((slow_current_slow_current_s_gate_V_s - V)/slow_current_slow_current_s_gate_theta_s));

  // Rate rules:
  V' = -(i_Ca + i_K + i_K_ATP + i_s)/tau;
  n' = potassium_current_potassium_current_n_gate_lamda*(potassium_current_potassium_current_n_gate_n_infinity - n)/tau;
  s' = (slow_current_slow_current_s_gate_s_infinity - s)/slow_current_slow_current_s_gate_tau_s;
end
