// SBML level 2 version 4

model difrancesco_noble_1985____main()
  // Originally created by libAntimony v1.4 (using libSBML 4.1.0-b2)

  // Compartments:
  compartment default_compartment = 1;

  // Parameters:
  V = -87;
  R = 8314.472;
  T = 310;
  F = 96485.3415;
  membrane_C = 0.075;
  membrane_i_pulse = 0;
  hyperpolarising_activated_current_g_f_Na = 3;
  hyperpolarising_activated_current_g_f_K = 3;
  hyperpolarising_activated_current_Km_f = 45;
  Kc = 4;
  Ki = 140;
  Nai = 8;
  Nao = 140;
  y = 0.2;
  hyperpolarising_activated_current_hyperpolarising_activated_current_y_gate_delta_y = 1e-5;
  time_dependent_potassium_current_i_K_max = 180;
  x = 0.01;
  time_independent_potassium_current_g_K1 = 920;
  time_independent_potassium_current_Km_K1 = 210;
  transient_outward_current_Km_to = 10;
  transient_outward_current_Km_Ca = 0.0005;
  transient_outward_current_g_to = 0.28;
  Cai = 5e-5;
  s = 1;
  sodium_background_current_g_Nab = 0.18;
  calcium_background_current_g_Cab = 0.02;
  Cao = 2;
  sodium_potassium_pump_I_p = 125;
  sodium_potassium_pump_K_mK = 1;
  sodium_potassium_pump_K_mNa = 40;
  n_NaCa = 3;
  Na_Ca_exchanger_K_NaCa = 0.02;
  Na_Ca_exchanger_d_NaCa = 0.001;
  Na_Ca_exchanger_gamma = 0.5;
  fast_sodium_current_g_Na = 750;
  m = 0.01;
  h = 0.8;
  fast_sodium_current_fast_sodium_current_m_gate_delta_m = 1e-5;
  second_inward_current_P_si = 15;
  d = 0.005;
  f = 1;
  f2 = 1;
  second_inward_current_second_inward_current_d_gate_delta_d = 0.0001;
  second_inward_current_second_inward_current_f_gate_delta_f = 0.0001;
  second_inward_current_second_inward_current_f2_gate_alpha_f2 = 5;
  second_inward_current_second_inward_current_f2_gate_K_mf2 = 0.001;
  intracellular_sodium_concentration_radius = 0.05;
  intracellular_sodium_concentration_length = 2;
  intracellular_sodium_concentration_V_e_ratio = 0.1;
  intracellular_calcium_concentration_Ca_up = 2;
  intracellular_calcium_concentration_Ca_rel = 1;
  intracellular_calcium_concentration_Ca_up_max = 5;
  intracellular_calcium_concentration_K_mCa = 0.001;
  intracellular_calcium_concentration_p = 1;
  intracellular_calcium_concentration_tau_up = 0.025;
  intracellular_calcium_concentration_tau_rep = 2;
  intracellular_calcium_concentration_tau_rel = 0.05;
  intracellular_calcium_concentration_rCa = 2;
  extracellular_potassium_concentration_Ve = 0.00157;
  extracellular_potassium_concentration_Kb = 4;
  extracellular_potassium_concentration_pf = 0.7;
  time_ = ;

  // Assignment rules:
  RTONF := R*T/F;
  i_f := i_fNa + i_fK;
  i_K := x*time_dependent_potassium_current_I_K;
  i_K1 := time_independent_potassium_current_g_K1*Kc/(Kc + time_independent_potassium_current_Km_K1)*(V - E_K)/(1 + exp((V + 10 - E_K)*2/RTONF));
  i_to := s*transient_outward_current_g_to*(0.2 + Kc/(transient_outward_current_Km_to + Kc))*Cai/(transient_outward_current_Km_Ca + Cai)*(V + 10)/(1 - exp(-0.2*(V + 10)))*(Ki*exp(0.5*V/RTONF) - Kc*exp(-0.5*V/RTONF));
  i_Na_b := sodium_background_current_g_Nab*(V - E_Na);
  i_Ca_b := calcium_background_current_g_Cab*(V - E_Ca);
  i_p := sodium_potassium_pump_I_p*Kc/(sodium_potassium_pump_K_mK + Kc)*Nai/(sodium_potassium_pump_K_mNa + Nai);
  i_NaCa := Na_Ca_exchanger_K_NaCa*(exp(Na_Ca_exchanger_gamma*(n_NaCa - 2)*V/RTONF)*Nai^n_NaCa*Cao - exp((Na_Ca_exchanger_gamma - 1)*(n_NaCa - 2)*V/RTONF)*Nao^n_NaCa*Cai)/((1 + Na_Ca_exchanger_d_NaCa*(Cai*Nao^n_NaCa + Cao*Nai^n_NaCa))*(1 + Cai/0.0069));
  i_Na := fast_sodium_current_g_Na*m^3*h*(V - fast_sodium_current_E_mh);
  i_si := i_siCa + i_siK + i_siNa;
  i_fNa := y*Kc/(Kc + hyperpolarising_activated_current_Km_f)*hyperpolarising_activated_current_g_f_Na*(V - E_Na);
  E_Na := RTONF*ln(Nao/Nai);
  E_K := RTONF*ln(Kc/Ki);
  i_fK := y*Kc/(Kc + hyperpolarising_activated_current_Km_f)*hyperpolarising_activated_current_g_f_K*(V - E_K);
  hyperpolarising_activated_current_hyperpolarising_activated_current_y_gate_alpha_y := 0.05*exp(-0.067*(V + 52 - 10));
  hyperpolarising_activated_current_hyperpolarising_activated_current_y_gate_beta_y := ;
  hyperpolarising_activated_current_hyperpolarising_activated_current_y_gate_E0_y := V + 52 - 10;
  time_dependent_potassium_current_I_K := time_dependent_potassium_current_i_K_max*(Ki - Kc*exp(-V/RTONF))/140;
  time_dependent_potassium_current_time_dependent_potassium_current_x_gate_alpha_x := 0.5*exp(0.0826*(V + 50))/(1 + exp(0.057*(V + 50)));
  time_dependent_potassium_current_time_dependent_potassium_current_x_gate_beta_x := 1.3*exp(-0.06*(V + 20))/(1 + exp(-0.04*(V + 20)));
  transient_outward_current_transient_outward_current_s_gate_alpha_s := 0.033*exp(-V/17);
  transient_outward_current_transient_outward_current_s_gate_beta_s := 33/(1 + exp(-(V + 10)/8));
  E_Ca := 0.5*RTONF*ln(Cao/Cai);
  fast_sodium_current_E_mh := RTONF*ln((Nao + 0.12*Kc)/(Nai + 0.12*Ki));
  fast_sodium_current_fast_sodium_current_m_gate_alpha_m := ;
  fast_sodium_current_fast_sodium_current_m_gate_beta_m := 8000*exp(-0.056*(V + 66));
  fast_sodium_current_fast_sodium_current_m_gate_E0_m := V + 41;
  fast_sodium_current_fast_sodium_current_h_gate_alpha_h := 20*exp(-0.125*(V + 75));
  fast_sodium_current_fast_sodium_current_h_gate_beta_h := 2000/(320*exp(-0.1*(V + 75)) + 1);
  i_siCa := 4*second_inward_current_P_si*(V - 50)/(RTONF*(1 - exp(-1*(V - 50)*2/RTONF)))*(Cai*exp(100/RTONF) - Cao*exp(-2*(V - 50)/RTONF))*d*f*f2;
  i_siK := 0.01*second_inward_current_P_si*(V - 50)/(RTONF*(1 - exp(-1*(V - 50)/RTONF)))*(Ki*exp(50/RTONF) - Kc*exp(-1*(V - 50)/RTONF))*d*f*f2;
  i_siNa := 0.01*second_inward_current_P_si*(V - 50)/(RTONF*(1 - exp(-1*(V - 50)/RTONF)))*(Nai*exp(50/RTONF) - Nao*exp(-1*(V - 50)/RTONF))*d*f*f2;
  second_inward_current_second_inward_current_d_gate_alpha_d := ;
  second_inward_current_second_inward_current_d_gate_beta_d := ;
  second_inward_current_second_inward_current_d_gate_E0_d := V + 24 - 5;
  second_inward_current_second_inward_current_f_gate_alpha_f := ;
  second_inward_current_second_inward_current_f_gate_beta_f := 50/(1 + exp(-1*(V + 34)/4));
  second_inward_current_second_inward_current_f_gate_E0_f := V + 34;
  second_inward_current_second_inward_current_f2_gate_beta_f2 := Cai*second_inward_current_second_inward_current_f2_gate_alpha_f2/second_inward_current_second_inward_current_f2_gate_K_mf2;
  intracellular_sodium_concentration_V_Cell := 3.141593*intracellular_sodium_concentration_radius^2*intracellular_sodium_concentration_length;
  Vi := intracellular_sodium_concentration_V_Cell*(1 - intracellular_sodium_concentration_V_e_ratio);
  intracellular_calcium_concentration_V_up := Vi*0.05;
  intracellular_calcium_concentration_V_rel := Vi*0.02;
  intracellular_calcium_concentration_i_up := 2*1*Vi*F/(1*intracellular_calcium_concentration_tau_up*intracellular_calcium_concentration_Ca_up_max)*Cai*(intracellular_calcium_concentration_Ca_up_max - intracellular_calcium_concentration_Ca_up);
  intracellular_calcium_concentration_i_tr := 2*1*intracellular_calcium_concentration_V_rel*F/(1*intracellular_calcium_concentration_tau_rep)*intracellular_calcium_concentration_p*(intracellular_calcium_concentration_Ca_up - intracellular_calcium_concentration_Ca_rel);
  intracellular_calcium_concentration_i_rel := 2*1*intracellular_calcium_concentration_V_rel*F/(1*intracellular_calcium_concentration_tau_rel)*intracellular_calcium_concentration_Ca_rel*Cai^intracellular_calcium_concentration_rCa/(Cai^intracellular_calcium_concentration_rCa + intracellular_calcium_concentration_K_mCa^intracellular_calcium_concentration_rCa);
  intracellular_calcium_concentration_alpha_p := 0.625*(V + 34)/(exp((V + 34)/4) - 1);
  intracellular_calcium_concentration_beta_p := 5/(1 + exp(-1*(V + 34)/4));
  i_mK := i_K1 + i_K + i_fK + i_siK + i_to - 2*i_p;

  // Rate rules:
  V' = -(i_f + i_K + i_K1 + i_to + i_Na_b + i_Ca_b + i_p + i_NaCa + i_Na + i_si + membrane_i_pulse)/membrane_C;
  Kc' = -extracellular_potassium_concentration_pf*(Kc - extracellular_potassium_concentration_Kb) + 1*i_mK/(1*extracellular_potassium_concentration_Ve*F);
  Ki' = -1*i_mK/(1*Vi*F);
  Nai' = -1*(i_Na + i_Na_b + i_fNa + i_siNa + i_p*3 + i_NaCa*n_NaCa/(n_NaCa - 2))/(1*Vi*F);
  y' = hyperpolarising_activated_current_hyperpolarising_activated_current_y_gate_alpha_y*(1 - y) - hyperpolarising_activated_current_hyperpolarising_activated_current_y_gate_beta_y*y;
  x' = time_dependent_potassium_current_time_dependent_potassium_current_x_gate_alpha_x*(1 - x) - time_dependent_potassium_current_time_dependent_potassium_current_x_gate_beta_x*x;
  Cai' = -1*(i_siCa + i_Ca_b - 2*i_NaCa/(n_NaCa - 2) - intracellular_calcium_concentration_i_rel + intracellular_calcium_concentration_i_up)/(2*1*Vi*F);
  s' = transient_outward_current_transient_outward_current_s_gate_alpha_s*(1 - s) - transient_outward_current_transient_outward_current_s_gate_beta_s*s;
  m' = fast_sodium_current_fast_sodium_current_m_gate_alpha_m*(1 - m) - fast_sodium_current_fast_sodium_current_m_gate_beta_m*m;
  h' = fast_sodium_current_fast_sodium_current_h_gate_alpha_h*(1 - h) - fast_sodium_current_fast_sodium_current_h_gate_beta_h*h;
  d' = second_inward_current_second_inward_current_d_gate_alpha_d*(1 - d) - second_inward_current_second_inward_current_d_gate_beta_d*d;
  f' = second_inward_current_second_inward_current_f_gate_alpha_f*(1 - f) - second_inward_current_second_inward_current_f_gate_beta_f*f;
  f2' = second_inward_current_second_inward_current_f2_gate_alpha_f2 - f2*(second_inward_current_second_inward_current_f2_gate_alpha_f2 + second_inward_current_second_inward_current_f2_gate_beta_f2);
  intracellular_calcium_concentration_Ca_up' = 1*(intracellular_calcium_concentration_i_up - intracellular_calcium_concentration_i_tr)/(2*1*intracellular_calcium_concentration_V_up*F);
  intracellular_calcium_concentration_Ca_rel' = 1*(intracellular_calcium_concentration_i_tr - intracellular_calcium_concentration_i_rel)/(2*1*intracellular_calcium_concentration_V_rel*F);
  intracellular_calcium_concentration_p' = intracellular_calcium_concentration_alpha_p*(1 - intracellular_calcium_concentration_p) - intracellular_calcium_concentration_beta_p*intracellular_calcium_concentration_p;
end
