// SBML level 2 version 4

model dijkstra_1992____main()
  // Originally created by libAntimony v1.4 (using libSBML 4.1.0-b2)

  // Compartments:
  compartment default_compartment = 1;

  // Parameters:
  Q_Pd_Q_Pd = 1;
  Q_Pd_v_PdPs_star = 0.0576;
  Q_Pd_M_Pd_PdPs_star = 0.264;
  Q_Pd_Y_Pd_InPd = 0.0091;
  Q_Pd_D_Pd = 1;
  Q_Pd_T_Pd = 1;
  Q_Pd_T_Pd_star = 0.66;
  Q_Ma0 = 1;
  Q_Mc0 = 1;
  V_Ru = 1;
  k_SoEx = 1;
  M_Ha_McMa = 0.0248;
  Q_Ps_Q_Ps = 1;
  Q_Ps_v_PsAm_star = 0.0144;
  Q_Ps_v_PsMa_star = 0.0576;
  Q_Ps_v_PsMc_star = 0.0576;
  Q_Ps_Y_Ps_InPs = 0.0091;
  Q_Ps_Y_Ps_SaPs = 0.001;
  Q_Ps_Y_Ps_PdPs = 1;
  Q_Ps_Y_Ps_MaMd = 0.0067;
  Q_Ps_Y_Ps_McPs = 0.0067;
  Q_Ps_D_Ps = 1;
  Q_Ps_M_Ps_PsAm = 0.0289;
  Q_Ps_M_Ps_PsMa = 0.0224;
  Q_Ps_M_Ps_PsMc = 0.0224;
  Q_Ps_M_Ha_PsMa = 0.0248;
  Q_Ps_M_Hc_PsMc = 0.0248;
  Q_Ps_J_Ha_PsAm = 0.0165;
  Q_Ps_J_Hc_PsAm = 0.0165;
  k_FlEx = 1;
  J_Ha_McAm = 0.0165;
  Q_Pu_Q_Pu = 1;
  Q_Pu_Y_Pu_InPu = 0.0091;
  Q_Pu_D_Pu = 1;
  Q_Am_Q_Am = 1;
  Q_Am_v_UeAm_star = 0.00165;
  Q_Am_v_AmAb_star = 1.1;
  Q_Am_v_AmMa_star = 0.0528;
  Q_Am_v_AmMc_star = 0.0528;
  Q_Am_Y_Am_InAm = 0.0588;
  Q_Am_Y_Am_UeAm = 2;
  Q_Am_Y_Am_PsAm = 1.257;
  Q_Am_Y_Am_McAm = 0.0084;
  Q_Am_M_Am_AmMa = 0.00135;
  Q_Am_M_Am_AmMc = 0.00135;
  Q_Am_M_Am_AmAb = 0.0132;
  Q_Am_M_pH_AmAb = 7.5;
  Q_Am_phi_pH_AmAb = 7.85;
  Q_Am_M_Ha_AmMa = 0.0159;
  Q_Am_M_Hc_AmMc = 0.0159;
  Q_Am_J_Am_UeAm = 0.00621;
  Q_Am_D_Am = 1;
  pH = 7;
  f_Po_Ma = 0.35;
  f_Ni_Fe = 1;
  Q_Li_Q_Li = 1;
  Q_Li_Y_Li_InLi = 0.0015;
  Q_Li_Y_Li_MaMd = 0.00021;
  Q_Li_D_Li = 1;
  Q_Sd_Q_Sd = 1;
  Q_Sd_Y_Sd_InSd = 0.0062;
  Q_Sd_D_Sd = 1;
  Q_Sd_v_SdHa_star = 0.2179;
  Q_Sd_M_Sd_SdHa_star = 0.416;
  Q_Sd_T_Sd = 1;
  Q_Sd_T_Sd_star = 1.04;
  Q_Fd_Q_Fd = 1;
  Q_Fd_Y_Fd_InFd = 0.0062;
  Q_Fd_D_Fd = 1;
  Q_Fd_v_FdHc_star = 0.1646;
  Q_Fd_M_Fd_FdHc_star = 0.332;
  Q_Fd_T_Fd = 1;
  Q_Fd_T_Fd_star = 0.83;
  Q_Fd_phi_pH_FdHc = 22.9;
  Q_Fd_M_pH_FdHc = 5.97;
  pm = 1;
  f = 1;
  Q_Fu_Q_Fu = 1;
  Q_Fu_Y_Fu_InFu = 0.0062;
  Q_Fu_D_Fu = 1;
  Q_Ha_Q_Ha = 1;
  Q_Ha_R_Ha_AmMa = 1.793;
  Q_Ha_R_Ha_PsMa = 1.291;
  Q_Ha_R_Ha_McMa = 0.0086;
  Q_Ha_M_Ha_HaAs = 0.0268;
  Q_Ha_M_Ha_HaVa = 0.055;
  Q_Ha_v_HaAs_star = 0.053;
  Q_Ha_v_HaVa_star = 0.1646;
  Q_Ha_Y_Ha_WrHa = 0.0062;
  Q_Ha_Y_Ha_SrHa = 0.0062;
  Q_Ha_Y_Ha_LaHa = 0.0025;
  Q_Ha_Y_Ha_SdHa = 1;
  Q_Ha_Y_Ha_MaMd = 0.0062;
  Q_Ha_D_Wr = 1;
  Q_Ha_D_Sr = 1;
  Q_Ha_D_La = 1;
  Q_Ha_J_Am_HaVa = 0.00861;
  Q_Ha_J_Ps_HaVa = 0.01465;
  Q_Hc_Q_Hc = 1;
  Q_Hc_R_Hc_AmMc = 1.793;
  Q_Hc_R_Hc_PsMc = 1.291;
  Q_Hc_v_HcVa_star = 0.1646;
  Q_Hc_Y_Hc_FdHc = 1;
  Q_Hc_M_Hc_HcVa = 0.055;
  Q_Hc_J_Am_HcVa = 0.00861;
  Q_Hc_J_Ps_HcVa = 0.01465;
  Q_Ma_Y_Ma_AmMa = 118.91;
  Q_Ma_Y_Ma_PsMa = 149.48;
  Q_Ma_Y_Ma_McMa = 149.48;
  Q_As_Q_As = 1;
  Q_As_Y_As_HaAs = 112.5;
  Q_Mc_Y_Mc_AmMc = 118.91;
  Q_Mc_Y_Mc_PsMc = 149.48;
  Q_Mc_v_McEg_star = 15.439;
  Q_Mc_M_Mc_McEg = 34.694;
  Q_Ac_Q_Ac = 1;
  Q_Ac_M_Ac_AcAb = 0.338;
  Q_Ac_v_AcAb_star = 7.86;
  Q_Ac_Y_Ac_WrAc = 1;
  Q_Ac_Y_Ac_InAc = 0.0167;
  Q_Ac_Y_Ac_StAc = 1;
  Q_Ac_Y_Ac_CeAc = 1;
  Q_Ac_Y_Ac_HeAc = 1;
  Q_Ac_Y_Ac_PsAc = 1;
  Q_Ac_D_Ac = 1;
  Q_Ac_J_pH_AcAb = 6.45;
  Q_Ac_phi_pH_AcAb = 6.48;
  f_Hf_AmMa = 0.526;
  f_Hf_AmMc = 0.526;
  f_Hf_PsMa = 0.711;
  f_Hf_PsMc = 0.711;
  f_Hf_HaAs = 0.306;
  f_Hf_McMa = 0.711;
  f_Lc_Le = 2.25;
  f_Ce_Fd = 1;
  Q_Pr_Q_Pr = 1;
  Q_Pr_M_Pr_PrAb = 0.338;
  Q_Pr_v_PrAb_star = 7.86;
  Q_Pr_Y_Pr_WrPr = 1;
  Q_Pr_Y_Pr_InPr = 0.0135;
  Q_Pr_Y_Pr_StPr = 1;
  Q_Pr_Y_Pr_CePr = 1;
  Q_Pr_Y_Pr_HePr = 1;
  Q_Pr_Y_Pr_PsPr = 1;
  Q_Pr_D_Pr = 1;
  Q_Pr_phi_pH_PrAb = 6.48;
  Q_Pr_J_pH_PrAb = 6.45;
  Q_Bu_Q_Bu = 1;
  Q_Bu_M_Bu_BuAb = 0.338;
  Q_Bu_v_BuAb_star = 7.86;
  Q_Bu_Y_Bu_WrBu = 1;
  Q_Bu_Y_Bu_InBu = 0.0114;
  Q_Bu_Y_Bu_StBu = 1;
  Q_Bu_Y_Bu_CeBu = 1;
  Q_Bu_Y_Bu_HeBu = 1;
  Q_Bu_Y_Bu_PsBu = 1;
  Q_Bu_D_Bu = 1;
  Q_Bu_phi_pH_BuAb = 6.48;
  Q_Bu_J_pH_BuAb = 6.45;
  Q_Vl_Q_Vl = 1;
  Q_Vl_M_Vl_VlAb = 0.338;
  Q_Vl_v_VlAb_star = 7.86;
  Q_Vl_Y_Vl_WrVl = 1;
  Q_Vl_Y_Vl_InVl = 0.0098;
  Q_Vl_Y_Vl_StVl = 1;
  Q_Vl_Y_Vl_CeVl = 1;
  Q_Vl_Y_Vl_HeVl = 1;
  Q_Vl_Y_Vl_PsVl = 1;
  Q_Vl_D_Vl = 1;
  Q_Vl_phi_pH_VlAb = 6.48;
  Q_Vl_J_pH_VlAb = 6.45;
  time_ = ;

  // Assignment rules:
  U_Pd_PdPs := Q_Pd_v_PdPs/(1 + Q_Pd_M_Pd_PdPs/Q_Pd_C_Pd);
  Q_Pd_C_Pd := Q_Pd_Q_Pd/V_Ru;
  Q_Pd_U_Pd_PdEx := Q_Pd_k_PdEx*Q_Pd_Q_Pd;
  Q_Pd_P_Pd_InPd := Q_Pd_Y_Pd_InPd*Q_Pd_D_Pd;
  Q_Pd_v_PdPs := Q_Pd_v_PdPs_star*(Q_Ma0 + Q_Mc0);
  Q_Pd_M_Pd_PdPs := Q_Pd_M_Pd_PdPs_star*(Q_Pd_T_Pd/Q_Pd_T_Pd_star);
  Q_Pd_k_PdEx := k_SoEx;
  C_Ps := Q_Ps_Q_Ps/V_Ru;
  U_McPs_PsAm := Q_Ps_v_Mc_PsAm/(1 + Q_Ps_M_Ps_PsAm/C_Ps + C_Hc/Q_Ps_J_Hc_PsAm);
  U_Ps_PsMa := Q_Ps_v_PsMa/(1 + Q_Ps_M_Ps_PsMa/C_Ps + Q_Ps_M_Ha_PsMa/C_Ha);
  U_Ps_PsMc := Q_Ps_v_PsMc/(1 + Q_Ps_M_Ps_PsMc/C_Ps + Q_Ps_M_Hc_PsMc/C_Hc);
  U_MaPs_PsAm := Q_Ps_v_Ma_PsAm/(1 + Q_Ps_M_Ps_PsAm/C_Ps + C_Ha/Q_Ps_J_Ha_PsAm);
  Q_Ps_P_Ps_InPs := Q_Ps_Y_Ps_InPs*Q_Ps_D_Ps;
  Q_Ps_P_Ps_SaPs := Q_Ps_Y_Ps_SaPs*Q_Ps_D_Ps;
  Q_Ps_P_Ps_PdPs := Q_Ps_Y_Ps_PdPs*U_Pd_PdPs;
  Q_Ps_P_Ps_MaMd := Q_Ps_Y_Ps_MaMd*U_Ma_MaMd;
  Q_Ps_P_Ps_McPs := Q_Ps_Y_Ps_McPs*Q_Ps_U_Mc_McPs;
  Q_Ps_U_Ps_PsEx := Q_Ps_k_PsEx*Q_Ps_Q_Ps;
  Q_Ps_U_Mc_McPs := U_Mc_McEg*(1 - (1/(1 + C_Ha/J_Ha_McAm) + 1/(1 + M_Ha_McMa/C_Ha)));
  Q_Ps_v_Ma_PsAm := Q_Ps_v_PsAm_star*Q_Ma0;
  Q_Ps_v_Mc_PsAm := Q_Ps_v_PsAm_star*Q_Mc0;
  Q_Ps_v_PsMa := Q_Ps_v_PsMa_star*Q_Ma0;
  Q_Ps_v_PsMc := Q_Ps_v_PsMc_star*Q_Mc0;
  Q_Ps_k_PsEx := k_FlEx;
  U_Mc_McEg := Q_Mc_v_McEg/(1 + Q_Mc_M_Mc_McEg/(Q_Mc_C_Mc + C_Ma*(1 - f_Po_Ma)));
  U_Ma_MaMd := Q_Ma_k_MaMd*Q_Ma0*f_Po_Ma;
  U_Hc_PsMc := Q_Hc_R_Hc_PsMc*U_Ps_PsMc;
  U_Ha_McMa := Q_Ha_R_Ha_McMa*U_Mc_McMa;
  C_Ha := Q_Ha_Q_Ha/V_Ru;
  C_Hc := Q_Hc_Q_Hc/V_Ru;
  Q_Pu_C_Pu := Q_Pu_Q_Pu/V_Ru;
  Q_Pu_P_Pu_InPu := Q_Pu_Y_Pu_InPu*Q_Pu_D_Pu;
  Q_Pu_U_Pu_PuEx := Q_Pu_k_PuEx*Q_Pu_Q_Pu;
  Q_Pu_k_PuEx := k_SoEx;
  C_Am := Q_Am_Q_Am/V_Ru;
  U_Am_AmMc := Q_Am_v_AmMc/(1 + Q_Am_M_Am_AmMc/C_Am + Q_Am_M_Hc_AmMc/C_Hc);
  U_Am_AmMa := Q_Am_v_AmMa/(1 + Q_Am_M_Am_AmMa/C_Am + Q_Am_M_Ha_AmMa/C_Ha);
  U_Mc_McAm := 1*U_Mc_McEg/(1 + C_Ha/J_Ha_McAm);
  Q_Am_P_Am_InAm := Q_Am_Y_Am_InAm*Q_Am_D_Am;
  Q_Am_P_Am_UeAm := Q_Am_Y_Am_UeAm*Q_Am_v_UeAm;
  Q_Am_P_MaAm_PsAm := Q_Am_Y_Am_PsAm*U_MaPs_PsAm;
  Q_Am_P_McAm_PsAm := Q_Am_Y_Am_PsAm*U_McPs_PsAm;
  Q_Am_P_Am_McAm := Q_Am_Y_Am_McAm*U_Mc_McAm;
  Q_Am_U_Am_AmAb := Q_Am_v_AmAb/(1 + Q_Am_M_Am_AmAb/C_Am);
  Q_Am_U_Am_AmEx := Q_Am_k_AmEx*Q_Am_Q_Am;
  Q_Am_v_UeAm := Q_Am_v_UeAm_star*V_Ru*(f_Ni_Fe/(1 + C_Am/Q_Am_J_Am_UeAm));
  Q_Am_v_AmAb := Q_Am_v_AmAb_star*1^0.25*V_Ru^0.75*(1 + (Q_Am_M_pH_AmAb/pH)^Q_Am_phi_pH_AmAb);
  Q_Am_v_AmMa := Q_Am_v_AmMa_star*Q_Ma0*(1 - f_Po_Ma);
  Q_Am_v_AmMc := Q_Am_v_AmMc_star*Q_Mc0;
  Q_Am_k_AmEx := k_FlEx;
  Q_Li_C_Li := Q_Li_Q_Li/V_Ru;
  Q_Li_P_Li_InLi := Q_Li_Y_Li_InLi*Q_Li_D_Li;
  Q_Li_P_Li_MaMd := Q_Li_Y_Li_MaMd*U_Ma_MaMd;
  Q_Li_U_Li_LiEx := Q_Li_k_LiEx*Q_Li_Q_Li;
  Q_Li_k_LiEx := k_FlEx;
  U_Sd_SdHa := Q_Sd_v_SdHa/(1 + Q_Sd_M_Sd_SdHa/Q_Sd_C_Sd);
  Q_Sd_C_Sd := Q_Sd_Q_Sd/V_Ru;
  Q_Sd_P_Sd_InSd := Q_Sd_Y_Sd_InSd*Q_Sd_D_Sd;
  Q_Sd_U_Sd_SdEx := Q_Sd_k_SdEx*Q_Sd_Q_Sd;
  Q_Sd_k_SdEx := k_SoEx;
  Q_Sd_v_SdHa := Q_Sd_v_SdHa_star*Q_Ma0;
  Q_Sd_M_Sd_SdHa := Q_Sd_M_Sd_SdHa_star*(Q_Sd_T_Sd/Q_Sd_T_Sd_star);
  U_Fd_FdHc := Q_Fd_v_FdHc/(1 + Q_Fd_M_Fd_FdHc/Q_Fd_C_Fd);
  Q_Fd_C_Fd := Q_Fd_Q_Fd/V_Ru;
  Q_Fd_P_Fd_InFd := Q_Fd_Y_Fd_InFd*Q_Fd_D_Fd;
  Q_Fd_U_Fd_FdEx := Q_Fd_k_FdEx*Q_Fd_Q_Fd;
  Q_Fd_k_FdEx := k_SoEx;
  Q_Fd_v_FdHc := Q_Fd_v_FdHc_star*Q_Mc0*(1 - time_*f/1 + time_*f/1/(1 + (Q_Fd_M_pH_FdHc/pm)^Q_Fd_phi_pH_FdHc));
  Q_Fd_M_Fd_FdHc := Q_Fd_M_Fd_FdHc_star*(Q_Fd_T_Fd/Q_Fd_T_Fd_star);
  Q_Fu_C_Fu := Q_Fu_Q_Fu/V_Ru;
  Q_Fu_P_Fu_InFu := Q_Fu_Y_Fu_InFu*Q_Fu_D_Fu;
  Q_Fu_U_Fu_FuEx := Q_Fu_k_FuEx*Q_Fu_Q_Fu;
  Q_Fu_k_FuEx := k_SoEx;
  U_Ha_HaAs := Q_Ha_v_HaAs/(1 + Q_Ha_M_Ha_HaAs/C_Ha);
  U_Ha_AmMa := Q_Ha_R_Ha_AmMa*U_Am_AmMa;
  U_Ha_PsMa := Q_Ha_R_Ha_PsMa*U_Ps_PsMa;
  U_Ha_HaVa := Q_Ha_v_HaVa*((1 - f_Po_Ma)/((1 + Q_Ha_M_Ha_HaVa/C_Ha)*(1 + C_Am/Q_Ha_J_Am_HaVa)*(C_Ps/Q_Ha_J_Ps_HaVa))) + Q_Ha_v_HaVa*f_Po_Ma/(1 + Q_Ha_M_Ha_HaVa/C_Ha);
  P_Ha_WrHa := Q_Ha_Y_Ha_WrHa*Q_Ha_D_Wr;
  P_Ha_LaHa := Q_Ha_Y_Ha_LaHa*Q_Ha_D_La;
  P_Ha_SrHa := Q_Ha_Y_Ha_SrHa*Q_Ha_D_Sr;
  P_Ha_SdHa := Q_Ha_Y_Ha_SdHa*U_Sd_SdHa;
  P_Ha_MaMd := Q_Ha_Y_Ha_MaMd*U_As_MaMd;
  Q_Ha_U_Ha_HaEx := Q_Ha_k_HaEx*Q_Ha_Q_Ha;
  Q_Ha_v_HaAs := Q_Ha_v_HaAs_star*Q_Ma0;
  Q_Ha_v_HaVa := Q_Ha_v_HaVa_star*Q_Ma0;
  Q_Ha_k_HaEx := k_FlEx;
  U_As_MaMd := Q_As_k_AsMd*Q_As_Q_As*f_Po_Ma;
  U_Mc_McMa := U_Mc_McEg/(1 + M_Ha_McMa/C_Ha);
  U_Hc_AmMc := Q_Hc_R_Hc_AmMc*U_Am_AmMc;
  U_Hc_HcVa := Q_Hc_v_HcVa/((1 + Q_Hc_M_Hc_HcVa/C_Hc)*(1 + C_Am/Q_Hc_J_Am_HcVa + C_Ps/Q_Hc_J_Ps_HcVa));
  Q_Hc_P_Hc_FdHc := Q_Hc_Y_Hc_FdHc*U_Fd_FdHc;
  Q_Hc_U_Hc_HcEx := Q_Hc_k_HcEx*Q_Hc_Q_Hc;
  Q_Hc_v_HcVa := Q_Hc_v_HcVa_star*Q_Mc0;
  Q_Hc_k_HcEx := k_FlEx;
  C_Ma := Q_Ma0/V_Ru;
  Q_Ma_P_Ma_AmMa := Q_Ma_Y_Ma_AmMa*U_Am_AmMa;
  Q_Ma_P_Ma_PsMa := Q_Ma_Y_Ma_PsMa*U_Ps_PsMa;
  Q_Ma_P_Ma_McMa := Q_Ma_Y_Ma_McMa*U_Mc_McMa;
  Q_Ma_U_Ma_PoEx := k_PoEx*Q_Ma0*f_Po_Ma;
  Q_Ma_U_Ma_MaEx := k_MaEx*Q_Ma0*(1 - f_Po_Ma);
  Q_Ma_k_MaMd := k_MaEx - k_PoEx;
  k_MaEx := k_FlEx;
  k_PoEx := k_SoEx/2;
  Q_As_C_As := Q_As_Q_As/V_Ru;
  Q_As_P_As_HaAs := Q_As_Y_As_HaAs*U_Ha_HaAs;
  Q_As_U_As_PoEx := k_PoEx*Q_As_Q_As*f_Po_Ma;
  Q_As_U_As_AsEx := Q_As_k_AsEx*Q_As_Q_As*(1 - f_Po_Ma);
  Q_As_k_AsEx := k_FlEx;
  Q_As_k_AsMd := k_MaEx - k_PoEx;
  Q_Mc_C_Mc := Q_Mc0/V_Ru;
  Q_Mc_P_Mc_AmMc := Q_Mc_Y_Mc_AmMc*U_Am_AmMc;
  Q_Mc_P_Mc_PsMc := Q_Mc_Y_Mc_PsMc*U_Ps_PsMc;
  Q_Mc_U_Mc_McEx := Q_Mc_k_McEx*Q_Mc0;
  Q_Mc_k_McEx := k_SoEx;
  Q_Mc_v_McEg := Q_Mc_v_McEg_star*Q_Ma0*f_Po_Ma*Q_Mc_C_Mc/(Q_Mc_C_Mc + C_Ma*(1 - f_Po_Ma));
  Q_Ac_C_Ac := Q_Ac_Q_Ac/V_Ru;
  Q_Ac_P_Ac_InAc := Q_Ac_Y_Ac_InAc*Q_Ac_D_Ac;
  Q_Ac_P_Ac_AmMa := Q_Ac_Y_Ac_AmMa*Q_Ac_U_Hf_AmMa;
  Q_Ac_P_Ac_AmMc := Q_Ac_Y_Ac_AmMc*Q_Ac_U_Hf_AmMc;
  Q_Ac_P_Ac_PsMa := Q_Ac_Y_Ac_PsMa*Q_Ac_U_Hf_PsMa;
  Q_Ac_P_Ac_PsMc := Q_Ac_Y_Ac_PsMc*Q_Ac_U_Hf_PsMc;
  Q_Ac_P_Ac_HaAs := Q_Ac_Y_Ac_HaAs*Q_Ac_U_Hf_HaAs;
  Q_Ac_P_Ac_HaVa := Q_Ac_Y_Ac_HaVa*U_Ha_HaVa;
  Q_Ac_P_Ac_HcVa := Q_Ac_Y_Ac_HcVa*U_Hc_HcVa;
  Q_Ac_P_MaAc_PsAm := Q_Ac_Y_Ac_PsAm*U_MaPs_PsAm;
  Q_Ac_P_McAc_PsAm := Q_Ac_Y_Ac_PsAm*U_McPs_PsAm;
  Q_Ac_P_Ac_McMa := Q_Ac_Y_Ac_McMa*Q_Ac_U_Hf_McMa;
  Q_Ac_P_Ac_McAm := Q_Ac_Y_Ac_McAm*U_Mc_McAm;
  Q_Ac_U_Ac_AcAb := Q_Ac_v_AcAb/(1 + Q_Ac_M_Ac_AcAb/Q_Ac_C_Ac);
  Q_Ac_U_Ac_AcEx := Q_Ac_k_AcEx*Q_Ac_Q_Ac;
  Q_Ac_U_Hf_AmMa := f_Hf_AmMa*U_Ha_AmMa;
  Q_Ac_U_Hf_AmMc := f_Hf_AmMc*U_Hc_AmMc;
  Q_Ac_U_Hf_PsMa := f_Hf_PsMa*U_Ha_PsMa;
  Q_Ac_U_Hf_PsMc := f_Hf_PsMc*U_Hc_PsMc;
  Q_Ac_U_Hf_HaAs := f_Hf_HaAs*U_Ha_HaAs;
  Q_Ac_U_Hf_McMa := f_Hf_McMa*U_Ha_McMa;
  Q_Ac_v_AcAb := Q_Ac_v_AcAb_star*1^0.25*(V_Ru^0.75/(1 + (pH/Q_Ac_J_pH_AcAb)^Q_Ac_phi_pH_AcAb));
  Q_Ac_Y_Ac_LaAc := f_Lc_Le*Q_Ac_Y_Ac_WrAc;
  Q_Ac_Y_Ac_HaVa := (Q_Ac_Y_Ac_WrAc*P_Ha_WrHa + Q_Ac_Y_Ac_LaAc*P_Ha_LaHa + Q_Ac_Y_Ac_StAc*(P_Ha_SrHa + P_Ha_SdHa + P_Ha_MaMd))/(P_Ha_WrHa + P_Ha_LaHa + P_Ha_SrHa + P_Ha_SdHa + P_Ha_MaMd);
  Q_Ac_Y_Ac_PsVa := Q_Ac_Y_Ac_PsAc;
  Q_Ac_Y_Ac_AmMa := Q_Ac_Y_Ac_HaVa;
  Q_Ac_Y_Ac_AmMc := Q_Ac_Y_Ac_HcVa;
  Q_Ac_Y_Ac_PsMa := Q_Ac_Y_Ac_HaVa;
  Q_Ac_Y_Ac_PsMc := Q_Ac_Y_Ac_HcVa;
  Q_Ac_Y_Ac_HaAs := Q_Ac_Y_Ac_HaVa;
  Q_Ac_Y_Ac_McMa := Q_Ac_Y_Ac_HcVa;
  Q_Ac_Y_Ac_PsAm := Q_Ac_Y_Ac_PsVa;
  Q_Ac_Y_Ac_McAm := Q_Ac_Y_Ac_PsVa;
  Q_Ac_Y_Ac_HcVa := f_Ce_Fd*Q_Ac_Y_Ac_CeAc + (1 - f_Ce_Fd)*Q_Ac_Y_Ac_HeAc;
  Q_Ac_k_AcEx := k_FlEx;
  Q_Pr_C_Pr := Q_Pr_Q_Pr/V_Ru;
  Q_Pr_P_Pr_InPr := Q_Pr_Y_Pr_InPr*Q_Pr_D_Pr;
  Q_Pr_P_Pr_AmMa := Q_Pr_Y_Pr_AmMa*Q_Pr_U_Hf_AmMa;
  Q_Pr_P_Pr_AmMc := Q_Pr_Y_Pr_AmMc*Q_Pr_U_Hf_AmMc;
  Q_Pr_P_Pr_PsMa := Q_Pr_Y_Pr_PsMa*Q_Pr_U_Hf_PsMa;
  Q_Pr_P_Pr_PsMc := Q_Pr_Y_Pr_PsMc*Q_Pr_U_Hf_PsMc;
  Q_Pr_P_Pr_HaAs := Q_Pr_Y_Pr_HaAs*Q_Pr_U_Hf_HaAs;
  Q_Pr_P_Pr_HaVa := Q_Pr_Y_Pr_HaVa*U_Ha_HaVa;
  Q_Pr_P_Pr_HcVa := Q_Pr_Y_Pr_HcVa*U_Hc_HcVa;
  Q_Pr_P_MaPr_PsAm := Q_Pr_Y_Pr_PsAm*U_MaPs_PsAm;
  Q_Pr_P_McPr_PsAm := Q_Pr_Y_Pr_PsAm*U_McPs_PsAm;
  Q_Pr_P_Pr_McMa := Q_Pr_Y_Pr_McMa*Q_Pr_U_Hf_McMa;
  Q_Pr_P_Pr_McAm := Q_Pr_Y_Pr_McAm*U_Mc_McAm;
  Q_Pr_U_Pr_PrAb := Q_Pr_v_PrAb/(1 + Q_Pr_M_Pr_PrAb/Q_Pr_C_Pr);
  Q_Pr_U_Pr_PrEx := Q_Pr_k_PrEx*Q_Pr_Q_Pr;
  Q_Pr_U_Hf_AmMa := f_Hf_AmMa*U_Ha_AmMa;
  Q_Pr_U_Hf_AmMc := f_Hf_AmMc*U_Hc_AmMc;
  Q_Pr_U_Hf_PsMa := f_Hf_PsMa*U_Ha_PsMa;
  Q_Pr_U_Hf_PsMc := f_Hf_PsMc*U_Hc_PsMc;
  Q_Pr_U_Hf_HaAs := f_Hf_HaAs*U_Ha_HaAs;
  Q_Pr_U_Hf_McMa := f_Hf_McMa*U_Ha_McMa;
  Q_Pr_v_PrAb := Q_Pr_v_PrAb_star*1^0.25*(V_Ru^0.75/(1 + (pH/Q_Pr_J_pH_PrAb)^Q_Pr_phi_pH_PrAb));
  Q_Pr_Y_Pr_LaPr := f_Lc_Le*Q_Pr_Y_Pr_WrPr;
  Q_Pr_Y_Pr_HaVa := (Q_Pr_Y_Pr_WrPr*P_Ha_WrHa + Q_Pr_Y_Pr_LaPr*P_Ha_LaHa + Q_Pr_Y_Pr_StPr*(P_Ha_SrHa + P_Ha_SdHa + P_Ha_MaMd))/(P_Ha_WrHa + P_Ha_LaHa + P_Ha_SrHa + P_Ha_SdHa + P_Ha_MaMd);
  Q_Pr_Y_Pr_PsVa := Q_Pr_Y_Pr_PsPr;
  Q_Pr_Y_Pr_AmMa := Q_Pr_Y_Pr_HaVa;
  Q_Pr_Y_Pr_AmMc := Q_Pr_Y_Pr_HcVa;
  Q_Pr_Y_Pr_PsMa := Q_Pr_Y_Pr_HaVa;
  Q_Pr_Y_Pr_PsMc := Q_Pr_Y_Pr_HcVa;
  Q_Pr_Y_Pr_HaAs := Q_Pr_Y_Pr_HaVa;
  Q_Pr_Y_Pr_McMa := Q_Pr_Y_Pr_HcVa;
  Q_Pr_Y_Pr_PsAm := Q_Pr_Y_Pr_PsVa;
  Q_Pr_Y_Pr_McAm := Q_Pr_Y_Pr_PsVa;
  Q_Pr_Y_Pr_HcVa := f_Ce_Fd*Q_Pr_Y_Pr_CePr + (1 - f_Ce_Fd)*Q_Pr_Y_Pr_HePr;
  Q_Pr_k_PrEx := k_FlEx;
  Q_Bu_C_Bu := Q_Bu_Q_Bu/V_Ru;
  Q_Bu_P_Bu_InBu := Q_Bu_Y_Bu_InBu*Q_Bu_D_Bu;
  Q_Bu_P_Bu_AmMa := Q_Bu_Y_Bu_AmMa*Q_Bu_U_Hf_AmMa;
  Q_Bu_P_Bu_AmMc := Q_Bu_Y_Bu_AmMc*Q_Bu_U_Hf_AmMc;
  Q_Bu_P_Bu_PsMa := Q_Bu_Y_Bu_PsMa*Q_Bu_U_Hf_PsMa;
  Q_Bu_P_Bu_PsMc := Q_Bu_Y_Bu_PsMc*Q_Bu_U_Hf_PsMc;
  Q_Bu_P_Bu_HaAs := Q_Bu_Y_Bu_HaAs*Q_Bu_U_Hf_HaAs;
  Q_Bu_P_Bu_HaVa := Q_Bu_Y_Bu_HaVa*U_Ha_HaVa;
  Q_Bu_P_Bu_HcVa := Q_Bu_Y_Bu_HcVa*U_Hc_HcVa;
  Q_Bu_P_MaBu_PsAm := Q_Bu_Y_Bu_PsAm*U_MaPs_PsAm;
  Q_Bu_P_McBu_PsAm := Q_Bu_Y_Bu_PsAm*U_McPs_PsAm;
  Q_Bu_P_Bu_McMa := Q_Bu_Y_Bu_McMa*Q_Bu_U_Hf_McMa;
  Q_Bu_P_Bu_McAm := Q_Bu_Y_Bu_McAm*U_Mc_McAm;
  Q_Bu_U_Bu_BuAb := Q_Bu_v_BuAb/(1 + Q_Bu_M_Bu_BuAb/Q_Bu_C_Bu);
  Q_Bu_U_Bu_BuEx := Q_Bu_k_BuEx*Q_Bu_Q_Bu;
  Q_Bu_U_Hf_AmMa := f_Hf_AmMa*U_Ha_AmMa;
  Q_Bu_U_Hf_AmMc := f_Hf_AmMc*U_Hc_AmMc;
  Q_Bu_U_Hf_PsMa := f_Hf_PsMa*U_Ha_PsMa;
  Q_Bu_U_Hf_PsMc := f_Hf_PsMc*U_Hc_PsMc;
  Q_Bu_U_Hf_HaAs := f_Hf_HaAs*U_Ha_HaAs;
  Q_Bu_U_Hf_McMa := f_Hf_McMa*U_Ha_McMa;
  Q_Bu_v_BuAb := Q_Bu_v_BuAb_star*1^0.25*(V_Ru^0.75/(1 + (pH/Q_Bu_J_pH_BuAb)^Q_Bu_phi_pH_BuAb));
  Q_Bu_Y_Bu_LaBu := f_Lc_Le*Q_Bu_Y_Bu_WrBu;
  Q_Bu_Y_Bu_HaVa := (Q_Bu_Y_Bu_WrBu*P_Ha_WrHa + Q_Bu_Y_Bu_LaBu*P_Ha_LaHa + Q_Bu_Y_Bu_StBu*(P_Ha_SrHa + P_Ha_SdHa + P_Ha_MaMd))/(P_Ha_WrHa + P_Ha_LaHa + P_Ha_SrHa + P_Ha_SdHa + P_Ha_MaMd);
  Q_Bu_Y_Bu_PsVa := Q_Bu_Y_Bu_PsBu;
  Q_Bu_Y_Bu_AmMa := Q_Bu_Y_Bu_HaVa;
  Q_Bu_Y_Bu_AmMc := Q_Bu_Y_Bu_HcVa;
  Q_Bu_Y_Bu_PsMa := Q_Bu_Y_Bu_HaVa;
  Q_Bu_Y_Bu_PsMc := Q_Bu_Y_Bu_HcVa;
  Q_Bu_Y_Bu_HaAs := Q_Bu_Y_Bu_HaVa;
  Q_Bu_Y_Bu_McMa := Q_Bu_Y_Bu_HcVa;
  Q_Bu_Y_Bu_PsAm := Q_Bu_Y_Bu_PsVa;
  Q_Bu_Y_Bu_McAm := Q_Bu_Y_Bu_PsVa;
  Q_Bu_Y_Bu_HcVa := f_Ce_Fd*Q_Bu_Y_Bu_CeBu + (1 - f_Ce_Fd)*Q_Bu_Y_Bu_HeBu;
  Q_Bu_k_BuEx := k_FlEx;
  Q_Vl_C_Vl := Q_Vl_Q_Vl/V_Ru;
  Q_Vl_P_Vl_InVl := Q_Vl_Y_Vl_InVl*Q_Vl_D_Vl;
  Q_Vl_P_Vl_AmMa := Q_Vl_Y_Vl_AmMa*Q_Vl_U_Hf_AmMa;
  Q_Vl_P_Vl_AmMc := Q_Vl_Y_Vl_AmMc*Q_Vl_U_Hf_AmMc;
  Q_Vl_P_Vl_PsMa := Q_Vl_Y_Vl_PsMa*Q_Vl_U_Hf_PsMa;
  Q_Vl_P_Vl_PsMc := Q_Vl_Y_Vl_PsMc*Q_Vl_U_Hf_PsMc;
  Q_Vl_P_Vl_HaAs := Q_Vl_Y_Vl_HaAs*Q_Vl_U_Hf_HaAs;
  Q_Vl_P_Vl_HaVa := Q_Vl_Y_Vl_HaVa*U_Ha_HaVa;
  Q_Vl_P_Vl_HcVa := Q_Vl_Y_Vl_HcVa*U_Hc_HcVa;
  Q_Vl_P_MaVl_PsAm := Q_Vl_Y_Vl_PsAm*U_MaPs_PsAm;
  Q_Vl_P_McVl_PsAm := Q_Vl_Y_Vl_PsAm*U_McPs_PsAm;
  Q_Vl_P_Vl_McMa := Q_Vl_Y_Vl_McMa*Q_Vl_U_Hf_McMa;
  Q_Vl_P_Vl_McAm := Q_Vl_Y_Vl_McAm*U_Mc_McAm;
  Q_Vl_U_Vl_VlAb := Q_Vl_v_VlAb/(1 + Q_Vl_M_Vl_VlAb/Q_Vl_C_Vl);
  Q_Vl_U_Vl_VlEx := Q_Vl_k_VlEx*Q_Vl_Q_Vl;
  Q_Vl_U_Hf_AmMa := f_Hf_AmMa*U_Ha_AmMa;
  Q_Vl_U_Hf_AmMc := f_Hf_AmMc*U_Hc_AmMc;
  Q_Vl_U_Hf_PsMa := f_Hf_PsMa*U_Ha_PsMa;
  Q_Vl_U_Hf_PsMc := f_Hf_PsMc*U_Hc_PsMc;
  Q_Vl_U_Hf_HaAs := f_Hf_HaAs*U_Ha_HaAs;
  Q_Vl_U_Hf_McMa := f_Hf_McMa*U_Ha_McMa;
  Q_Vl_v_VlAb := Q_Vl_v_VlAb_star*1^0.25*(V_Ru^0.75/(1 + (pH/Q_Vl_J_pH_VlAb)^Q_Vl_phi_pH_VlAb));
  Q_Vl_Y_Vl_LaVl := f_Lc_Le*Q_Vl_Y_Vl_WrVl;
  Q_Vl_Y_Vl_HaVa := (Q_Vl_Y_Vl_WrVl*P_Ha_WrHa + Q_Vl_Y_Vl_LaVl*P_Ha_LaHa + Q_Vl_Y_Vl_StVl*(P_Ha_SrHa + P_Ha_SdHa + P_Ha_MaMd))/(P_Ha_WrHa + P_Ha_LaHa + P_Ha_SrHa + P_Ha_SdHa + P_Ha_MaMd);
  Q_Vl_Y_Vl_PsVa := Q_Vl_Y_Vl_PsVl;
  Q_Vl_Y_Vl_AmMa := Q_Vl_Y_Vl_HaVa;
  Q_Vl_Y_Vl_AmMc := Q_Vl_Y_Vl_HcVa;
  Q_Vl_Y_Vl_PsMa := Q_Vl_Y_Vl_HaVa;
  Q_Vl_Y_Vl_PsMc := Q_Vl_Y_Vl_HcVa;
  Q_Vl_Y_Vl_HaAs := Q_Vl_Y_Vl_HaVa;
  Q_Vl_Y_Vl_McMa := Q_Vl_Y_Vl_HcVa;
  Q_Vl_Y_Vl_PsAm := Q_Vl_Y_Vl_PsVa;
  Q_Vl_Y_Vl_McAm := Q_Vl_Y_Vl_PsVa;
  Q_Vl_Y_Vl_HcVa := f_Ce_Fd*Q_Vl_Y_Vl_CeVl + (1 - f_Ce_Fd)*Q_Vl_Y_Vl_HeVl;
  Q_Vl_k_VlEx := k_FlEx;

  // Rate rules:
  Q_Pd_Q_Pd' = Q_Pd_P_Pd_InPd - (U_Pd_PdPs + Q_Pd_U_Pd_PdEx);
  Q_Ma0' = Q_Ma_P_Ma_AmMa + Q_Ma_P_Ma_PsMa + Q_Ma_P_Ma_McMa - (U_Ma_MaMd + U_Mc_McMa + Q_Ma_U_Ma_PoEx);
  Q_Mc0' = Q_Mc_P_Mc_AmMc + Q_Mc_P_Mc_PsMc - (U_Mc_McEg + Q_Mc_U_Mc_McEx);
  Q_Ps_Q_Ps' = Q_Ps_P_Ps_InPs + Q_Ps_P_Ps_PdPs + Q_Ps_P_Ps_MaMd + Q_Ps_P_Ps_SaPs + Q_Ps_P_Ps_McPs - (U_MaPs_PsAm + U_McPs_PsAm + U_Ps_PsMa + U_Ps_PsMc + Q_Ps_U_Ps_PsEx);
  Q_Pu_Q_Pu' = Q_Pu_P_Pu_InPu - Q_Pu_U_Pu_PuEx;
  Q_Am_Q_Am' = Q_Am_P_Am_InAm + Q_Am_P_MaAm_PsAm + Q_Am_P_McAm_PsAm + Q_Am_P_Am_UeAm + Q_Am_P_Am_McAm - (Q_Am_U_Am_AmAb + U_Am_AmMa + U_Am_AmMc + Q_Am_U_Am_AmEx);
  Q_Li_Q_Li' = Q_Li_P_Li_InLi + Q_Li_P_Li_MaMd - Q_Li_U_Li_LiEx;
  Q_Sd_Q_Sd' = Q_Sd_P_Sd_InSd - (U_Sd_SdHa + Q_Sd_U_Sd_SdEx);
  Q_Fd_Q_Fd' = Q_Fd_P_Fd_InFd - (U_Fd_FdHc + Q_Fd_U_Fd_FdEx);
  Q_Fu_Q_Fu' = Q_Fu_P_Fu_InFu - Q_Fu_U_Fu_FuEx;
  Q_Ha_Q_Ha' = P_Ha_WrHa + P_Ha_SrHa + P_Ha_SdHa + P_Ha_MaMd + P_Ha_LaHa - (U_Ha_AmMa + U_Ha_PsMa + U_Ha_McMa + U_Ha_HaAs + U_Ha_HaVa + Q_Ha_U_Ha_HaEx);
  Q_Hc_Q_Hc' = Q_Hc_P_Hc_FdHc - (U_Hc_AmMc + U_Hc_PsMc + U_Hc_HcVa + Q_Hc_U_Hc_HcEx);
  Q_As_Q_As' = Q_As_P_As_HaAs - (U_As_MaMd + Q_As_U_As_AsEx + Q_As_U_As_PoEx);
  Q_Ac_Q_Ac' = Q_Ac_P_Ac_InAc + Q_Ac_P_Ac_AmMa + Q_Ac_P_Ac_AmMc + Q_Ac_P_Ac_PsMa + Q_Ac_P_Ac_PsMc + Q_Ac_P_Ac_HaAs + Q_Ac_P_Ac_HaVa + Q_Ac_P_Ac_HcVa + Q_Ac_P_MaAc_PsAm + Q_Ac_P_McAc_PsAm + Q_Ac_P_Ac_McMa + Q_Ac_P_Ac_McAm - (Q_Ac_U_Ac_AcAb + Q_Ac_U_Ac_AcEx);
  Q_Pr_Q_Pr' = Q_Pr_P_Pr_InPr + Q_Pr_P_Pr_AmMa + Q_Pr_P_Pr_AmMc + Q_Pr_P_Pr_PsMa + Q_Pr_P_Pr_PsMc + Q_Pr_P_Pr_HaAs + Q_Pr_P_Pr_HaVa + Q_Pr_P_Pr_HcVa + Q_Pr_P_MaPr_PsAm + Q_Pr_P_McPr_PsAm + Q_Pr_P_Pr_McMa + Q_Pr_P_Pr_McAm - (Q_Pr_U_Pr_PrAb + Q_Pr_U_Pr_PrEx);
  Q_Bu_Q_Bu' = Q_Bu_P_Bu_InBu + Q_Bu_P_Bu_AmMa + Q_Bu_P_Bu_AmMc + Q_Bu_P_Bu_PsMa + Q_Bu_P_Bu_PsMc + Q_Bu_P_Bu_HaAs + Q_Bu_P_Bu_HaVa + Q_Bu_P_Bu_HcVa + Q_Bu_P_MaBu_PsAm + Q_Bu_P_McBu_PsAm + Q_Bu_P_Bu_McMa + Q_Bu_P_Bu_McAm - (Q_Bu_U_Bu_BuAb + Q_Bu_U_Bu_BuEx);
  Q_Vl_Q_Vl' = Q_Vl_P_Vl_InVl + Q_Vl_P_Vl_AmMa + Q_Vl_P_Vl_AmMc + Q_Vl_P_Vl_PsMa + Q_Vl_P_Vl_PsMc + Q_Vl_P_Vl_HaAs + Q_Vl_P_Vl_HaVa + Q_Vl_P_Vl_HcVa + Q_Vl_P_MaVl_PsAm + Q_Vl_P_McVl_PsAm + Q_Vl_P_Vl_McMa + Q_Vl_P_Vl_McAm - (Q_Vl_U_Vl_VlAb + Q_Vl_U_Vl_VlEx);
end
