// SBML level 2 version 4

model dokos_celler_lovell_1996____main()
  // Originally created by libAntimony v1.3 (using libSBML 4.1.0-b2)

  // Compartments:
  compartment default_compartment = 1;

  // Parameters:
  R = 8314.472;
  T = 310;
  F = 96485.3415;
  E = -64.9;
  membrane_C = 3.2e-5;
  Cai = 3.4e-5;
  Cao = 2.0004;
  Nai = 7.4994;
  Nao = 139.9929;
  Ki = 140.0073;
  Ko = 5.4243;
  L_type_calcium_current_g_CaL = 0.4;
  dL = 0.0001;
  fL = 0.1505;
  fL2 = 0.219;
  L_type_calcium_current_L_type_calcium_current_d_gate_tau_dL = 0.002;
  L_type_calcium_current_L_type_calcium_current_f2_gate_alpha_fL2 = 3;
  L_type_calcium_current_L_type_calcium_current_f2_gate_beta_fL2 = 40000;
  T_type_calcium_current_g_CaT = 0.085;
  dT = 0.001;
  fT = 0.1328;
  fast_sodium_current_g_Na = 0.25;
  m = 0.0139;
  h = 0.0087;
  delayed_rectifying_potassium_current_Kk = 0.00026;
  delayed_rectifying_potassium_current_P_KNa = 0.035;
  x = 0.5682;
  hyperpolarising_activated_current_Kmf = 10.3;
  hyperpolarising_activated_current_g_fNa = 0.0081;
  hyperpolarising_activated_current_g_fK = 0.0135;
  y = 0.0287;
  sodium_potassium_pump_KmNa = 40;
  sodium_potassium_pump_KmK = 1;
  sodium_potassium_pump_i_pmax = 0.226;
  sodium_calcium_exchange_current_kNaCa = 4;
  sodium_calcium_exchange_current_Qci = 0.1369;
  sodium_calcium_exchange_current_Qn = 0.4315;
  sodium_calcium_exchange_current_Qco = 0;
  sodium_calcium_exchange_current_K3ni = 26.44;
  sodium_calcium_exchange_current_Kci = 0.0207;
  sodium_calcium_exchange_current_K1ni = 395.3;
  sodium_calcium_exchange_current_K2ni = 2.289;
  sodium_calcium_exchange_current_Kcni = 26.44;
  sodium_calcium_exchange_current_K3no = 4.663;
  sodium_calcium_exchange_current_K1no = 1628;
  sodium_calcium_exchange_current_K2no = 561.4;
  sodium_calcium_exchange_current_Kco = 3.663;
  background_sodium_current_g_Nab = 0.00024;
  background_potassium_current_KbK = 7e-5;
  V_i = 2.5e-6;
  sarcoplasmic_reticulum_kinetics_i_up_max = 0.0212;
  sarcoplasmic_reticulum_kinetics_KmCaup = 0.0005;
  sarcoplasmic_reticulum_kinetics_KmCarel = 0.001;
  sarcoplasmic_reticulum_kinetics_tau_rel = 0.005;
  sarcoplasmic_reticulum_kinetics_tau_tr = 0.4;
  Caup = 0.5832;
  Carel = 0.1101;
  ion_concentrations_tau_b = 0.1;
  ion_concentrations_Nab = 140;
  ion_concentrations_Cab = 2;
  ion_concentrations_Kb = 5.4;
  time_ = ;

  // Assignment rules:
  membrane_i_tot := i_CaL + i_CaT + i_Na + i_K + i_f + i_p + i_NaCa + i_bNa + i_bK;
  i_CaL := L_type_calcium_current_g_CaL*dL*fL*fL2*(E - E_Ca + 75);
  i_CaT := T_type_calcium_current_g_CaT*dT*fT*(E - E_Ca + 75);
  i_Na := fast_sodium_current_g_Na*m^3*h*(E - E_Na);
  i_K := i_KK + i_KNa;
  i_f := i_fK + i_fNa;
  i_p := sodium_potassium_pump_i_pmax*Nai/(Nai + sodium_potassium_pump_KmNa)*Ko/(Ko + sodium_potassium_pump_KmK)*(1 - ((E - 40)/211)^2);
  i_NaCa := sodium_calcium_exchange_current_kNaCa*(sodium_calcium_exchange_current_x2*sodium_calcium_exchange_current_k21 - sodium_calcium_exchange_current_x1*sodium_calcium_exchange_current_k12)/(sodium_calcium_exchange_current_x1 + sodium_calcium_exchange_current_x2 + sodium_calcium_exchange_current_x3 + sodium_calcium_exchange_current_x4);
  i_bNa := background_sodium_current_g_Nab*(E - E_Na);
  i_bK := background_potassium_current_KbK*(Ko/1)^0.41*(Ki - Ko*exp(-E*F/(R*T)));
  E_Ca := R*T/(2*F)*ln(Cao/Cai);
  E_Na := R*T/F*ln(Nao/Nai);
  E_K := R*T/F*ln(Ko/Ki);
  L_type_calcium_current_L_type_calcium_current_d_gate_dL_infinity := 1/(1 + exp((E + 6.6)/(-6.6)));
  L_type_calcium_current_L_type_calcium_current_f_gate_fL_infinity := 1/(1 + exp((E + 25)/6));
  L_type_calcium_current_L_type_calcium_current_f_gate_tau_fL := 0.031 + 1/(1 + exp((E + 37.6)/8.1));
  T_type_calcium_current_T_type_calcium_current_d_gate_dT_infinity := 1/(1 + exp((E + 23)/(-6.1)));
  T_type_calcium_current_T_type_calcium_current_d_gate_tau_dT := 0.0006 + 0.0054/(1 + exp(0.03*(E + 100)));
  T_type_calcium_current_T_type_calcium_current_f_gate_fT_infinity := 1/(1 + exp((E + 75)/6.6));
  T_type_calcium_current_T_type_calcium_current_f_gate_tau_fT := 0.001 + 0.04/(1 + exp(0.08*(E + 65)));
  fast_sodium_current_fast_sodium_current_m_gate_alpha_m := 200*(E + 34.3)/(1 - exp(-0.09*(E + 34.3)));
  fast_sodium_current_fast_sodium_current_m_gate_beta_m := 8000*exp(-0.15*(E + 56.2));
  fast_sodium_current_fast_sodium_current_h_gate_alpha_h := 32.4*exp(-0.14*(E + 93.4));
  fast_sodium_current_fast_sodium_current_h_gate_beta_h := 709/(1 + 4.2*exp(-0.06*(E + 45.4)));
  i_KK := x*delayed_rectifying_potassium_current_Kk*(Ko/1)^0.59*(Ki - Ko*exp(-E*F/(R*T)));
  i_KNa := x*delayed_rectifying_potassium_current_Kk*delayed_rectifying_potassium_current_P_KNa*(Ko/1)^0.59*(Nai - Nao*exp(-E*F/(R*T)));
  delayed_rectifying_potassium_current_delayed_rectifying_potassium_current_x_gate_x_infinity := 1/(1 + exp((E + 25.1)/(-7.4)));
  delayed_rectifying_potassium_current_delayed_rectifying_potassium_current_x_gate_tau_x := 1/(17*exp(0.0398*E) + 0.211*exp(-0.051*E));
  i_fNa := y*Ko^1.83/(Ko^1.83 + hyperpolarising_activated_current_Kmf^1.83)*hyperpolarising_activated_current_g_fNa*(E - E_Na);
  i_fK := y*Ko^1.83/(Ko^1.83 + hyperpolarising_activated_current_Kmf^1.83)*hyperpolarising_activated_current_g_fK*(E - E_K);
  hyperpolarising_activated_current_hyperpolarising_activated_current_y_gate_alpha_y := 0.36*(E + 137.8)/(exp(0.066*(E + 137.8)) - 1);
  hyperpolarising_activated_current_hyperpolarising_activated_current_y_gate_beta_y := 0.1*(E + 76.3)/(1 - exp(-0.21*(E + 76.3)));
  sodium_calcium_exchange_current_x1 := sodium_calcium_exchange_current_k41*sodium_calcium_exchange_current_k34*(sodium_calcium_exchange_current_k23 + sodium_calcium_exchange_current_k21) + sodium_calcium_exchange_current_k21*sodium_calcium_exchange_current_k32*(sodium_calcium_exchange_current_k43 + sodium_calcium_exchange_current_k41);
  sodium_calcium_exchange_current_x2 := sodium_calcium_exchange_current_k32*sodium_calcium_exchange_current_k43*(sodium_calcium_exchange_current_k14 + sodium_calcium_exchange_current_k12) + sodium_calcium_exchange_current_k41*sodium_calcium_exchange_current_k12*(sodium_calcium_exchange_current_k34 + sodium_calcium_exchange_current_k32);
  sodium_calcium_exchange_current_x3 := sodium_calcium_exchange_current_k14*sodium_calcium_exchange_current_k43*(sodium_calcium_exchange_current_k23 + sodium_calcium_exchange_current_k21) + sodium_calcium_exchange_current_k12*sodium_calcium_exchange_current_k23*(sodium_calcium_exchange_current_k43 + sodium_calcium_exchange_current_k41);
  sodium_calcium_exchange_current_x4 := sodium_calcium_exchange_current_k23*sodium_calcium_exchange_current_k34*(sodium_calcium_exchange_current_k14 + sodium_calcium_exchange_current_k12) + sodium_calcium_exchange_current_k14*sodium_calcium_exchange_current_k21*(sodium_calcium_exchange_current_k34 + sodium_calcium_exchange_current_k32);
  sodium_calcium_exchange_current_k41 := exp(-sodium_calcium_exchange_current_Qn*E*F/(2*R*T));
  sodium_calcium_exchange_current_k34 := Nao/(sodium_calcium_exchange_current_K3no + Nao);
  sodium_calcium_exchange_current_k23 := (Nao^2/(sodium_calcium_exchange_current_K1no*sodium_calcium_exchange_current_K2no) + Nao^3/(sodium_calcium_exchange_current_K1no*sodium_calcium_exchange_current_K2no*sodium_calcium_exchange_current_K3no))*exp(-sodium_calcium_exchange_current_Qn*E*F/(2*R*T))/sodium_calcium_exchange_current_do;
  sodium_calcium_exchange_current_k21 := Cao/sodium_calcium_exchange_current_Kco*exp(-sodium_calcium_exchange_current_Qco*E*F/(R*T))/sodium_calcium_exchange_current_do;
  sodium_calcium_exchange_current_k32 := exp(sodium_calcium_exchange_current_Qn*E*F/(2*R*T));
  sodium_calcium_exchange_current_k43 := Nai/(sodium_calcium_exchange_current_K3ni + Nai);
  sodium_calcium_exchange_current_k12 := Cai/sodium_calcium_exchange_current_Kci*exp(-sodium_calcium_exchange_current_Qci*E*F/(R*T))/sodium_calcium_exchange_current_di;
  sodium_calcium_exchange_current_k14 := (Nai^2/(sodium_calcium_exchange_current_K1ni*sodium_calcium_exchange_current_K2ni) + Nai^3/(sodium_calcium_exchange_current_K1ni*sodium_calcium_exchange_current_K2ni*sodium_calcium_exchange_current_K3ni))*exp(sodium_calcium_exchange_current_Qn*E*F/(2*R*T))/sodium_calcium_exchange_current_di;
  sodium_calcium_exchange_current_do := 1 + Cao/sodium_calcium_exchange_current_Kco + Cao/sodium_calcium_exchange_current_Kco*exp(sodium_calcium_exchange_current_Qco*E*F/(R*T)) + Nao/sodium_calcium_exchange_current_K1no + Nao^2/(sodium_calcium_exchange_current_K1no*sodium_calcium_exchange_current_K2no) + Nao^3/(sodium_calcium_exchange_current_K1no*sodium_calcium_exchange_current_K2no*sodium_calcium_exchange_current_K3no);
  sodium_calcium_exchange_current_di := 1 + Cai/sodium_calcium_exchange_current_Kci + Cai/sodium_calcium_exchange_current_Kci*exp(-sodium_calcium_exchange_current_Qci*E*F/(R*T)) + Cai*Nai/(sodium_calcium_exchange_current_Kci*sodium_calcium_exchange_current_Kcni) + Nai/sodium_calcium_exchange_current_K1ni + Nai^2/(sodium_calcium_exchange_current_K1ni*sodium_calcium_exchange_current_K2ni) + Nai^3/(sodium_calcium_exchange_current_K1ni*sodium_calcium_exchange_current_K2ni*sodium_calcium_exchange_current_K3ni);
  i_up := sarcoplasmic_reticulum_kinetics_i_up_max*Cai^2/(Cai^2 + sarcoplasmic_reticulum_kinetics_KmCaup^2);
  i_tr := 2*1*V_rel*F/(1*sarcoplasmic_reticulum_kinetics_tau_tr)*Caup;
  i_rel := 2*1*V_rel*F/(1*sarcoplasmic_reticulum_kinetics_tau_rel)*Carel*Cai^2/(Cai^2 + sarcoplasmic_reticulum_kinetics_KmCarel^2);
  V_rel := 0.006*V_i;
  V_up := 0.014*V_i;
  ion_concentrations_V_e := 0.2*V_i;

  // Rate rules:
  E' = -membrane_i_tot/membrane_C;
  Cai' = -1*(i_CaL + i_CaT - 2*i_NaCa + i_up + (-i_rel))/(2*F*1*V_i);
  Cao' = 1*(i_CaL + i_CaT - 2*i_NaCa)/(2*F*1*ion_concentrations_V_e) + (ion_concentrations_Cab - Cao)/ion_concentrations_tau_b;
  Nai' = -1*(i_bNa + i_fNa + i_Na + 3*i_p + 3*i_NaCa + i_KNa)/(F*1*V_i);
  Nao' = 1*(i_bNa + i_fNa + i_Na + 3*i_p + 3*i_NaCa + i_KNa)/(F*1*ion_concentrations_V_e) + (ion_concentrations_Nab - Nao)/ion_concentrations_tau_b;
  Ki' = -1*(i_KK + i_fK - 2*i_p + i_bK)/(F*1*V_i);
  Ko' = 1*(i_KK + i_fK - 2*i_p + i_bK)/(F*1*ion_concentrations_V_e) + (ion_concentrations_Kb - Ko)/ion_concentrations_tau_b;
  dL' = (L_type_calcium_current_L_type_calcium_current_d_gate_dL_infinity - dL)/L_type_calcium_current_L_type_calcium_current_d_gate_tau_dL;
  fL' = (L_type_calcium_current_L_type_calcium_current_f_gate_fL_infinity - fL)/L_type_calcium_current_L_type_calcium_current_f_gate_tau_fL;
  fL2' = L_type_calcium_current_L_type_calcium_current_f2_gate_alpha_fL2*(1 - fL2) - L_type_calcium_current_L_type_calcium_current_f2_gate_beta_fL2*Cai*fL2;
  dT' = (T_type_calcium_current_T_type_calcium_current_d_gate_dT_infinity - dT)/T_type_calcium_current_T_type_calcium_current_d_gate_tau_dT;
  fT' = (T_type_calcium_current_T_type_calcium_current_f_gate_fT_infinity - fT)/T_type_calcium_current_T_type_calcium_current_f_gate_tau_fT;
  m' = fast_sodium_current_fast_sodium_current_m_gate_alpha_m*(1 - m) - fast_sodium_current_fast_sodium_current_m_gate_beta_m*m;
  h' = fast_sodium_current_fast_sodium_current_h_gate_alpha_h*(1 - h) - fast_sodium_current_fast_sodium_current_h_gate_beta_h*h;
  x' = (delayed_rectifying_potassium_current_delayed_rectifying_potassium_current_x_gate_x_infinity - x)/delayed_rectifying_potassium_current_delayed_rectifying_potassium_current_x_gate_tau_x;
  y' = hyperpolarising_activated_current_hyperpolarising_activated_current_y_gate_alpha_y*(1 - y) - hyperpolarising_activated_current_hyperpolarising_activated_current_y_gate_beta_y*y;
  Caup' = 1*(i_up - i_tr)/(2*1*V_up*F);
  Carel' = 1*(i_tr - i_rel)/(2*1*V_rel*F);
end
