// SBML level 2 version 4

model Dupont_1991b____main()
  // Originally created by libAntimony v1.3 (using libSBML 4.1.0-b2)

  // Compartments:
  compartment default_compartment = 1;

  // Parameters:
  v0 = 1;
  v1 = 7.3;
  parameters_VM2 = 65;
  parameters_VM3 = 500;
  parameters_KR = 2;
  parameters_KA = 0.9;
  kf = 1;
  k = 10;
  parameters_K2 = 1;
  parameters_n = 2;
  parameters_m = 2;
  parameters_p = 4;
  Z = 0.1;
  Y = 0.64;
  parameters_beta_pulse_betaf = 0.96;
  parameters_beta_pulse_tp = 4;
  time_ = ;

  // Assignment rules:
  v2 := parameters_VM2*Z^parameters_n/(parameters_K2^parameters_n + Z^parameters_n);
  v3 := parameters_VM3*(Y^parameters_m/(parameters_KR^parameters_m + Y^parameters_m))*(Z^parameters_p/(parameters_KA^parameters_p + Z^parameters_p));
  beta := ;

  // Rate rules:
  Z' = v0 + v1*beta - v2 + v3 + kf*Y - k*Z;
  Y' = v2 - v3 - kf*Y;
end
