// SBML level 2 version 4

model earm_noble_1990____main()
  // Originally created by libAntimony v1.4 (using libSBML 4.1.0-b2)

  // Compartments:
  compartment default_compartment = 1;

  // Parameters:
  V = -91.6;
  R = 8314.472;
  T = 310;
  F = 96485.3415;
  membrane_C_m = 4e-5;
  membrane_stim_start = 0.1;
  membrane_stim_end = 100000;
  membrane_stim_period = 1;
  membrane_stim_duration = 0.002;
  membrane_stim_amplitude = -1.3;
  fast_sodium_current_g_Na = 0.5;
  Na_o = 140;
  Na_i = 6.48;
  K_c = 4;
  K_i = 140;
  m = 0.076;
  h = 0.015;
  fast_sodium_current_fast_sodium_current_m_gate_delta_m = 1e-5;
  transient_outward_current_g_to = 0.01;
  transient_outward_current_g_to_s = 0;
  r = 0;
  s = 1;
  sodium_potassium_pump_i_NaK_max = 0.14;
  sodium_potassium_pump_K_mK = 1;
  sodium_potassium_pump_K_mNa = 40;
  sodium_background_current_g_b_Na = 0.00012;
  calcium_background_current_g_b_Ca = 5e-5;
  Ca_o = 2;
  Ca_i = 1e-5;
  Na_Ca_exchanger_k_NaCa = 0.0001;
  Na_Ca_exchanger_n_NaCa = 3;
  Na_Ca_exchanger_d_NaCa = 0.0001;
  Na_Ca_exchanger_gamma = 0.5;
  potassium_background_current_g_b_K = 0.0017;
  time_independent_potassium_current_g_K1 = 0.017;
  time_independent_potassium_current_K_m_K1 = 10;
  L_type_calcium_current_P_Ca_L = 0.05;
  d = 0.0011;
  f_Ca = 0.785;
  sarcoplasmic_reticulum_calcium_pump_K_cyca = 0.0003;
  sarcoplasmic_reticulum_calcium_pump_K_xcs = 0.4;
  sarcoplasmic_reticulum_calcium_pump_K_srca = 0.5;
  sarcoplasmic_reticulum_calcium_pump_alpha_up = 3;
  sarcoplasmic_reticulum_calcium_pump_beta_up = 0.23;
  Ca_up = 0.3;
  calcium_release_K_leak_rate = 0;
  calcium_release_K_m_rel = 250;
  calcium_release_ActFrac = 0;
  calcium_release_ProdFrac = 0;
  calcium_release_ProdFracRate = 1;
  Ca_rel = 0.3;
  calcium_translocation_alpha_tr = 50;
  intracellular_calcium_concentration_Ca_Calmod = 0.0005;
  intracellular_calcium_concentration_Ca_Trop = 0.0015;
  intracellular_calcium_concentration_Calmod = 0.02;
  intracellular_calcium_concentration_Trop = 0.15;
  intracellular_calcium_concentration_alpha_Calmod = 100000;
  intracellular_calcium_concentration_beta_Calmod = 50;
  intracellular_calcium_concentration_alpha_Trop = 100000;
  intracellular_calcium_concentration_beta_Trop = 200;
  intracellular_calcium_concentration_radius = 0.01;
  intracellular_calcium_concentration_length = 0.08;
  intracellular_calcium_concentration_V_rel_ratio = 0.1;
  intracellular_calcium_concentration_V_e_ratio = 0.4;
  intracellular_calcium_concentration_V_up_ratio = 0.01;
  time_ = ;
  intracellular_calcium_concentration_d = ;

  // Assignment rules:
  RTONF := R*T/F;
  i_b_K := potassium_background_current_g_b_K*(V - E_K);
  i_K1 := time_independent_potassium_current_g_K1*K_c/(K_c + time_independent_potassium_current_K_m_K1)*(V - E_K)/(1 + exp((V - E_K - 10)*2/RTONF));
  i_to := transient_outward_current_g_to*(transient_outward_current_g_to_s + s*(1 - transient_outward_current_g_to_s))*r*(V - E_K);
  i_b_Na := sodium_background_current_g_b_Na*(V - E_Na);
  i_b_Ca := calcium_background_current_g_b_Ca*(V - E_Ca);
  i_NaK := sodium_potassium_pump_i_NaK_max*K_c/(sodium_potassium_pump_K_mK + K_c)*Na_i/(sodium_potassium_pump_K_mNa + Na_i);
  i_NaCa := Na_Ca_exchanger_k_NaCa*(exp(Na_Ca_exchanger_gamma*(Na_Ca_exchanger_n_NaCa - 2)*V/RTONF)*Na_i^Na_Ca_exchanger_n_NaCa*Ca_o - exp((Na_Ca_exchanger_gamma - 1)*(Na_Ca_exchanger_n_NaCa - 2)*V/RTONF)*Na_o^Na_Ca_exchanger_n_NaCa*Ca_i)/((1 + Na_Ca_exchanger_d_NaCa*(Ca_i*Na_o^Na_Ca_exchanger_n_NaCa + Ca_o*Na_i^Na_Ca_exchanger_n_NaCa))*(1 + Ca_i/0.0069));
  i_Na := fast_sodium_current_g_Na*m^3*h*(V - fast_sodium_current_E_mh);
  i_Ca_L := i_Ca_L_Ca + i_Ca_L_K + i_Ca_L_Na;
  membrane_i_Stim := ;
  fast_sodium_current_E_mh := RTONF*ln((Na_o + 0.12*K_c)/(Na_i + 0.12*K_i));
  fast_sodium_current_fast_sodium_current_m_gate_alpha_m := ;
  fast_sodium_current_fast_sodium_current_m_gate_beta_m := 8000*exp(-0.056*(V + 66));
  fast_sodium_current_fast_sodium_current_m_gate_E0_m := V + 41;
  fast_sodium_current_fast_sodium_current_h_gate_alpha_h := 20*exp(-0.125*(V + 75));
  fast_sodium_current_fast_sodium_current_h_gate_beta_h := 2000/(1 + 320*exp(-0.1*(V + 75)));
  E_K := RTONF*ln(K_c/K_i);
  transient_outward_current_transient_outward_current_s_gate_alpha_s := 0.033*exp(-V/17);
  transient_outward_current_transient_outward_current_s_gate_beta_s := 33/(1 + exp(-0.125*(V + 10)));
  E_Na := RTONF*ln(Na_o/Na_i);
  E_Ca := 0.5*RTONF*ln(Ca_o/Ca_i);
  i_Ca_L_Ca := 4*L_type_calcium_current_P_Ca_L*d*CaChon*(V - 50)/RTONF/(1 - exp(-(V - 50)*2/RTONF))*(Ca_i*exp(100/RTONF) - Ca_o*exp(-(V - 50)*2/RTONF));
  i_Ca_L_K := 0.002*L_type_calcium_current_P_Ca_L*d*CaChon*(V - 50)/RTONF/(1 - exp(-(V - 50)/RTONF))*(K_i*exp(50/RTONF) - K_c*exp(-(V - 50)/RTONF));
  i_Ca_L_Na := 0.01*L_type_calcium_current_P_Ca_L*d*CaChon*(V - 50)/RTONF/(1 - exp(-(V - 50)/RTONF))*(Na_i*exp(50/RTONF) - Na_o*exp(-(V - 50)/RTONF));
  CaChon := (1 - f_Ca)*(1 - L_type_calcium_current_L_type_calcium_current_f_Ca_gate_CaChoff);
  L_type_calcium_current_L_type_calcium_current_d_gate_alpha_d := ;
  L_type_calcium_current_L_type_calcium_current_d_gate_beta_d := ;
  L_type_calcium_current_L_type_calcium_current_d_gate_E0_d := V + 19;
  L_type_calcium_current_L_type_calcium_current_f_Ca_gate_alpha_f_Ca := ;
  L_type_calcium_current_L_type_calcium_current_f_Ca_gate_beta_f_Ca := 12/(1 + exp(-L_type_calcium_current_L_type_calcium_current_f_Ca_gate_E0_f/4));
  L_type_calcium_current_L_type_calcium_current_f_Ca_gate_CaChoff := Ca_i/(0.001 + Ca_i);
  L_type_calcium_current_L_type_calcium_current_f_Ca_gate_E0_f := V + 34;
  i_up := Ca_i/sarcoplasmic_reticulum_calcium_pump_K_2*sarcoplasmic_reticulum_calcium_pump_alpha_up - Ca_up*sarcoplasmic_reticulum_calcium_pump_K_1/sarcoplasmic_reticulum_calcium_pump_K_2*sarcoplasmic_reticulum_calcium_pump_beta_up;
  sarcoplasmic_reticulum_calcium_pump_K_1 := sarcoplasmic_reticulum_calcium_pump_K_cyca*sarcoplasmic_reticulum_calcium_pump_K_xcs/sarcoplasmic_reticulum_calcium_pump_K_srca;
  sarcoplasmic_reticulum_calcium_pump_K_2 := Ca_i + Ca_up*sarcoplasmic_reticulum_calcium_pump_K_1 + sarcoplasmic_reticulum_calcium_pump_K_cyca*sarcoplasmic_reticulum_calcium_pump_K_xcs + sarcoplasmic_reticulum_calcium_pump_K_cyca;
  i_rel := ((calcium_release_ActFrac/(calcium_release_ActFrac + 0.25))^2*calcium_release_K_m_rel + calcium_release_K_leak_rate)*Ca_rel;
  calcium_release_VoltDep := exp(0.08*(V - 40));
  calcium_release_RegBindSite := (Ca_i/(Ca_i + 0.0005))^2;
  calcium_release_ActRate := 600*calcium_release_VoltDep + 500*calcium_release_RegBindSite;
  calcium_release_InactRate := 60 + 500*calcium_release_RegBindSite;
  calcium_release_PrecFrac := 1 - calcium_release_ActFrac - calcium_release_ProdFrac;
  i_trans := (Ca_up - Ca_rel)*calcium_translocation_alpha_tr;
  V_i := intracellular_calcium_concentration_V_Cell*intracellular_calcium_concentration_V_i_ratio;
  intracellular_calcium_concentration_V_Cell := 3.141593*intracellular_calcium_concentration_radius^2*intracellular_calcium_concentration_length;
  intracellular_calcium_concentration_V_i_ratio := 1 - intracellular_calcium_concentration_V_e_ratio - intracellular_calcium_concentration_V_up_ratio - intracellular_calcium_concentration_V_rel_ratio;

  // Rate rules:
  V' = -1/membrane_C_m*(membrane_i_Stim + i_b_K + i_K1 + i_to + i_b_Na + i_b_Ca + i_NaK + i_NaCa + i_Na + i_Ca_L);
  Na_i' = -1/(1*V_i*F)*(i_Na + i_b_Na + 3*i_NaK + 3*i_NaCa + i_Ca_L_Na);
  K_i' = -1/(1*V_i*F)*(i_K1 + i_Ca_L_K + i_to + i_b_K - 2*i_NaK);
  m' = fast_sodium_current_fast_sodium_current_m_gate_alpha_m*(1 - m) - fast_sodium_current_fast_sodium_current_m_gate_beta_m*m;
  h' = fast_sodium_current_fast_sodium_current_h_gate_alpha_h*(1 - h) - fast_sodium_current_fast_sodium_current_h_gate_beta_h*h;
  r' = 333*(1/(1 + exp(-(V + 4)/5)) - r);
  s' = transient_outward_current_transient_outward_current_s_gate_alpha_s*(1 - s) - transient_outward_current_transient_outward_current_s_gate_beta_s*s;
  Ca_i' = -1/(2*1*V_i*F)*(i_Ca_L_Ca + i_b_Ca - 2*i_NaCa) + i_rel*intracellular_calcium_concentration_V_rel_ratio/intracellular_calcium_concentration_V_i_ratio - intracellular_calcium_concentration_d(intracellular_calcium_concentration_Ca_Calmod)/intracellular_calcium_concentration_d(time_) - intracellular_calcium_concentration_d(intracellular_calcium_concentration_Ca_Trop)/intracellular_calcium_concentration_d(time_) - i_up;
  d' = L_type_calcium_current_L_type_calcium_current_d_gate_alpha_d*(1 - d) - L_type_calcium_current_L_type_calcium_current_d_gate_beta_d*d;
  f_Ca' = (120*(1 - f_Ca)*L_type_calcium_current_L_type_calcium_current_f_Ca_gate_CaChoff + (1 - f_Ca)*(1 - L_type_calcium_current_L_type_calcium_current_f_Ca_gate_CaChoff))*L_type_calcium_current_L_type_calcium_current_f_Ca_gate_beta_f_Ca - L_type_calcium_current_L_type_calcium_current_f_Ca_gate_alpha_f_Ca*f_Ca;
  Ca_up' = intracellular_calcium_concentration_V_i_ratio/intracellular_calcium_concentration_V_up_ratio*i_up - i_trans;
  calcium_release_ActFrac' = calcium_release_PrecFrac*calcium_release_ActRate - calcium_release_ActFrac*calcium_release_InactRate;
  calcium_release_ProdFrac' = calcium_release_ActFrac*calcium_release_InactRate - calcium_release_ProdFracRate*calcium_release_ProdFrac;
  Ca_rel' = intracellular_calcium_concentration_V_up_ratio/intracellular_calcium_concentration_V_rel_ratio*i_trans - i_rel;
  intracellular_calcium_concentration_Ca_Calmod' = intracellular_calcium_concentration_alpha_Calmod*Ca_i*(intracellular_calcium_concentration_Calmod - intracellular_calcium_concentration_Ca_Calmod) - intracellular_calcium_concentration_beta_Calmod*intracellular_calcium_concentration_Ca_Calmod;
  intracellular_calcium_concentration_Ca_Trop' = intracellular_calcium_concentration_alpha_Trop*Ca_i*(intracellular_calcium_concentration_Trop - intracellular_calcium_concentration_Ca_Trop) - intracellular_calcium_concentration_beta_Trop*intracellular_calcium_concentration_Ca_Trop;
end
