// SBML level 2 version 4

model egli_model_2004_version01____main()
  // Originally created by libAntimony v1.3 (using libSBML 4.1.0-b2)

  // Compartments:
  compartment default_compartment = 1;

  // Parameters:
  PRL_PRL = 20;
  PRL_kD = 300;
  PRL_kO = 9;
  PRL_rP = 300000;
  PRL_qP = 0.5;
  OT0 = 25;
  DA0 = 20000;
  DA_vDbar = 10000;
  DA_DA_infinity = 20000;
  DA_qD = 0.2;
  OT_kx = 50;
  OT_vObar = 500;
  OT_rO = 1100;
  OT_qO = 1;
  time_ = ;

  // Assignment rules:
  DA_vD := ;
  OT_vO := ;
  x0 := ;

  // Rate rules:
  PRL_PRL' = PRL_rP*(1/(PRL_kD + DA0))*(OT0/(PRL_kO + OT0))^2 - PRL_qP*PRL_PRL;
  OT0' = OT_rO*(x0/(OT_kx + x0)) - (OT_qO*OT0 + OT_vO);
  DA0' = DA_qD*(DA_DA_infinity - DA0) - DA_vD;
end
