// SBML level 2 version 4

model ElectrEcoBluModel_SVBM____main()
  // Originally created by libAntimony v1.3 (using libSBML 4.1.0-b2)

  // Compartments:
  compartment default_compartment = 1;

  // Parameters:
  RNA_Device10 = 0;
  TF0 = 8621;
  TFS0 = 0;
  RNA_Device20 = 0;
  IC0 = 0;
  PhzS0 = 0;
  PhzM0 = 0;
  PYO0 = 0;
  concentration1 = 5000;
  concentration5 = 2;
  cellVolume = 1;
  k = 1.085;
  ElectrEcoBluDevice1_Promoter_Template_Promoter_Constitutive_avogadrosConstant = 6.0221415e23;
  concentration = RNA_Device10;
  kDecay = 0.05;
  k0 = 1.4;
  concentration0 = TF0;
  kDecay0 = 0.0058;
  kf = 1000;
  kb = 4000000;
  concentration2 = TFS0;
  kDecay1 = 0.0003851;
  k1 = 89;
  Km = 15000;
  n = 1;
  ElectrEcoBluDevice2_Promoter_Template_Promoter_Inductive_avogadrosConstant = 6.0221415e23;
  concentration3 = RNA_Device20;
  kDecay2 = 8e-6;
  k2 = 40;
  k3 = 1;
  k4 = 2.8e-6;
  concentration4 = PhzM0;
  kDecay3 = 0.8;
  k5 = 0.2;
  Km0 = 0.1;
  concentration6 = IC0;
  kDecay4 = 5e-5;
  concentration7 = PhzS0;
  kDecay5 = 0.8;
  k6 = 1;
  Km1 = 0.1;
  concentration8 = PYO0;
  kDecay6 = 0.5;
  time_ = ;

  // Assignment rules:
  JRNA := k*1e9/(cellVolume*1e-15*ElectrEcoBluDevice1_Promoter_Template_Promoter_Constitutive_avogadrosConstant);
  JGain := JRNA - J;
  J := kDecay*concentration;
  J0 := 1e6*RNARiPs/cellVolume;
  J1 := 1e6*RNARiPs2/cellVolume;
  J2 := kDecay0*concentration0;
  J3 := concentration0*concentration1*kf - kb*concentration2;
  JGain0 := J0 + J1 - J2 - J3;
  JGain1 := J3 - J4;
  J4 := kDecay1*concentration2;
  JRNA0 := k1*concentration2^n/(Km^n + concentration2^n)*1e9/(cellVolume*1e-15*ElectrEcoBluDevice2_Promoter_Template_Promoter_Inductive_avogadrosConstant);
  JGain2 := JRNA0 - J5;
  J5 := kDecay2*concentration3;
  J6 := 1e6*RNARiPs0/cellVolume;
  JGain3 := J6 - J7;
  J7 := kDecay3*concentration4;
  J9 := k5*concentration4*concentration5/(concentration5 + Km0);
  JGain4 := J9 - J8 - J10;
  J8 := kDecay4*concentration6;
  J10 := k6*concentration7*concentration6/(concentration6 + Km1);
  J12 := 1e6*RNARiPs1/cellVolume;
  JGain5 := J12 - J11;
  J11 := kDecay5*concentration7;
  JGain6 := J10 - J13;
  J13 := kDecay6*concentration8;
  RNARiPs := 1e9*k0*concentration*cellVolume*1e-15;
  RNARiPs0 := 1e9*k2*concentration3*cellVolume*1e-15;
  RNARiPs1 := 1e9*k3*concentration3*cellVolume*1e-15;
  RNARiPs2 := 1e9*k4*concentration3*cellVolume*1e-15;

  // Rate rules:
  concentration' = JGain;
  concentration0' = JGain0;
  concentration2' = JGain1;
  concentration3' = JGain2;
  concentration4' = JGain3;
  concentration6' = JGain4;
  concentration7' = JGain5;
  concentration8' = JGain6;
end
