// SBML level 2 version 4

model elowitz_leibler_2000____main()
  // Originally created by libAntimony v1.3 (using libSBML 4.1.0-b2)

  // Compartments:
  compartment default_compartment = 1;

  // Parameters:
  n = 2;
  K_m = 40;
  efficiency = 20;
  mRNA_halflife = 2;
  prot_halflife = 10;
  tps_repr = 0.0005;
  tps_active = 0.5;
  M_lacl0 = 0;
  P_cl0 = 0;
  M_tetR0 = 20;
  P_lacl0 = 0;
  M_cl0 = 0;
  P_tetR0 = 0;
  time_ = ;

  // Assignment rules:
  alpha_0 := a0_tr*efficiency/(kd_prot*K_m);
  alpha := a_tr*efficiency/(kd_prot*K_m);
  beta := kd_prot/kd_mRNA;
  t_ave := mRNA_halflife/ln(2);
  kd_prot := ln(2)/prot_halflife;
  kd_mRNA := ln(2)/mRNA_halflife;
  k_tl := efficiency*kd_mRNA;
  a_tr := (tps_active - tps_repr)*60;
  a0_tr := tps_repr*60;

  // Rate rules:
  M_lacl0' = a0_tr + a_tr*K_m^n/(K_m^n + P_cl0^n) - kd_mRNA*M_lacl0;
  P_cl0' = k_tl*M_cl0 - kd_prot*P_cl0;
  M_tetR0' = a_tr*K_m^n/(K_m^n + P_lacl0^n) + a0_tr - kd_mRNA*M_tetR0;
  P_lacl0' = k_tl*M_lacl0 - kd_prot*P_lacl0;
  M_cl0' = a_tr*K_m^n/(K_m^n + P_tetR0^n) + a0_tr - kd_mRNA*M_cl0;
  P_tetR0' = k_tl*M_tetR0 - kd_prot*P_tetR0;
end
