// SBML level 2 version 4

model evans_errington_shelly_feeney_chapman_godfrey_smith_chappell_2004____main()
  // Originally created by libAntimony v1.4 (using libSBML 4.1.0-b2)

  // Compartments:
  compartment default_compartment = 1;

  // Parameters:
  Lm0 = 10;
  ko_m = 2.89e-2;
  kc_m = 1.06e-4;
  ki = 3.09e-4;
  ke = 1.014;
  Hm0 = 0;
  Lc0 = 0;
  ko_c = 2.6553e-2;
  kc_c = 1.8637e-1;
  kb = 8.5341e-4;
  kd = 4.4489;
  BT = 2.89e1;
  Hc0 = 0;
  Ln_0 = 0;
  time_ = ;
  kinetic_parameters_Vm = ;
  kinetic_parameters_Vn = ;
  kinetic_parameters_Vc = ;

  // Assignment rules:
  v1 := kinetic_parameters_Vm/kinetic_parameters_Vc;
  v2 := kinetic_parameters_Vn/kinetic_parameters_Vc;

  // Rate rules:
  Lm0' = kc_m*Hm0 + ke/v1*Lc0 - (ko_m + ki)*Lm0;
  Hm0' = ko_m*Lm0 - kc_m*Hm0;
  Lc0' = ki*v1*Lm0 + kc_c*Hc0 + v2*kd*Ln_0 - ((ke + ko_c)*Lc0 + kb*(BT - Ln_0)*Lc0);
  Hc0' = ko_c*Lc0 - kc_c*Hc0;
  Ln_0' = kb/v2*(BT - Ln_0)*Lc0 - kd*Ln_0;
end
