// SBML level 2 version 4

model faber_2000____main()
  // Originally created by libAntimony v1.4 (using libSBML 4.1.0-b2)

  // Compartments:
  compartment default_compartment = 1;

  // Parameters:
  V = -85.21192;
  R = 8314;
  T = 310;
  F = 96485;
  cell_stim_start = 100;
  cell_stim_end = 9000000;
  cell_stim_period = 1000;
  cell_stim_duration = 2;
  cell_stim_amplitude = -25.5;
  fast_sodium_current_g_Na = 16;
  Nai = 13.36492;
  Nao = 140;
  m = 0.001491831;
  h = 0.9855966;
  j = 0.9908985;
  fast_sodium_current_fast_sodium_current_m_gate_delta_m = 1e-5;
  gamma_Nai = 0.75;
  gamma_Nao = 0.75;
  gamma_Ki = 0.75;
  gamma_Ko = 0.75;
  L_type_Ca_channel_gamma_Cai = 1;
  L_type_Ca_channel_gamma_Cao = 0.341;
  L_type_Ca_channel_P_Ca = 0.00054;
  L_type_Ca_channel_P_Na = 6.75e-7;
  L_type_Ca_channel_P_K = 1.93e-7;
  Cai = 0.000117482;
  Cao = 1.8;
  Ko = 5.4;
  Ki = 141.0569;
  d = 5.825971e-6;
  f = 0.9977654;
  L_type_Ca_channel_L_type_Ca_channel_f_Ca_gate_Km_Ca = 0.0006;
  T_type_Ca_channel_g_CaT = 0.05;
  b = 0.001367379;
  g = 0.9888144;
  rapid_delayed_rectifier_potassium_current_G_Kr = 0.02614;
  xr = 0.0002047004;
  slow_delayed_rectifier_potassium_current_G_Ks = 0.433;
  slow_delayed_rectifier_potassium_current_PNaK = 0.01833;
  xs1 = 0.006607467;
  xs2 = 0.03037682;
  time_independent_potassium_current_G_K1 = 0.75;
  plateau_potassium_current_g_Kp = 0.00552;
  sodium_activated_potassium_current_g_K_Na = 0.12848;
  sodium_activated_potassium_current_nKNa = 2.8;
  sodium_activated_potassium_current_kdKNa = 66;
  ATP_sensitive_potassium_current_i_K_ATP_on = 1;
  ATP_sensitive_potassium_current_nATP = 0.24;
  ATP_sensitive_potassium_current_nicholsarea = 5e-5;
  ATP_sensitive_potassium_current_ATPi = 3;
  ATP_sensitive_potassium_current_hATP = 2;
  ATP_sensitive_potassium_current_kATP = 0.00025;
  zdv = 0.01446225;
  ydv = 0.9999456;
  sarcolemmal_calcium_pump_K_mpCa = 0.0005;
  sarcolemmal_calcium_pump_I_pCa = 1.15;
  sodium_background_current_g_Nab = 0.004;
  calcium_background_current_g_Cab = 0.003016;
  sodium_potassium_pump_I_NaK = 2.25;
  sodium_potassium_pump_K_mNai = 10;
  sodium_potassium_pump_K_mKo = 1.5;
  non_specific_calcium_activated_current_K_m_ns_Ca = 0.0012;
  Na_Ca_exchanger_c1 = 0.00025;
  Na_Ca_exchanger_c2 = 0.0001;
  Na_Ca_exchanger_gamma = 0.15;
  calcium_dynamics_G_rel_max = 60;
  calcium_dynamics_G_rel_overload = 4;
  calcium_dynamics_tau_tr = 180;
  calcium_dynamics_K_mrel = 0.0008;
  calcium_dynamics_delta_Ca_ith = 0.00018;
  calcium_dynamics_CSQN_max = 10;
  calcium_dynamics_K_mCSQN = 0.8;
  calcium_dynamics_K_mup = 0.00092;
  calcium_dynamics_I_up = 0.00875;
  calcium_dynamics_Ca_NSR_max = 15;
  Ca_JSR = 1.127914;
  Ca_NSR = 1.76731;
  A_cap = 0.0001534;
  calcium_dynamics_K_mTn = 0.0005;
  calcium_dynamics_K_mCMDN = 0.00238;
  calcium_dynamics_Tn_max = 0.07;
  calcium_dynamics_CMDN_max = 0.05;
  calcium_dynamics_APtrack = 9.659105e-196;
  calcium_dynamics_APtrack2 = 5.33945e-195;
  calcium_dynamics_APtrack3 = 0.0001295152;
  calcium_dynamics_Cainfluxtrack = 2.693803e-196;
  calcium_dynamics_OVRLDtrack = 0;
  calcium_dynamics_OVRLDtrack2 = 0;
  calcium_dynamics_OVRLDtrack3 = 0;
  calcium_dynamics_CSQNthresh = 0.7;
  calcium_dynamics_Logicthresh = 0.98;
  geometry_preplength = 0.1;
  geometry_radius = 0.011;
  time_ = ;

  // Assignment rules:
  I_st := ;
  i_Na := fast_sodium_current_g_Na*m^3*h*j*(V - E_Na);
  i_Ca_L := i_CaCa + i_CaK + i_CaNa;
  i_Ca_T := T_type_Ca_channel_g_CaT*b*b*g*(V - E_Ca);
  i_Kr := rapid_delayed_rectifier_potassium_current_g_Kr*xr*rapid_delayed_rectifier_potassium_current_Rect*(V - E_K);
  i_Ks := slow_delayed_rectifier_potassium_current_g_Ks*xs1*xs2*(V - slow_delayed_rectifier_potassium_current_E_Ks);
  i_K_Na := sodium_activated_potassium_current_g_K_Na*sodium_activated_potassium_current_pona*sodium_activated_potassium_current_pov*(V - E_K);
  i_K_ATP := ATP_sensitive_potassium_current_GKbaraATP*(V - E_K);
  i_to := transient_outward_current_g_to*zdv^3*ydv*transient_outward_current_rvdv*(V - E_K);
  i_NaCa := Na_Ca_exchanger_c1*exp((Na_Ca_exchanger_gamma - 1)*V*F/(R*T))*(exp(V*F/(R*T))*Nai^3*Cao - Nao^3*Cai)/(1 + Na_Ca_exchanger_c2*exp((Na_Ca_exchanger_gamma - 1)*V*F/(R*T))*(exp(V*F/(R*T))*Nai^3*Cao + Nao^3*Cai));
  i_K1 := time_independent_potassium_current_g_K1*K1_infinity*(V - E_K);
  i_Kp := plateau_potassium_current_g_Kp*plateau_potassium_current_Kp*(V - E_K);
  i_p_Ca := sarcolemmal_calcium_pump_I_pCa*Cai/(sarcolemmal_calcium_pump_K_mpCa + Cai);
  i_Na_b := sodium_background_current_g_Nab*(V - E_Na);
  i_Ca_b := calcium_background_current_g_Cab*(V - E_Ca);
  i_NaK := sodium_potassium_pump_I_NaK*sodium_potassium_pump_f_NaK*1/(1 + (sodium_potassium_pump_K_mNai/Nai)^2)*Ko/(Ko + sodium_potassium_pump_K_mKo);
  i_ns_Ca := i_ns_Na + i_ns_K;
  dVdt := -(i_Na + i_Ca_L + i_Ca_T + i_Kr + i_Ks + i_K_Na + i_K_ATP + i_to + i_K1 + i_Kp + i_NaCa + i_p_Ca + i_Na_b + i_Ca_b + i_NaK + i_ns_Ca + I_st);
  E_Na := R*T/F*ln(Nao/Nai);
  fast_sodium_current_fast_sodium_current_m_gate_alpha_m := ;
  fast_sodium_current_fast_sodium_current_m_gate_beta_m := 0.08*exp(-V/11);
  fast_sodium_current_fast_sodium_current_m_gate_E0_m := V + 47.13;
  fast_sodium_current_fast_sodium_current_h_gate_alpha_h := ;
  fast_sodium_current_fast_sodium_current_h_gate_beta_h := ;
  fast_sodium_current_fast_sodium_current_j_gate_alpha_j := ;
  fast_sodium_current_fast_sodium_current_j_gate_beta_j := ;
  i_CaCa := d*f*f_Ca*L_type_Ca_channel_I_CaCa;
  i_CaK := d*f*f_Ca*L_type_Ca_channel_I_CaK;
  i_CaNa := d*f*f_Ca*L_type_Ca_channel_I_CaNa;
  L_type_Ca_channel_I_CaCa := L_type_Ca_channel_P_Ca*2^2*V*F^2/(R*T)*(L_type_Ca_channel_gamma_Cai*Cai*exp(2*V*F/(R*T)) - L_type_Ca_channel_gamma_Cao*Cao)/(exp(2*V*F/(R*T)) - 1);
  L_type_Ca_channel_I_CaK := L_type_Ca_channel_P_K*1^2*V*F^2/(R*T)*(gamma_Ki*Ki*exp(1*V*F/(R*T)) - gamma_Ko*Ko)/(exp(1*V*F/(R*T)) - 1);
  L_type_Ca_channel_I_CaNa := L_type_Ca_channel_P_Na*1^2*V*F^2/(R*T)*(gamma_Nai*Nai*exp(1*V*F/(R*T)) - gamma_Nao*Nao)/(exp(1*V*F/(R*T)) - 1);
  f_Ca := 1/(1 + Cai/L_type_Ca_channel_L_type_Ca_channel_f_Ca_gate_Km_Ca);
  L_type_Ca_channel_L_type_Ca_channel_d_gate_alpha_d := L_type_Ca_channel_L_type_Ca_channel_d_gate_d_infinity/L_type_Ca_channel_L_type_Ca_channel_d_gate_tau_d;
  L_type_Ca_channel_L_type_Ca_channel_d_gate_beta_d := (1 - L_type_Ca_channel_L_type_Ca_channel_d_gate_d_infinity)/L_type_Ca_channel_L_type_Ca_channel_d_gate_tau_d;
  L_type_Ca_channel_L_type_Ca_channel_d_gate_d_infinity := 1/(1 + exp(-L_type_Ca_channel_L_type_Ca_channel_d_gate_E0_d/6.24));
  L_type_Ca_channel_L_type_Ca_channel_d_gate_tau_d := ;
  L_type_Ca_channel_L_type_Ca_channel_d_gate_E0_d := V + 10;
  L_type_Ca_channel_L_type_Ca_channel_f_gate_alpha_f := L_type_Ca_channel_L_type_Ca_channel_f_gate_f_infinity/L_type_Ca_channel_L_type_Ca_channel_f_gate_tau_f;
  L_type_Ca_channel_L_type_Ca_channel_f_gate_beta_f := (1 - L_type_Ca_channel_L_type_Ca_channel_f_gate_f_infinity)/L_type_Ca_channel_L_type_Ca_channel_f_gate_tau_f;
  L_type_Ca_channel_L_type_Ca_channel_f_gate_f_infinity := 1/(1 + exp((V + 35.06)/8.6)) + 0.6/(1 + exp((50 - V)/20));
  L_type_Ca_channel_L_type_Ca_channel_f_gate_tau_f := 1/(0.0197*exp(-(0.0337*(V + 10))^2) + 0.02);
  E_Ca := R*T/(2*F)*ln(Cao/Cai);
  T_type_Ca_channel_T_type_Ca_channel_b_gate_b_inf := 1/(1 + exp(-(V + 14)/10.8));
  T_type_Ca_channel_T_type_Ca_channel_b_gate_tau_b := 3.7 + 6.1/(1 + exp((V + 25)/4.5));
  T_type_Ca_channel_T_type_Ca_channel_g_gate_g_inf := 1/(1 + exp((V + 60)/5.6));
  T_type_Ca_channel_T_type_Ca_channel_g_gate_tau_g := ;
  rapid_delayed_rectifier_potassium_current_g_Kr := rapid_delayed_rectifier_potassium_current_G_Kr*sqrt(Ko/5.4);
  rapid_delayed_rectifier_potassium_current_Rect := 1/(1 + exp((V + 9)/22.4));
  E_K := R*T/F*ln(Ko/Ki);
  rapid_delayed_rectifier_potassium_current_rapid_delayed_rectifier_potassium_current_xr_gate_xr_infinity := 1/(1 + exp(-(V + 21.5)/7.5));
  rapid_delayed_rectifier_potassium_current_rapid_delayed_rectifier_potassium_current_xr_gate_tau_xr := 1/(0.00138*(V + 14.2)/(1 - exp(-0.123*(V + 14.2))) + 0.00061*(V + 38.9)/(exp(0.145*(V + 38.9)) - 1));
  slow_delayed_rectifier_potassium_current_g_Ks := slow_delayed_rectifier_potassium_current_G_Ks*(1 + 0.6/(1 + (3.8e-5/Cai)^1.4));
  slow_delayed_rectifier_potassium_current_E_Ks := R*T/F*ln((Ko + slow_delayed_rectifier_potassium_current_PNaK*Nao)/(Ki + slow_delayed_rectifier_potassium_current_PNaK*Nai));
  slow_delayed_rectifier_potassium_current_slow_delayed_rectifier_potassium_current_xs1_gate_xs1_infinity := 1/(1 + exp(-(V - 1.5)/16.7));
  slow_delayed_rectifier_potassium_current_slow_delayed_rectifier_potassium_current_xs1_gate_tau_xs1 := 1/(7.19e-5*(V + 30)/(1 - exp(-0.148*(V + 30))) + 0.000131*(V + 30)/(exp(0.0687*(V + 30)) - 1));
  slow_delayed_rectifier_potassium_current_slow_delayed_rectifier_potassium_current_xs2_gate_xs2_infinity := 1/(1 + exp(-(V - 1.5)/16.7));
  slow_delayed_rectifier_potassium_current_slow_delayed_rectifier_potassium_current_xs2_gate_tau_xs2 := 4/(7.19e-5*(V + 30)/(1 - exp(-0.148*(V + 30))) + 0.000131*(V + 30)/(exp(0.0687*(V + 30)) - 1));
  time_independent_potassium_current_g_K1 := time_independent_potassium_current_G_K1*sqrt(Ko/5.4);
  K1_infinity := time_independent_potassium_current_time_independent_potassium_current_K1_gate_alpha_K1/(time_independent_potassium_current_time_independent_potassium_current_K1_gate_alpha_K1 + time_independent_potassium_current_time_independent_potassium_current_K1_gate_beta_K1);
  time_independent_potassium_current_time_independent_potassium_current_K1_gate_alpha_K1 := 1.02/(1 + exp(0.2385*(V - E_K - 59.215)));
  time_independent_potassium_current_time_independent_potassium_current_K1_gate_beta_K1 := 1*(0.49124*exp(0.08032*(V - E_K + 5.476)) + exp(0.06175*(V - E_K - 594.31)))/(1 + exp(-0.5143*(V - E_K + 4.753)));
  plateau_potassium_current_Kp := 1/(1 + exp((7.488 - V)/5.98));
  sodium_activated_potassium_current_pona := 0.85/(1 + (sodium_activated_potassium_current_kdKNa/Nai)^sodium_activated_potassium_current_nKNa);
  sodium_activated_potassium_current_pov := 0.8 - 0.65/(1 + exp((V + 125)/15));
  ATP_sensitive_potassium_current_g_K_ATP := ATP_sensitive_potassium_current_i_K_ATP_on*0.000193/ATP_sensitive_potassium_current_nicholsarea;
  ATP_sensitive_potassium_current_pATP := 1/(1 + (ATP_sensitive_potassium_current_ATPi/ATP_sensitive_potassium_current_kATP)^ATP_sensitive_potassium_current_hATP);
  ATP_sensitive_potassium_current_GKbaraATP := ATP_sensitive_potassium_current_g_K_ATP*ATP_sensitive_potassium_current_pATP*(Ko/4)^ATP_sensitive_potassium_current_nATP;
  transient_outward_current_g_to := 0*0.5;
  transient_outward_current_rvdv := exp(V/100);
  transient_outward_current_transient_outward_current_zdv_gate_alpha_zdv := 10*exp((V - 40)/25)/(1 + exp((V - 40)/25));
  transient_outward_current_transient_outward_current_zdv_gate_beta_zdv := 10*exp(-(V + 90)/25)/(1 + exp(-(V + 90)/25));
  transient_outward_current_transient_outward_current_zdv_gate_tau_zdv := 1/(transient_outward_current_transient_outward_current_zdv_gate_alpha_zdv + transient_outward_current_transient_outward_current_zdv_gate_beta_zdv);
  transient_outward_current_transient_outward_current_zdv_gate_zdv_ss := transient_outward_current_transient_outward_current_zdv_gate_alpha_zdv/(transient_outward_current_transient_outward_current_zdv_gate_alpha_zdv + transient_outward_current_transient_outward_current_zdv_gate_beta_zdv);
  transient_outward_current_transient_outward_current_ydv_gate_alpha_ydv := 0.015/(1 + exp((V + 60)/5));
  transient_outward_current_transient_outward_current_ydv_gate_beta_ydv := 0.1*exp((V + 25)/5)/(1 + exp((V + 25)/5));
  transient_outward_current_transient_outward_current_ydv_gate_tau_ydv := 1/(transient_outward_current_transient_outward_current_ydv_gate_alpha_ydv + transient_outward_current_transient_outward_current_ydv_gate_beta_ydv);
  transient_outward_current_transient_outward_current_ydv_gate_ydv_ss := transient_outward_current_transient_outward_current_ydv_gate_alpha_ydv/(transient_outward_current_transient_outward_current_ydv_gate_alpha_ydv + transient_outward_current_transient_outward_current_ydv_gate_beta_ydv);
  sodium_potassium_pump_f_NaK := 1/(1 + 0.1245*exp(-0.1*V*F/(R*T)) + 0.0365*sodium_potassium_pump_sigma*exp(-V*F/(R*T)));
  sodium_potassium_pump_sigma := 1/7*(exp(Nao/67.3) - 1);
  i_ns_Na := non_specific_calcium_activated_current_I_ns_Na*1/(1 + (non_specific_calcium_activated_current_K_m_ns_Ca/Cai)^3);
  i_ns_K := non_specific_calcium_activated_current_I_ns_K*1/(1 + (non_specific_calcium_activated_current_K_m_ns_Ca/Cai)^3);
  non_specific_calcium_activated_current_P_ns_Ca := 1.75e-7;
  non_specific_calcium_activated_current_I_ns_Na := non_specific_calcium_activated_current_P_ns_Ca*1^2*V*F^2/(R*T)*(gamma_Nai*Nai*exp(1*V*F/(R*T)) - gamma_Nao*Nao)/(exp(1*V*F/(R*T)) - 1);
  non_specific_calcium_activated_current_I_ns_K := non_specific_calcium_activated_current_P_ns_Ca*1^2*V*F^2/(R*T)*(gamma_Ki*Ki*exp(1*V*F/(R*T)) - gamma_Ko*Ko)/(exp(1*V*F/(R*T)) - 1);
  i_rel := calcium_dynamics_G_rel*(Ca_JSR - Cai);
  i_up := calcium_dynamics_I_up*Cai/(Cai + calcium_dynamics_K_mup);
  i_leak := calcium_dynamics_K_leak*Ca_NSR;
  i_tr := (Ca_NSR - Ca_JSR)/calcium_dynamics_tau_tr;
  calcium_dynamics_G_rel := calcium_dynamics_RyRopen*calcium_dynamics_RyRclose*150/(1 + exp((i_CaCa + i_Ca_T - 2*i_NaCa + i_p_Ca + i_Ca_b + 5)/0.9));
  calcium_dynamics_G_rel_Viswanathan := ;
  calcium_dynamics_K_leak := calcium_dynamics_I_up/calcium_dynamics_Ca_NSR_max;
  V_myo := 0.68*geometry_volume;
  V_JSR := 0.0048*geometry_volume;
  V_NSR := 0.0552*geometry_volume;
  calcium_dynamics_RyRopen := 1/(1 + exp(2)*calcium_dynamics_APtrack2);
  calcium_dynamics_RyRclose := 1 - calcium_dynamics_RyRopen;
  geometry_volume := pi*geometry_preplength*geometry_radius^2;

  // Rate rules:
  V' = dVdt;
  Nai' = -1*(i_Na + i_CaNa + i_Na_b + i_ns_Na + i_NaCa*3 + i_NaK*3)*A_cap/(V_myo*F);
  m' = fast_sodium_current_fast_sodium_current_m_gate_alpha_m*(1 - m) - fast_sodium_current_fast_sodium_current_m_gate_beta_m*m;
  h' = fast_sodium_current_fast_sodium_current_h_gate_alpha_h*(1 - h) - fast_sodium_current_fast_sodium_current_h_gate_beta_h*h;
  j' = fast_sodium_current_fast_sodium_current_j_gate_alpha_j*(1 - j) - fast_sodium_current_fast_sodium_current_j_gate_beta_j*j;
  Cai' = 1/(1 + calcium_dynamics_CMDN_max*calcium_dynamics_K_mCMDN/(calcium_dynamics_K_mCMDN + Cai)^2 + calcium_dynamics_Tn_max*calcium_dynamics_K_mTn/(calcium_dynamics_K_mTn + Cai)^2)*(-1*A_cap*(i_CaCa + i_Ca_T - 2*i_NaCa + i_p_Ca + i_Ca_b)/(2*V_myo*F) + i_rel*V_JSR/V_myo + (i_leak - i_up)*V_NSR/V_myo);
  Ki' = -1*(I_st + i_CaK + i_Kr + i_Ks + i_K1 + i_Kp + i_K_Na + i_K_ATP + i_to + i_ns_K + (-i_NaK*2))*A_cap/(V_myo*F);
  d' = L_type_Ca_channel_L_type_Ca_channel_d_gate_alpha_d*(1 - d) - L_type_Ca_channel_L_type_Ca_channel_d_gate_beta_d*d;
  f' = L_type_Ca_channel_L_type_Ca_channel_f_gate_alpha_f*(1 - f) - L_type_Ca_channel_L_type_Ca_channel_f_gate_beta_f*f;
  b' = (T_type_Ca_channel_T_type_Ca_channel_b_gate_b_inf - b)/T_type_Ca_channel_T_type_Ca_channel_b_gate_tau_b;
  g' = (T_type_Ca_channel_T_type_Ca_channel_g_gate_g_inf - g)/T_type_Ca_channel_T_type_Ca_channel_g_gate_tau_g;
  xr' = (rapid_delayed_rectifier_potassium_current_rapid_delayed_rectifier_potassium_current_xr_gate_xr_infinity - xr)/rapid_delayed_rectifier_potassium_current_rapid_delayed_rectifier_potassium_current_xr_gate_tau_xr;
  xs1' = (slow_delayed_rectifier_potassium_current_slow_delayed_rectifier_potassium_current_xs1_gate_xs1_infinity - xs1)/slow_delayed_rectifier_potassium_current_slow_delayed_rectifier_potassium_current_xs1_gate_tau_xs1;
  xs2' = (slow_delayed_rectifier_potassium_current_slow_delayed_rectifier_potassium_current_xs2_gate_xs2_infinity - xs2)/slow_delayed_rectifier_potassium_current_slow_delayed_rectifier_potassium_current_xs2_gate_tau_xs2;
  zdv' = (transient_outward_current_transient_outward_current_zdv_gate_zdv_ss - zdv)/transient_outward_current_transient_outward_current_zdv_gate_tau_zdv;
  ydv' = (transient_outward_current_transient_outward_current_ydv_gate_ydv_ss - ydv)/transient_outward_current_transient_outward_current_ydv_gate_tau_ydv;
  Ca_JSR' = 1/(1 + calcium_dynamics_CSQN_max*calcium_dynamics_K_mCSQN/(calcium_dynamics_K_mCSQN + Ca_JSR)^2)*(i_tr - i_rel);
  Ca_NSR' = -i_tr*V_JSR/V_NSR - i_leak + i_up;
  calcium_dynamics_APtrack' = ;
  calcium_dynamics_APtrack2' = ;
  calcium_dynamics_APtrack3' = ;
  calcium_dynamics_Cainfluxtrack' = ;
  calcium_dynamics_OVRLDtrack' = ;
  calcium_dynamics_OVRLDtrack2' = ;
  calcium_dynamics_OVRLDtrack3' = ;
end
