// SBML level 2 version 4

model farhy_bowers_veldhuis_model_2007_version01____main()
  // Originally created by libAntimony v1.3 (using libSBML 4.1.0-b2)

  // Compartments:
  compartment default_compartment = 1;

  // Parameters:
  GH0 = 0;
  GHS = 20;
  GH_k1 = 3;
  GH_kr1 = 600;
  GH_t1 = 400;
  GH_n1 = 5;
  GH_n2 = 2;
  GH_g0 = 1;
  GH_ng0 = 2.9;
  GH_tg0 = 200;
  GH_t2 = 10;
  SRIF_PeV0 = 0;
  GHRH0 = 0;
  ghr_GHRH0 = 0;
  SRIF_PeV_k4 = 25;
  SRIF_PeV_kr4 = 20400;
  SRIF_PeV_t5 = 10;
  SRIF_PeV_n5 = 2;
  SRIF_PeV_S_basal = 900;
  SRIF_ArC0 = 0;
  SRIF_ArC_k2 = 25;
  SRIF_ArC_kr2 = 2200;
  SRIF_ArC_t3 = 400;
  SRIF_ArC_n3 = 2;
  GHRH_k3 = 40;
  GHRH_kr3 = 63000;
  GHRH_t4 = 28;
  GHRH_n4 = 5;
  F_g1 = 45000;
  F_g2 = 100;
  F_tg1 = 390;
  F_tg2 = 10000;
  F_ng1 = 3;
  F_ng2 = 2;
  ghr_GHRH_kghr = 15;
  ghr_GHRH_C = 10000;
  ghr_GHRH_onset = 2;
  ghr_GHRH_duration = 0.2;
  time_ = ;

  // Assignment rules:
  F1_GHS := F_g1*((GHS/F_tg1)^F_ng1/(1 + (GHS/F_tg1)^F_ng1));
  F2_GHS := F_g2*((GHS/F_tg2)^F_ng2/(1 + (GHS/F_tg2)^F_ng2));
  dghr_GHRH_dt := ghr_GHRH_inject - ghr_GHRH_kghr*ghr_GHRH0;
  ghr_GHRH_inject := ;

  // Rate rules:
  GH0' = GH_kr1*(((GHRH0 + ghr_GHRH0)/GH_t1)^GH_n1/(((GHRH0 + ghr_GHRH0)/GH_t1)^GH_n1 + 1) + GH_g0*((GHS/GH_tg0)^GH_ng0/(1 + (GHS/GH_tg0)^GH_ng0)) + (1 + F1_GHS)/(1 + (SRIF_PeV0/GH_t2)^GH_n2 + F1_GHS)) - GH_k1*GH0;
  SRIF_PeV0' = -(SRIF_PeV_k4*SRIF_PeV0) + SRIF_PeV_kr4*((GH0/SRIF_PeV_t5)^SRIF_PeV_n5/((GH0/SRIF_PeV_t5)^SRIF_PeV_n5 + 1)) + SRIF_PeV_S_basal;
  GHRH0' = GHRH_kr3*((1 + F2_GHS)/(1 + ((SRIF_PeV0 + SRIF_ArC0)/GHRH_t4)^GHRH_n4 + F2_GHS)) + ghr_GHRH0*1 - GHRH_k3*GHRH0;
  ghr_GHRH0' = ghr_GHRH_inject - ghr_GHRH_kghr*ghr_GHRH0;
  SRIF_ArC0' = SRIF_ArC_kr2*(((GHRH0 + ghr_GHRH0)/SRIF_ArC_t3)^SRIF_ArC_n3/(1 + ((GHRH0 + ghr_GHRH0)/SRIF_ArC_t3)^SRIF_ArC_n3)) - SRIF_ArC_k2*SRIF_ArC0;
end
