// SBML level 2 version 4

model fenton_karma_1998_MBR____main()
  // Originally created by libAntimony v1.4 (using libSBML 4.1.0-b2)

  // Compartments:
  compartment default_compartment = 1;

  // Parameters:
  u = 0;
  Cm = 1;
  membrane_V_0 = -85;
  membrane_V_fi = 15;
  u_c = 0.13;
  q_u_v = 0.055;
  fast_inward_current_g_fi_max = 4;
  v = 1;
  fast_inward_current_fast_inward_current_v_gate_tau_v1_minus = 1000;
  fast_inward_current_fast_inward_current_v_gate_tau_v2_minus = 19.2;
  fast_inward_current_fast_inward_current_v_gate_tau_v_plus = 3.33;
  slow_outward_current_tau_0 = 8.3;
  slow_outward_current_tau_r = 50;
  slow_inward_current_tau_si = 44.84;
  slow_inward_current_u_csi = 0.85;
  slow_inward_current_k = 10;
  w = 1;
  slow_inward_current_slow_inward_current_w_gate_tau_w_minus = 11;
  slow_inward_current_slow_inward_current_w_gate_tau_w_plus = 667;
  stimulus_protocol_IstimStart = 10;
  stimulus_protocol_IstimEnd = 50000;
  stimulus_protocol_IstimAmplitude = -0.2;
  stimulus_protocol_IstimPeriod = 1000;
  stimulus_protocol_IstimPulseDuration = 1;
  time_ = ;

  // Assignment rules:
  membrane_Vm := membrane_V_0 + u*(membrane_V_fi - membrane_V_0);
  J_fi := -v*p0*(1 - u)*(u - u_c)/fast_inward_current_tau_d;
  J_so := u*(1 - p0)/slow_outward_current_tau_0 + p0/slow_outward_current_tau_r;
  J_si := -w*(1 + tanh(slow_inward_current_k*(u - slow_inward_current_u_csi)))/(2*slow_inward_current_tau_si);
  Istim := ;
  p0 := ;
  q0 := ;
  fast_inward_current_tau_d := Cm/fast_inward_current_g_fi_max;
  fast_inward_current_fast_inward_current_v_gate_tau_v_minus := q0*fast_inward_current_fast_inward_current_v_gate_tau_v1_minus + (1 - q0)*fast_inward_current_fast_inward_current_v_gate_tau_v2_minus;

  // Rate rules:
  u' = -(J_fi + J_so + J_si + Istim);
  v' = (1 - p0)*(1 - v)/fast_inward_current_fast_inward_current_v_gate_tau_v_minus - p0*v/fast_inward_current_fast_inward_current_v_gate_tau_v_plus;
  w' = (1 - p0)*(1 - w)/slow_inward_current_slow_inward_current_w_gate_tau_w_minus - p0*w/slow_inward_current_slow_inward_current_w_gate_tau_w_plus;
end
