// SBML level 2 version 4

model fink_noble_giles_model_2008____main()
  // Originally created by libAntimony v1.3 (using libSBML 4.1.0-b2)

  // Compartments:
  compartment default_compartment = 1;

  // Parameters:
  R = 8314.472;
  T = 310;
  F = 96485.3415;
  K_o = 5.4;
  Ca_o = 2;
  Na_o = 140;
  V = -86.45;
  Cm = 0.115;
  Vol_c = 0.016404;
  cell_stim_Period = 1000;
  reversal_potentials_P_kna = 0.03;
  K_i = 141.0167;
  Na_i = 7.940167;
  Ca_i = 0.0001092;
  IK1_g_K1_0 = 0.6821;
  IK1_iK1_rectification_Mg_Buf = 0.0356;
  IK1_iK1_rectification_SPM = 0.0014613;
  IK1_iK1_rectification_fac = 1.0648;
  IK1_iK1_rectification_phi = 0.8838;
  IKr_g_Kr_0 = 0.024;
  Or4 = 0.014;
  IKr_iKr_Markov_Cr1 = 0.9786;
  IKr_iKr_Markov_Cr2 = 0.0031;
  IKr_iKr_Markov_Cr3 = 0.0029;
  IKr_iKr_Markov_Ir5 = 0.0014;
  IKr_iKr_Markov_T_Base = 310;
  IKr_iKr_Markov_iKr_Markov_Sotalol_block_Sotalol_mM = 0;
  IKr_iKr_Markov_iKr_Markov_Sotalol_block_BCr1 = 0;
  IKr_iKr_Markov_iKr_Markov_Sotalol_block_BCr2 = 0;
  IKr_iKr_Markov_iKr_Markov_Sotalol_block_BCr3 = 0;
  IKr_iKr_Markov_iKr_Markov_Sotalol_block_BOr4 = 0;
  IKr_iKr_Markov_iKr_Markov_Sotalol_block_BIr5 = 0;
  IKr_iKr_Markov_iKr_Markov_Sotalol_block_kBinding = 0.005;
  IKr_iKr_Markov_iKr_Markov_Sotalol_block_kDiss = 0.00125;
  IKs_g_Ks = 0.0392;
  Xs = 0.00303;
  Ito_g_to = 0.2;
  s = 1;
  r = 2.11e-8;
  INa_g_Na = 11;
  shift_INa_inact = 0;
  m = 0.00132;
  h = 0.7768;
  j = 0.7766;
  INab_g_bna = 0.00029;
  ICaL_g_CaL = 2e-5;
  Ca_ss = 0.0001893;
  d = 5.06e-6;
  f = 0.9999;
  f2 = 0.9995;
  fCass = 1;
  ICaL_z = 2;
  ICaL_iCaL_d_gate_d_inf_shift = 5;
  ICab_g_bca = 0.0004736;
  IpCa_g_pCa = 0.0619;
  IpCa_K_pCa = 0.0005;
  IpK_g_pK = 0.00973;
  INaK_P_NaK = 1.297;
  INaK_K_mk = 1;
  INaK_K_mNa = 40;
  INaCa_K_NaCa = 200;
  INaCa_K_sat = 0.1;
  INaCa_alpha = 2.5;
  INaCa_gamma = 0.35;
  INaCa_Km_Ca = 1.38;
  INaCa_Km_Nai = 87.5;
  Ca_SR = 2.7656;
  Ca_V_sr = 0.001094;
  Ca_V_ss = 5.468e-5;
  Ca_Irel_R_prime = 0.9864;
  Ca_Irel_k1_prime = 0.15;
  Ca_Irel_k2_prime = 0.045;
  Ca_Irel_EC = 1.5;
  Ca_Irel_max_sr = 2.5;
  Ca_Irel_min_sr = 1;
  Ca_Irel_k3 = 0.06;
  Ca_Irel_k4 = 0.005;
  Ca_Irel_Vol_rel = 0.306;
  Ca_Ca_buffer_Buf_c = 0.2;
  Ca_Ca_buffer_K_buf_c = 0.001;
  Ca_Ca_buffer_Buf_sr = 10;
  Ca_Ca_buffer_K_buf_sr = 0.3;
  Ca_Ca_buffer_Buf_ss = 0.4;
  Ca_Ca_buffer_K_buf_ss = 0.00025;
  Ca_Ileak_Iup_Ixfer_Vol_xfer = 0.0038;
  Ca_Ileak_Iup_Ixfer_K_up = 0.00025;
  Ca_Ileak_Iup_Ixfer_Vol_leak = 0.00036;
  Ca_Ileak_Iup_Ixfer_Vmax_up = 0.006375;
  time_ = ;

  // Assignment rules:
  i_K1 := IK1_g_K1_0*(T/35 - 55/7)*sqrt(K_o/5.4)*xK1_inf*(V - E_K);
  i_to := Ito_g_to*r*s*(V - E_K);
  i_Kr := IKr_g_Kr_0*(T/35 - 55/7)*sqrt(K_o/5.4)*Or4*(V - E_K);
  i_Ks := IKs_g_Ks*Xs^2*(V - E_Ks);
  i_CaL := ICaL_g_CaL*d*f*f2*fCass*ICaL_z^2*(V - 15)*F^2/(R*T)*(0.25*Ca_ss*exp(2*(V - 15)*F/(R*T)) - Ca_o)/(exp(2*(V - 15)*F/(R*T)) - 1);
  i_NaK := INaK_P_NaK*K_o/(K_o + INaK_K_mk)*Na_i/(Na_i + INaK_K_mNa)/(1 + 0.1245*exp(-0.1*V*F/(R*T)) + 0.0353*exp(-V*F/(R*T)));
  i_Na := INa_g_Na*m^3*h*j*(V - E_Na);
  i_b_Na := INab_g_bna*(V - E_Na);
  i_NaCa := INaCa_K_NaCa*(exp(INaCa_gamma*V*F/(R*T))*Na_i^3*Ca_o - exp((INaCa_gamma - 1)*V*F/(R*T))*Na_o^3*Ca_i*INaCa_alpha)/((INaCa_Km_Nai^3 + Na_o^3)*(INaCa_Km_Ca + Ca_o)*(1 + INaCa_K_sat*exp((INaCa_gamma - 1)*V*F/(R*T))));
  i_b_Ca := ICab_g_bca*(V - E_Ca);
  i_p_K := IpK_g_pK*(V - E_K)/(1 + exp((25 - V)/5.98));
  i_p_Ca := IpCa_g_pCa*Ca_i/(Ca_i + IpCa_K_pCa);
  i_Stim := ;
  cell_i_tot := i_K1 + i_to + i_Kr + i_Ks + i_CaL + i_NaK + i_Na + i_b_Na + i_NaCa + i_b_Ca + i_p_K + i_p_Ca + i_Stim;
  E_Na := R*T/F*ln(Na_o/Na_i);
  E_K := R*T/F*ln(K_o/K_i);
  E_Ks := R*T/F*ln((K_o + reversal_potentials_P_kna*Na_o)/(K_i + reversal_potentials_P_kna*Na_i));
  E_Ca := 0.5*R*T/F*ln(Ca_o/Ca_i);
  xK1_inf := IK1_iK1_rectification_phi*IK1_iK1_rectification_rec1 + (1 - IK1_iK1_rectification_phi)*IK1_iK1_rectification_rec2;
  IK1_iK1_rectification_temp := 1 + IK1_iK1_rectification_Mg_Buf/IK1_iK1_rectification_KbMg;
  IK1_iK1_rectification_rec1 := IK1_iK1_rectification_temp*IK1_iK1_rectification_temp/(IK1_iK1_rectification_SPM/IK1_iK1_rectification_Kd1SPM + IK1_iK1_rectification_Mg_Buf/IK1_iK1_rectification_KiMg + IK1_iK1_rectification_temp*IK1_iK1_rectification_temp*IK1_iK1_rectification_temp);
  IK1_iK1_rectification_rec2 := 1/(1 + IK1_iK1_rectification_SPM/IK1_iK1_rectification_Kd2SPM);
  IK1_iK1_rectification_KiMg := 2.8*exp(-(V - IK1_iK1_rectification_fac*E_K)/180);
  IK1_iK1_rectification_KbMg := 0.45*exp(-(V - IK1_iK1_rectification_fac*E_K)/20);
  IK1_iK1_rectification_Kd1SPM := 0.7e-3*exp(-(V - IK1_iK1_rectification_fac*E_K + 8*IK1_iK1_rectification_Mg_Buf)/4.8);
  IK1_iK1_rectification_Kd2SPM := 40e-3*exp(-(V - IK1_iK1_rectification_fac*E_K)/9.1);
  IKr_alpha_xr1 := 1*T/IKr_iKr_Markov_T_Base*exp(24.335 + IKr_iKr_Markov_T_Base/T*(0.0112*V - 25.914));
  IKr_beta_xr1 := 1*T/IKr_iKr_Markov_T_Base*exp(13.688 + IKr_iKr_Markov_T_Base/T*(-0.0603*V - 15.707));
  IKr_alpha_xr2 := 1*T/IKr_iKr_Markov_T_Base*exp(22.746 + IKr_iKr_Markov_T_Base/T*(0*V - 25.914));
  IKr_beta_xr2 := 1*T/IKr_iKr_Markov_T_Base*exp(13.193 + IKr_iKr_Markov_T_Base/T*(0*V - 15.707));
  IKr_alpha_xr3 := 1*T/IKr_iKr_Markov_T_Base*exp(22.098 + IKr_iKr_Markov_T_Base/T*(0.0365*V - 25.914));
  IKr_beta_xr3 := 1*T/IKr_iKr_Markov_T_Base*exp(7.313 + IKr_iKr_Markov_T_Base/T*(-0.0399*V - 15.707));
  IKr_alpha_xr4 := 1*T/IKr_iKr_Markov_T_Base*exp(30.016 + IKr_iKr_Markov_T_Base/T*(0.0223*V - 30.888))*(5.4/K_o)^0.4;
  IKr_beta_xr4 := 1*T/IKr_iKr_Markov_T_Base*exp(30.061 + IKr_iKr_Markov_T_Base/T*(-0.0312*V - 33.243));
  IKr_OtoB := Or4*IKr_iKr_Markov_iKr_Markov_Sotalol_block_Sotalol_mM*IKr_iKr_Markov_iKr_Markov_Sotalol_block_kBinding;
  IKr_BtoO := IKr_iKr_Markov_iKr_Markov_Sotalol_block_BOr4*IKr_iKr_Markov_iKr_Markov_Sotalol_block_kDiss;
  IKs_iKs_Xs_gate_xs_inf := 1/(1 + exp((-5 - V)/14));
  IKs_iKs_Xs_gate_alpha_xs := 1400/sqrt(1 + exp((5 - V)/6));
  IKs_iKs_Xs_gate_beta_xs := 1/(1 + exp((V - 35)/15));
  IKs_iKs_Xs_gate_tau_xs := 1*IKs_iKs_Xs_gate_alpha_xs*IKs_iKs_Xs_gate_beta_xs + 80;
  Ito_ito_s_gate_s_inf := 1/(1 + exp((V + 20)/5));
  Ito_ito_s_gate_tau_s := 85*exp(-(V + 45)^2/320) + 5/(1 + exp((V - 20)/5)) + 3;
  Ito_ito_r_gate_r_inf := 1/(1 + exp((20 - V)/6));
  Ito_ito_r_gate_tau_r := 9.5*exp(-(V + 40)^2/1800) + 0.8;
  INa_iNa_m_gate_m_inf := 1/(1 + exp((-56.86 - V)/9.03))^2;
  INa_iNa_m_gate_alpha_m := 1/(1 + exp((-60 - V)/5));
  INa_iNa_m_gate_beta_m := 0.1/(1 + exp((V + 35)/5)) + 0.1/(1 + exp((V - 50)/200));
  INa_iNa_m_gate_tau_m := 1*INa_iNa_m_gate_alpha_m*INa_iNa_m_gate_beta_m;
  INa_iNa_h_gate_h_inf := 1/(1 + exp((V + 71.55 - shift_INa_inact)/7.43))^2;
  INa_iNa_h_gate_alpha_h := ;
  INa_iNa_h_gate_beta_h := ;
  INa_iNa_h_gate_tau_h := 1/(INa_iNa_h_gate_alpha_h + INa_iNa_h_gate_beta_h);
  INa_iNa_j_gate_j_inf := 1/(1 + exp((V + 71.55 - shift_INa_inact)/7.43))^2;
  INa_iNa_j_gate_alpha_j := ;
  INa_iNa_j_gate_beta_j := ;
  INa_iNa_j_gate_tau_j := 1/(INa_iNa_j_gate_alpha_j + INa_iNa_j_gate_beta_j);
  ICaL_iCaL_d_gate_d_inf := 1/(1 + exp((ICaL_iCaL_d_gate_d_inf_shift - V)/7.5));
  ICaL_iCaL_d_gate_alpha_d := 1.4/(1 + exp((-35 - V)/13)) + 0.25;
  ICaL_iCaL_d_gate_beta_d := 1.4/(1 + exp((V + 5)/5));
  ICaL_iCaL_d_gate_gamma_d := 1/(1 + exp((50 - V)/20));
  ICaL_iCaL_d_gate_tau_d := 1*ICaL_iCaL_d_gate_alpha_d*ICaL_iCaL_d_gate_beta_d + ICaL_iCaL_d_gate_gamma_d;
  ICaL_iCaL_f_gate_f_inf := 1/(1 + exp((V + 20)/7));
  ICaL_iCaL_f_gate_tau_f := (1102.5*exp(-(V + 27)^2/225) + 200/(1 + exp((13 - V)/10)) + 180/(1 + exp((V + 30)/10)) + 20)/4;
  ICaL_iCaL_f2_gate_f2_inf := 0.75/(1 + exp((V + 35)/7)) + 0.25;
  ICaL_iCaL_f2_gate_tau_f2 := (562*exp(-(V + 27)^2/240) + 31/(1 + exp((25 - V)/10)) + 80/(1 + exp((V + 30)/10)))/2;
  ICaL_iCaL_fCass_gate_fCass_inf := 0.4/(1 + (Ca_ss/0.05)^2) + 0.6;
  ICaL_iCaL_fCass_gate_tau_fCass := 80/(1 + (Ca_ss/0.05)^2) + 2;
  Ca_i_bufc := 1/(1 + Ca_Ca_buffer_Buf_c*Ca_Ca_buffer_K_buf_c/(Ca_i + Ca_Ca_buffer_K_buf_c)^2);
  Ca_sr_bufsr := 1/(1 + Ca_Ca_buffer_Buf_sr*Ca_Ca_buffer_K_buf_sr/(Ca_SR + Ca_Ca_buffer_K_buf_sr)^2);
  Ca_ss_bufss := 1/(1 + Ca_Ca_buffer_Buf_ss*Ca_Ca_buffer_K_buf_ss/(Ca_ss + Ca_Ca_buffer_K_buf_ss)^2);
  i_rel := Ca_Irel_Vol_rel*Ca_Irel_O*(Ca_SR - Ca_ss);
  i_up := Ca_Ileak_Iup_Ixfer_Vmax_up/(1 + Ca_Ileak_Iup_Ixfer_K_up^2/Ca_i^2);
  i_leak := Ca_Ileak_Iup_Ixfer_Vol_leak*(Ca_SR - Ca_i);
  i_xfer := Ca_Ileak_Iup_Ixfer_Vol_xfer*(Ca_ss - Ca_i);
  Ca_Irel_O := Ca_Irel_k1*Ca_ss^2*Ca_Irel_R_prime/(Ca_Irel_k3 + Ca_Irel_k1*Ca_ss^2);
  Ca_Irel_kcasr := Ca_Irel_max_sr - (Ca_Irel_max_sr - Ca_Irel_min_sr)/(1 + (Ca_Irel_EC/Ca_SR)^2);
  Ca_Irel_k1 := Ca_Irel_k1_prime/Ca_Irel_kcasr;
  Ca_Irel_k2 := Ca_Irel_k2_prime*Ca_Irel_kcasr;

  // Rate rules:
  V' = -cell_i_tot;
  K_i' = -(i_K1 + i_to + i_Kr + i_Ks + i_p_K + i_Stim - 2*i_NaK)/(Vol_c*F)*Cm;
  Na_i' = -(i_Na + i_b_Na + 3*i_NaK + 3*i_NaCa)*Cm/(Vol_c*F);
  Ca_i' = Ca_i_bufc*((i_leak - i_up)*Ca_V_sr/Vol_c + i_xfer - (i_b_Ca + i_p_Ca - 2*i_NaCa)*Cm/(2*Vol_c*F));
  Or4' = IKr_alpha_xr3*IKr_iKr_Markov_Cr3 + IKr_beta_xr4*IKr_iKr_Markov_Ir5 - (IKr_alpha_xr4 + IKr_beta_xr3)*Or4 - IKr_OtoB + IKr_BtoO;
  IKr_iKr_Markov_Cr1' = IKr_beta_xr1*IKr_iKr_Markov_Cr2 - IKr_alpha_xr1*IKr_iKr_Markov_Cr1;
  IKr_iKr_Markov_Cr2' = IKr_alpha_xr1*IKr_iKr_Markov_Cr1 + IKr_beta_xr2*IKr_iKr_Markov_Cr3 - (IKr_alpha_xr2 + IKr_beta_xr1)*IKr_iKr_Markov_Cr2;
  IKr_iKr_Markov_Cr3' = IKr_alpha_xr2*IKr_iKr_Markov_Cr2 + IKr_beta_xr3*Or4 - (IKr_alpha_xr3 + IKr_beta_xr2)*IKr_iKr_Markov_Cr3;
  IKr_iKr_Markov_Ir5' = IKr_alpha_xr4*Or4 - IKr_beta_xr4*IKr_iKr_Markov_Ir5;
  IKr_iKr_Markov_iKr_Markov_Sotalol_block_BCr1' = IKr_beta_xr1*IKr_iKr_Markov_iKr_Markov_Sotalol_block_BCr2 - IKr_alpha_xr1*IKr_iKr_Markov_iKr_Markov_Sotalol_block_BCr1;
  IKr_iKr_Markov_iKr_Markov_Sotalol_block_BCr2' = IKr_alpha_xr1*IKr_iKr_Markov_iKr_Markov_Sotalol_block_BCr1 + IKr_beta_xr2*IKr_iKr_Markov_iKr_Markov_Sotalol_block_BCr3 - (IKr_alpha_xr2 + IKr_beta_xr1)*IKr_iKr_Markov_iKr_Markov_Sotalol_block_BCr2;
  IKr_iKr_Markov_iKr_Markov_Sotalol_block_BCr3' = IKr_alpha_xr2*IKr_iKr_Markov_iKr_Markov_Sotalol_block_BCr2 + IKr_beta_xr3*IKr_iKr_Markov_iKr_Markov_Sotalol_block_BOr4 - (IKr_alpha_xr3 + IKr_beta_xr2)*IKr_iKr_Markov_iKr_Markov_Sotalol_block_BCr3;
  IKr_iKr_Markov_iKr_Markov_Sotalol_block_BOr4' = IKr_alpha_xr3*IKr_iKr_Markov_iKr_Markov_Sotalol_block_BCr3 + IKr_beta_xr4*IKr_iKr_Markov_iKr_Markov_Sotalol_block_BIr5 - (IKr_alpha_xr4 + IKr_beta_xr3)*IKr_iKr_Markov_iKr_Markov_Sotalol_block_BOr4 + IKr_OtoB - IKr_BtoO;
  IKr_iKr_Markov_iKr_Markov_Sotalol_block_BIr5' = IKr_alpha_xr4*IKr_iKr_Markov_iKr_Markov_Sotalol_block_BOr4 - IKr_beta_xr4*IKr_iKr_Markov_iKr_Markov_Sotalol_block_BIr5;
  Xs' = (IKs_iKs_Xs_gate_xs_inf - Xs)/IKs_iKs_Xs_gate_tau_xs;
  s' = (Ito_ito_s_gate_s_inf - s)/Ito_ito_s_gate_tau_s;
  r' = (Ito_ito_r_gate_r_inf - r)/Ito_ito_r_gate_tau_r;
  m' = (INa_iNa_m_gate_m_inf - m)/INa_iNa_m_gate_tau_m;
  h' = (INa_iNa_h_gate_h_inf - h)/INa_iNa_h_gate_tau_h;
  j' = (INa_iNa_j_gate_j_inf - j)/INa_iNa_j_gate_tau_j;
  Ca_ss' = Ca_ss_bufss*(-i_CaL*Cm/(2*Ca_V_ss*F) + i_rel*Ca_V_sr/Ca_V_ss - i_xfer*Vol_c/Ca_V_ss);
  d' = (ICaL_iCaL_d_gate_d_inf - d)/ICaL_iCaL_d_gate_tau_d;
  f' = (ICaL_iCaL_f_gate_f_inf - f)/ICaL_iCaL_f_gate_tau_f;
  f2' = (ICaL_iCaL_f2_gate_f2_inf - f2)/ICaL_iCaL_f2_gate_tau_f2;
  fCass' = (ICaL_iCaL_fCass_gate_fCass_inf - fCass)/ICaL_iCaL_fCass_gate_tau_fCass;
  Ca_SR' = Ca_sr_bufsr*(i_up - (i_rel + i_leak));
  Ca_Irel_R_prime' = -Ca_Irel_k2*Ca_ss*Ca_Irel_R_prime + Ca_Irel_k4*(1 - Ca_Irel_R_prime);
end
