// SBML level 2 version 4

model fink_slepchenko_loew_1999_version01____main()
  // Originally created by libAntimony v1.3 (using libSBML 4.1.0-b2)

  // Compartments:
  compartment default_compartment = 1;

  // Parameters:
  Ca = 0.05;
  Ca_ER = 400;
  Channel_kinetics_J_max = 2880;
  Channel_kinetics_h = 0.667;
  Channel_kinetics_K_act = 0.17;
  Channel_kinetics_K_I = 0.03;
  Channel_kinetics_K_inh = 0.1;
  Channel_kinetics_k_on = 8;
  Channel_kinetics_I = 0.01;
  SERCA_pump_kinetics_V_max = 5.85;
  SERCA_pump_kinetics_K_p = 0.24;
  Calcium_buffering_B_end = 12;
  Calcium_buffering_B_ex = 11.35;
  Calcium_buffering_K_end = 0.3;
  Calcium_buffering_K_ex = 0.26;
  Leak_L = 0.0804;
  time_ = ;
  Calcium_buffering_Ca_ex = ;

  // Assignment rules:
  J_channel := Channel_kinetics_J_max*(Channel_kinetics_I/(Channel_kinetics_I + Channel_kinetics_K_I)*(Ca/(Ca + Channel_kinetics_K_act))*Channel_kinetics_h)^3*(1 - Ca/Ca_ER);
  J_pump := SERCA_pump_kinetics_V_max*(Ca^2/(Ca^2 + SERCA_pump_kinetics_K_p^2));
  J_leak := Leak_L*(1 - Ca/Ca_ER);
  beta := (1 + Calcium_buffering_B_end/Calcium_buffering_K_end + Calcium_buffering_B_ex*Calcium_buffering_K_ex/(Calcium_buffering_Ca_ex + Calcium_buffering_K_ex)^2)^(-1);

  // Rate rules:
  Ca' = beta*(J_channel - J_pump + J_leak);
  Channel_kinetics_h' = Channel_kinetics_k_on*(Channel_kinetics_K_inh - Channel_kinetics_h*(Ca + Channel_kinetics_K_inh));
end
