// SBML level 2 version 4

model flynn_green_pedley_boxer_dearling_watson_boden_begent_2002_version01____main()
  // Originally created by libAntimony v1.4 (using libSBML 4.1.0-b2)

  // Compartments:
  compartment default_compartment = 1;

  // Parameters:
  B0 = 0.4;
  V0 = ;
  H0 = ;
  antibody_dose_rate_K = 1.6e-6;
  time_ = ;
  B_lamda_Bo = ;
  lamda_Vi = ;
  V_lamda_Vo = ;
  lamda_Ho = ;
  H_lamda_Hi = ;
  antibody_dose_rate_n_beta = ;
  antibody_dose_rate_Eav = ;
  antibody_dose_rate_phi = ;
  antibody_dose_rate_A0 = ;
  antibody_dose_rate_VV = ;
  antibody_dose_rate_VH = ;
  antibody_dose_rate_HV = ;
  antibody_dose_rate_HH = ;
  S_RE = ;
  S_D = ;
  alpha = ;
  total_probability = ;
  probability_of_typeB_damage = ;
  probability_of_typeA_damage = ;
  response_models_P = ;
  response_models_R = ;
  response_models_T = ;
  response_models_mu = ;

  // Assignment rules:
  RV := antibody_dose_rate_A0*antibody_dose_rate_Eav*antibody_dose_rate_n_beta*antibody_dose_rate_K*(V0*antibody_dose_rate_phi*antibody_dose_rate_VV + H0*antibody_dose_rate_phi*antibody_dose_rate_VH);
  RH := antibody_dose_rate_A0*antibody_dose_rate_Eav*antibody_dose_rate_n_beta*antibody_dose_rate_K*(V0*antibody_dose_rate_phi*antibody_dose_rate_HV + H0*antibody_dose_rate_phi*antibody_dose_rate_HH);
  S0 := exp(-(alpha*S_D)*S_RE);

  // Rate rules:
  B0' = -(B_lamda_Bo + lamda_Vi)*B0;
  V0' = lamda_Vi*B0 - (V_lamda_Vo + lamda_Ho)*V0;
  H0' = -(H_lamda_Hi*V0) + lamda_Ho*H0;
end
