// SBML level 2 version 4

model fohlmeister_miller_1997_version01____main()
  // Originally created by libAntimony v1.4 (using libSBML 4.1.0-b2)

  // Compartments:
  compartment default_compartment = 1;

  // Parameters:
  V = ;
  membrane_Cm = 1;
  sodium_channel_E_Na = 35;
  sodium_channel_g_Na = 50;
  m = ;
  h = ;
  calcium_channel_g_Ca = 2.2;
  calcium_channel_R = 8314;
  calcium_channel_T = -4.72;
  F = 96487;
  Ca_i = 1e-7;
  c = ;
  delayed_rectifier_potassium_channel_g_K = 12;
  E_K = -75;
  n = ;
  A_type_potassium_channel_g_K_A = 36;
  a = ;
  h0 = ;
  calcium_activated_potassium_channel_g_K_Ca = 0.05;
  Ca_diss = 1e-6;
  leakage_channel_g_L = 0.05;
  leakage_channel_E_L = -60;
  parameters_Ca_res = 1e-7;
  parameters_tau_Ca = 1.5;
  time_ = ;
  Ca_e = ;
  parameters_r = ;

  // Assignment rules:
  i_Na := sodium_channel_g_Na*m^3*h*(V - sodium_channel_E_Na);
  i_Ca := calcium_channel_g_Ca*c^3*(V - calcium_channel_E_Ca);
  i_K := delayed_rectifier_potassium_channel_g_K*n^4*(V - E_K);
  i_K_A := A_type_potassium_channel_g_K_A*a^3*h0*(V - E_K);
  i_K_Ca := calcium_activated_potassium_channel_g_K_Ca*(V - E_K);
  i_L := leakage_channel_g_L*(V - leakage_channel_E_L);
  sodium_channel_sodium_channel_m_gate_alpha_m := -0.6*(V + 30)/(exp(-0.1*(V + 30)) - 1);
  sodium_channel_sodium_channel_m_gate_beta_m := 20*exp(-(V + 55)/18);
  sodium_channel_sodium_channel_h_gate_alpha_h := 0.4*exp(-(V + 50)/20);
  sodium_channel_sodium_channel_h_gate_beta_h := 6/(exp(-0.1*(V + 20)) + 1);
  calcium_channel_E_Ca := calcium_channel_R*calcium_channel_T/(2*F)*ln(Ca_e/Ca_i);
  calcium_channel_calcium_channel_c_gate_alpha_c := -0.3*(V + 13)/(exp(-0.1*(V + 13)) - 1);
  calcium_channel_calcium_channel_c_gate_beta_c := 10*exp(-(V + 38)/18);
  delayed_rectifier_potassium_channel_delayed_rectifier_potassium_channel_n_gate_alpha_n := -0.02*(V + 40)/(exp(-0.1*(V + 40)) - 1);
  delayed_rectifier_potassium_channel_delayed_rectifier_potassium_channel_n_gate_beta_n := 0.4*exp(-(V + 50)/80);
  A_type_potassium_channel_A_type_potassium_channel_a_gate_alpha_a := -0.006*(V + 90)/(exp(-0.1*(V + 90)) - 1);
  A_type_potassium_channel_A_type_potassium_channel_a_gate_beta_a := 0.1*exp(-(V + 30)/10);
  A_type_potassium_channel_A_type_potassium_channel_h_gate_alpha_h := 0.04*exp(-(V + 70)/20);
  A_type_potassium_channel_A_type_potassium_channel_h_gate_beta_h := 0.6/(exp(-0.1*(V + 40)) + 1);
  calcium_activated_potassium_channel_g_K_Ca_gate := calcium_activated_potassium_channel_g_K_Ca*((Ca_i/Ca_diss)^2/(1 + (Ca_i/Ca_diss)^2));

  // Rate rules:
  V' = -(1/membrane_Cm)*(i_Na + i_Ca + i_K + i_K_A + i_K_Ca + i_L);
  m' = sodium_channel_sodium_channel_m_gate_alpha_m*(1 - m) - sodium_channel_sodium_channel_m_gate_beta_m*m;
  h' = sodium_channel_sodium_channel_h_gate_alpha_h*(1 - h) - sodium_channel_sodium_channel_h_gate_beta_h*h;
  Ca_i' = -3*i_Ca/(2*F*parameters_r) - (Ca_i - parameters_Ca_res)/parameters_tau_Ca;
  c' = calcium_channel_calcium_channel_c_gate_alpha_c*(1 - c) - calcium_channel_calcium_channel_c_gate_beta_c*c;
  n' = delayed_rectifier_potassium_channel_delayed_rectifier_potassium_channel_n_gate_alpha_n*(1 - n) - delayed_rectifier_potassium_channel_delayed_rectifier_potassium_channel_n_gate_beta_n*n;
  a' = A_type_potassium_channel_A_type_potassium_channel_a_gate_alpha_a*(1 - a) - A_type_potassium_channel_A_type_potassium_channel_a_gate_beta_a*a;
  h0' = A_type_potassium_channel_A_type_potassium_channel_h_gate_alpha_h*(1 - h0) - A_type_potassium_channel_A_type_potassium_channel_h_gate_beta_h*h0;
end
