// SBML level 2 version 4

model fox_model_2001____main()
  // Originally created by libAntimony v1.3 (using libSBML 4.1.0-b2)

  // Compartments:
  compartment default_compartment = 1;

  // Parameters:
  V = -94.7;
  R = 8.314;
  T = 310;
  F = 96.5;
  membrane_stim_start = 50;
  membrane_stim_end = 9000;
  membrane_stim_period = 1000;
  membrane_stim_duration = 1;
  membrane_stim_amplitude = -80;
  fast_sodium_current_g_Na = 12.8;
  Na_o = 138;
  Na_i = 10;
  m = 0.00024676;
  h = 0.99869;
  j = 0.99887;
  time_independent_potassium_current_g_K1 = 2.8;
  time_independent_potassium_current_K_mK1 = 13;
  K_o = 4;
  rapid_activating_delayed_rectifiyer_K_current_g_Kr = 0.0136;
  K_i = 149.4;
  X_kr = 0.229;
  slow_activating_delayed_rectifiyer_K_current_g_Ks = 0.0245;
  X_ks = 0.0001;
  transient_outward_potassium_current_g_to = 0.23815;
  X_to = 3.742e-5;
  Y_to = 1;
  plateau_potassium_current_g_Kp = 0.002216;
  sodium_potassium_pump_i_NaK_max = 0.693;
  sodium_potassium_pump_K_mNai = 10;
  sodium_potassium_pump_K_mKo = 1.5;
  Na_Ca_exchanger_K_mCa = 1380;
  Na_Ca_exchanger_K_mNa = 87.5;
  Na_Ca_exchanger_K_NaCa = 1500;
  Na_Ca_exchanger_K_sat = 0.2;
  Na_Ca_exchanger_eta = 0.35;
  Ca_i = 0.0472;
  Ca_o = 2000;
  sarcolemmal_calcium_pump_K_mpCa = 0.05;
  sarcolemmal_calcium_pump_i_pCa_max = 0.05;
  calcium_background_current_g_Cab = 0.0003842;
  sodium_background_current_g_Nab = 0.0031;
  L_type_Ca_current_P_Ca = 2.26e-5;
  L_type_Ca_current_P_CaK = 5.79e-7;
  L_type_Ca_current_i_Ca_half = -0.265;
  C_sc = 1;
  f = 0.983;
  d = 0.0001;
  f_Ca = 0.942;
  L_type_Ca_current_L_type_Ca_current_f_Ca_gate_K_mfCa = 0.18;
  calcium_dynamics_K_mCMDN = 2;
  calcium_dynamics_CMDN_tot = 10;
  calcium_dynamics_V_myo = 2.584e-5;
  calcium_dynamics_A_Cap = 0.0001534;
  calcium_dynamics_Ca_SR = 320;
  calcium_dynamics_P_rel = 6;
  calcium_dynamics_P_leak = 1e-6;
  calcium_dynamics_K_mCSQN = 600;
  calcium_dynamics_CSQN_tot = 10000;
  calcium_dynamics_V_SR = 2e-6;
  calcium_dynamics_V_up = 0.1;
  calcium_dynamics_K_mup = 0.32;
  time_ = ;

  // Assignment rules:
  i_Na := fast_sodium_current_g_Na*m^3*h*j*(V - E_Na);
  i_Ca := L_type_Ca_current_i_Ca_max*f*d*f_Ca;
  i_CaK := L_type_Ca_current_P_CaK/C_sc*f*d*f_Ca/(1 + L_type_Ca_current_i_Ca_max/L_type_Ca_current_i_Ca_half)*1000*V*F^2/(R*T)*(K_i*exp(V*F/(R*T)) - K_o)/(exp(V*F/(R*T)) - 1);
  i_Kr := rapid_activating_delayed_rectifiyer_K_current_g_Kr*rapid_activating_delayed_rectifiyer_K_current_R_V*X_kr*sqrt(K_o/4)*(V - E_K);
  i_Ks := slow_activating_delayed_rectifiyer_K_current_g_Ks*X_ks^2*(V - slow_activating_delayed_rectifiyer_K_current_E_Ks);
  i_to := transient_outward_potassium_current_g_to*X_to*Y_to*(V - E_K);
  i_K1 := time_independent_potassium_current_g_K1*K1_infinity*K_o/(K_o + time_independent_potassium_current_K_mK1)*(V - E_K);
  i_Kp := plateau_potassium_current_g_Kp*Kp_V*(V - E_K);
  i_NaCa := Na_Ca_exchanger_K_NaCa/((Na_Ca_exchanger_K_mNa^3 + Na_o^3)*(Na_Ca_exchanger_K_mCa + Ca_o)*(1 + Na_Ca_exchanger_K_sat*exp((Na_Ca_exchanger_eta - 1)*V*F/(R*T))))*(exp(Na_Ca_exchanger_eta*V*F/(R*T))*Na_i^3*Ca_o - exp((Na_Ca_exchanger_eta - 1)*V*F/(R*T))*Na_o^3*Ca_i);
  i_NaK := sodium_potassium_pump_i_NaK_max*sodium_potassium_pump_f_NaK/(1 + (sodium_potassium_pump_K_mNai/Na_i)^1.5)*K_o/(K_o + sodium_potassium_pump_K_mKo);
  i_p_Ca := sarcolemmal_calcium_pump_i_pCa_max*Ca_i/(sarcolemmal_calcium_pump_K_mpCa + Ca_i);
  i_Ca_b := calcium_background_current_g_Cab*(V - calcium_background_current_E_Ca);
  i_Na_b := sodium_background_current_g_Nab*(V - E_Na);
  i_Stim := ;
  E_Na := R*T/F*ln(Na_o/Na_i);
  fast_sodium_current_fast_sodium_current_m_gate_alpha_m := 0.32*fast_sodium_current_fast_sodium_current_m_gate_E0_m/(1 - exp(-0.1*fast_sodium_current_fast_sodium_current_m_gate_E0_m));
  fast_sodium_current_fast_sodium_current_m_gate_beta_m := 0.08*exp(-V/11);
  fast_sodium_current_fast_sodium_current_m_gate_E0_m := V + 47.13;
  fast_sodium_current_fast_sodium_current_h_gate_alpha_h := 0.135*exp((V + 80)/(-6.8));
  fast_sodium_current_fast_sodium_current_h_gate_beta_h := 7.5/(1 + exp(-0.1*(V + 11)));
  fast_sodium_current_fast_sodium_current_j_gate_alpha_j := 0.175*exp((V + 100)/(-23))/(1 + exp(0.15*(V + 79)));
  fast_sodium_current_fast_sodium_current_j_gate_beta_j := 0.3/(1 + exp(-0.1*(V + 32)));
  E_K := R*T/F*ln(K_o/K_i);
  K1_infinity := 1/(2 + exp(1.62*F/(R*T)*(V - E_K)));
  rapid_activating_delayed_rectifiyer_K_current_R_V := 1/(1 + 2.5*exp(0.1*(V + 28)));
  rapid_activating_delayed_rectifiyer_K_current_rapid_activating_delayed_rectifiyer_K_current_X_kr_gate_X_kr_inf := 1/(1 + exp(-2.182 - 0.1819*V));
  rapid_activating_delayed_rectifiyer_K_current_rapid_activating_delayed_rectifiyer_K_current_X_kr_gate_tau_X_kr := 43 + 1/(exp(-5.495 + 0.1691*V) + exp(-7.677 - 0.0128*V));
  slow_activating_delayed_rectifiyer_K_current_E_Ks := R*T/F*ln((K_o + 0.01833*Na_o)/(K_i + 0.01833*Na_i));
  slow_activating_delayed_rectifiyer_K_current_slow_activating_delayed_rectifiyer_K_current_X_ks_gate_tau_X_ks := 1/(7.19e-5*(V - 10)/(1 - exp(-0.148*(V - 10))) + 0.000131*(V - 10)/(exp(0.0687*(V - 10)) - 1));
  slow_activating_delayed_rectifiyer_K_current_slow_activating_delayed_rectifiyer_K_current_X_ks_gate_X_ks_infinity := 1/(1 + exp((V - 16)/(-13.6)));
  transient_outward_potassium_current_transient_outward_potassium_current_X_to_gate_alpha_X_to := 0.04516*exp(0.03577*V);
  transient_outward_potassium_current_transient_outward_potassium_current_X_to_gate_beta_X_to := 0.0989*exp(-0.06237*V);
  transient_outward_potassium_current_transient_outward_potassium_current_Y_to_gate_alpha_Y_to := 0.005415*exp((V + 33.5)/(-5))/(1 + 0.051335*exp((V + 33.5)/(-5)));
  transient_outward_potassium_current_transient_outward_potassium_current_Y_to_gate_beta_Y_to := 0.005415*exp((V + 33.5)/5)/(1 + 0.051335*exp((V + 33.5)/5));
  Kp_V := 1/(1 + exp((7.488 - V)/5.98));
  sodium_potassium_pump_f_NaK := 1/(1 + 0.1245*exp(-0.1*V*F/(R*T)) + 0.0365*sodium_potassium_pump_sigma*exp(-V*F/(R*T)));
  sodium_potassium_pump_sigma := 1/7*(exp(Na_o/67.3) - 1);
  calcium_background_current_E_Ca := R*T/(2*F)*ln(Ca_o/Ca_i);
  L_type_Ca_current_i_Ca_max := L_type_Ca_current_P_Ca/C_sc*4*V*F^2/(R*T)*(Ca_i*exp(2*V*F/(R*T)) - 0.341*Ca_o)/(exp(2*V*F/(R*T)) - 1);
  L_type_Ca_current_L_type_Ca_current_f_gate_f_infinity := 1/(1 + exp((V + 12.5)/5));
  L_type_Ca_current_L_type_Ca_current_f_gate_tau_f := 30 + 200/(1 + exp((V + 20)/9.5));
  L_type_Ca_current_L_type_Ca_current_d_gate_d_infinity := 1/(1 + exp((V + 10)/(-6.24)));
  L_type_Ca_current_L_type_Ca_current_d_gate_tau_d := 1/(0.25*exp(-0.01*V)/(1 + exp(-0.07*V)) + 0.07*exp(-0.05*L_type_Ca_current_L_type_Ca_current_d_gate_E0_m)/(1 + exp(0.05*L_type_Ca_current_L_type_Ca_current_d_gate_E0_m)));
  L_type_Ca_current_L_type_Ca_current_d_gate_E0_m := V + 40;
  L_type_Ca_current_L_type_Ca_current_f_Ca_gate_tau_f_Ca := 30;
  L_type_Ca_current_L_type_Ca_current_f_Ca_gate_f_Ca_infinity := 1/(1 + (Ca_i/L_type_Ca_current_L_type_Ca_current_f_Ca_gate_K_mfCa)^3);
  calcium_dynamics_beta_i := 1/(1 + calcium_dynamics_CMDN_tot*calcium_dynamics_K_mCMDN/(calcium_dynamics_K_mCMDN + Ca_i)^2);
  calcium_dynamics_J_rel := calcium_dynamics_P_rel*f*d*f_Ca*(calcium_dynamics_gamma*calcium_dynamics_Ca_SR - Ca_i)/(1 + 1.65*exp(V/20));
  calcium_dynamics_J_leak := calcium_dynamics_P_leak*(calcium_dynamics_Ca_SR - Ca_i);
  calcium_dynamics_J_up := calcium_dynamics_V_up/(1 + (calcium_dynamics_K_mup/Ca_i)^2);
  calcium_dynamics_gamma := 1/(1 + (2000/calcium_dynamics_Ca_SR)^3);
  calcium_dynamics_beta_SR := 1/(1 + calcium_dynamics_CSQN_tot*calcium_dynamics_K_mCSQN/(calcium_dynamics_K_mCSQN + calcium_dynamics_Ca_SR)^2);

  // Rate rules:
  V' = -(i_Na + i_Ca + i_CaK + i_Kr + i_Ks + i_to + i_K1 + i_Kp + i_NaCa + i_NaK + i_p_Ca + i_Na_b + i_Ca_b + i_Stim);
  m' = fast_sodium_current_fast_sodium_current_m_gate_alpha_m*(1 - m) - fast_sodium_current_fast_sodium_current_m_gate_beta_m*m;
  h' = fast_sodium_current_fast_sodium_current_h_gate_alpha_h*(1 - h) - fast_sodium_current_fast_sodium_current_h_gate_beta_h*h;
  j' = fast_sodium_current_fast_sodium_current_j_gate_alpha_j*(1 - j) - fast_sodium_current_fast_sodium_current_j_gate_beta_j*j;
  X_kr' = (rapid_activating_delayed_rectifiyer_K_current_rapid_activating_delayed_rectifiyer_K_current_X_kr_gate_X_kr_inf - X_kr)/rapid_activating_delayed_rectifiyer_K_current_rapid_activating_delayed_rectifiyer_K_current_X_kr_gate_tau_X_kr;
  X_ks' = (slow_activating_delayed_rectifiyer_K_current_slow_activating_delayed_rectifiyer_K_current_X_ks_gate_X_ks_infinity - X_ks)/slow_activating_delayed_rectifiyer_K_current_slow_activating_delayed_rectifiyer_K_current_X_ks_gate_tau_X_ks;
  X_to' = transient_outward_potassium_current_transient_outward_potassium_current_X_to_gate_alpha_X_to*(1 - X_to) - transient_outward_potassium_current_transient_outward_potassium_current_X_to_gate_beta_X_to*X_to;
  Y_to' = transient_outward_potassium_current_transient_outward_potassium_current_Y_to_gate_alpha_Y_to*(1 - Y_to) - transient_outward_potassium_current_transient_outward_potassium_current_Y_to_gate_beta_Y_to*Y_to;
  Ca_i' = calcium_dynamics_beta_i*(calcium_dynamics_J_rel + calcium_dynamics_J_leak - calcium_dynamics_J_up - calcium_dynamics_A_Cap*C_sc/(2*F*calcium_dynamics_V_myo)*(i_Ca + i_Ca_b + i_p_Ca - 2*i_NaCa));
  f' = (L_type_Ca_current_L_type_Ca_current_f_gate_f_infinity - f)/L_type_Ca_current_L_type_Ca_current_f_gate_tau_f;
  d' = (L_type_Ca_current_L_type_Ca_current_d_gate_d_infinity - d)/L_type_Ca_current_L_type_Ca_current_d_gate_tau_d;
  f_Ca' = (L_type_Ca_current_L_type_Ca_current_f_Ca_gate_f_Ca_infinity - f_Ca)/L_type_Ca_current_L_type_Ca_current_f_Ca_gate_tau_f_Ca;
  calcium_dynamics_Ca_SR' = calcium_dynamics_beta_SR*(calcium_dynamics_J_up - calcium_dynamics_J_leak - calcium_dynamics_J_rel)*calcium_dynamics_V_myo/calcium_dynamics_V_SR;
end
