// SBML level 2 version 4

model gardner_dolnik_collins_1998____main()
  // Originally created by libAntimony v1.4 (using libSBML 4.1.0-b2)

  // Compartments:
  compartment default_compartment = 1;

  // Parameters:
  vi = 0.1;
  k1 = 0.5;
  X0 = ;
  C0 = ;
  K5 = 0.02;
  kd = 0.02;
  Z0 = ;
  M0 = ;
  K1 = 0.02;
  V2 = 0.25;
  K2 = 0.02;
  K3 = 0.1;
  V4 = 0.1;
  K4 = 0.1;
  K6 = 0.3;
  V1_dash = 0.75;
  V3_dash = 0.3;
  vs = 0.1;
  d1 = 0.05;
  Y0 = ;
  a1 = 1.5;
  a2 = 1.5;
  alpha = 0.1;
  Kd = 1;
  time_ = ;

  // Assignment rules:
  Ctot := C0 + Z0;
  V10 := C0*V1_dash/(C0 + K6);
  M_ := 1 - M0;
  V30 := M0*V3_dash;
  X_ := 1 - X0;
  Ytot := Y0 + Z0;
  BP0 := 1 + Kd*Ytot/(C0 + Kd)^2;

  // Rate rules:
  X0' = V30*X_/(X_ + K3) - V4*X0/(X0 + K4);
  C0' = vi - k1*X0*C0/(C0 + K5) - kd*C0;
  Z0' = a1*C0*Y0 - (a2 + alpha*kd + alpha*d1)*Z0;
  M0' = V10*M_/(M_ + K1) - V2*M0/(M0 + K2);
  Y0' = vs - d1*Y0 - a1*C0*Y0 + (a2 + alpha*kd)*Z0;
end
