// SBML level 2 version 4

model garny_2003____main()
  // Originally created by libAntimony v1.4 (using libSBML 4.1.0-b2)

  // Compartments:
  compartment default_compartment = 1;

  // Parameters:
  Version = 1;
  dCell = 0;
  FCellConstant = 1.0309347;
  V = -39.01356;
  R = 8314;
  T = 310;
  F = 96845;
  membrane_CmCentre = 2e-5;
  membrane_CmPeriphery = 6.5e-5;
  sodium_current_g_Na_Centre_Published = 0;
  sodium_current_g_Na_Centre_0DCapable = 0;
  sodium_current_g_Na_Centre_1DCapable = 0;
  sodium_current_g_Na_Periphery_Published = 1.2e-6;
  sodium_current_g_Na_Periphery_0DCapable = 1.204e-6;
  sodium_current_g_Na_Periphery_1DCapable = 3.7e-7;
  Na_o = 140;
  m = 0.0923617;
  sodium_current_sodium_current_h_gate_h1 = 0.01590538;
  sodium_current_sodium_current_h_gate_h2 = 0.01445216;
  L_type_Ca_channel_g_Ca_L_Centre_Published = 0.0058;
  L_type_Ca_channel_g_Ca_L_Centre_0DCapable = 0.0057938;
  L_type_Ca_channel_g_Ca_L_Centre_1DCapable = 0.0082;
  L_type_Ca_channel_g_Ca_L_Periphery_Published = 0.0659;
  L_type_Ca_channel_g_Ca_L_Periphery_0DCapable = 0.06588648;
  L_type_Ca_channel_g_Ca_L_Periphery_1DCapable = 0.0659;
  L_type_Ca_channel_E_Ca_L = 46.4;
  d_L = 0.04804901;
  f_L = 0.4877985;
  T_type_Ca_channel_g_Ca_T_Centre_Published = 0.0043;
  T_type_Ca_channel_g_Ca_T_Centre_0DCapable = 0.00427806;
  T_type_Ca_channel_g_Ca_T_Centre_1DCapable = 0.0021;
  T_type_Ca_channel_g_Ca_T_Periphery_Published = 0.0139;
  T_type_Ca_channel_g_Ca_T_Periphery_0DCapable = 0.0138823;
  T_type_Ca_channel_g_Ca_T_Periphery_1DCapable = 0.00694;
  T_type_Ca_channel_E_Ca_T = 45;
  d_T = 0.4207405;
  f_T = 0.03896842;
  four_AP_sensitive_currents_g_to_Centre_Published = 0.00491;
  four_AP_sensitive_currents_g_to_Centre_0DCapable = 0.004905;
  four_AP_sensitive_currents_g_to_Centre_1DCapable = 0.004905;
  four_AP_sensitive_currents_g_to_Periphery_Published = 0.03649;
  four_AP_sensitive_currents_g_to_Periphery_0DCapable = 0.036495;
  four_AP_sensitive_currents_g_to_Periphery_1DCapable = 0.0365;
  four_AP_sensitive_currents_g_sus_Centre_Published = 6.65e-5;
  four_AP_sensitive_currents_g_sus_Centre_0DCapable = 6.645504e-5;
  four_AP_sensitive_currents_g_sus_Centre_1DCapable = 0.000266;
  four_AP_sensitive_currents_g_sus_Periphery_Published = 0.0114;
  four_AP_sensitive_currents_g_sus_Periphery_0DCapable = 0.01138376;
  four_AP_sensitive_currents_g_sus_Periphery_1DCapable = 0.0114;
  q = 0.2976054;
  r = 0.06440295;
  rapid_delayed_rectifying_potassium_current_g_K_r_Centre_Published = 0.000797;
  rapid_delayed_rectifying_potassium_current_g_K_r_Centre_0DCapable = 0.00079704;
  rapid_delayed_rectifying_potassium_current_g_K_r_Centre_1DCapable = 0.000738;
  rapid_delayed_rectifying_potassium_current_g_K_r_Periphery_Published = 0.016;
  rapid_delayed_rectifying_potassium_current_g_K_r_Periphery_0DCapable = 0.016;
  rapid_delayed_rectifying_potassium_current_g_K_r_Periphery_1DCapable = 0.0208;
  P_af = 0.130342;
  P_as = 0.4696096;
  P_i = 0.8799338;
  slow_delayed_rectifying_potassium_current_g_K_s_Centre_Published = 0.000518;
  slow_delayed_rectifying_potassium_current_g_K_s_Centre_0DCapable = 0.0003445;
  slow_delayed_rectifying_potassium_current_g_K_s_Centre_1DCapable = 0.000345;
  slow_delayed_rectifying_potassium_current_g_K_s_Periphery_Published = 0.0104;
  slow_delayed_rectifying_potassium_current_g_K_s_Periphery_0DCapable = 0.0104;
  slow_delayed_rectifying_potassium_current_g_K_s_Periphery_1DCapable = 0.0104;
  xs = 0.08229383;
  hyperpolarisation_activated_current_g_f_Na_Centre_Published = 0.000548;
  hyperpolarisation_activated_current_g_f_Na_Centre_0DCapable = 0.0005465;
  hyperpolarisation_activated_current_g_f_Na_Centre_1DCapable = 0.000437;
  hyperpolarisation_activated_current_g_f_Na_Periphery_Published = 0.0069;
  hyperpolarisation_activated_current_g_f_Na_Periphery_0DCapable = 0.006875;
  hyperpolarisation_activated_current_g_f_Na_Periphery_1DCapable = 0.0055;
  hyperpolarisation_activated_current_g_f_K_Centre_Published = 0.000548;
  hyperpolarisation_activated_current_g_f_K_Centre_0DCapable = 0.0005465;
  hyperpolarisation_activated_current_g_f_K_Centre_1DCapable = 0.000437;
  hyperpolarisation_activated_current_g_f_K_Periphery_Published = 0.0069;
  hyperpolarisation_activated_current_g_f_K_Periphery_0DCapable = 0.006875;
  hyperpolarisation_activated_current_g_f_K_Periphery_1DCapable = 0.0055;
  y = 0.03889292;
  sodium_background_current_g_b_Na_Centre_Published = 5.8e-5;
  sodium_background_current_g_b_Na_Centre_0DCapable = 5.81818e-5;
  sodium_background_current_g_b_Na_Centre_1DCapable = 5.8e-5;
  sodium_background_current_g_b_Na_Periphery_Published = 0.000189;
  sodium_background_current_g_b_Na_Periphery_0DCapable = 0.0001888;
  sodium_background_current_g_b_Na_Periphery_1DCapable = 0.000189;
  potassium_background_current_g_b_K_Centre_Published = 2.52e-5;
  potassium_background_current_g_b_K_Centre_0DCapable = 2.523636e-5;
  potassium_background_current_g_b_K_Centre_1DCapable = 2.52e-5;
  potassium_background_current_g_b_K_Periphery_Published = 8.19e-5;
  potassium_background_current_g_b_K_Periphery_0DCapable = 8.1892e-5;
  potassium_background_current_g_b_K_Periphery_1DCapable = 8.19e-5;
  calcium_background_current_g_b_Ca_Centre_Published = 1.32e-5;
  calcium_background_current_g_b_Ca_Centre_0DCapable = 1.3236e-5;
  calcium_background_current_g_b_Ca_Centre_1DCapable = 1.323e-5;
  calcium_background_current_g_b_Ca_Periphery_Published = 4.3e-5;
  calcium_background_current_g_b_Ca_Periphery_0DCapable = 4.2952e-5;
  calcium_background_current_g_b_Ca_Periphery_1DCapable = 4.29e-5;
  sodium_calcium_exchanger_k_NaCa_Centre_Published = 2.7e-6;
  sodium_calcium_exchanger_k_NaCa_Centre_0DCapable = 2.7229e-6;
  sodium_calcium_exchanger_k_NaCa_Centre_1DCapable = 2.8e-6;
  sodium_calcium_exchanger_k_NaCa_Periphery_Published = 8.8e-6;
  sodium_calcium_exchanger_k_NaCa_Periphery_0DCapable = 8.83584e-6;
  sodium_calcium_exchanger_k_NaCa_Periphery_1DCapable = 8.8e-6;
  sodium_calcium_exchanger_d_NaCa = 0.0001;
  sodium_calcium_exchanger_gamma_NaCa = 0.5;
  Na_i = 8;
  Ca_i = 0.0001;
  Ca_o = 2;
  sodium_potassium_pump_K_m_Na = 5.64;
  sodium_potassium_pump_K_m_K = 0.621;
  sodium_potassium_pump_i_p_max_Centre_Published = 0.0478;
  sodium_potassium_pump_i_p_max_Centre_0DCapable = 0.04782545;
  sodium_potassium_pump_i_p_max_Centre_1DCapable = 0.0478;
  sodium_potassium_pump_i_p_max_Periphery_Published = 0.16;
  sodium_potassium_pump_i_p_max_Periphery_0DCapable = 0.1551936;
  sodium_potassium_pump_i_p_max_Periphery_1DCapable = 0.16;
  K_o = 5.4;
  persistent_calcium_current_i_Ca_p_max_Centre_Published = 0;
  persistent_calcium_current_i_Ca_p_max_Centre_0DCapable = 0;
  persistent_calcium_current_i_Ca_p_max_Centre_1DCapable = 0.0042;
  persistent_calcium_current_i_Ca_p_max_Periphery_Published = 0;
  persistent_calcium_current_i_Ca_p_max_Periphery_0DCapable = 0;
  persistent_calcium_current_i_Ca_p_max_Periphery_1DCapable = 0.03339;
  K_i = 140;
  time_ = ;

  // Assignment rules:
  FCell := ;
  membrane_Cm := membrane_CmCentre + FCell*(membrane_CmPeriphery - membrane_CmCentre);
  i_Na := sodium_current_g_Na*m^3*h*Na_o*F^2/(R*T)*(exp((V - E_Na)*F/(R*T)) - 1)/(exp(V*F/(R*T)) - 1)*V;
  i_Ca_L := L_type_Ca_channel_g_Ca_L*(f_L*d_L + 0.006/(1 + exp(-(V + 14.1)/6)))*(V - L_type_Ca_channel_E_Ca_L);
  i_Ca_T := T_type_Ca_channel_g_Ca_T*d_T*f_T*(V - T_type_Ca_channel_E_Ca_T);
  i_to := four_AP_sensitive_currents_g_to*q*r*(V - E_K);
  i_sus := four_AP_sensitive_currents_g_sus*r*(V - E_K);
  i_K_r := rapid_delayed_rectifying_potassium_current_g_K_r*rapid_delayed_rectifying_potassium_current_P_a*P_i*(V - E_K);
  i_K_s := slow_delayed_rectifying_potassium_current_g_K_s*xs^2*(V - E_K_s);
  i_f_Na := ;
  i_f_K := ;
  i_b_Na := sodium_background_current_g_b_Na*(V - E_Na);
  i_b_Ca := calcium_background_current_g_b_Ca*(V - E_Ca);
  i_b_K := potassium_background_current_g_b_K*(V - E_K);
  i_NaCa := ;
  i_p := sodium_potassium_pump_i_p_max*(Na_i/(sodium_potassium_pump_K_m_Na + Na_i))^3*(K_o/(sodium_potassium_pump_K_m_K + K_o))^2*1.6/(1.5 + exp(-(V + 60)/40));
  i_Ca_p := persistent_calcium_current_i_Ca_p_max*Ca_i/(Ca_i + 0.0004);
  sodium_current_g_Na := ;
  E_Na := R*T/F*ln(Na_o/Na_i);
  h := (1 - sodium_current_sodium_current_h_gate_F_Na)*sodium_current_sodium_current_h_gate_h1 + sodium_current_sodium_current_h_gate_F_Na*sodium_current_sodium_current_h_gate_h2;
  sodium_current_sodium_current_m_gate_m_infinity := ;
  sodium_current_sodium_current_m_gate_tau_m := ;
  sodium_current_sodium_current_h_gate_F_Na := ;
  sodium_current_sodium_current_h_gate_h1_infinity := 1/(1 + exp((V + 66.1)/6.4));
  sodium_current_sodium_current_h_gate_h2_infinity := sodium_current_sodium_current_h_gate_h1_infinity;
  sodium_current_sodium_current_h_gate_tau_h1 := 3.717e-6*exp(-0.2815*(V + 17.11))/(1 + 0.003732*exp(-0.3426*(V + 37.76))) + 0.0005977;
  sodium_current_sodium_current_h_gate_tau_h2 := 3.186e-8*exp(-0.6219*(V + 18.8))/(1 + 7.189e-5*exp(-0.6683*(V + 34.07))) + 0.003556;
  L_type_Ca_channel_g_Ca_L := ;
  L_type_Ca_channel_L_type_Ca_channel_d_gate_alpha_d_L := ;
  L_type_Ca_channel_L_type_Ca_channel_d_gate_beta_d_L := ;
  L_type_Ca_channel_L_type_Ca_channel_d_gate_d_L_infinity := ;
  L_type_Ca_channel_L_type_Ca_channel_d_gate_tau_d_L := 2/(L_type_Ca_channel_L_type_Ca_channel_d_gate_alpha_d_L + L_type_Ca_channel_L_type_Ca_channel_d_gate_beta_d_L);
  L_type_Ca_channel_L_type_Ca_channel_f_gate_alpha_f_L := ;
  L_type_Ca_channel_L_type_Ca_channel_f_gate_beta_f_L := ;
  L_type_Ca_channel_L_type_Ca_channel_f_gate_f_L_infinity := 1/(1 + exp((V + 45)/5));
  L_type_Ca_channel_L_type_Ca_channel_f_gate_tau_f_L := ;
  T_type_Ca_channel_g_Ca_T := ;
  T_type_Ca_channel_T_type_Ca_channel_d_gate_alpha_d_T := 1068*exp((V + 26.3)/30);
  T_type_Ca_channel_T_type_Ca_channel_d_gate_beta_d_T := 1068*exp(-(V + 26.3)/30);
  T_type_Ca_channel_T_type_Ca_channel_d_gate_d_T_infinity := 1/(1 + exp(-(V + 37)/6.8));
  T_type_Ca_channel_T_type_Ca_channel_d_gate_tau_d_T := 1/(T_type_Ca_channel_T_type_Ca_channel_d_gate_alpha_d_T + T_type_Ca_channel_T_type_Ca_channel_d_gate_beta_d_T);
  T_type_Ca_channel_T_type_Ca_channel_f_gate_alpha_f_T := ;
  T_type_Ca_channel_T_type_Ca_channel_f_gate_beta_f_T := ;
  T_type_Ca_channel_T_type_Ca_channel_f_gate_f_T_infinity := 1/(1 + exp((V + 71)/9));
  T_type_Ca_channel_T_type_Ca_channel_f_gate_tau_f_T := 1/(T_type_Ca_channel_T_type_Ca_channel_f_gate_alpha_f_T + T_type_Ca_channel_T_type_Ca_channel_f_gate_beta_f_T);
  four_AP_sensitive_currents_g_to := ;
  four_AP_sensitive_currents_g_sus := ;
  E_K := R*T/F*ln(K_o/K_i);
  four_AP_sensitive_currents_four_AP_sensitive_currents_q_gate_q_infinity := 1/(1 + exp((V + 59.37)/13.1));
  four_AP_sensitive_currents_four_AP_sensitive_currents_q_gate_tau_q := ;
  four_AP_sensitive_currents_four_AP_sensitive_currents_r_gate_r_infinity := 1/(1 + exp(-(V - 10.93)/19.7));
  four_AP_sensitive_currents_four_AP_sensitive_currents_r_gate_tau_r := ;
  rapid_delayed_rectifying_potassium_current_g_K_r := ;
  rapid_delayed_rectifying_potassium_current_P_a := 0.6*P_af + 0.4*P_as;
  rapid_delayed_rectifying_potassium_current_P_af_infinity := ;
  rapid_delayed_rectifying_potassium_current_rapid_delayed_rectifying_potassium_current_P_af_gate_tau_P_af := ;
  rapid_delayed_rectifying_potassium_current_rapid_delayed_rectifying_potassium_current_P_as_gate_P_as_infinity := rapid_delayed_rectifying_potassium_current_P_af_infinity;
  rapid_delayed_rectifying_potassium_current_rapid_delayed_rectifying_potassium_current_P_as_gate_tau_P_as := ;
  rapid_delayed_rectifying_potassium_current_rapid_delayed_rectifying_potassium_current_P_i_gate_P_i_infinity := 1/(1 + exp((V + 18.6)/10.1));
  rapid_delayed_rectifying_potassium_current_rapid_delayed_rectifying_potassium_current_P_i_gate_tau_P_i := ;
  slow_delayed_rectifying_potassium_current_g_K_s := ;
  E_K_s := ;
  slow_delayed_rectifying_potassium_current_slow_delayed_rectifying_potassium_current_xs_gate_alpha_xs := 14/(1 + exp(-(V - 40)/9));
  slow_delayed_rectifying_potassium_current_slow_delayed_rectifying_potassium_current_xs_gate_beta_xs := 1*exp(-V/45);
  hyperpolarisation_activated_current_g_f_Na := ;
  hyperpolarisation_activated_current_g_f_K := ;
  hyperpolarisation_activated_current_hyperpolarisation_activated_current_y_gate_alpha_y := ;
  hyperpolarisation_activated_current_hyperpolarisation_activated_current_y_gate_beta_y := 1*exp((V + 75.13)/21.25);
  sodium_background_current_g_b_Na := ;
  potassium_background_current_g_b_K := ;
  calcium_background_current_g_b_Ca := ;
  E_Ca := R*T/(2*F)*ln(Ca_o/Ca_i);
  sodium_calcium_exchanger_k_NaCa := ;
  sodium_potassium_pump_i_p_max := ;
  persistent_calcium_current_i_Ca_p_max := ;

  // Rate rules:
  V' = -1/membrane_Cm*(i_Na + i_Ca_L + i_Ca_T + i_to + i_sus + i_K_r + i_K_s + i_f_Na + i_f_K + i_b_Na + i_b_Ca + i_b_K + i_NaCa + i_p + i_Ca_p);
  m' = (sodium_current_sodium_current_m_gate_m_infinity - m)/sodium_current_sodium_current_m_gate_tau_m;
  sodium_current_sodium_current_h_gate_h1' = (sodium_current_sodium_current_h_gate_h1_infinity - sodium_current_sodium_current_h_gate_h1)/sodium_current_sodium_current_h_gate_tau_h1;
  sodium_current_sodium_current_h_gate_h2' = (sodium_current_sodium_current_h_gate_h2_infinity - sodium_current_sodium_current_h_gate_h2)/sodium_current_sodium_current_h_gate_tau_h2;
  d_L' = (L_type_Ca_channel_L_type_Ca_channel_d_gate_d_L_infinity - d_L)/L_type_Ca_channel_L_type_Ca_channel_d_gate_tau_d_L;
  f_L' = (L_type_Ca_channel_L_type_Ca_channel_f_gate_f_L_infinity - f_L)/L_type_Ca_channel_L_type_Ca_channel_f_gate_tau_f_L;
  d_T' = (T_type_Ca_channel_T_type_Ca_channel_d_gate_d_T_infinity - d_T)/T_type_Ca_channel_T_type_Ca_channel_d_gate_tau_d_T;
  f_T' = (T_type_Ca_channel_T_type_Ca_channel_f_gate_f_T_infinity - f_T)/T_type_Ca_channel_T_type_Ca_channel_f_gate_tau_f_T;
  q' = (four_AP_sensitive_currents_four_AP_sensitive_currents_q_gate_q_infinity - q)/four_AP_sensitive_currents_four_AP_sensitive_currents_q_gate_tau_q;
  r' = (four_AP_sensitive_currents_four_AP_sensitive_currents_r_gate_r_infinity - r)/four_AP_sensitive_currents_four_AP_sensitive_currents_r_gate_tau_r;
  P_af' = (rapid_delayed_rectifying_potassium_current_P_af_infinity - P_af)/rapid_delayed_rectifying_potassium_current_rapid_delayed_rectifying_potassium_current_P_af_gate_tau_P_af;
  P_as' = (rapid_delayed_rectifying_potassium_current_rapid_delayed_rectifying_potassium_current_P_as_gate_P_as_infinity - P_as)/rapid_delayed_rectifying_potassium_current_rapid_delayed_rectifying_potassium_current_P_as_gate_tau_P_as;
  P_i' = (rapid_delayed_rectifying_potassium_current_rapid_delayed_rectifying_potassium_current_P_i_gate_P_i_infinity - P_i)/rapid_delayed_rectifying_potassium_current_rapid_delayed_rectifying_potassium_current_P_i_gate_tau_P_i;
  xs' = slow_delayed_rectifying_potassium_current_slow_delayed_rectifying_potassium_current_xs_gate_alpha_xs*(1 - xs) - slow_delayed_rectifying_potassium_current_slow_delayed_rectifying_potassium_current_xs_gate_beta_xs*xs;
  y' = hyperpolarisation_activated_current_hyperpolarisation_activated_current_y_gate_alpha_y*(1 - y) - hyperpolarisation_activated_current_hyperpolarisation_activated_current_y_gate_beta_y*y;
end
