// SBML level 2 version 4

model Electroblue2007____main()
  // Originally created by libAntimony v1.4 (using libSBML 4.1.0-b2)

  // Compartments:
  compartment default_compartment = 1;

  // Parameters:
  Device_TFgenerator_alphaTF = 0.05;
  TFS = 0;
  TF = 8.6207;
  BioEnv_TFSAssociation_s = 5;
  BioEnv_TFSAssociation_betaTFS = 1000000;
  BioEnv_TFSAssociation_kd = 4000000;
  BioEnv_TFSAssociation_deltaTFS = 0.0003851;
  BioEnv_TFSAssociation_deltaTF = 0.0058;
  Device_PhzMSgenerator_gammaPhzMS = 5;
  Device_PhzMSgenerator_betaPhzMS = 0.1;
  Device_PhzMSgenerator_gammaTF = 4;
  Device_PhzMSgenerator_betaTF = 0.07;
  Device_PhzMSgenerator_feedbackOn = 1;
  PhzMS = 0;
  PYO = 0;
  BioEnv_PhzMStoPYO_deltaPhzMS = 8.0225e-6;
  BioEnv_PhzMStoPYO_alphaPYO = 1.3;
  BioEnv_PhzMStoPYO_deltaPYO = 0.58;
  time_ = ;

  // Assignment rules:
  JTF := Device_TFgenerator_alphaTF;
  Jgain_TF := JTF + JTF2;
  Jgain_TFS := 0;
  JTF2 := ;
  BioEnv_TFSAssociation_Jassociation := BioEnv_TFSAssociation_betaTFS*BioEnv_TFSAssociation_s*TF - BioEnv_TFSAssociation_kd*TFS;
  JPhzMS := Device_PhzMSgenerator_betaPhzMS*TFS/(Device_PhzMSgenerator_gammaPhzMS + TFS);
  Jgain_PhzMS := JPhzMS;
  Jgain_PYO := 0;
  BioEnv_PhzMStoPYO_JPYOformation := BioEnv_PhzMStoPYO_alphaPYO*PhzMS;

  // Rate rules:
  TFS' = BioEnv_TFSAssociation_Jassociation - BioEnv_TFSAssociation_deltaTFS*TFS + Jgain_TFS;
  TF' = -BioEnv_TFSAssociation_Jassociation + Jgain_TF - BioEnv_TFSAssociation_deltaTF*TF;
  PhzMS' = Jgain_PhzMS - BioEnv_PhzMStoPYO_deltaPhzMS*PhzMS;
  PYO' = Jgain_PYO - BioEnv_PhzMStoPYO_deltaPYO*PYO + BioEnv_PhzMStoPYO_JPYOformation;
end
