// SBML level 2 version 4

model goldbeter_1991____main()
  // Originally created by libAntimony v1.3 (using libSBML 4.1.0-b2)

  // Compartments:
  compartment default_compartment = 1;

  // Parameters:
  C0 = 0.01;
  X0 = 0.01;
  kd = 0.01;
  Kd = 0.02;
  vi = 0.025;
  vd = 0.25;
  M0 = 0.01;
  V2 = 1.5;
  K1 = 0.005;
  K2 = 0.005;
  V4 = 0.5;
  K3 = 0.005;
  K4 = 0.005;
  Kc = 0.5;
  VM1 = 3;
  VM3 = 1;
  time_ = ;

  // Assignment rules:
  M_star0 := 1 - M0;
  V1 := VM1*C0/(Kc + C0);
  X_star0 := 1 - X0;
  V3 := M0*VM3;

  // Rate rules:
  C0' = vi - vd*X0*C0/(Kd + C0) - kd*C0;
  X0' = V3*X_star0/(K3 + X_star0) - V4*X0/(K4 + X0);
  M0' = V1*M_star0/(K1 + M_star0) - V2*M0/(K2 + M0);
end
