// SBML level 2 version 4

model grandi_pasqualini_bers_2010_flat____main()
  // Originally created by libAntimony v1.3 (using libSBML 4.1.0-b2)

  // Compartments:
  compartment default_compartment = 1;

  // Parameters:
  Na_j = 9.06;
  Na_sl = 9.06;
  K_i = 120;
  Ca_j = 0.0001737475;
  Ca_sl = 0.0001031812;
  m = 0.001405627;
  h = 0.9867005;
  j = 0.991562;
  V_m = -80.9763;
  x_kr = 0.008641386;
  x_ks = 0.005412034;
  Na_i = 9.06;
  x_to_s = 0.004051574;
  y_to_s = 0.9945511;
  x_to_f = 0.004051574;
  y_to_f = 0.9945511;
  d = 7.175662e-6;
  f = 1.000681;
  f_Ca_Bj = 0.02421991;
  f_Ca_Bsl = 0.01452605;
  Ry_Rr = 0.8884332;
  Ry_Ro = 8.156628e-7;
  Ry_Ri = 1.024274e-7;
  Ca_sr = 0.01;
  Ca_i = 8.597401e-5;
  Na_Bj = 3.539892;
  Na_Bsl = 0.7720854;
  Tn_CL = 0.008773191;
  Tn_CHc = 0.1078283;
  Tn_CHm = 0.01524002;
  CaM = 0.0002911916;
  Myo_c = 0.001298754;
  Myo_m = 0.1381982;
  SRB = 0.002143165;
  SLL_j = 0.009566355;
  SLL_sl = 0.1110363;
  SLH_j = 0.007347888;
  SLH_sl = 0.07297378;
  Csqn_b = 1.242988;
  time_ = ;

  // Assignment rules:
  epi := 1;
  R := 8314;
  Frdy := 96485;
  Temp := 310;
  FoRT := Frdy/(R*Temp);
  Cmem := 1.381e-10;
  Qpow := (Temp - 310)/10;
  cellLength := 100;
  cellRadius := 10.25;
  junctionLength := 160e-3;
  junctionRadius := 15e-3;
  distSLcyto := 0.45;
  distJuncSL := 0.5;
  DcaJuncSL := 1.64e-6;
  DcaSLcyto := 1.22e-6;
  DnaJuncSL := 1.09e-5;
  DnaSLcyto := 1.79e-5;
  Vcell := pi*cellRadius^2*cellLength*1e-15;
  Vmyo := 0.65*Vcell;
  Vsr := 0.035*Vcell;
  Vsl := 0.02*Vcell;
  Vjunc := 0.0539*0.01*Vcell;
  SAjunc := 20150*pi*2*junctionLength*junctionRadius;
  SAsl := pi*2*cellRadius*cellLength;
  J_ca_juncsl := 8.2413e-13;
  J_ca_slmyo := 3.2743e-12;
  J_na_juncsl := 1.8313e-14;
  J_na_slmyo := 1.6386e-12;
  Fjunc := 0.11;
  Fsl := 1 - Fjunc;
  Fjunc_CaL := 0.9;
  Fsl_CaL := 1 - Fjunc_CaL;
  Cli := 15;
  Clo := 150;
  Ko := 5.4;
  Nao := 140;
  Cao := 1.8;
  Mgi := 1;
  ena_junc := 1/FoRT*ln(Nao/Na_j);
  ena_sl := 1/FoRT*ln(Nao/Na_sl);
  ek := 1/FoRT*ln(Ko/K_i);
  eca_junc := 1/FoRT/2*ln(Cao/Ca_j);
  eca_sl := 1/FoRT/2*ln(Cao/Ca_sl);
  ecl := 1/FoRT*ln(Cli/Clo);
  GNa := 23;
  GNaB := 0.597e-3;
  IbarNaK := 1*1.8;
  KmNaip := 11;
  KmKo := 1.5;
  Q10NaK := 1.63;
  Q10KmNai := 1.39;
  pNaK := 0.01833;
  gkp := 2*0.001;
  GClCa := 0.5*0.109625;
  GClB := 1*9e-3;
  KdClCa := 100e-3;
  pNa := 0.5*1.5e-8;
  pCa := 0.5*5.4e-4;
  pK := 0.5*2.7e-7;
  Q10CaL := 1.8;
  IbarNCX := 1*4.5;
  KmCai := 3.59e-3;
  KmCao := 1.3;
  KmNai := 12.29;
  KmNao := 87.5;
  ksat := 0.32;
  nu := 0.27;
  Kdact := 0.15e-3;
  Q10NCX := 1.57;
  IbarSLCaP := 0.0673;
  KmPCa := 0.5e-3;
  GCaB := 5.513e-4;
  Q10SLCaP := 2.35;
  Q10SRCaP := 2.6;
  Vmax_SRCaP := 5.3114e-3;
  Kmf := 0.246e-3;
  Kmr := 1.7;
  hillSRCaP := 1.787;
  ks := 25;
  koCa := 10;
  kom := 0.06;
  kiCa := 0.5;
  kim := 0.005;
  ec50SR := 0.45;
  Bmax_Naj := 7.561;
  Bmax_Nasl := 1.65;
  koff_na := 1e-3;
  kon_na := 0.1e-3;
  Bmax_TnClow := 70e-3;
  koff_tncl := 19.6e-3;
  kon_tncl := 32.7;
  Bmax_TnChigh := 140e-3;
  koff_tnchca := 0.032e-3;
  kon_tnchca := 2.37;
  koff_tnchmg := 3.33e-3;
  kon_tnchmg := 3e-3;
  Bmax_CaM := 24e-3;
  koff_cam := 238e-3;
  kon_cam := 34;
  Bmax_myosin := 140e-3;
  koff_myoca := 0.46e-3;
  kon_myoca := 13.8;
  koff_myomg := 0.057e-3;
  kon_myomg := 0.0157;
  Bmax_SR := 19*0.9e-3;
  koff_sr := 60e-3;
  kon_sr := 100;
  Bmax_SLlowsl := 37.4e-3*Vmyo/Vsl;
  Bmax_SLlowj := 4.6e-3*Vmyo/Vjunc*0.1;
  koff_sll := 1300e-3;
  kon_sll := 100;
  Bmax_SLhighsl := 13.4e-3*Vmyo/Vsl;
  Bmax_SLhighj := 1.65e-3*Vmyo/Vjunc*0.1;
  koff_slh := 30e-3;
  kon_slh := 100;
  Bmax_Csqn := 140e-3*Vmyo/Vsr;
  koff_csqn := 65;
  kon_csqn := 100;
  mss := 1/(1 + exp(-(56.86 + V_m)/9.03))^2;
  taum := 0.1292*exp(-((V_m + 45.79)/15.54)^2) + 0.06487*exp(-((V_m - 4.823)/51.12)^2);
  ah := ;
  bh := ;
  tauh := 1/(ah + bh);
  hss := 1/(1 + exp((V_m + 71.55)/7.43))^2;
  aj := ;
  bj := ;
  tauj := 1/(aj + bj);
  jss := 1/(1 + exp((V_m + 71.55)/7.43))^2;
  I_Na_junc := Fjunc*GNa*m^3*h*j*(V_m - ena_junc);
  I_Na_sl := Fsl*GNa*m^3*h*j*(V_m - ena_sl);
  I_Na0 := I_Na_junc + I_Na_sl;
  I_nabk_junc := Fjunc*GNaB*(V_m - ena_junc);
  I_nabk_sl := Fsl*GNaB*(V_m - ena_sl);
  I_nabk := I_nabk_junc + I_nabk_sl;
  sigma := (exp(Nao/67.3) - 1)/7;
  fnak := 1/(1 + 0.1245*exp(-0.1*V_m*FoRT) + 0.0365*sigma*exp(-V_m*FoRT));
  I_nak_junc := Fjunc*IbarNaK*fnak*Ko/(1 + (KmNaip/Na_j)^4)/(Ko + KmKo);
  I_nak_sl := Fsl*IbarNaK*fnak*Ko/(1 + (KmNaip/Na_sl)^4)/(Ko + KmKo);
  I_nak := I_nak_junc + I_nak_sl;
  gkr := 0.035*sqrt(Ko/5.4);
  xrss := 1/(1 + exp(-(V_m + 10)/5));
  tauxr := 550/(1 + exp((-22 - V_m)/9))*6/(1 + exp((V_m - (-11))/9)) + 230/(1 + exp((V_m - (-40))/20));
  rkr := 1/(1 + exp((V_m + 74)/24));
  I_kr := gkr*x_kr*rkr*(V_m - ek);
  kp_kp := 1/(1 + exp(7.488 - V_m/5.98));
  I_kp_junc := Fjunc*gkp*kp_kp*(V_m - ek);
  I_kp_sl := Fsl*gkp*kp_kp*(V_m - ek);
  I_kp := I_kp_junc + I_kp_sl;
  eks := 1/FoRT*ln((Ko + pNaK*Nao)/(K_i + pNaK*Na_i));
  gks_junc := 0.0035;
  gks_sl := 0.0035;
  xsss := 1/(1 + exp(-(V_m + 3.8)/14.25));
  tauxs := 990.1/(1 + exp(-(V_m + 2.436)/14.12));
  I_ks_junc := Fjunc*gks_junc*x_ks^2*(V_m - eks);
  I_ks_sl := Fsl*gks_sl*x_ks^2*(V_m - eks);
  I_ks := I_ks_junc + I_ks_sl;
  GtoSlow := ;
  GtoFast := ;
  xtoss := 1/(1 + exp(-(V_m - 19)/13));
  ytoss := 1/(1 + exp((V_m + 19.5)/5));
  tauxtos := 9/(1 + exp((V_m + 3)/15)) + 0.5;
  tauytos := 800/(1 + exp((V_m + 60)/10)) + 30;
  I_tos := GtoSlow*x_to_s*y_to_s*(V_m - ek);
  tauxtof := 8.5*exp(-((V_m + 45)/50)^2) + 0.5;
  tauytof := 85*exp(-(V_m + 40)^2/220) + 7;
  I_tof := GtoFast*x_to_f*y_to_f*(V_m - ek);
  I_to0 := I_tos + I_tof;
  aki := 1.02/(1 + exp(0.2385*(V_m - ek - 59.215)));
  bki := (0.49124*exp(0.08032*(V_m + 5.476 - ek)) + exp(0.06175*(V_m - ek - 594.31)))/(1 + exp(-0.5143*(V_m - ek + 4.753)));
  kiss := aki/(aki + bki);
  I_ki := 1*0.35*sqrt(Ko/5.4)*kiss*(V_m - ek);
  I_ClCa_junc := Fjunc*GClCa/(1 + KdClCa/Ca_j)*(V_m - ecl);
  I_ClCa_sl := Fsl*GClCa/(1 + KdClCa/Ca_sl)*(V_m - ecl);
  I_ClCa0 := I_ClCa_junc + I_ClCa_sl;
  I_Clbk := GClB*(V_m - ecl);
  fss := 1/(1 + exp((V_m + 35)/9)) + 0.6/(1 + exp((50 - V_m)/20));
  dss := 1/(1 + exp(-(V_m + 5)/6));
  taud := 1*dss*(1 - exp(-(V_m + 5)/6))/(0.035*(V_m + 5));
  tauf := 1/(0.0197*exp(-(0.0337*(V_m + 14.5))^2) + 0.02);
  fcaCaMSL := 0;
  fcaCaj := 0;
  ibarca_j := pCa*4*V_m*Frdy*FoRT*(0.341*Ca_j*exp(2*V_m*FoRT) - 0.341*Cao)/(exp(2*V_m*FoRT) - 1);
  ibarca_sl := pCa*4*V_m*Frdy*FoRT*(0.341*Ca_sl*exp(2*V_m*FoRT) - 0.341*Cao)/(exp(2*V_m*FoRT) - 1);
  ibark := pK*V_m*Frdy*FoRT*(0.75*K_i*exp(V_m*FoRT) - 0.75*Ko)/(exp(V_m*FoRT) - 1);
  ibarna_j := pNa*V_m*Frdy*FoRT*(0.75*Na_j*exp(V_m*FoRT) - 0.75*Nao)/(exp(V_m*FoRT) - 1);
  ibarna_sl := pNa*V_m*Frdy*FoRT*(0.75*Na_sl*exp(V_m*FoRT) - 0.75*Nao)/(exp(V_m*FoRT) - 1);
  I_Ca_junc := Fjunc_CaL*ibarca_j*d*f*(1 - f_Ca_Bj + fcaCaj)*Q10CaL^Qpow*0.45*1;
  I_Ca_sl := Fsl_CaL*ibarca_sl*d*f*(1 - f_Ca_Bsl + fcaCaMSL)*Q10CaL^Qpow*0.45*1;
  I_Ca0 := I_Ca_junc + I_Ca_sl;
  I_CaK := ibark*d*f*(Fjunc_CaL*(fcaCaj + (1 - f_Ca_Bj)) + Fsl_CaL*(fcaCaMSL + (1 - f_Ca_Bsl)))*Q10CaL^Qpow*0.45*1;
  I_CaNa_junc := Fjunc_CaL*ibarna_j*d*f*(1 - f_Ca_Bj + fcaCaj)*Q10CaL^Qpow*0.45*1;
  I_CaNa_sl := Fsl_CaL*ibarna_sl*d*f*(1 - f_Ca_Bsl + fcaCaMSL)*Q10CaL^Qpow*0.45*1;
  I_CaNa := I_CaNa_junc + I_CaNa_sl;
  I_Catot := I_Ca0 + I_CaK + I_CaNa;
  Ka_junc := 1/(1 + (Kdact/Ca_j)^2);
  Ka_sl := 1/(1 + (Kdact/Ca_sl)^2);
  s1_junc := exp(nu*V_m*FoRT)*Na_j^3*Cao;
  s1_sl := exp(nu*V_m*FoRT)*Na_sl^3*Cao;
  s2_junc := exp((nu - 1)*V_m*FoRT)*Nao^3*Ca_j;
  s3_junc := KmCai*Nao^3*(1 + (Na_j/KmNai)^3) + KmNao^3*Ca_j*(1 + Ca_j/KmCai) + KmCao*Na_j^3 + Na_j^3*Cao + Nao^3*Ca_j;
  s2_sl := exp((nu - 1)*V_m*FoRT)*Nao^3*Ca_sl;
  s3_sl := KmCai*Nao^3*(1 + (Na_sl/KmNai)^3) + KmNao^3*Ca_sl*(1 + Ca_sl/KmCai) + KmCao*Na_sl^3 + Na_sl^3*Cao + Nao^3*Ca_sl;
  I_ncx_junc := Fjunc*IbarNCX*Q10NCX^Qpow*Ka_junc*(s1_junc - s2_junc)/s3_junc/(1 + ksat*exp((nu - 1)*V_m*FoRT));
  I_ncx_sl := Fsl*IbarNCX*Q10NCX^Qpow*Ka_sl*(s1_sl - s2_sl)/s3_sl/(1 + ksat*exp((nu - 1)*V_m*FoRT));
  I_ncx := I_ncx_junc + I_ncx_sl;
  I_pca_junc := Fjunc*Q10SLCaP^Qpow*IbarSLCaP*Ca_j^1.6/(KmPCa^1.6 + Ca_j^1.6);
  I_pca_sl := Fsl*Q10SLCaP^Qpow*IbarSLCaP*Ca_sl^1.6/(KmPCa^1.6 + Ca_sl^1.6);
  I_pca := I_pca_junc + I_pca_sl;
  I_cabk_junc := Fjunc*GCaB*(V_m - eca_junc);
  I_cabk_sl := Fsl*GCaB*(V_m - eca_sl);
  I_cabk := I_cabk_junc + I_cabk_sl;
  MaxSR := 15;
  MinSR := 1;
  kCaSR := MaxSR - (MaxSR - MinSR)/(1 + (ec50SR/Ca_sr)^2.5);
  koSRCa := koCa/kCaSR;
  kiSRCa := kiCa*kCaSR;
  RI := 1 - Ry_Rr - Ry_Ro - Ry_Ri;
  J_SRCarel := ks*Ry_Ro/1*(Ca_sr - Ca_j);
  J_serca := Q10SRCaP^Qpow*Vmax_SRCaP*((Ca_i/Kmf)^hillSRCaP - (Ca_sr/Kmr)^hillSRCaP)/(1 + (Ca_i/Kmf)^hillSRCaP + (Ca_sr/Kmr)^hillSRCaP);
  J_SRleak := 5.348e-6*(Ca_sr - Ca_j);
  dNa_Bj_dt := kon_na*Na_j*(Bmax_Naj - Na_Bj) - koff_na*Na_Bj;
  dNa_Bsl_dt := kon_na*Na_sl*(Bmax_Nasl - Na_Bsl) - koff_na*Na_Bsl;
  J_CaB_cytosol := kon_tncl*Ca_i*(Bmax_TnClow - Tn_CL) - koff_tncl*Tn_CL + kon_tnchca*Ca_i*(Bmax_TnChigh - Tn_CHc - Tn_CHm) - koff_tnchca*Tn_CHc + kon_tnchmg*Mgi*(Bmax_TnChigh - Tn_CHc - Tn_CHm) - koff_tnchmg*Tn_CHm + kon_cam*Ca_i*(Bmax_CaM - CaM) - koff_cam*CaM + kon_myoca*Ca_i*(Bmax_myosin - Myo_c - Myo_m) - koff_myoca*Myo_c + kon_myomg*Mgi*(Bmax_myosin - Myo_c - Myo_m) - koff_myomg*Myo_m + (kon_sr*Ca_i*(Bmax_SR - SRB) - koff_sr*SRB);
  J_CaB_junction := kon_sll*Ca_j*(Bmax_SLlowj - SLL_j) - koff_sll*SLL_j + (kon_slh*Ca_j*(Bmax_SLhighj - SLH_j) - koff_slh*SLH_j);
  J_CaB_sl := kon_sll*Ca_sl*(Bmax_SLlowsl - SLL_sl) - koff_sll*SLL_sl + (kon_slh*Ca_sl*(Bmax_SLhighsl - SLH_sl) - koff_slh*SLH_sl);
  I_Na_tot_junc := I_Na_junc + I_nabk_junc + 3*I_ncx_junc + 3*I_nak_junc + I_CaNa_junc;
  I_Na_tot_sl := I_Na_sl + I_nabk_sl + 3*I_ncx_sl + 3*I_nak_sl + I_CaNa_sl;
  I_Na_tot_sl2 := 3*I_ncx_sl + 3*I_nak_sl + I_CaNa_sl;
  I_Na_tot_junc2 := 3*I_ncx_junc + 3*I_nak_junc + I_CaNa_junc;
  I_K_tot := I_to0 + I_kr + I_ks + I_ki - 2*I_nak + I_CaK + I_kp;
  I_Ca_tot_junc := I_Ca_junc + I_cabk_junc + I_pca_junc - 2*I_ncx_junc;
  I_Ca_tot_sl := I_Ca_sl + I_cabk_sl + I_pca_sl - 2*I_ncx_sl;
  membrane_potential_I_Na_tot := I_Na_tot_junc + I_Na_tot_sl;
  membrane_potential_I_Cl_tot := I_ClCa0 + I_Clbk;
  membrane_potential_I_Ca_tot := I_Ca_tot_junc + I_Ca_tot_sl;
  membrane_potential_I_tot := membrane_potential_I_Na_tot + membrane_potential_I_Cl_tot + membrane_potential_I_Ca_tot + I_K_tot;
  membrane_potential_I_app := 0;

  // Rate rules:
  Na_j' = -I_Na_tot_junc*Cmem/(Vjunc*Frdy) + J_na_juncsl/Vjunc*(Na_sl - Na_j) - dNa_Bj_dt;
  Na_sl' = -I_Na_tot_sl*Cmem/(Vsl*Frdy) + J_na_juncsl/Vsl*(Na_j - Na_sl) + J_na_slmyo/Vsl*(Na_i - Na_sl) - dNa_Bsl_dt;
  K_i' = 0;
  Ca_j' = -I_Ca_tot_junc*Cmem/(Vjunc*2*Frdy) + J_ca_juncsl/Vjunc*(Ca_sl - Ca_j) - J_CaB_junction + J_SRCarel*Vsr/Vjunc + J_SRleak*Vmyo/Vjunc;
  Ca_sl' = -I_Ca_tot_sl*Cmem/(Vsl*2*Frdy) + J_ca_juncsl/Vsl*(Ca_j - Ca_sl) + J_ca_slmyo/Vsl*(Ca_i - Ca_sl) - J_CaB_sl;
  m' = (mss - m)/taum;
  h' = (hss - h)/tauh;
  j' = (jss - j)/tauj;
  V_m' = -(membrane_potential_I_tot - membrane_potential_I_app);
  x_kr' = (xrss - x_kr)/tauxr;
  x_ks' = (xsss - x_ks)/tauxs;
  Na_i' = J_na_slmyo/Vmyo*(Na_sl - Na_i);
  x_to_s' = (xtoss - x_to_s)/tauxtos;
  y_to_s' = (ytoss - y_to_s)/tauytos;
  x_to_f' = (xtoss - x_to_f)/tauxtof;
  y_to_f' = (ytoss - y_to_f)/tauytof;
  d' = (dss - d)/taud;
  f' = (fss - f)/tauf;
  f_Ca_Bj' = 1.7*Ca_j/1*(1 - f_Ca_Bj) - 11.9e-3*f_Ca_Bj;
  f_Ca_Bsl' = 1.7*Ca_sl/1*(1 - f_Ca_Bsl) - 11.9e-3*f_Ca_Bsl;
  Ry_Rr' = kim*RI - kiSRCa*Ca_j*Ry_Rr - (koSRCa*Ca_j^2*Ry_Rr - kom*Ry_Ro);
  Ry_Ro' = koSRCa*Ca_j^2*Ry_Rr - kom*Ry_Ro - (kiSRCa*Ca_j*Ry_Ro - kim*Ry_Ri);
  Ry_Ri' = kiSRCa*Ca_j*Ry_Ro - kim*Ry_Ri - (kom*Ry_Ri - koSRCa*Ca_j^2*RI);
  Ca_sr' = J_serca - (J_SRleak*Vmyo/Vsr + J_SRCarel) - (kon_csqn*Ca_sr*(Bmax_Csqn - Csqn_b) - koff_csqn*Csqn_b);
  Ca_i' = -J_serca*Vsr/Vmyo - J_CaB_cytosol + J_ca_slmyo/Vmyo*(Ca_sl - Ca_i);
  Na_Bj' = dNa_Bj_dt;
  Na_Bsl' = dNa_Bsl_dt;
  Tn_CL' = kon_tncl*Ca_i*(Bmax_TnClow - Tn_CL) - koff_tncl*Tn_CL;
  Tn_CHc' = kon_tnchca*Ca_i*(Bmax_TnChigh - Tn_CHc - Tn_CHm) - koff_tnchca*Tn_CHc;
  Tn_CHm' = kon_tnchmg*Mgi*(Bmax_TnChigh - Tn_CHc - Tn_CHm) - koff_tnchmg*Tn_CHm;
  CaM' = kon_cam*Ca_i*(Bmax_CaM - CaM) - koff_cam*CaM;
  Myo_c' = kon_myoca*Ca_i*(Bmax_myosin - Myo_c - Myo_m) - koff_myoca*Myo_c;
  Myo_m' = kon_myomg*Mgi*(Bmax_myosin - Myo_c - Myo_m) - koff_myomg*Myo_m;
  SRB' = kon_sr*Ca_i*(Bmax_SR - SRB) - koff_sr*SRB;
  SLL_j' = kon_sll*Ca_j*(Bmax_SLlowj - SLL_j) - koff_sll*SLL_j;
  SLL_sl' = kon_sll*Ca_sl*(Bmax_SLlowsl - SLL_sl) - koff_sll*SLL_sl;
  SLH_j' = kon_slh*Ca_j*(Bmax_SLhighj - SLH_j) - koff_slh*SLH_j;
  SLH_sl' = kon_slh*Ca_sl*(Bmax_SLhighsl - SLH_sl) - koff_slh*SLH_sl;
  Csqn_b' = kon_csqn*Ca_sr*(Bmax_Csqn - Csqn_b) - koff_csqn*Csqn_b;
end
