// SBML level 2 version 4

model grange_holford_guentert_2001____main()
  // Originally created by libAntimony v1.4 (using libSBML 4.1.0-b2)

  // Compartments:
  compartment default_compartment = 1;

  // Parameters:
  A_dopa_b = 101;
  ka_b_dopa = 2.11;
  gastrointestinal_compartment_L_dopa_Q = 0.828;
  gastrointestinal_compartment_L_dopa_f_H = 0.13;
  CL_dopa_0 = 0.823;
  C_dopa_b = 0;
  body_compartment_L_dopa_V_dopa = 0.496;
  body_compartment_3_OMD_C_OMD_b = 0;
  body_compartment_3_OMD_CL_OMD_b = 0.012;
  body_compartment_3_OMD_V_OMD_b = 0.196;
  C_Ro_central = 0;
  L_dopa_clearance_ki = 0.00246;
  A_bens = 19.51;
  ka_Bens = 0.94;
  F_Bens = 0.022;
  C_bens_central = 0;
  central_compartment_benserazide_V1_B = 0.202;
  CLd_B = 0.072;
  C_bens_peripheral = 0;
  peripheral_compartment_benserazide_V2_B = 0.127;
  benserazide_clearance_CL_B = 1.67;
  benserazide_clearance_fm = 0.15;
  A_Ro = 1.3658;
  ka_M = 2.47;
  F_Ro = 1;
  central_compartment_Ro_V1_M = 0.0691;
  CLd_M = 1.06;
  central_compartment_Ro_CL_M = 4.29;
  C_Ro_peripheral = 0;
  peripheral_compartment_Ro_V2_M = 3.2;
  time_ = ;

  // Assignment rules:
  F_b_dopa := gastrointestinal_compartment_L_dopa_F_H*gastrointestinal_compartment_L_dopa_F_G;
  gastrointestinal_compartment_L_dopa_F_G := 0.244;
  gastrointestinal_compartment_L_dopa_F_H := 1 - gastrointestinal_compartment_L_dopa_CL_H/gastrointestinal_compartment_L_dopa_Q;
  gastrointestinal_compartment_L_dopa_CL_H := gastrointestinal_compartment_L_dopa_f_H*CL_dopa_0;
  CL_dopa := L_dopa_clearance_CL_AADC + CL_COMT + L_dopa_clearance_CL_REST;
  CL_COMT := CL_dopa_0*0.1;
  L_dopa_clearance_CL_AADC := L_dopa_clearance_CL_AADC0/(1 + C_Ro_central/L_dopa_clearance_ki);
  L_dopa_clearance_CL_AADC0 := CL_dopa_0*0.69;
  L_dopa_clearance_CL_REST := CL_dopa_0*0.21;
  CL_bens_total := benserazide_clearance_CL_B/(1 - benserazide_clearance_fm);
  CL_Ro := CL_bens_total*benserazide_clearance_fm;

  // Rate rules:
  A_dopa_b' = -ka_b_dopa*A_dopa_b;
  C_dopa_b' = 1/body_compartment_L_dopa_V_dopa*(ka_b_dopa*A_dopa_b*F_b_dopa - CL_dopa*C_dopa_b);
  body_compartment_3_OMD_C_OMD_b' = 1/body_compartment_3_OMD_V_OMD_b*(CL_COMT*C_dopa_b - body_compartment_3_OMD_CL_OMD_b*body_compartment_3_OMD_C_OMD_b);
  C_Ro_central' = 1/central_compartment_Ro_V1_M*(ka_M*A_Ro*F_Ro - central_compartment_Ro_CL_M*C_Ro_central + CL_Ro*C_bens_central + CLd_M*(C_Ro_peripheral - C_Ro_central));
  A_bens' = -ka_Bens*A_bens;
  C_bens_central' = 1/central_compartment_benserazide_V1_B*(ka_Bens*A_bens*F_Bens - CL_bens_total*C_bens_central + CLd_B*(C_bens_peripheral - C_bens_central));
  C_bens_peripheral' = 1/peripheral_compartment_benserazide_V2_B*CLd_B*(C_bens_central - C_bens_peripheral);
  A_Ro' = -ka_M*A_Ro;
  C_Ro_peripheral' = 1/peripheral_compartment_Ro_V2_M*CLd_M*(C_Ro_central - C_Ro_peripheral);
end
