// SBML level 2 version 4

model greenstein_wu_po_tomaselli_winslow_2000_version01____main()
  // Originally created by libAntimony v1.3 (using libSBML 4.1.0-b2)

  // Compartments:
  compartment default_compartment = 1;

  // Parameters:
  V = -95.87;
  R = 8.314;
  T = 310;
  F = 96.5;
  C_sc = 10e4;
  fast_sodium_current_g_Na = 12.8;
  Nao = 138;
  Nai = 10;
  m = 0.00024676;
  h = 0.99869;
  j = 0.99887;
  rapid_activating_delayed_rectifiyer_K_current_g_Kr = 0.0034;
  Ko = 4;
  Ki = 159.48;
  X_kr = 0.6935;
  slow_activating_delayed_rectifiyer_K_current_g_Ks = 0.00271;
  X_ks = 0.00014589;
  transient_outward_potassium_current_Kv4_3_current_P_C0 = ;
  transient_outward_potassium_current_Kv4_3_current_P_C1 = ;
  transient_outward_potassium_current_Kv4_3_current_P_C2 = ;
  transient_outward_potassium_current_Kv4_3_current_P_C3 = ;
  transient_outward_potassium_current_Kv4_3_current_P_CI0 = ;
  transient_outward_potassium_current_Kv4_3_current_P_CI1 = ;
  transient_outward_potassium_current_Kv4_3_current_P_CI2 = ;
  transient_outward_potassium_current_Kv4_3_current_P_CI3 = ;
  transient_outward_potassium_current_Kv4_3_current_P_O = ;
  transient_outward_potassium_current_Kv4_3_current_P_OI = ;
  transient_outward_potassium_current_Kv4_3_current_a_a = 0.02898;
  transient_outward_potassium_current_Kv4_3_current_b_a = 0.04684;
  transient_outward_potassium_current_Kv4_3_current_a_i = 3.7302e-4;
  transient_outward_potassium_current_Kv4_3_current_b_i = 5.374e-8;
  transient_outward_potassium_current_Kv4_3_current_alpha_a0 = 0.5437;
  transient_outward_potassium_current_Kv4_3_current_beta_a0 = 0.08019;
  transient_outward_potassium_current_Kv4_3_current_alpha_i0 = 0.04984;
  transient_outward_potassium_current_Kv4_3_current_beta_i0 = 8.1948e-4;
  transient_outward_potassium_current_Kv4_3_current_f1 = 1.8936;
  transient_outward_potassium_current_Kv4_3_current_f2 = 14.225;
  transient_outward_potassium_current_Kv4_3_current_f3 = 158.574;
  transient_outward_potassium_current_Kv4_3_current_f4 = 142.937;
  transient_outward_potassium_current_Kv4_3_current_b1 = 6.7735;
  transient_outward_potassium_current_Kv4_3_current_b2 = 15.621;
  transient_outward_potassium_current_Kv4_3_current_b3 = 28.753;
  transient_outward_potassium_current_Kv4_3_current_b4 = 524.576;
  transient_outward_potassium_current_Kv1_4_current_P_C0 = ;
  transient_outward_potassium_current_Kv1_4_current_P_C1 = ;
  transient_outward_potassium_current_Kv1_4_current_P_C2 = ;
  transient_outward_potassium_current_Kv1_4_current_P_C3 = ;
  transient_outward_potassium_current_Kv1_4_current_P_CI0 = ;
  transient_outward_potassium_current_Kv1_4_current_P_CI1 = ;
  transient_outward_potassium_current_Kv1_4_current_P_CI2 = ;
  transient_outward_potassium_current_Kv1_4_current_P_CI3 = ;
  transient_outward_potassium_current_Kv1_4_current_P_O = ;
  transient_outward_potassium_current_Kv1_4_current_P_OI = ;
  transient_outward_potassium_current_Kv1_4_current_a_a = 0.00695;
  transient_outward_potassium_current_Kv1_4_current_b_a = 0.08527;
  transient_outward_potassium_current_Kv1_4_current_a_i = 0;
  transient_outward_potassium_current_Kv1_4_current_b_i = 0;
  transient_outward_potassium_current_Kv1_4_current_alpha_a0 = 1.8931;
  transient_outward_potassium_current_Kv1_4_current_beta_a0 = 0.01179;
  transient_outward_potassium_current_Kv1_4_current_alpha_i0 = 0.002963;
  transient_outward_potassium_current_Kv1_4_current_beta_i0 = 1.0571e-4;
  transient_outward_potassium_current_Kv1_4_current_f1 = 0.2001;
  transient_outward_potassium_current_Kv1_4_current_f2 = 0.3203;
  transient_outward_potassium_current_Kv1_4_current_f3 = 13.509;
  transient_outward_potassium_current_Kv1_4_current_f4 = 1151.765;
  transient_outward_potassium_current_Kv1_4_current_b1 = 2.23;
  transient_outward_potassium_current_Kv1_4_current_b2 = 12;
  transient_outward_potassium_current_Kv1_4_current_b3 = 5.37;
  transient_outward_potassium_current_Kv1_4_current_b4 = 5.24;
  transient_outward_potassium_current_Kv1_4_current_P_Kv1_4 = 1.709e-6;
  time_independent_potassium_current_g_K1 = 2.8;
  time_independent_potassium_current_K_mK1 = 13;
  plateau_potassium_current_g_Kp = 0.002216;
  Na_Ca_exchanger_K_mCa = 1.38;
  Na_Ca_exchanger_K_mNa = 87.5;
  Na_Ca_exchanger_K_NaCa = 0.3;
  Na_Ca_exchanger_K_sat = 0.2;
  Na_Ca_exchanger_eta = 0.35;
  Cai = 8.464e-5;
  Cao = 2;
  sodium_potassium_pump_I_NaK = 0.693;
  sodium_potassium_pump_K_mNai = 10;
  sodium_potassium_pump_K_mKo = 1.5;
  sarcolemmal_calcium_pump_K_mpCa = 5e-5;
  sarcolemmal_calcium_pump_I_pCa = 0.05;
  calcium_background_current_g_Cab = 0.0003842;
  sodium_background_current_g_Nab = 0.0031;
  L_type_Ca_current_P_Ca = 0.0003125;
  L_type_Ca_current_P_K = 5.79e-7;
  L_type_Ca_current_i_Ca_half = -0.265;
  L_type_Ca_current_O = 0;
  L_type_Ca_current_O_Ca = 0;
  L_type_Ca_current_a = 2;
  L_type_Ca_current_b = 2;
  L_type_Ca_current_g = 2;
  L_type_Ca_current_f = 0.3;
  L_type_Ca_current_g_ = 7;
  L_type_Ca_current_f_ = 0.005;
  L_type_Ca_current_omega = 0.01;
  L_type_Ca_current_C0 = 0.99802;
  L_type_Ca_current_C1 = 1.9544e-6;
  L_type_Ca_current_C2 = 0;
  L_type_Ca_current_C3 = 0;
  L_type_Ca_current_C4 = 0;
  L_type_Ca_current_C_Ca0 = 0.0019734;
  L_type_Ca_current_C_Ca1 = 0;
  L_type_Ca_current_C_Ca2 = 0;
  L_type_Ca_current_C_Ca3 = 0;
  L_type_Ca_current_C_Ca4 = 0;
  Ca_ss = 0.0001315;
  y = 0.7959;
  RyR_channel_v1 = 1.8;
  RyR_channel_k_a_plus = 12150000000;
  RyR_channel_k_a_minus = 0.576;
  RyR_channel_k_b_plus = 4050000;
  RyR_channel_k_b_minus = 1.93;
  RyR_channel_k_c_plus = 0.1;
  RyR_channel_k_c_minus = 0.0008;
  RyR_channel_P_O1 = 0.0006027;
  RyR_channel_P_O2 = 2.882e-9;
  RyR_channel_P_C1 = 0.4929;
  RyR_channel_P_C2 = 0.5056;
  RyR_channel_n = 4;
  RyR_channel_m = 3;
  Ca_JSR = 0.2616;
  SERCA2a_pump_K_fb = 0.000168;
  SERCA2a_pump_K_rb = 3.29;
  SERCA2a_pump_Vmaxf = 8.13e-5;
  SERCA2a_pump_Vmaxr = 0.000318;
  SERCA2a_pump_K_SR = 1;
  SERCA2a_pump_N_fb = 1.2;
  SERCA2a_pump_N_rb = 1;
  Ca_NSR = 0.262;
  intracellular_Ca_fluxes_tau_tr = 0.5747;
  intracellular_Ca_fluxes_tau_xfer = 26.7;
  intracellular_Ca_fluxes_HTRPNCa = 0.13664;
  intracellular_Ca_fluxes_LTRPNCa = 0.0055443;
  intracellular_Ca_fluxes_HTRPN_tot = 0.14;
  intracellular_Ca_fluxes_LTRPN_tot = 0.07;
  intracellular_Ca_fluxes_k_htrpn_plus = 20;
  intracellular_Ca_fluxes_k_htrpn_minus = 6.6e-6;
  intracellular_Ca_fluxes_k_ltrpn_plus = 40;
  intracellular_Ca_fluxes_k_ltrpn_minus = 0.04;
  intracellular_ion_concentrations_A_cap = 0.0001534;
  intracellular_ion_concentrations_V_myo = 2.584e-5;
  intracellular_ion_concentrations_V_JSR = 1.6e-7;
  intracellular_ion_concentrations_V_NSR = 2.1e-6;
  intracellular_ion_concentrations_V_SS = 1.2e-9;
  intracellular_ion_concentrations_K_mCMDN = 0.00238;
  intracellular_ion_concentrations_K_mCSQN = 0.8;
  intracellular_ion_concentrations_CMDN_tot = 0.05;
  intracellular_ion_concentrations_CSQN_tot = 15;
  time_ = ;
  transient_outward_potassium_current_Kv4_3_current_g_Kv4_3 = ;
  transient_outward_potassium_current_Kv1_4_current_alpha = ;
  intracellular_Ca_fluxes_d = ;

  // Assignment rules:
  i_Na := fast_sodium_current_g_Na*m^3*h*j*(V - E_Na);
  i_Ca := L_type_Ca_current_i_Ca_max*y*(L_type_Ca_current_O + L_type_Ca_current_O_Ca);
  i_Ca_K := L_type_Ca_current_p_k/C_sc*y*(L_type_Ca_current_O + L_type_Ca_current_O_Ca)*(V*F^2/(R*T))*((Ki*exp(V*F/(R*T)) - Ko)/(exp(V*F/(R*T)) - 1));
  i_Kr := rapid_activating_delayed_rectifiyer_K_current_g_Kr*rapid_activating_delayed_rectifiyer_K_current_f_Ko*rapid_activating_delayed_rectifiyer_K_current_R_V*X_kr*(V - E_K);
  i_Ks := slow_activating_delayed_rectifiyer_K_current_g_Ks*X_ks^2*(V - slow_activating_delayed_rectifiyer_K_current_E_Ks);
  i_to1 := i_Kv4_3 + i_Kv1_4;
  i_K1 := time_independent_potassium_current_g_K1*K1_infinity_V*(Ko/(Ko + time_independent_potassium_current_K_mK1))*(V - E_K);
  i_Kp := plateau_potassium_current_g_Kp*Kp_V*(V - E_K);
  i_NaCa := Na_Ca_exchanger_K_NaCa*(5000/(Na_Ca_exchanger_K_mNa^3 + Nao^3))*(1/(Na_Ca_exchanger_K_mCa + Cao))*(1/(1 + Na_Ca_exchanger_K_sat*exp((Na_Ca_exchanger_eta - 1)*V*(F/(R*T)))))*(exp(Na_Ca_exchanger_eta*V*(F/(R*T)))*Nai^3*Cao - exp((Na_Ca_exchanger_eta - 1)*V*(F/(R*T)))*Nao^3*Cai);
  i_NaK := sodium_potassium_pump_I_NaK*sodium_potassium_pump_f_NaK*(1/(1 + (sodium_potassium_pump_K_mNai/Nai)^1.5))*(Ko/(Ko + sodium_potassium_pump_K_mKo));
  i_p_Ca := sarcolemmal_calcium_pump_I_pCa*(Cai/(sarcolemmal_calcium_pump_K_mpCa + Cai));
  i_Ca_b := calcium_background_current_g_Cab*(V - calcium_background_current_E_Ca);
  i_Na_b := sodium_background_current_g_Nab*(V - E_Na);
  E_Na := R*T/F*ln(Nao/Nai);
  fast_sodium_current_fast_sodium_current_m_gate_alpha_m := 0.32*(V + 47.13)/(1 - exp(-0.1*(V + 47.13)));
  fast_sodium_current_fast_sodium_current_m_gate_beta_m := 0.08*exp(-V/11);
  fast_sodium_current_fast_sodium_current_h_gate_alpha_h := ;
  fast_sodium_current_fast_sodium_current_h_gate_beta_h := ;
  fast_sodium_current_fast_sodium_current_j_gate_alpha_j := ;
  fast_sodium_current_fast_sodium_current_j_gate_beta_j := ;
  E_K := R*T/F*ln(Ko/Ki);
  rapid_activating_delayed_rectifiyer_K_current_f_Ko := sqrt(Ko/4);
  rapid_activating_delayed_rectifiyer_K_current_R_V := 1/(1 + 1.4945*exp(0.0446*V));
  rapid_activating_delayed_rectifiyer_K_current_rapid_activating_delayed_rectifiyer_K_current_X_kr_gate_K12 := exp(-5.495 + 0.169*V);
  rapid_activating_delayed_rectifiyer_K_current_rapid_activating_delayed_rectifiyer_K_current_X_kr_gate_K21 := exp(-7.677 - 0.0128*V);
  slow_activating_delayed_rectifiyer_K_current_E_Ks := R*T/F*ln((Ko + 0.01833*Nao)/(Ki + 0.01833*Nai));
  slow_activating_delayed_rectifiyer_K_current_slow_activating_delayed_rectifiyer_K_current_X_ks_gate_tau_X_ks := 1/(7.19e-5*(V - 10)/(1 - exp(-0.148*(V - 10))) + 0.000131*(V - 10)/(exp(0.0687*(V - 10)) - 1));
  slow_activating_delayed_rectifiyer_K_current_slow_activating_delayed_rectifiyer_K_current_X_ks_gate_X_ks_infinity := 1/(1 + exp(-(V - 24.7)/13.6));
  i_Kv4_3 := transient_outward_potassium_current_Kv4_3_current_g_Kv4_3*transient_outward_potassium_current_Kv4_3_current_P_open*(V - E_K);
  i_Kv1_4 := transient_outward_potassium_current_Kv1_4_current_i_Kv1_4_K + transient_outward_potassium_current_Kv1_4_current_i_Kv1_4_Na;
  transient_outward_potassium_current_Kv4_3_current_P_open := transient_outward_potassium_current_Kv4_3_current_P_O + transient_outward_potassium_current_Kv4_3_current_P_OI;
  transient_outward_potassium_current_Kv4_3_current_alpha_a := transient_outward_potassium_current_Kv4_3_current_alpha_a0*exp(transient_outward_potassium_current_Kv4_3_current_a_a);
  transient_outward_potassium_current_Kv4_3_current_beta_a := transient_outward_potassium_current_Kv4_3_current_beta_a0*exp(-transient_outward_potassium_current_Kv4_3_current_b_a);
  transient_outward_potassium_current_Kv4_3_current_alpha_i := transient_outward_potassium_current_Kv4_3_current_alpha_i0*exp(-transient_outward_potassium_current_Kv4_3_current_a_i);
  transient_outward_potassium_current_Kv4_3_current_beta_i := transient_outward_potassium_current_Kv4_3_current_beta_i0*exp(transient_outward_potassium_current_Kv4_3_current_b_i);
  transient_outward_potassium_current_Kv1_4_current_i_Kv1_4_K := transient_outward_potassium_current_Kv1_4_current_P_Kv1_4/C_sc*(F^2*V/(R*T))*transient_outward_potassium_current_Kv1_4_current_P_open*((Ki - Ko*exp(-(V*F)/(R*T)))/(1 - exp(-(V*F)/(R*T))));
  transient_outward_potassium_current_Kv1_4_current_i_Kv1_4_Na := transient_outward_potassium_current_Kv1_4_current_alpha*transient_outward_potassium_current_Kv1_4_current_P_Kv1_4/C_sc*(F^2*V/(R*T))*transient_outward_potassium_current_Kv1_4_current_P_open*((Ki - Ko*exp(-(V*F)/(R*T)))/(1 - exp(-(V*F)/(R*T))));
  transient_outward_potassium_current_Kv1_4_current_P_open := transient_outward_potassium_current_Kv1_4_current_P_O + transient_outward_potassium_current_Kv1_4_current_P_OI;
  transient_outward_potassium_current_Kv1_4_current_alpha_a := transient_outward_potassium_current_Kv1_4_current_alpha_a0*exp(transient_outward_potassium_current_Kv1_4_current_a_a);
  transient_outward_potassium_current_Kv1_4_current_beta_a := transient_outward_potassium_current_Kv1_4_current_beta_a0*exp(-transient_outward_potassium_current_Kv1_4_current_b_a);
  transient_outward_potassium_current_Kv1_4_current_alpha_i := transient_outward_potassium_current_Kv1_4_current_alpha_i0*exp(-transient_outward_potassium_current_Kv1_4_current_a_i);
  transient_outward_potassium_current_Kv1_4_current_beta_i := transient_outward_potassium_current_Kv1_4_current_beta_i0*exp(transient_outward_potassium_current_Kv1_4_current_b_i);
  K1_infinity_V := 1/(2 + exp(1.5*(F/(R*T))*(V - E_K)));
  Kp_V := 1/(1 + exp((7.488 - V)/5.98));
  sodium_potassium_pump_f_NaK := 1/(1 + 0.1245*exp(-0.1*(V*F/(R*T))) + 0.0365*sodium_potassium_pump_sigma*exp(-(V*F/(R*T))));
  sodium_potassium_pump_sigma := 1/7*(exp(Nao/67.3) - 1);
  calcium_background_current_E_Ca := R*T/(2*F)*ln(Cao/Cai);
  L_type_Ca_current_p_k := L_type_Ca_current_P_K/(1 + L_type_Ca_current_i_Ca_max/L_type_Ca_current_i_Ca_half);
  L_type_Ca_current_i_Ca_max := L_type_Ca_current_P_Ca/C_sc*(4*V*F^2/(R*T))*((0.001*exp(2*V*F/(R*T)) - 0.341*Cao)/(exp(2*V*F/(R*T)) - 1));
  L_type_Ca_current_alpha := 0.4*exp((V + 2)/10);
  L_type_Ca_current_beta := 0.05*exp(-(V + 2)/13);
  L_type_Ca_current_gamma := 0.10375*Ca_ss;
  L_type_Ca_current_alpha_a := L_type_Ca_current_alpha*L_type_Ca_current_a;
  L_type_Ca_current_beta_b := L_type_Ca_current_beta/L_type_Ca_current_b;
  L_type_Ca_current_L_type_Ca_current_y_gate_y_infinity := 0.8/(1 + exp((V + 12.5)/5)) + 0.2;
  L_type_Ca_current_L_type_Ca_current_y_gate_tau_y := 20 + 600/(1 + exp((V + 20)/9.5));
  J_rel := RyR_channel_v1*(RyR_channel_P_O1 + RyR_channel_P_O2)*(Ca_JSR - Ca_ss);
  J_up := SERCA2a_pump_K_SR*((SERCA2a_pump_Vmaxf*SERCA2a_pump_fb - SERCA2a_pump_Vmaxr*SERCA2a_pump_rb)/(1 + SERCA2a_pump_fb + SERCA2a_pump_rb));
  SERCA2a_pump_fb := (Cai/SERCA2a_pump_K_fb)^SERCA2a_pump_N_fb;
  SERCA2a_pump_rb := (Ca_NSR/SERCA2a_pump_K_rb)^SERCA2a_pump_N_rb;
  J_tr := (Ca_NSR - Ca_JSR)/intracellular_Ca_fluxes_tau_tr;
  J_xfer := (Ca_ss - Cai)/intracellular_Ca_fluxes_tau_xfer;
  J_trpn := intracellular_Ca_fluxes_J_HTRPNCa + intracellular_Ca_fluxes_J_LTRPNCa;
  intracellular_Ca_fluxes_J_HTRPNCa := intracellular_Ca_fluxes_d(intracellular_Ca_fluxes_HTRPNCa)/intracellular_Ca_fluxes_d(time_);
  intracellular_Ca_fluxes_J_LTRPNCa := intracellular_Ca_fluxes_d(intracellular_Ca_fluxes_LTRPNCa)/intracellular_Ca_fluxes_d(time_);
  intracellular_ion_concentrations_beta_i := 1/(1 + intracellular_ion_concentrations_CMDN_tot*intracellular_ion_concentrations_K_mCMDN/(intracellular_ion_concentrations_K_mCMDN + Cai^2));
  intracellular_ion_concentrations_beta_SS := 1/(1 + intracellular_ion_concentrations_CMDN_tot*intracellular_ion_concentrations_K_mCMDN/(intracellular_ion_concentrations_K_mCMDN + Ca_ss^2));
  intracellular_ion_concentrations_beta_JSR := 1/(1 + intracellular_ion_concentrations_CSQN_tot*intracellular_ion_concentrations_K_mCSQN/(intracellular_ion_concentrations_K_mCSQN + Ca_JSR^2));

  // Rate rules:
  V' = -(i_Na + i_Ca + i_Ca_K + i_Kr + i_Ks + i_to1 + i_K1 + i_Kp + i_NaCa + i_NaK + i_p_Ca + i_Na_b + i_Ca_b)/C_sc;
  Nai' = -(i_Na + i_Na_b + i_NaCa*3 + i_NaK*3)*(intracellular_ion_concentrations_A_cap*C_sc/(intracellular_ion_concentrations_V_myo*F));
  m' = fast_sodium_current_fast_sodium_current_m_gate_alpha_m*(1 - m) - fast_sodium_current_fast_sodium_current_m_gate_beta_m*m;
  h' = fast_sodium_current_fast_sodium_current_h_gate_alpha_h*(1 - h) - fast_sodium_current_fast_sodium_current_h_gate_beta_h*h;
  j' = fast_sodium_current_fast_sodium_current_j_gate_alpha_j*(1 - j) - fast_sodium_current_fast_sodium_current_j_gate_beta_j*j;
  Ki' = -(i_Ca_K + i_Kr + i_Ks + i_K1 + i_Kp + i_to1 + i_NaK*(-2))*(intracellular_ion_concentrations_A_cap*C_sc/(intracellular_ion_concentrations_V_myo*F));
  X_kr' = rapid_activating_delayed_rectifiyer_K_current_rapid_activating_delayed_rectifiyer_K_current_X_kr_gate_K12*(1 - X_kr) - rapid_activating_delayed_rectifiyer_K_current_rapid_activating_delayed_rectifiyer_K_current_X_kr_gate_K12*X_kr;
  X_ks' = (slow_activating_delayed_rectifiyer_K_current_slow_activating_delayed_rectifiyer_K_current_X_ks_gate_X_ks_infinity - X_ks)/slow_activating_delayed_rectifiyer_K_current_slow_activating_delayed_rectifiyer_K_current_X_ks_gate_tau_X_ks;
  transient_outward_potassium_current_Kv4_3_current_P_C0' = transient_outward_potassium_current_Kv4_3_current_alpha_i*transient_outward_potassium_current_Kv4_3_current_P_CI0 + transient_outward_potassium_current_Kv4_3_current_beta_a*transient_outward_potassium_current_Kv4_3_current_P_C1 - (transient_outward_potassium_current_Kv4_3_current_beta_i + 4*transient_outward_potassium_current_Kv4_3_current_alpha_a)*transient_outward_potassium_current_Kv4_3_current_P_C0;
  transient_outward_potassium_current_Kv4_3_current_P_C1' = transient_outward_potassium_current_Kv4_3_current_alpha_i/transient_outward_potassium_current_Kv4_3_current_b1*transient_outward_potassium_current_Kv4_3_current_P_CI1 + 4*transient_outward_potassium_current_Kv4_3_current_alpha_a*transient_outward_potassium_current_Kv4_3_current_P_C0 + 2*transient_outward_potassium_current_Kv4_3_current_beta_a*transient_outward_potassium_current_Kv4_3_current_P_C2 - (transient_outward_potassium_current_Kv4_3_current_f1*transient_outward_potassium_current_Kv4_3_current_beta_i + transient_outward_potassium_current_Kv4_3_current_beta_a + 3*transient_outward_potassium_current_Kv4_3_current_alpha_a)*transient_outward_potassium_current_Kv4_3_current_P_C1;
  transient_outward_potassium_current_Kv4_3_current_P_C2' = transient_outward_potassium_current_Kv4_3_current_alpha_i/transient_outward_potassium_current_Kv4_3_current_b2*transient_outward_potassium_current_Kv4_3_current_P_CI2 + 3*transient_outward_potassium_current_Kv4_3_current_alpha_a*transient_outward_potassium_current_Kv4_3_current_P_C1 + 3*transient_outward_potassium_current_Kv4_3_current_beta_a*transient_outward_potassium_current_Kv4_3_current_P_C3 - (transient_outward_potassium_current_Kv4_3_current_f2*transient_outward_potassium_current_Kv4_3_current_beta_i + 2*transient_outward_potassium_current_Kv4_3_current_beta_a + 2*transient_outward_potassium_current_Kv4_3_current_alpha_a)*transient_outward_potassium_current_Kv4_3_current_P_C2;
  transient_outward_potassium_current_Kv4_3_current_P_C3' = transient_outward_potassium_current_Kv4_3_current_alpha_i/transient_outward_potassium_current_Kv4_3_current_b3*transient_outward_potassium_current_Kv4_3_current_P_CI3 + 2*transient_outward_potassium_current_Kv4_3_current_alpha_a*transient_outward_potassium_current_Kv4_3_current_P_C2 + 4*transient_outward_potassium_current_Kv4_3_current_beta_a*transient_outward_potassium_current_Kv4_3_current_P_O - (transient_outward_potassium_current_Kv4_3_current_f3*transient_outward_potassium_current_Kv4_3_current_beta_i + 3*transient_outward_potassium_current_Kv4_3_current_beta_a + transient_outward_potassium_current_Kv4_3_current_alpha_a)*transient_outward_potassium_current_Kv4_3_current_P_C3;
  transient_outward_potassium_current_Kv4_3_current_P_CI0' = transient_outward_potassium_current_Kv4_3_current_beta_i*transient_outward_potassium_current_Kv4_3_current_P_C0 + transient_outward_potassium_current_Kv4_3_current_beta_a/transient_outward_potassium_current_Kv4_3_current_f1*transient_outward_potassium_current_Kv4_3_current_P_C1 - (transient_outward_potassium_current_Kv4_3_current_alpha_i + transient_outward_potassium_current_Kv4_3_current_b1*4*transient_outward_potassium_current_Kv4_3_current_alpha_a)*transient_outward_potassium_current_Kv4_3_current_P_CI0;
  transient_outward_potassium_current_Kv4_3_current_P_CI1' = transient_outward_potassium_current_Kv4_3_current_f1*2*transient_outward_potassium_current_Kv4_3_current_beta_a/transient_outward_potassium_current_Kv4_3_current_f2*transient_outward_potassium_current_Kv4_3_current_P_CI2 + transient_outward_potassium_current_Kv4_3_current_b1*4*transient_outward_potassium_current_Kv4_3_current_alpha_a*transient_outward_potassium_current_Kv4_3_current_P_CI0 + transient_outward_potassium_current_Kv4_3_current_f1*transient_outward_potassium_current_Kv4_3_current_beta_i*transient_outward_potassium_current_Kv4_3_current_P_C1 - (transient_outward_potassium_current_Kv4_3_current_b2*3*transient_outward_potassium_current_Kv4_3_current_alpha_a/transient_outward_potassium_current_Kv4_3_current_b1 + transient_outward_potassium_current_Kv4_3_current_alpha_i/transient_outward_potassium_current_Kv4_3_current_b1 + transient_outward_potassium_current_Kv4_3_current_beta_a/transient_outward_potassium_current_Kv4_3_current_f1)*transient_outward_potassium_current_Kv4_3_current_P_CI1;
  transient_outward_potassium_current_Kv4_3_current_P_CI2' = transient_outward_potassium_current_Kv4_3_current_f2*3*transient_outward_potassium_current_Kv4_3_current_beta_a/transient_outward_potassium_current_Kv4_3_current_f3*transient_outward_potassium_current_Kv4_3_current_P_CI3 + transient_outward_potassium_current_Kv4_3_current_b2*3*transient_outward_potassium_current_Kv4_3_current_alpha_a/transient_outward_potassium_current_Kv4_3_current_b1*transient_outward_potassium_current_Kv4_3_current_P_CI1 + transient_outward_potassium_current_Kv4_3_current_f2*transient_outward_potassium_current_Kv4_3_current_beta_i*transient_outward_potassium_current_Kv4_3_current_P_C2 - (transient_outward_potassium_current_Kv4_3_current_b3*2*transient_outward_potassium_current_Kv4_3_current_alpha_a/transient_outward_potassium_current_Kv4_3_current_b2 + transient_outward_potassium_current_Kv4_3_current_alpha_i/transient_outward_potassium_current_Kv4_3_current_b2 + transient_outward_potassium_current_Kv4_3_current_f1*2*transient_outward_potassium_current_Kv4_3_current_beta_a/transient_outward_potassium_current_Kv4_3_current_f2)*transient_outward_potassium_current_Kv4_3_current_P_CI2;
  transient_outward_potassium_current_Kv4_3_current_P_CI3' = transient_outward_potassium_current_Kv4_3_current_f3*4*transient_outward_potassium_current_Kv4_3_current_beta_a/transient_outward_potassium_current_Kv4_3_current_f4*transient_outward_potassium_current_Kv4_3_current_P_OI + transient_outward_potassium_current_Kv4_3_current_b3*2*transient_outward_potassium_current_Kv4_3_current_alpha_a/transient_outward_potassium_current_Kv4_3_current_b2*transient_outward_potassium_current_Kv4_3_current_P_CI2 + transient_outward_potassium_current_Kv4_3_current_f3*transient_outward_potassium_current_Kv4_3_current_beta_i*transient_outward_potassium_current_Kv4_3_current_P_C3 - (transient_outward_potassium_current_Kv4_3_current_b4*transient_outward_potassium_current_Kv4_3_current_alpha_a/transient_outward_potassium_current_Kv4_3_current_b3 + transient_outward_potassium_current_Kv4_3_current_alpha_i/transient_outward_potassium_current_Kv4_3_current_b3 + transient_outward_potassium_current_Kv4_3_current_f2*3*transient_outward_potassium_current_Kv4_3_current_beta_a/transient_outward_potassium_current_Kv4_3_current_f3)*transient_outward_potassium_current_Kv4_3_current_P_CI3;
  transient_outward_potassium_current_Kv4_3_current_P_O' = transient_outward_potassium_current_Kv4_3_current_alpha_a*transient_outward_potassium_current_Kv4_3_current_P_C3 + transient_outward_potassium_current_Kv4_3_current_alpha_i/transient_outward_potassium_current_Kv4_3_current_b4*transient_outward_potassium_current_Kv4_3_current_P_OI - (transient_outward_potassium_current_Kv4_3_current_f4*transient_outward_potassium_current_Kv4_3_current_beta_i + 4*transient_outward_potassium_current_Kv4_3_current_beta_a)*transient_outward_potassium_current_Kv4_3_current_P_O;
  transient_outward_potassium_current_Kv4_3_current_P_OI' = transient_outward_potassium_current_Kv4_3_current_b4*transient_outward_potassium_current_Kv4_3_current_alpha_a/transient_outward_potassium_current_Kv4_3_current_b3*transient_outward_potassium_current_Kv4_3_current_P_CI3 + transient_outward_potassium_current_Kv4_3_current_f4*transient_outward_potassium_current_Kv4_3_current_beta_i*transient_outward_potassium_current_Kv4_3_current_P_O - (transient_outward_potassium_current_Kv4_3_current_alpha_i/transient_outward_potassium_current_Kv4_3_current_b4 + transient_outward_potassium_current_Kv4_3_current_f3*4*transient_outward_potassium_current_Kv4_3_current_beta_a/transient_outward_potassium_current_Kv4_3_current_f4)*transient_outward_potassium_current_Kv4_3_current_P_OI;
  transient_outward_potassium_current_Kv1_4_current_P_C0' = transient_outward_potassium_current_Kv1_4_current_alpha_i*transient_outward_potassium_current_Kv1_4_current_P_CI0 + transient_outward_potassium_current_Kv1_4_current_beta_a*transient_outward_potassium_current_Kv1_4_current_P_C1 - (transient_outward_potassium_current_Kv1_4_current_beta_i + 4*transient_outward_potassium_current_Kv1_4_current_alpha_a)*transient_outward_potassium_current_Kv1_4_current_P_C0;
  transient_outward_potassium_current_Kv1_4_current_P_C1' = transient_outward_potassium_current_Kv1_4_current_alpha_i/transient_outward_potassium_current_Kv1_4_current_b1*transient_outward_potassium_current_Kv1_4_current_P_CI1 + 4*transient_outward_potassium_current_Kv1_4_current_alpha_a*transient_outward_potassium_current_Kv1_4_current_P_C0 + 2*transient_outward_potassium_current_Kv1_4_current_beta_a*transient_outward_potassium_current_Kv1_4_current_P_C2 - (transient_outward_potassium_current_Kv1_4_current_f1*transient_outward_potassium_current_Kv1_4_current_beta_i + transient_outward_potassium_current_Kv1_4_current_beta_a + 3*transient_outward_potassium_current_Kv1_4_current_alpha_a)*transient_outward_potassium_current_Kv1_4_current_P_C1;
  transient_outward_potassium_current_Kv1_4_current_P_C2' = transient_outward_potassium_current_Kv1_4_current_alpha_i/transient_outward_potassium_current_Kv1_4_current_b2*transient_outward_potassium_current_Kv1_4_current_P_CI2 + 3*transient_outward_potassium_current_Kv1_4_current_alpha_a*transient_outward_potassium_current_Kv1_4_current_P_C1 + 3*transient_outward_potassium_current_Kv1_4_current_beta_a*transient_outward_potassium_current_Kv1_4_current_P_C3 - (transient_outward_potassium_current_Kv1_4_current_f2*transient_outward_potassium_current_Kv1_4_current_beta_i + 2*transient_outward_potassium_current_Kv1_4_current_beta_a + 2*transient_outward_potassium_current_Kv1_4_current_alpha_a)*transient_outward_potassium_current_Kv1_4_current_P_C2;
  transient_outward_potassium_current_Kv1_4_current_P_C3' = transient_outward_potassium_current_Kv1_4_current_alpha_i/transient_outward_potassium_current_Kv1_4_current_b3*transient_outward_potassium_current_Kv1_4_current_P_CI3 + 2*transient_outward_potassium_current_Kv1_4_current_alpha_a*transient_outward_potassium_current_Kv1_4_current_P_C2 + 4*transient_outward_potassium_current_Kv1_4_current_beta_a*transient_outward_potassium_current_Kv1_4_current_P_O - (transient_outward_potassium_current_Kv1_4_current_f3*transient_outward_potassium_current_Kv1_4_current_beta_i + 3*transient_outward_potassium_current_Kv1_4_current_beta_a + transient_outward_potassium_current_Kv1_4_current_alpha_a)*transient_outward_potassium_current_Kv1_4_current_P_C3;
  transient_outward_potassium_current_Kv1_4_current_P_CI0' = transient_outward_potassium_current_Kv1_4_current_beta_i*transient_outward_potassium_current_Kv1_4_current_P_C0 + transient_outward_potassium_current_Kv1_4_current_beta_a/transient_outward_potassium_current_Kv1_4_current_f1*transient_outward_potassium_current_Kv1_4_current_P_C1 - (transient_outward_potassium_current_Kv1_4_current_alpha_i + transient_outward_potassium_current_Kv1_4_current_b1*4*transient_outward_potassium_current_Kv1_4_current_alpha_a)*transient_outward_potassium_current_Kv1_4_current_P_CI0;
  transient_outward_potassium_current_Kv1_4_current_P_CI1' = transient_outward_potassium_current_Kv1_4_current_f1*2*transient_outward_potassium_current_Kv1_4_current_beta_a/transient_outward_potassium_current_Kv1_4_current_f2*transient_outward_potassium_current_Kv1_4_current_P_CI2 + transient_outward_potassium_current_Kv1_4_current_b1*4*transient_outward_potassium_current_Kv1_4_current_alpha_a*transient_outward_potassium_current_Kv1_4_current_P_CI0 + transient_outward_potassium_current_Kv1_4_current_f1*transient_outward_potassium_current_Kv1_4_current_beta_i*transient_outward_potassium_current_Kv1_4_current_P_C1 - (transient_outward_potassium_current_Kv1_4_current_b2*3*transient_outward_potassium_current_Kv1_4_current_alpha_a/transient_outward_potassium_current_Kv1_4_current_b1 + transient_outward_potassium_current_Kv1_4_current_alpha_i/transient_outward_potassium_current_Kv1_4_current_b1 + transient_outward_potassium_current_Kv1_4_current_beta_a/transient_outward_potassium_current_Kv1_4_current_f1)*transient_outward_potassium_current_Kv1_4_current_P_CI1;
  transient_outward_potassium_current_Kv1_4_current_P_CI2' = transient_outward_potassium_current_Kv1_4_current_f2*3*transient_outward_potassium_current_Kv1_4_current_beta_a/transient_outward_potassium_current_Kv1_4_current_f3*transient_outward_potassium_current_Kv1_4_current_P_CI3 + transient_outward_potassium_current_Kv1_4_current_b2*3*transient_outward_potassium_current_Kv1_4_current_alpha_a/transient_outward_potassium_current_Kv1_4_current_b1*transient_outward_potassium_current_Kv1_4_current_P_CI1 + transient_outward_potassium_current_Kv1_4_current_f2*transient_outward_potassium_current_Kv1_4_current_beta_i*transient_outward_potassium_current_Kv1_4_current_P_C2 - (transient_outward_potassium_current_Kv1_4_current_b3*2*transient_outward_potassium_current_Kv1_4_current_alpha_a/transient_outward_potassium_current_Kv1_4_current_b2 + transient_outward_potassium_current_Kv1_4_current_alpha_i/transient_outward_potassium_current_Kv1_4_current_b2 + transient_outward_potassium_current_Kv1_4_current_f1*2*transient_outward_potassium_current_Kv1_4_current_beta_a/transient_outward_potassium_current_Kv1_4_current_f2)*transient_outward_potassium_current_Kv1_4_current_P_CI2;
  transient_outward_potassium_current_Kv1_4_current_P_CI3' = transient_outward_potassium_current_Kv1_4_current_f3*4*transient_outward_potassium_current_Kv1_4_current_beta_a/transient_outward_potassium_current_Kv1_4_current_f4*transient_outward_potassium_current_Kv1_4_current_P_OI + transient_outward_potassium_current_Kv1_4_current_b3*2*transient_outward_potassium_current_Kv1_4_current_alpha_a/transient_outward_potassium_current_Kv1_4_current_b2*transient_outward_potassium_current_Kv1_4_current_P_CI2 + transient_outward_potassium_current_Kv1_4_current_f3*transient_outward_potassium_current_Kv1_4_current_beta_i*transient_outward_potassium_current_Kv1_4_current_P_C3 - (transient_outward_potassium_current_Kv1_4_current_b4*transient_outward_potassium_current_Kv1_4_current_alpha_a/transient_outward_potassium_current_Kv1_4_current_b3 + transient_outward_potassium_current_Kv1_4_current_alpha_i/transient_outward_potassium_current_Kv1_4_current_b3 + transient_outward_potassium_current_Kv1_4_current_f2*3*transient_outward_potassium_current_Kv1_4_current_beta_a/transient_outward_potassium_current_Kv1_4_current_f3)*transient_outward_potassium_current_Kv1_4_current_P_CI3;
  transient_outward_potassium_current_Kv1_4_current_P_O' = transient_outward_potassium_current_Kv1_4_current_alpha_a*transient_outward_potassium_current_Kv1_4_current_P_C3 + transient_outward_potassium_current_Kv1_4_current_alpha_i/transient_outward_potassium_current_Kv1_4_current_b4*transient_outward_potassium_current_Kv1_4_current_P_OI - (transient_outward_potassium_current_Kv1_4_current_f4*transient_outward_potassium_current_Kv1_4_current_beta_i + 4*transient_outward_potassium_current_Kv1_4_current_beta_a)*transient_outward_potassium_current_Kv1_4_current_P_O;
  transient_outward_potassium_current_Kv1_4_current_P_OI' = transient_outward_potassium_current_Kv1_4_current_b4*transient_outward_potassium_current_Kv1_4_current_alpha_a/transient_outward_potassium_current_Kv1_4_current_b3*transient_outward_potassium_current_Kv1_4_current_P_CI3 + transient_outward_potassium_current_Kv1_4_current_f4*transient_outward_potassium_current_Kv1_4_current_beta_i*transient_outward_potassium_current_Kv1_4_current_P_O - (transient_outward_potassium_current_Kv1_4_current_alpha_i/transient_outward_potassium_current_Kv1_4_current_b4 + transient_outward_potassium_current_Kv1_4_current_f3*4*transient_outward_potassium_current_Kv1_4_current_beta_a/transient_outward_potassium_current_Kv1_4_current_f4)*transient_outward_potassium_current_Kv1_4_current_P_OI;
  Cai' = intracellular_ion_concentrations_beta_i*(J_xfer - (J_up + J_trpn + (i_Ca_b - 2*i_NaCa + i_p_Ca)*(intracellular_ion_concentrations_A_cap*C_sc/(2*intracellular_ion_concentrations_V_myo*F))));
  L_type_Ca_current_O' = L_type_Ca_current_f*L_type_Ca_current_C4 - L_type_Ca_current_g*L_type_Ca_current_O;
  L_type_Ca_current_O_Ca' = L_type_Ca_current_f_*L_type_Ca_current_C_Ca4 - L_type_Ca_current_g_*L_type_Ca_current_O_Ca;
  L_type_Ca_current_C0' = L_type_Ca_current_beta*L_type_Ca_current_C1 + L_type_Ca_current_omega*L_type_Ca_current_C_Ca0 - (4*L_type_Ca_current_alpha + L_type_Ca_current_gamma)*L_type_Ca_current_C0;
  L_type_Ca_current_C1' = 4*L_type_Ca_current_alpha*L_type_Ca_current_C0 + 2*L_type_Ca_current_beta*L_type_Ca_current_C2 + L_type_Ca_current_omega/L_type_Ca_current_b*L_type_Ca_current_C_Ca1 - (L_type_Ca_current_beta + 3*L_type_Ca_current_alpha + L_type_Ca_current_gamma*L_type_Ca_current_a)*L_type_Ca_current_C1;
  L_type_Ca_current_C2' = 3*L_type_Ca_current_alpha*L_type_Ca_current_C1 + 3*L_type_Ca_current_beta*L_type_Ca_current_C3 + L_type_Ca_current_omega/L_type_Ca_current_b^2*L_type_Ca_current_C_Ca2 - (L_type_Ca_current_beta*2 + 2*L_type_Ca_current_alpha + L_type_Ca_current_gamma*L_type_Ca_current_a^2)*L_type_Ca_current_C2;
  L_type_Ca_current_C3' = 2*L_type_Ca_current_alpha*L_type_Ca_current_C2 + 4*L_type_Ca_current_beta*L_type_Ca_current_C4 + L_type_Ca_current_omega/L_type_Ca_current_b^3*L_type_Ca_current_C_Ca3 - (L_type_Ca_current_beta*3 + L_type_Ca_current_alpha + L_type_Ca_current_gamma*L_type_Ca_current_a^3)*L_type_Ca_current_C3;
  L_type_Ca_current_C4' = L_type_Ca_current_alpha*L_type_Ca_current_C3 + L_type_Ca_current_g*L_type_Ca_current_O + L_type_Ca_current_omega/L_type_Ca_current_b^4*L_type_Ca_current_C_Ca4 - (L_type_Ca_current_beta*4 + L_type_Ca_current_f + L_type_Ca_current_gamma*L_type_Ca_current_a^4)*L_type_Ca_current_C4;
  L_type_Ca_current_C_Ca0' = L_type_Ca_current_beta_b*L_type_Ca_current_C_Ca1 + L_type_Ca_current_gamma*L_type_Ca_current_C_Ca0 - (4*L_type_Ca_current_alpha_a + L_type_Ca_current_omega)*L_type_Ca_current_C_Ca0;
  L_type_Ca_current_C_Ca1' = 4*L_type_Ca_current_alpha_a*L_type_Ca_current_C_Ca0 + 2*L_type_Ca_current_beta_b*L_type_Ca_current_C_Ca2 + L_type_Ca_current_gamma*L_type_Ca_current_a*L_type_Ca_current_C1 - (L_type_Ca_current_beta_b + 3*L_type_Ca_current_alpha_a + L_type_Ca_current_omega/L_type_Ca_current_b)*L_type_Ca_current_C_Ca1;
  L_type_Ca_current_C_Ca2' = 3*L_type_Ca_current_alpha_a*L_type_Ca_current_C_Ca1 + 3*L_type_Ca_current_beta_b*L_type_Ca_current_C_Ca3 + L_type_Ca_current_gamma*L_type_Ca_current_a^2*L_type_Ca_current_C2 - (L_type_Ca_current_beta_b*2 + 2*L_type_Ca_current_alpha_a + L_type_Ca_current_omega/L_type_Ca_current_b^2)*L_type_Ca_current_C_Ca2;
  L_type_Ca_current_C_Ca3' = 2*L_type_Ca_current_alpha_a*L_type_Ca_current_C_Ca2 + 4*L_type_Ca_current_beta_b*L_type_Ca_current_C_Ca4 + L_type_Ca_current_gamma*L_type_Ca_current_a^3*L_type_Ca_current_C3 - (L_type_Ca_current_beta_b*3 + L_type_Ca_current_alpha_a + L_type_Ca_current_omega/L_type_Ca_current_b^3)*L_type_Ca_current_C_Ca3;
  L_type_Ca_current_C_Ca4' = L_type_Ca_current_alpha_a*L_type_Ca_current_C_Ca3 + L_type_Ca_current_g_*L_type_Ca_current_O_Ca + L_type_Ca_current_gamma*L_type_Ca_current_a^4*L_type_Ca_current_C4 - (L_type_Ca_current_beta_b*4 + L_type_Ca_current_f_ + L_type_Ca_current_omega/L_type_Ca_current_b^4)*L_type_Ca_current_C_Ca4;
  Ca_ss' = intracellular_ion_concentrations_beta_SS*(J_rel*(intracellular_ion_concentrations_V_JSR/intracellular_ion_concentrations_V_SS) - J_xfer*(intracellular_ion_concentrations_V_myo/intracellular_ion_concentrations_V_SS) - i_Ca*(intracellular_ion_concentrations_A_cap*C_sc/(2*intracellular_ion_concentrations_V_SS*F)));
  y' = (L_type_Ca_current_L_type_Ca_current_y_gate_y_infinity - y)/L_type_Ca_current_L_type_Ca_current_y_gate_tau_y;
  RyR_channel_P_O1' = RyR_channel_k_a_plus*Ca_ss^RyR_channel_n*RyR_channel_P_C1 - (RyR_channel_k_a_minus*RyR_channel_P_O1 + RyR_channel_k_b_plus*Ca_ss^RyR_channel_m*RyR_channel_P_O1 + RyR_channel_k_c_plus*RyR_channel_P_O1) + RyR_channel_k_b_minus*RyR_channel_P_O2 + RyR_channel_k_c_minus*RyR_channel_P_C2;
  RyR_channel_P_O2' = RyR_channel_k_b_plus*Ca_ss^RyR_channel_m*RyR_channel_P_O1 - RyR_channel_k_b_minus*RyR_channel_P_O2;
  RyR_channel_P_C1' = -RyR_channel_k_a_plus*Ca_ss^RyR_channel_n*RyR_channel_P_C1 + RyR_channel_k_a_minus*RyR_channel_P_O1;
  RyR_channel_P_C2' = RyR_channel_k_c_plus*RyR_channel_P_O1 - RyR_channel_k_c_minus*RyR_channel_P_C2;
  Ca_JSR' = intracellular_ion_concentrations_beta_JSR*(J_tr - J_rel);
  Ca_NSR' = J_up*(intracellular_ion_concentrations_V_myo/intracellular_ion_concentrations_V_NSR) - J_tr*(intracellular_ion_concentrations_V_JSR/intracellular_ion_concentrations_V_NSR);
  intracellular_Ca_fluxes_HTRPNCa' = intracellular_Ca_fluxes_k_htrpn_plus*Cai*(intracellular_Ca_fluxes_HTRPN_tot - intracellular_Ca_fluxes_HTRPNCa) - intracellular_Ca_fluxes_k_htrpn_minus*intracellular_Ca_fluxes_HTRPNCa;
  intracellular_Ca_fluxes_LTRPNCa' = intracellular_Ca_fluxes_k_ltrpn_plus*Cai*(intracellular_Ca_fluxes_LTRPN_tot - intracellular_Ca_fluxes_LTRPNCa) - intracellular_Ca_fluxes_k_ltrpn_minus*intracellular_Ca_fluxes_LTRPNCa;
end
