// SBML level 2 version 4

model Gross_and_Hopfer_1999_pH7_25____main()
  // Originally created by libAntimony v1.3 (using libSBML 4.1.0-b2)

  // Compartments:
  compartment default_compartment = 1;

  // Parameters:
  f0_1 = 0.065;
  b0_1 = 1.4;
  f0_2 = 0.019;
  b0_2 = 45000;
  f0_3 = 7000;
  b0_3 = 2500;
  f0_4 = 1700;
  b0_4 = 0.0013;
  f0_5 = 1.3;
  b0_5 = 0.061;
  f0_6 = 0.5;
  delta_z = 1.3;
  alpha_p = 0.04;
  alpha_pp = 0.04;
  beta_p = 0.1;
  beta_pp = 0.1;
  C_T = 0.2;
  n = 1;
  m = 3;
  F = 96.48534;
  R = 8.314;
  T = 310;
  V = -60;
  Na_i = 10;
  Na_o = 10;
  HCO3_i = 18;
  HCO3_o = 18;
  C_1 = 1.02165;
  C_2 = 0.089633;
  C_3 = 0.0004173;
  C_4 = 0.001504;
  C_5 = 0.5685776;
  C_6_temp = 0.318217;
  time_ = ;

  // Assignment rules:
  b0_6 := f0_1*f0_2*f0_3*f0_4*f0_5*f0_6/(b0_1*b0_2*b0_3*b0_4*b0_5);
  delta_m := 1 - beta_p - beta_pp;
  delta_n := 1 - alpha_p - alpha_pp;
  u := F*V/(R*T);
  f_1 := f0_1*Na_i^n*exp(n*alpha_p*u/2);
  b_1 := b0_1*exp(-n*alpha_p*u/2);
  f_2 := f0_2*HCO3_i^m*exp(-m*beta_p*u/2);
  b_2 := b0_2*exp(m*beta_p*u/2);
  f_3 := f0_3*exp((delta_z + n*delta_n - m*delta_m)*u/2);
  b_3 := b0_3*exp(-(delta_z + n*delta_n - m*delta_m)*u/2);
  f_4 := f0_4*exp(-m*beta_pp*u/2);
  b_4 := b0_4*HCO3_o^m*exp(m*beta_pp*u/2);
  f_5 := f0_5*exp(n*alpha_pp*u/2);
  b_5 := b0_5*Na_o^n*exp(-n*alpha_pp*u/2);
  f_6 := f0_6*exp(-delta_z*u/2);
  b_6 := b0_6*exp(delta_z*u/2);
  C_6 := C_T - (C_1 + C_2 + C_3 + C_4 + C_5);
  king_altman_states_C1_sum := f_2*f_3*f_4*f_5*f_6 + b_1*f_3*f_4*f_5*f_6 + b_1*b_2*f_4*f_5*f_6 + b_1*b_2*b_3*f_5*f_6 + b_1*b_2*b_3*b_4*f_6 + b_1*b_2*b_3*b_4*b_5;
  king_altman_states_C2_sum := f_1*f_3*f_4*f_5*f_6 + b_2*f_1*f_4*f_5*f_6 + b_2*b_3*f_1*f_5*f_6 + b_2*b_3*b_4*f_1*f_6 + b_2*b_3*b_4*b_5*f_1 + b_2*b_3*b_4*b_5*b_6;
  king_altman_states_C3_sum := f_1*f_2*f_4*f_5*f_6 + b_3*f_1*f_2*f_5*f_6 + b_3*b_4*f_1*f_2*f_6 + b_3*b_4*b_5*f_1*f_2 + b_3*b_4*b_5*b_6*f_2 + b_1*b_3*b_4*b_5*b_6;
  king_altman_states_C4_sum := f_1*f_2*f_3*f_5*f_6 + b_4*f_1*f_2*f_3*f_6 + b_4*b_5*f_1*f_2*f_3 + b_4*b_5*b_6*f_2*f_3 + b_1*b_4*b_5*b_6*f_3 + b_1*b_2*b_4*b_5*b_6;
  king_altman_states_C5_sum := f_1*f_2*f_3*f_4*f_6 + b_5*f_1*f_2*f_3*f_4 + b_5*b_6*f_2*f_3*f_4 + b_1*b_5*b_6*f_3*f_4 + b_1*b_2*b_5*b_6*f_4 + b_1*b_2*b_3*b_5*b_6;
  king_altman_states_C6_sum := f_1*f_2*f_3*f_4*f_5 + b_6*f_2*f_3*f_4*f_5 + b_1*b_6*f_3*f_4*f_5 + b_1*b_2*b_6*f_4*f_5 + b_1*b_2*b_3*b_6*f_5 + b_1*b_2*b_3*b_4*b_6;
  king_altman_states_C_sum := king_altman_states_C1_sum + king_altman_states_C2_sum + king_altman_states_C3_sum + king_altman_states_C4_sum + king_altman_states_C5_sum + king_altman_states_C6_sum;
  C1 := C_T*king_altman_states_C1_sum/king_altman_states_C_sum;
  C2 := C_T*king_altman_states_C2_sum/king_altman_states_C_sum;
  C3 := C_T*king_altman_states_C3_sum/king_altman_states_C_sum;
  C4 := C_T*king_altman_states_C4_sum/king_altman_states_C_sum;
  C5 := C_T*king_altman_states_C5_sum/king_altman_states_C_sum;
  C6 := C_T*king_altman_states_C6_sum/king_altman_states_C_sum;
  I_NBC := -F*(delta_z*(b_6*C_1 - f_6*C_6) + (delta_z + n - m)*(f_3*C_3 - b_3*C_4));
  I_NBC_SS := -F*(delta_z*(b_6*C1 - f_6*C6) + (delta_z + n - m)*(f_3*C3 - b_3*C4));
  I_NBC_micro := 1e-3*(-F)*(delta_z*(b_6*C_1 - f_6*C_6) + (delta_z + n - m)*(f_3*C_3 - b_3*C_4));

  // Rate rules:
  C_1' = b_1*C_2 + f_6*C_6 - (f_1 + b_6)*C_1;
  C_2' = f_1*C_1 + b_2*C_3 - (b_1 + f_2)*C_2;
  C_3' = f_2*C_2 + b_3*C_4 - (b_2 + f_3)*C_3;
  C_4' = f_3*C_3 + b_4*C_5 - (b_3 + f_4)*C_4;
  C_5' = f_4*C_4 + b_5*C_6 - (b_4 + f_5)*C_5;
  C_6_temp' = f_5*C_5 + b_6*C_1 - (b_5 + f_6)*C_6;
end
