// SBML level 2 version 4

model gupta_2009____main()
  // Originally created by libAntimony v1.4 (using libSBML 4.1.0-b2)

  // Compartments:
  compartment default_compartment = 1;

  // Parameters:
  main_k_1 = 355.637;
  main_k_2 = 1e-15;
  main_k_3 = 1e-15;
  main_k_4 = 1e-15;
  main_k_5 = 1e-15;
  main_k_6 = 0.33;
  main_k_7 = 1e-15;
  main_k_8 = 0.007;
  main_k_9 = 0.187;
  main_k_10 = 0.024;
  main_k_11 = 0.111;
  main_k_12 = 0.098;
  main_k_13 = 0.204;
  main_k_14 = 1e-15;
  main_k_15 = 0.061;
  main_k_16 = 1e-15;
  main_k_17 = 3.116;
  main_k_18 = 0.054;
  main_k_19 = 0.029;
  main_k_20 = 0.014;
  main_k_21 = 0.034;
  main_k_22 = 0.116;
  main_PIP_2 = 1;
  main_DG = 0;
  main_GPCho = 1;
  main_AA = 25;
  main_HETE = 0;
  main_PGH_2 = 0;
  main_PGE_2 = 0;
  main_PGF_2a = 0;
  main_PGD_2 = 0;
  main_PGJ_2 = 0;
  main_dPGD_2 = 0;
  main_dPGJ_2 = 0;
  time_ = ;

  // Assignment rules:
  main_v_1 := main_LPS*main_PIP_2*main_k_1;
  main_v_2 := main_PIP_2*main_k_2;
  main_v_3 := main_DG*main_k_3;
  main_v_4 := main_AA*main_k_4;
  main_v_5 := main_DG*main_GPCho*main_k_5;
  main_v_6 := main_LPS*main_GPCho*main_k_6;
  main_v_7 := main_GPCho*main_k_7;
  main_v_8 := main_AA*main_k_8;
  main_v_9 := main_HETE*main_k_9;
  main_v_10 := main_DG*main_AA*main_k_10;
  main_v_11 := main_LPS*main_AA*main_k_11;
  main_v_12 := main_AA*main_k_12;
  main_v_13 := main_PGH_2*main_k_13;
  main_v_14 := main_PGE_2*main_k_14;
  main_v_15 := main_PGH_2*main_k_15;
  main_v_16 := main_PGF_2a*main_k_16;
  main_v_17 := main_PGH_2*main_k_17;
  main_v_18 := main_PGD_2*main_k_18;
  main_v_19 := main_PGD_2*main_k_19;
  main_v_20 := main_dPGD_2*main_k_20;
  main_v_21 := main_PGJ_2*main_k_21;
  main_v_22 := main_dPGJ_2*main_k_22;
  main_LPS := ;

  // Rate rules:
  main_AA' = main_v_1 + main_v_2 + main_v_3 - main_v_4 + main_v_5 + main_v_6 + main_v_7 - main_v_8 - main_v_10 - main_v_11 - main_v_12;
  main_HETE' = main_v_8 - main_v_9;
  main_PGH_2' = main_v_10 + main_v_11 + main_v_12 - main_v_13 - main_v_15 - main_v_17;
  main_PGE_2' = main_v_13 - main_v_14;
  main_PGF_2a' = main_v_15 - main_v_16;
  main_PGD_2' = main_v_17 - main_v_18 - main_v_19;
  main_PGJ_2' = main_v_18 - main_v_21;
  main_dPGD_2' = main_v_19 - main_v_20;
  main_dPGJ_2' = main_v_21 - main_v_22;
end
