// SBML level 2 version 4

model aldosterone_model____main()
  // Originally created by libAntimony v1.4 (using libSBML 4.1.0-b2)

  // Compartments:
  compartment default_compartment = 1;

  // Parameters:
  aldosterone_A1K = 0.5;
  aldosterone_A2K = 60;
  aldosterone_A3K = 40000;
  aldosterone_A4K = 0.1;
  aldosterone_A4K2 = 40000;
  aldosterone_AARK = 1;
  aldosterone_AARLL = 4;
  aldosterone_ADHINF = 0;
  aldosterone_ADHKLL = 0.2;
  aldosterone_ADHKUL = 5;
  aldosterone_ADHPAM = 0.3;
  aldosterone_ADHPUL = 85;
  aldosterone_ADHTC = 15;
  aldosterone_ADHVLL = 0.93617;
  aldosterone_ADHVUL = 2.5;
  aldosterone_AH10 = 0.333;
  aldosterone_AH11 = 1000;
  aldosterone_AH9 = 1;
  aldosterone_AHMNAR = 0.3;
  aldosterone_AHTHM = 2;
  aldosterone_ALCLK = 0.3;
  aldosterone_ALDINF = 0;
  aldosterone_ALDKNS = 0;
  aldosterone_ALDMM = 2.5;
  aldosterone_AM1LL = 0;
  aldosterone_AM1UL = 5;
  aldosterone_AMCSNS = 0.65;
  aldosterone_AMKM = 0.5;
  aldosterone_AMKMUL = 12;
  aldosterone_AMM1LM = 0.005;
  aldosterone_AMM4 = 0.005;
  aldosterone_AMNALL = 0.04;
  aldosterone_AMNAM = 0.8;
  aldosterone_AMNAUL = 15;
  aldosterone_AMT = 60;
  aldosterone_ANCSNS = 0.4;
  aldosterone_ANGINF = 0;
  aldosterone_ANGKNS = 0;
  aldosterone_ANMALD = 2.5;
  aldosterone_ANMAM = 1.4;
  aldosterone_ANMARL = 0.86;
  aldosterone_ANMEM = 1.6;
  aldosterone_ANMKEL = 0.3;
  aldosterone_ANMKEM = 2;
  aldosterone_ANMLL = 0.7;
  aldosterone_ANMNAM = 1;
  aldosterone_ANMSLT = 2;
  aldosterone_ANMTM = 1.5;
  aldosterone_ANMUL = 1.8;
  aldosterone_ANPTC = 4;
  aldosterone_ANPXAF = 1.5;
  aldosterone_ANPXUL = 10;
  aldosterone_ANT = 12;
  aldosterone_ANULL = 0.8;
  aldosterone_ANUM = 6;
  aldosterone_ANUVM = 0;
  aldosterone_ANV = 5000;
  aldosterone_ANXM = 0;
  aldosterone_ANY = -0.2;
  aldosterone_AR1LM = 0.005;
  aldosterone_AR2LM = 0.005;
  aldosterone_ARF = 0.5;
  aldosterone_AUC1 = 0.3;
  aldosterone_AUDMP = 0.3;
  aldosterone_AUK = 0.004;
  aldosterone_AUL = 1.5;
  aldosterone_AULPM = 0;
  aldosterone_AUM1 = 3;
  aldosterone_AUM2 = 1;
  aldosterone_AUMAX = 5;
  aldosterone_AUMIN = 0.4;
  aldosterone_AUMK1 = 0.3;
  aldosterone_AUN1 = 0.5;
  aldosterone_AURG = 1;
  aldosterone_AUS = 1;
  aldosterone_AUSLP = 1.5;
  aldosterone_AUTO = 0;
  aldosterone_AUTOGN = 7;
  aldosterone_AUTOSN = 0.9;
  aldosterone_AUX = 1;
  aldosterone_BAROTC = 0.16;
  aldosterone_CFC = 0.01167;
  aldosterone_CKEEX = 4;
  aldosterone_CMPTSS = 2;
  aldosterone_CN2 = 0.0212;
  aldosterone_CN7 = 0.2;
  aldosterone_CNR = 139;
  aldosterone_CPF = 0.0003;
  aldosterone_CPK = 0.000253;
  aldosterone_CPR = 40;
  aldosterone_CV = 0.1;
  aldosterone_CRRFLX = 0;
  aldosterone_DIURET = 1;
  aldosterone_DHDTR = 0.05;
  aldosterone_DTNAR = 0.675;
  aldosterone_DTNARL = 1e-6;
  aldosterone_EARK = 1;
  aldosterone_EARLL = 24;
  aldosterone_EFAFR = 0;
  aldosterone_EXC = 1;
  aldosterone_EXCML = 0.01;
  aldosterone_EXCXP = 1;
  aldosterone_EXCXP2 = 0.17;
  aldosterone_EXE = 0;
  aldosterone_GCOPF = 0.8092;
  aldosterone_GFLC = 0.0208333;
  aldosterone_GFNDMP = 3;
  aldosterone_GFNLL = 0.001;
  aldosterone_GPPD = 1;
  aldosterone_HM6 = 1850;
  aldosterone_HM8 = 4.714e-8;
  aldosterone_HTAUML = 0.4;
  aldosterone_KORGN = 1;
  aldosterone_KORNER = 0;
  aldosterone_KORREN = 0;
  aldosterone_KORTC = 10000;
  aldosterone_LPDE = 8;
  aldosterone_LPK = 2.728e-14;
  aldosterone_LPPR = 0.03;
  aldosterone_MDFL1 = 10;
  aldosterone_MDFLKM = 0.667;
  aldosterone_MDFLW2 = 0.005;
  aldosterone_MDFLWX = 0.01;
  aldosterone_MDMP = 0;
  aldosterone_O2A = 0.1;
  aldosterone_O2CHMO = 0.01;
  aldosterone_OMM = 57.1;
  aldosterone_PA4 = 1;
  aldosterone_PAEX = 2;
  aldosterone_PCE = 1;
  aldosterone_PCR = 15;
  aldosterone_PR1LL = 0;
  aldosterone_PGHF = -2;
  aldosterone_PK2 = 0.79167;
  aldosterone_PL2 = 1.8;
  aldosterone_PLDF = 4.2;
  aldosterone_PM5 = 30;
  aldosterone_PO2ADV = 0.001;
  aldosterone_POK = 0.1;
  aldosterone_POM = 0.04;
  aldosterone_POM2 = 2;
  aldosterone_PON = 0.1;
  aldosterone_POR = 35;
  aldosterone_POZ = 2;
  aldosterone_PXTP = 8;
  aldosterone_QAOLM = 0.2;
  aldosterone_QRF = 0.15;
  aldosterone_RABSC = 0.5;
  aldosterone_RAM = 96.3;
  aldosterone_RAPRSP = 0;
  aldosterone_RAR = 30.52;
  aldosterone_RCDFDP = 2000;
  aldosterone_RCDFPC = 0;
  aldosterone_REK = 1;
  aldosterone_RFABKM = 0.03;
  aldosterone_RFABDM = 0.3;
  aldosterone_RFABDP = 1;
  aldosterone_RFCDFT = 0;
  aldosterone_RKC = 5.8e-6;
  aldosterone_RNAGTC = 15;
  aldosterone_RNAUAD = 0;
  aldosterone_RPS = 0;
  aldosterone_RTPPR = 0.9;
  aldosterone_RTPPRS = 15.2;
  aldosterone_RTSPRS = 6;
  aldosterone_RVRS = 19.167;
  aldosterone_RVSM = 1;
  aldosterone_SR = 1;
  aldosterone_SR2 = 1;
  aldosterone_SRK = 5;
  aldosterone_SRK2 = 10000;
  aldosterone_STA = 0;
  aldosterone_TENSGN = 0;
  aldosterone_TENSTC = 0.05;
  aldosterone_TIMETR = 0;
  aldosterone_TRNSFS = 0;
  aldosterone_TRPL = 0;
  aldosterone_TSSLML = 0.15;
  aldosterone_TSSLTC = 0.005;
  aldosterone_TVDDL = 30;
  aldosterone_U = 4;
  aldosterone_VID1 = 0.01;
  aldosterone_VIDML = 0.01;
  aldosterone_VNTSTM = 1;
  aldosterone_VP1 = 0.01;
  aldosterone_VPTISS = 0.0175;
  aldosterone_VTSF = 6;
  aldosterone_VV9 = 2.51;
  aldosterone_X = 4;
  aldosterone_Z = 1;
  aldosterone_Z4 = 0.5;
  aldosterone_Z5 = 0.3;
  aldosterone_Z6 = 20;
  aldosterone_Z7 = 5;
  aldosterone_Z10 = 45;
  aldosterone_Z11 = 0.01;
  aldosterone_Z12 = 5;
  aldosterone_Z13 = 0.625;
  aldosterone_Z14 = 5;
  aldosterone_Z16 = 5;
  aldosterone_Z18 = 5;
  aldosterone_Z19 = 5;
  aldosterone_KID = 0.08;
  aldosterone_URFORM = 0.24;
  aldosterone_AUV = 0.55;
  aldosterone_AUY = 0;
  aldosterone_O2M = 164;
  aldosterone_NID = 0.1;
  aldosterone_ATRFBM = 0;
  aldosterone_GBL = 0;
  aldosterone_RNAUGN = 0.6;
  aldosterone_RNAULL = 0.3;
  aldosterone_RNAUUL = 10;
  aldosterone_HSR = 1;
  aldosterone_HSL = 1;
  aldosterone_HMK = 90;
  aldosterone_PO2AMB = 150;
  aldosterone_HKM = 0.53333;
  aldosterone_DR = 0;
  aldosterone_ANPKNS = 0;
  aldosterone_RMULT1 = 1;
  aldosterone_GLPCA = 1;
  aldosterone_RFN = 1.22057;
  aldosterone_RFABX = 0.8;
  aldosterone_ANPINF = 0;
  aldosterone_FIS = 0;
  aldosterone_CPPD = 31.9719;
  aldosterone_TRRBC = 0;
  aldosterone_HYL = 60;
  aldosterone_ATRVM = 0;
  aldosterone_ADHC_init = 1;
  aldosterone_AHY_init = 0.301963;
  aldosterone_AMC_init = 1;
  aldosterone_AMM1T_init = 1.00269;
  aldosterone_AMM2_init = 1.09071;
  aldosterone_ANC_init = 0.859476;
  aldosterone_ANPC_init = 1;
  aldosterone_ANX1_init = 0;
  aldosterone_AR1T_init = 1.02127;
  aldosterone_AR2T_init = 1.01179;
  aldosterone_AR3T_init = 1.1448;
  aldosterone_AU1_init = 1.00007;
  aldosterone_AU4_init = -0.060024;
  aldosterone_AU6_init = 1.00132;
  aldosterone_DTKA_init = 0.0367573;
  aldosterone_HMD1_init = 1;
  aldosterone_HPL_init = 1.00163;
  aldosterone_HPR_init = 1.00237;
  aldosterone_KTOT_init = 3622.54;
  aldosterone_NAE_init = 2109.91;
  aldosterone_O2VAD1_init = 2.368e-7;
  aldosterone_OSV_init = 0.694163;
  aldosterone_OVA_init = 204.497;
  aldosterone_OVS_init = 0.699673;
  aldosterone_PAR1_init = 103.525;
  aldosterone_PC_init = 16.9144;
  aldosterone_PLUR_init = 159.549;
  aldosterone_PPR1_init = 0.419998;
  aldosterone_PRP_init = 216.243;
  aldosterone_QO2T_init = 72.2362;
  aldosterone_QOM1_init = 48.0839;
  aldosterone_RNAUG3_init = 0;
  aldosterone_TSP_init = 279.945;
  aldosterone_TVD_init = 0.000980838;
  aldosterone_VAS1_init = 0.862514;
  aldosterone_VIC_init = 25.0404;
  aldosterone_VLA1_init = 0.379883;
  aldosterone_VPA1_init = 0.38131;
  aldosterone_VPF1_init = 0.0123238;
  aldosterone_VP_init = 3.00449;
  aldosterone_VRA1_init = 0.100043;
  aldosterone_VRC_init = 2.00439;
  aldosterone_VTS2_init = 0;
  aldosterone_VTW_init = 39.8952;
  aldosterone_VV6_init = 0.0101913;
  aldosterone_VV7_init = 0.00366525;
  aldosterone_VVS1_init = 3.28246;
  aldosterone_AMC = aldosterone_AMC_init;
  time_ = ;
  ANM = ;
  CKE = ;

  // Assignment rules:
  AMK := ;
  AMNA := ;
  aldosterone_ANMAL := (ANM - 1)*aldosterone_ANMALD + 1;
  aldosterone_OSMAL := (CKE - 3.3)/1;
  aldosterone_AMR1 := ;
  aldosterone_aldosterone_secretion_AMRBSC := aldosterone_ANMAL*0.909*aldosterone_OSMAL;
  aldosterone_aldosterone_secretion_AMRT := (aldosterone_aldosterone_secretion_AMRBSC - 1)*aldosterone_AMKMUL + 1;
  aldosterone_aldosterone_secretion_AMR := ;
  aldosterone_AM := (aldosterone_general_aldosterone_multiplier_AM1 - 1)*aldosterone_ALDMM + 1;
  aldosterone_general_aldosterone_multiplier_AM1 := aldosterone_AM1UL - (aldosterone_AM1UL - 1)/((aldosterone_AM1LL - 1)/(aldosterone_AM1LL - aldosterone_AM1UL)*(aldosterone_AMC - 1)*aldosterone_AMCSNS + 1);
  aldosterone_aldosterone_effect_on_cell_membrane_K_transport_AMKT := (aldosterone_AM - 1)*aldosterone_AMKM + 1;
  aldosterone_aldosterone_effect_on_cell_membrane_Na_transport_AMNAT := (aldosterone_AM - 1)*aldosterone_AMNAM + 1;

  // Rate rules:
  aldosterone_AMC' = (aldosterone_AMR1 - aldosterone_AMC)/aldosterone_AMT;
end
