// SBML level 2 version 4

model angiotensin_parent_model____main()
  // Originally created by libAntimony v1.3 (using libSBML 4.1.0-b2)

  // Compartments:
  compartment default_compartment = 1;

  // Parameters:
  MDFLW = 1.00051;
  A1K = 0.5;
  A2K = 60;
  A3K = 40000;
  A4K = 0.1;
  A4K2 = 40000;
  AARK = 1;
  AARLL = 4;
  ADHINF = 0;
  ADHKLL = 0.2;
  ADHKUL = 5;
  ADHPAM = 0.3;
  ADHPUL = 85;
  ADHTC = 15;
  ADHVLL = 0.93617;
  ADHVUL = 2.5;
  AH10 = 0.333;
  AH11 = 1000;
  AH9 = 1;
  AHMNAR = 0.3;
  AHTHM = 2;
  ALCLK = 0.3;
  ALDINF = 0;
  ALDKNS = 0;
  ALDMM = 2.5;
  AM1LL = 0;
  AM1UL = 5;
  AMCSNS = 0.65;
  AMKM = 0.5;
  AMKMUL = 12;
  AMM1LM = 0.005;
  AMM4 = 0.005;
  AMNALL = 0.04;
  AMNAM = 0.8;
  AMNAUL = 15;
  AMT = 60;
  ANCSNS = 0.4;
  ANGINF = 0;
  ANGKNS = 0;
  ANMALD = 2.5;
  ANMAM = 1.4;
  ANMARL = 0.86;
  ANMEM = 1.6;
  ANMKEL = 0.3;
  ANMKEM = 2;
  ANMLL = 0.7;
  ANMNAM = 1;
  ANMSLT = 2;
  ANMTM = 1.5;
  ANMUL = 1.8;
  ANPTC = 4;
  ANPXAF = 1.5;
  ANPXUL = 10;
  ANT = 12;
  ANULL = 0.8;
  ANUM = 6;
  ANUVM = 0;
  ANV = 5000;
  ANXM = 0;
  ANY = -0.2;
  AR1LM = 0.005;
  AR2LM = 0.005;
  ARF = 0.5;
  AUC1 = 0.3;
  AUDMP = 0.3;
  AUK = 0.004;
  AUL = 1.5;
  AULPM = 0;
  AUM1 = 3;
  AUM2 = 1;
  AUMAX = 5;
  AUMIN = 0.4;
  AUMK1 = 0.3;
  AUN1 = 0.5;
  AURG = 1;
  AUS = 1;
  AUSLP = 1.5;
  AUTO = 0;
  AUTOGN = 7;
  AUTOSN = 0.9;
  AUX = 1;
  BAROTC = 0.16;
  CFC = 0.01167;
  CKEEX = 4;
  CMPTSS = 2;
  CN2 = 0.0212;
  CN7 = 0.2;
  CNR = 139;
  CPF = 0.0003;
  CPK = 0.000253;
  CPR = 40;
  CV = 0.1;
  CRRFLX = 0;
  DIURET = 1;
  DHDTR = 0.05;
  DTNAR = 0.675;
  DTNARL = 1e-6;
  EARK = 1;
  EARLL = 24;
  EFAFR = 0;
  EXC = 1;
  EXCML = 0.01;
  EXCXP = 1;
  EXCXP2 = 0.17;
  EXE = 0;
  GCOPF = 0.8092;
  GFLC = 0.0208333;
  GFNDMP = 3;
  GFNLL = 0.001;
  GPPD = 1;
  HM6 = 1850;
  HM8 = 4.714e-8;
  HTAUML = 0.4;
  KORGN = 1;
  KORNER = 0;
  KORREN = 0;
  KORTC = 10000;
  LPDE = 8;
  LPK = 2.728e-14;
  LPPR = 0.03;
  MDFL1 = 10;
  MDFLKM = 0.667;
  MDFLW2 = 0.005;
  MDFLWX = 0.01;
  MDMP = 0;
  O2A = 0.1;
  O2CHMO = 0.01;
  OMM = 57.1;
  PA4 = 1;
  PAEX = 2;
  PCE = 1;
  PCR = 15;
  PR1LL = 0;
  PGHF = -2;
  PK2 = 0.79167;
  PL2 = 1.8;
  PLDF = 4.2;
  PM5 = 30;
  PO2ADV = 0.001;
  POK = 0.1;
  POM = 0.04;
  POM2 = 2;
  PON = 0.1;
  POR = 35;
  POZ = 2;
  PXTP = 8;
  QAOLM = 0.2;
  QRF = 0.15;
  RABSC = 0.5;
  RAM = 96.3;
  RAPRSP = 0;
  RAR = 30.52;
  RCDFDP = 2000;
  RCDFPC = 0;
  REK = 1;
  RFABKM = 0.03;
  RFABDM = 0.3;
  RFABDP = 1;
  RFCDFT = 0;
  RKC = 5.8e-6;
  RNAGTC = 15;
  RNAUAD = 0;
  RPS = 0;
  RTPPR = 0.9;
  RTPPRS = 15.2;
  RTSPRS = 6;
  RVRS = 19.167;
  RVSM = 1;
  SR = 1;
  SR2 = 1;
  SRK = 5;
  SRK2 = 10000;
  STA = 0;
  TENSGN = 0;
  TENSTC = 0.05;
  TIMETR = 0;
  TRNSFS = 0;
  TRPL = 0;
  TSSLML = 0.15;
  TSSLTC = 0.005;
  TVDDL = 30;
  U = 4;
  VID1 = 0.01;
  VIDML = 0.01;
  VNTSTM = 1;
  VP1 = 0.01;
  VPTISS = 0.0175;
  VTSF = 6;
  VV9 = 2.51;
  X = 4;
  Z = 1;
  Z4 = 0.5;
  Z5 = 0.3;
  Z6 = 20;
  Z7 = 5;
  Z10 = 45;
  Z11 = 0.01;
  Z12 = 5;
  Z13 = 0.625;
  Z14 = 5;
  Z16 = 5;
  Z18 = 5;
  Z19 = 5;
  KID = 0.08;
  URFORM = 0.24;
  AUV = 0.55;
  AUY = 0;
  O2M = 164;
  NID = 0.1;
  ATRFBM = 0;
  GBL = 0;
  RNAUGN = 0.6;
  RNAULL = 0.3;
  RNAUUL = 10;
  HSR = 1;
  HSL = 1;
  HMK = 90;
  PO2AMB = 150;
  HKM = 0.53333;
  DR = 0;
  ANPKNS = 0;
  RMULT1 = 1;
  GLPCA = 1;
  RFN = 1.22057;
  RFABX = 0.8;
  ANPINF = 0;
  FIS = 0;
  CPPD = 31.9719;
  TRRBC = 0;
  HYL = 60;
  ATRVM = 0;
  ADHC_init = 1;
  AHY_init = 0.301963;
  AMC_init = 1;
  AMM1T_init = 1.00269;
  AMM2_init = 1.09071;
  ANC_init = 0.859476;
  ANPC_init = 1;
  ANX1_init = 0;
  AR1T_init = 1.02127;
  AR2T_init = 1.01179;
  AR3T_init = 1.1448;
  AU1_init = 1.00007;
  AU4_init = -0.060024;
  AU6_init = 1.00132;
  DTKA_init = 0.0367573;
  HMD1_init = 1;
  HPL_init = 1.00163;
  HPR_init = 1.00237;
  KTOT_init = 3622.54;
  NAE_init = 2109.91;
  O2VAD1_init = 2.368e-7;
  OSV_init = 0.694163;
  OVA_init = 204.497;
  OVS_init = 0.699673;
  PAR1_init = 103.525;
  PC_init = 16.9144;
  PLUR_init = 159.549;
  PPR1_init = 0.419998;
  PRP_init = 216.243;
  QO2T_init = 72.2362;
  QOM1_init = 48.0839;
  RNAUG3_init = 0;
  TSP_init = 279.945;
  TVD_init = 0.000980838;
  VAS1_init = 0.862514;
  VIC_init = 25.0404;
  VLA1_init = 0.379883;
  VPA1_init = 0.38131;
  VPF1_init = 0.0123238;
  VP_init = 3.00449;
  VRA1_init = 0.100043;
  VRC_init = 2.00439;
  VTS2_init = 0;
  VTW_init = 39.8952;
  VV6_init = 0.0101913;
  VV7_init = 0.00366525;
  VVS1_init = 3.28246;
  angiotensin_A1K = 0.5;
  angiotensin_A2K = 60;
  angiotensin_A3K = 40000;
  angiotensin_A4K = 0.1;
  angiotensin_A4K2 = 40000;
  angiotensin_AARK = 1;
  angiotensin_AARLL = 4;
  angiotensin_ADHINF = 0;
  angiotensin_ADHKLL = 0.2;
  angiotensin_ADHKUL = 5;
  angiotensin_ADHPAM = 0.3;
  angiotensin_ADHPUL = 85;
  angiotensin_ADHTC = 15;
  angiotensin_ADHVLL = 0.93617;
  angiotensin_ADHVUL = 2.5;
  angiotensin_AH10 = 0.333;
  angiotensin_AH11 = 1000;
  angiotensin_AH9 = 1;
  angiotensin_AHMNAR = 0.3;
  angiotensin_AHTHM = 2;
  angiotensin_ALCLK = 0.3;
  angiotensin_ALDINF = 0;
  angiotensin_ALDKNS = 0;
  angiotensin_ALDMM = 2.5;
  angiotensin_AM1LL = 0;
  angiotensin_AM1UL = 5;
  angiotensin_AMCSNS = 0.65;
  angiotensin_AMKM = 0.5;
  angiotensin_AMKMUL = 12;
  angiotensin_AMM1LM = 0.005;
  angiotensin_AMM4 = 0.005;
  angiotensin_AMNALL = 0.04;
  angiotensin_AMNAM = 0.8;
  angiotensin_AMNAUL = 15;
  angiotensin_AMT = 60;
  angiotensin_ANCSNS = 0.4;
  angiotensin_ANGINF = 0;
  angiotensin_ANGKNS = 0;
  angiotensin_ANMALD = 2.5;
  angiotensin_ANMAM = 1.4;
  angiotensin_ANMARL = 0.86;
  angiotensin_ANMEM = 1.6;
  angiotensin_ANMKEL = 0.3;
  angiotensin_ANMKEM = 2;
  angiotensin_ANMLL = 0.7;
  angiotensin_ANMNAM = 1;
  angiotensin_ANMSLT = 2;
  angiotensin_ANMTM = 1.5;
  angiotensin_ANMUL = 1.8;
  angiotensin_ANPTC = 4;
  angiotensin_ANPXAF = 1.5;
  angiotensin_ANPXUL = 10;
  angiotensin_ANT = 12;
  angiotensin_ANULL = 0.8;
  angiotensin_ANUM = 6;
  angiotensin_ANUVM = 0;
  angiotensin_ANV = 5000;
  angiotensin_ANXM = 0;
  angiotensin_ANY = -0.2;
  angiotensin_AR1LM = 0.005;
  angiotensin_AR2LM = 0.005;
  angiotensin_ARF = 0.5;
  angiotensin_AUC1 = 0.3;
  angiotensin_AUDMP = 0.3;
  angiotensin_AUK = 0.004;
  angiotensin_AUL = 1.5;
  angiotensin_AULPM = 0;
  angiotensin_AUM1 = 3;
  angiotensin_AUM2 = 1;
  angiotensin_AUMAX = 5;
  angiotensin_AUMIN = 0.4;
  angiotensin_AUMK1 = 0.3;
  angiotensin_AUN1 = 0.5;
  angiotensin_AURG = 1;
  angiotensin_AUS = 1;
  angiotensin_AUSLP = 1.5;
  angiotensin_AUTO = 0;
  angiotensin_AUTOGN = 7;
  angiotensin_AUTOSN = 0.9;
  angiotensin_AUX = 1;
  angiotensin_BAROTC = 0.16;
  angiotensin_CFC = 0.01167;
  angiotensin_CKEEX = 4;
  angiotensin_CMPTSS = 2;
  angiotensin_CN2 = 0.0212;
  angiotensin_CN7 = 0.2;
  angiotensin_CNR = 139;
  angiotensin_CPF = 0.0003;
  angiotensin_CPK = 0.000253;
  angiotensin_CPR = 40;
  angiotensin_CV = 0.1;
  angiotensin_CRRFLX = 0;
  angiotensin_DIURET = 1;
  angiotensin_DHDTR = 0.05;
  angiotensin_DTNAR = 0.675;
  angiotensin_DTNARL = 1e-6;
  angiotensin_EARK = 1;
  angiotensin_EARLL = 24;
  angiotensin_EFAFR = 0;
  angiotensin_EXC = 1;
  angiotensin_EXCML = 0.01;
  angiotensin_EXCXP = 1;
  angiotensin_EXCXP2 = 0.17;
  angiotensin_EXE = 0;
  angiotensin_GCOPF = 0.8092;
  angiotensin_GFLC = 0.0208333;
  angiotensin_GFNDMP = 3;
  angiotensin_GFNLL = 0.001;
  angiotensin_GPPD = 1;
  angiotensin_HM6 = 1850;
  angiotensin_HM8 = 4.714e-8;
  angiotensin_HTAUML = 0.4;
  angiotensin_KORGN = 1;
  angiotensin_KORNER = 0;
  angiotensin_KORREN = 0;
  angiotensin_KORTC = 10000;
  angiotensin_LPDE = 8;
  angiotensin_LPK = 2.728e-14;
  angiotensin_LPPR = 0.03;
  angiotensin_MDFL1 = 10;
  angiotensin_MDFLKM = 0.667;
  angiotensin_MDFLW2 = 0.005;
  angiotensin_MDFLWX = 0.01;
  angiotensin_MDMP = 0;
  angiotensin_O2A = 0.1;
  angiotensin_O2CHMO = 0.01;
  angiotensin_OMM = 57.1;
  angiotensin_PA4 = 1;
  angiotensin_PAEX = 2;
  angiotensin_PCE = 1;
  angiotensin_PCR = 15;
  angiotensin_PR1LL = 0;
  angiotensin_PGHF = -2;
  angiotensin_PK2 = 0.79167;
  angiotensin_PL2 = 1.8;
  angiotensin_PLDF = 4.2;
  angiotensin_PM5 = 30;
  angiotensin_PO2ADV = 0.001;
  angiotensin_POK = 0.1;
  angiotensin_POM = 0.04;
  angiotensin_POM2 = 2;
  angiotensin_PON = 0.1;
  angiotensin_POR = 35;
  angiotensin_POZ = 2;
  angiotensin_PXTP = 8;
  angiotensin_QAOLM = 0.2;
  angiotensin_QRF = 0.15;
  angiotensin_RABSC = 0.5;
  angiotensin_RAM = 96.3;
  angiotensin_RAPRSP = 0;
  angiotensin_RAR = 30.52;
  angiotensin_RCDFDP = 2000;
  angiotensin_RCDFPC = 0;
  angiotensin_REK = 1;
  angiotensin_RFABKM = 0.03;
  angiotensin_RFABDM = 0.3;
  angiotensin_RFABDP = 1;
  angiotensin_RFCDFT = 0;
  angiotensin_RKC = 5.8e-6;
  angiotensin_RNAGTC = 15;
  angiotensin_RNAUAD = 0;
  angiotensin_RPS = 0;
  angiotensin_RTPPR = 0.9;
  angiotensin_RTPPRS = 15.2;
  angiotensin_RTSPRS = 6;
  angiotensin_RVRS = 19.167;
  angiotensin_RVSM = 1;
  angiotensin_SR = 1;
  angiotensin_SR2 = 1;
  angiotensin_SRK = 5;
  angiotensin_SRK2 = 10000;
  angiotensin_STA = 0;
  angiotensin_TENSGN = 0;
  angiotensin_TENSTC = 0.05;
  angiotensin_TIMETR = 0;
  angiotensin_TRNSFS = 0;
  angiotensin_TRPL = 0;
  angiotensin_TSSLML = 0.15;
  angiotensin_TSSLTC = 0.005;
  angiotensin_TVDDL = 30;
  angiotensin_U = 4;
  angiotensin_VID1 = 0.01;
  angiotensin_VIDML = 0.01;
  angiotensin_VNTSTM = 1;
  angiotensin_VP1 = 0.01;
  angiotensin_VPTISS = 0.0175;
  angiotensin_VTSF = 6;
  angiotensin_VV9 = 2.51;
  angiotensin_X = 4;
  angiotensin_Z = 1;
  angiotensin_Z4 = 0.5;
  angiotensin_Z5 = 0.3;
  angiotensin_Z6 = 20;
  angiotensin_Z7 = 5;
  angiotensin_Z10 = 45;
  angiotensin_Z11 = 0.01;
  angiotensin_Z12 = 5;
  angiotensin_Z13 = 0.625;
  angiotensin_Z14 = 5;
  angiotensin_Z16 = 5;
  angiotensin_Z18 = 5;
  angiotensin_Z19 = 5;
  angiotensin_KID = 0.08;
  angiotensin_URFORM = 0.24;
  angiotensin_AUV = 0.55;
  angiotensin_AUY = 0;
  angiotensin_O2M = 164;
  angiotensin_NID = 0.1;
  angiotensin_ATRFBM = 0;
  angiotensin_GBL = 0;
  angiotensin_RNAUGN = 0.6;
  angiotensin_RNAULL = 0.3;
  angiotensin_RNAUUL = 10;
  angiotensin_HSR = 1;
  angiotensin_HSL = 1;
  angiotensin_HMK = 90;
  angiotensin_PO2AMB = 150;
  angiotensin_HKM = 0.53333;
  angiotensin_DR = 0;
  angiotensin_ANPKNS = 0;
  angiotensin_RMULT1 = 1;
  angiotensin_GLPCA = 1;
  angiotensin_RFN = 1.22057;
  angiotensin_RFABX = 0.8;
  angiotensin_ANPINF = 0;
  angiotensin_FIS = 0;
  angiotensin_CPPD = 31.9719;
  angiotensin_TRRBC = 0;
  angiotensin_HYL = 60;
  angiotensin_ATRVM = 0;
  angiotensin_ADHC_init = 1;
  angiotensin_AHY_init = 0.301963;
  angiotensin_AMC_init = 1;
  angiotensin_AMM1T_init = 1.00269;
  angiotensin_AMM2_init = 1.09071;
  angiotensin_ANC_init = 0.859476;
  angiotensin_ANPC_init = 1;
  angiotensin_ANX1_init = 0;
  angiotensin_AR1T_init = 1.02127;
  angiotensin_AR2T_init = 1.01179;
  angiotensin_AR3T_init = 1.1448;
  angiotensin_AU1_init = 1.00007;
  angiotensin_AU4_init = -0.060024;
  angiotensin_AU6_init = 1.00132;
  angiotensin_DTKA_init = 0.0367573;
  angiotensin_HMD1_init = 1;
  angiotensin_HPL_init = 1.00163;
  angiotensin_HPR_init = 1.00237;
  angiotensin_KTOT_init = 3622.54;
  angiotensin_NAE_init = 2109.91;
  angiotensin_O2VAD1_init = 2.368e-7;
  angiotensin_OSV_init = 0.694163;
  angiotensin_OVA_init = 204.497;
  angiotensin_OVS_init = 0.699673;
  angiotensin_PAR1_init = 103.525;
  angiotensin_PC_init = 16.9144;
  angiotensin_PLUR_init = 159.549;
  angiotensin_PPR1_init = 0.419998;
  angiotensin_PRP_init = 216.243;
  angiotensin_QO2T_init = 72.2362;
  angiotensin_QOM1_init = 48.0839;
  angiotensin_RNAUG3_init = 0;
  angiotensin_TSP_init = 279.945;
  angiotensin_TVD_init = 0.000980838;
  angiotensin_VAS1_init = 0.862514;
  angiotensin_VIC_init = 25.0404;
  angiotensin_VLA1_init = 0.379883;
  angiotensin_VPA1_init = 0.38131;
  angiotensin_VPF1_init = 0.0123238;
  angiotensin_VP_init = 3.00449;
  angiotensin_VRA1_init = 0.100043;
  angiotensin_VRC_init = 2.00439;
  angiotensin_VTS2_init = 0;
  angiotensin_VTW_init = 39.8952;
  angiotensin_VV6_init = 0.0101913;
  angiotensin_VV7_init = 0.00366525;
  angiotensin_VVS1_init = 3.28246;
  angiotensin_ANX1 = angiotensin_ANX1_init;
  angiotensin_ANC = angiotensin_ANC_init;
  time_ = ;

  // Assignment rules:
  ANUVN := (ANU - 1)*angiotensin_ANUVM + 1;
  ANU := ;
  ANM := angiotensin_ANMUL - (angiotensin_ANMUL - 1)/((angiotensin_ANMLL - 1)/(angiotensin_ANMLL - angiotensin_ANMUL)*(angiotensin_ANC - 1)*angiotensin_ANCSNS + 1);
  angiotensin_ANGSCR := ;
  angiotensin_instantaneous_angiotensin_formation_MDFLW3 := MDFLW;
  angiotensin_time_delayed_angiotensin_formation_ANX := (angiotensin_ANGSCR - 1)*angiotensin_ANXM;
  angiotensin_ANPR := ;
  angiotensin_total_angiotensin_formation_ANPRT := (angiotensin_ANGSCR + angiotensin_ANX1)*angiotensin_REK;
  angiotensin_ANPR1 := ;
  angiotensin_angiotensin_effect_on_circulation_ANU1 := (ANM - 1)*angiotensin_ANUM + 1;

  // Rate rules:
  angiotensin_ANX1' = (angiotensin_time_delayed_angiotensin_formation_ANX - angiotensin_ANX1)/angiotensin_ANV;
  angiotensin_ANC' = (angiotensin_ANPR1 - angiotensin_ANC)/angiotensin_ANT;
end
