// SBML level 2 version 4

model antidiuretic_hormone_model____main()
  // Originally created by libAntimony v1.4 (using libSBML 4.1.0-b2)

  // Compartments:
  compartment default_compartment = 1;

  // Parameters:
  ADHC = antidiuretic_hormone_ADHC_init;
  antidiuretic_hormone_A1K = 0.5;
  antidiuretic_hormone_A2K = 60;
  antidiuretic_hormone_A3K = 40000;
  antidiuretic_hormone_A4K = 0.1;
  antidiuretic_hormone_A4K2 = 40000;
  antidiuretic_hormone_AARK = 1;
  antidiuretic_hormone_AARLL = 4;
  antidiuretic_hormone_ADHINF = 0;
  antidiuretic_hormone_ADHKLL = 0.2;
  antidiuretic_hormone_ADHKUL = 5;
  antidiuretic_hormone_ADHPAM = 0.3;
  antidiuretic_hormone_ADHPUL = 85;
  antidiuretic_hormone_ADHTC = 15;
  antidiuretic_hormone_ADHVLL = 0.93617;
  antidiuretic_hormone_ADHVUL = 2.5;
  antidiuretic_hormone_AH10 = 0.333;
  antidiuretic_hormone_AH11 = 1000;
  antidiuretic_hormone_AH9 = 1;
  antidiuretic_hormone_AHMNAR = 0.3;
  antidiuretic_hormone_AHTHM = 2;
  antidiuretic_hormone_ALCLK = 0.3;
  antidiuretic_hormone_ALDINF = 0;
  antidiuretic_hormone_ALDKNS = 0;
  antidiuretic_hormone_ALDMM = 2.5;
  antidiuretic_hormone_AM1LL = 0;
  antidiuretic_hormone_AM1UL = 5;
  antidiuretic_hormone_AMCSNS = 0.65;
  antidiuretic_hormone_AMKM = 0.5;
  antidiuretic_hormone_AMKMUL = 12;
  antidiuretic_hormone_AMM1LM = 0.005;
  antidiuretic_hormone_AMM4 = 0.005;
  antidiuretic_hormone_AMNALL = 0.04;
  antidiuretic_hormone_AMNAM = 0.8;
  antidiuretic_hormone_AMNAUL = 15;
  antidiuretic_hormone_AMT = 60;
  antidiuretic_hormone_ANCSNS = 0.4;
  antidiuretic_hormone_ANGINF = 0;
  antidiuretic_hormone_ANGKNS = 0;
  antidiuretic_hormone_ANMALD = 2.5;
  antidiuretic_hormone_ANMAM = 1.4;
  antidiuretic_hormone_ANMARL = 0.86;
  antidiuretic_hormone_ANMEM = 1.6;
  antidiuretic_hormone_ANMKEL = 0.3;
  antidiuretic_hormone_ANMKEM = 2;
  antidiuretic_hormone_ANMLL = 0.7;
  antidiuretic_hormone_ANMNAM = 1;
  antidiuretic_hormone_ANMSLT = 2;
  antidiuretic_hormone_ANMTM = 1.5;
  antidiuretic_hormone_ANMUL = 1.8;
  antidiuretic_hormone_ANPTC = 4;
  antidiuretic_hormone_ANPXAF = 1.5;
  antidiuretic_hormone_ANPXUL = 10;
  antidiuretic_hormone_ANT = 12;
  antidiuretic_hormone_ANULL = 0.8;
  antidiuretic_hormone_ANUM = 6;
  antidiuretic_hormone_ANUVM = 0;
  antidiuretic_hormone_ANV = 5000;
  antidiuretic_hormone_ANXM = 0;
  antidiuretic_hormone_ANY = -0.2;
  antidiuretic_hormone_AR1LM = 0.005;
  antidiuretic_hormone_AR2LM = 0.005;
  antidiuretic_hormone_ARF = 0.5;
  antidiuretic_hormone_AUC1 = 0.3;
  antidiuretic_hormone_AUDMP = 0.3;
  antidiuretic_hormone_AUK = 0.004;
  antidiuretic_hormone_AUL = 1.5;
  antidiuretic_hormone_AULPM = 0;
  antidiuretic_hormone_AUM1 = 3;
  antidiuretic_hormone_AUM2 = 1;
  antidiuretic_hormone_AUMAX = 5;
  antidiuretic_hormone_AUMIN = 0.4;
  antidiuretic_hormone_AUMK1 = 0.3;
  antidiuretic_hormone_AUN1 = 0.5;
  antidiuretic_hormone_AURG = 1;
  antidiuretic_hormone_AUS = 1;
  antidiuretic_hormone_AUSLP = 1.5;
  antidiuretic_hormone_AUTO = 0;
  antidiuretic_hormone_AUTOGN = 7;
  antidiuretic_hormone_AUTOSN = 0.9;
  antidiuretic_hormone_AUX = 1;
  antidiuretic_hormone_BAROTC = 0.16;
  antidiuretic_hormone_CFC = 0.01167;
  antidiuretic_hormone_CKEEX = 4;
  antidiuretic_hormone_CMPTSS = 2;
  antidiuretic_hormone_CN2 = 0.0212;
  antidiuretic_hormone_CN7 = 0.2;
  antidiuretic_hormone_CNR = 139;
  antidiuretic_hormone_CPF = 0.0003;
  antidiuretic_hormone_CPK = 0.000253;
  antidiuretic_hormone_CPR = 40;
  antidiuretic_hormone_CV = 0.1;
  antidiuretic_hormone_CRRFLX = 0;
  antidiuretic_hormone_DIURET = 1;
  antidiuretic_hormone_DHDTR = 0.05;
  antidiuretic_hormone_DTNAR = 0.675;
  antidiuretic_hormone_DTNARL = 1e-6;
  antidiuretic_hormone_EARK = 1;
  antidiuretic_hormone_EARLL = 24;
  antidiuretic_hormone_EFAFR = 0;
  antidiuretic_hormone_EXC = 1;
  antidiuretic_hormone_EXCML = 0.01;
  antidiuretic_hormone_EXCXP = 1;
  antidiuretic_hormone_EXCXP2 = 0.17;
  antidiuretic_hormone_EXE = 0;
  antidiuretic_hormone_GCOPF = 0.8092;
  antidiuretic_hormone_GFLC = 0.0208333;
  antidiuretic_hormone_GFNDMP = 3;
  antidiuretic_hormone_GFNLL = 0.001;
  antidiuretic_hormone_GPPD = 1;
  antidiuretic_hormone_HM6 = 1850;
  antidiuretic_hormone_HM8 = 4.714e-8;
  antidiuretic_hormone_HTAUML = 0.4;
  antidiuretic_hormone_KORGN = 1;
  antidiuretic_hormone_KORNER = 0;
  antidiuretic_hormone_KORREN = 0;
  antidiuretic_hormone_KORTC = 10000;
  antidiuretic_hormone_LPDE = 8;
  antidiuretic_hormone_LPK = 2.728e-14;
  antidiuretic_hormone_LPPR = 0.03;
  antidiuretic_hormone_MDFL1 = 10;
  antidiuretic_hormone_MDFLKM = 0.667;
  antidiuretic_hormone_MDFLW2 = 0.005;
  antidiuretic_hormone_MDFLWX = 0.01;
  antidiuretic_hormone_MDMP = 0;
  antidiuretic_hormone_O2A = 0.1;
  antidiuretic_hormone_O2CHMO = 0.01;
  antidiuretic_hormone_OMM = 57.1;
  antidiuretic_hormone_PA4 = 1;
  antidiuretic_hormone_PAEX = 2;
  antidiuretic_hormone_PCE = 1;
  antidiuretic_hormone_PCR = 15;
  antidiuretic_hormone_PR1LL = 0;
  antidiuretic_hormone_PGHF = -2;
  antidiuretic_hormone_PK2 = 0.79167;
  antidiuretic_hormone_PL2 = 1.8;
  antidiuretic_hormone_PLDF = 4.2;
  antidiuretic_hormone_PM5 = 30;
  antidiuretic_hormone_PO2ADV = 0.001;
  antidiuretic_hormone_POK = 0.1;
  antidiuretic_hormone_POM = 0.04;
  antidiuretic_hormone_POM2 = 2;
  antidiuretic_hormone_PON = 0.1;
  antidiuretic_hormone_POR = 35;
  antidiuretic_hormone_POZ = 2;
  antidiuretic_hormone_PXTP = 8;
  antidiuretic_hormone_QAOLM = 0.2;
  antidiuretic_hormone_QRF = 0.15;
  antidiuretic_hormone_RABSC = 0.5;
  antidiuretic_hormone_RAM = 96.3;
  antidiuretic_hormone_RAPRSP = 0;
  antidiuretic_hormone_RAR = 30.52;
  antidiuretic_hormone_RCDFDP = 2000;
  antidiuretic_hormone_RCDFPC = 0;
  antidiuretic_hormone_REK = 1;
  antidiuretic_hormone_RFABKM = 0.03;
  antidiuretic_hormone_RFABDM = 0.3;
  antidiuretic_hormone_RFABDP = 1;
  antidiuretic_hormone_RFCDFT = 0;
  antidiuretic_hormone_RKC = 5.8e-6;
  antidiuretic_hormone_RNAGTC = 15;
  antidiuretic_hormone_RNAUAD = 0;
  antidiuretic_hormone_RPS = 0;
  antidiuretic_hormone_RTPPR = 0.9;
  antidiuretic_hormone_RTPPRS = 15.2;
  antidiuretic_hormone_RTSPRS = 6;
  antidiuretic_hormone_RVRS = 19.167;
  antidiuretic_hormone_RVSM = 1;
  antidiuretic_hormone_SR = 1;
  antidiuretic_hormone_SR2 = 1;
  antidiuretic_hormone_SRK = 5;
  antidiuretic_hormone_SRK2 = 10000;
  antidiuretic_hormone_STA = 0;
  antidiuretic_hormone_TENSGN = 0;
  antidiuretic_hormone_TENSTC = 0.05;
  antidiuretic_hormone_TIMETR = 0;
  antidiuretic_hormone_TRNSFS = 0;
  antidiuretic_hormone_TRPL = 0;
  antidiuretic_hormone_TSSLML = 0.15;
  antidiuretic_hormone_TSSLTC = 0.005;
  antidiuretic_hormone_TVDDL = 30;
  antidiuretic_hormone_U = 4;
  antidiuretic_hormone_VID1 = 0.01;
  antidiuretic_hormone_VIDML = 0.01;
  antidiuretic_hormone_VNTSTM = 1;
  antidiuretic_hormone_VP1 = 0.01;
  antidiuretic_hormone_VPTISS = 0.0175;
  antidiuretic_hormone_VTSF = 6;
  antidiuretic_hormone_VV9 = 2.51;
  antidiuretic_hormone_X = 4;
  antidiuretic_hormone_Z = 1;
  antidiuretic_hormone_Z4 = 0.5;
  antidiuretic_hormone_Z5 = 0.3;
  antidiuretic_hormone_Z6 = 20;
  antidiuretic_hormone_Z7 = 5;
  antidiuretic_hormone_Z10 = 45;
  antidiuretic_hormone_Z11 = 0.01;
  antidiuretic_hormone_Z12 = 5;
  antidiuretic_hormone_Z13 = 0.625;
  antidiuretic_hormone_Z14 = 5;
  antidiuretic_hormone_Z16 = 5;
  antidiuretic_hormone_Z18 = 5;
  antidiuretic_hormone_Z19 = 5;
  antidiuretic_hormone_KID = 0.08;
  antidiuretic_hormone_URFORM = 0.24;
  antidiuretic_hormone_AUV = 0.55;
  antidiuretic_hormone_AUY = 0;
  antidiuretic_hormone_O2M = 164;
  antidiuretic_hormone_NID = 0.1;
  antidiuretic_hormone_ATRFBM = 0;
  antidiuretic_hormone_GBL = 0;
  antidiuretic_hormone_RNAUGN = 0.6;
  antidiuretic_hormone_RNAULL = 0.3;
  antidiuretic_hormone_RNAUUL = 10;
  antidiuretic_hormone_HSR = 1;
  antidiuretic_hormone_HSL = 1;
  antidiuretic_hormone_HMK = 90;
  antidiuretic_hormone_PO2AMB = 150;
  antidiuretic_hormone_HKM = 0.53333;
  antidiuretic_hormone_DR = 0;
  antidiuretic_hormone_ANPKNS = 0;
  antidiuretic_hormone_RMULT1 = 1;
  antidiuretic_hormone_GLPCA = 1;
  antidiuretic_hormone_RFN = 1.22057;
  antidiuretic_hormone_RFABX = 0.8;
  antidiuretic_hormone_ANPINF = 0;
  antidiuretic_hormone_FIS = 0;
  antidiuretic_hormone_CPPD = 31.9719;
  antidiuretic_hormone_TRRBC = 0;
  antidiuretic_hormone_HYL = 60;
  antidiuretic_hormone_ATRVM = 0;
  antidiuretic_hormone_ADHC_init = 1;
  antidiuretic_hormone_AHY_init = 0.301963;
  antidiuretic_hormone_AMC_init = 1;
  antidiuretic_hormone_AMM1T_init = 1.00269;
  antidiuretic_hormone_AMM2_init = 1.09071;
  antidiuretic_hormone_ANC_init = 0.859476;
  antidiuretic_hormone_ANPC_init = 1;
  antidiuretic_hormone_ANX1_init = 0;
  antidiuretic_hormone_AR1T_init = 1.02127;
  antidiuretic_hormone_AR2T_init = 1.01179;
  antidiuretic_hormone_AR3T_init = 1.1448;
  antidiuretic_hormone_AU1_init = 1.00007;
  antidiuretic_hormone_AU4_init = -0.060024;
  antidiuretic_hormone_AU6_init = 1.00132;
  antidiuretic_hormone_DTKA_init = 0.0367573;
  antidiuretic_hormone_HMD1_init = 1;
  antidiuretic_hormone_HPL_init = 1.00163;
  antidiuretic_hormone_HPR_init = 1.00237;
  antidiuretic_hormone_KTOT_init = 3622.54;
  antidiuretic_hormone_NAE_init = 2109.91;
  antidiuretic_hormone_O2VAD1_init = 2.368e-7;
  antidiuretic_hormone_OSV_init = 0.694163;
  antidiuretic_hormone_OVA_init = 204.497;
  antidiuretic_hormone_OVS_init = 0.699673;
  antidiuretic_hormone_PAR1_init = 103.525;
  antidiuretic_hormone_PC_init = 16.9144;
  antidiuretic_hormone_PLUR_init = 159.549;
  antidiuretic_hormone_PPR1_init = 0.419998;
  antidiuretic_hormone_PRP_init = 216.243;
  antidiuretic_hormone_QO2T_init = 72.2362;
  antidiuretic_hormone_QOM1_init = 48.0839;
  antidiuretic_hormone_RNAUG3_init = 0;
  antidiuretic_hormone_TSP_init = 279.945;
  antidiuretic_hormone_TVD_init = 0.000980838;
  antidiuretic_hormone_VAS1_init = 0.862514;
  antidiuretic_hormone_VIC_init = 25.0404;
  antidiuretic_hormone_VLA1_init = 0.379883;
  antidiuretic_hormone_VPA1_init = 0.38131;
  antidiuretic_hormone_VPF1_init = 0.0123238;
  antidiuretic_hormone_VP_init = 3.00449;
  antidiuretic_hormone_VRA1_init = 0.100043;
  antidiuretic_hormone_VRC_init = 2.00439;
  antidiuretic_hormone_VTS2_init = 0;
  antidiuretic_hormone_VTW_init = 39.8952;
  antidiuretic_hormone_VV6_init = 0.0101913;
  antidiuretic_hormone_VV7_init = 0.00366525;
  antidiuretic_hormone_VVS1_init = 3.28246;
  time_ = ;
  CNA = ;
  PA1 = ;

  // Assignment rules:
  ADHMK := ;
  ADHMV := ;
  antidiuretic_hormone_ADHNA := ;
  antidiuretic_hormone_osmotic_control_of_ADH_secretion_ADHNA1 := (CNA - antidiuretic_hormone_CNR)/(142 - antidiuretic_hormone_CNR);
  antidiuretic_hormone_ADHPR := (antidiuretic_hormone_ADHPUL - antidiuretic_hormone_pressure_control_of_ADH_secretion_ADHPA)^2*antidiuretic_hormone_ADHPAM;
  antidiuretic_hormone_pressure_control_of_ADH_secretion_ADHPA := ;
  antidiuretic_hormone_ADH := ;
  antidiuretic_hormone_total_ADH_secretion_ADH1 := antidiuretic_hormone_ADHNA + antidiuretic_hormone_ADHPR + antidiuretic_hormone_ADHINF;
  antidiuretic_hormone_ADH_effect_on_nonrenal_vascular_resistance_ADHMV1 := antidiuretic_hormone_ADHVUL - (antidiuretic_hormone_ADHVUL - 1)/((antidiuretic_hormone_ADHVLL - 1)/(antidiuretic_hormone_ADHVLL - antidiuretic_hormone_ADHVUL)*(ADHC - 1) + 1);
  antidiuretic_hormone_ADH_effect_on_kidney_ADHMK1 := antidiuretic_hormone_ADHKUL - (antidiuretic_hormone_ADHKUL - 1)/((antidiuretic_hormone_ADHKLL - 1)/(antidiuretic_hormone_ADHKLL - antidiuretic_hormone_ADHKUL)*(ADHC - 1) + 1);

  // Rate rules:
  ADHC' = (antidiuretic_hormone_ADH - ADHC)/antidiuretic_hormone_ADHTC;
end
