// SBML level 2 version 4

model atrial_natriuretic_peptide_model____main()
  // Originally created by libAntimony v1.4 (using libSBML 4.1.0-b2)

  // Compartments:
  compartment default_compartment = 1;

  // Parameters:
  atrial_natriuretic_peptide_A1K = 0.5;
  atrial_natriuretic_peptide_A2K = 60;
  atrial_natriuretic_peptide_A3K = 40000;
  atrial_natriuretic_peptide_A4K = 0.1;
  atrial_natriuretic_peptide_A4K2 = 40000;
  atrial_natriuretic_peptide_AARK = 1;
  atrial_natriuretic_peptide_AARLL = 4;
  atrial_natriuretic_peptide_ADHINF = 0;
  atrial_natriuretic_peptide_ADHKLL = 0.2;
  atrial_natriuretic_peptide_ADHKUL = 5;
  atrial_natriuretic_peptide_ADHPAM = 0.3;
  atrial_natriuretic_peptide_ADHPUL = 85;
  atrial_natriuretic_peptide_ADHTC = 15;
  atrial_natriuretic_peptide_ADHVLL = 0.93617;
  atrial_natriuretic_peptide_ADHVUL = 2.5;
  atrial_natriuretic_peptide_AH10 = 0.333;
  atrial_natriuretic_peptide_AH11 = 1000;
  atrial_natriuretic_peptide_AH9 = 1;
  atrial_natriuretic_peptide_AHMNAR = 0.3;
  atrial_natriuretic_peptide_AHTHM = 2;
  atrial_natriuretic_peptide_ALCLK = 0.3;
  atrial_natriuretic_peptide_ALDINF = 0;
  atrial_natriuretic_peptide_ALDKNS = 0;
  atrial_natriuretic_peptide_ALDMM = 2.5;
  atrial_natriuretic_peptide_AM1LL = 0;
  atrial_natriuretic_peptide_AM1UL = 5;
  atrial_natriuretic_peptide_AMCSNS = 0.65;
  atrial_natriuretic_peptide_AMKM = 0.5;
  atrial_natriuretic_peptide_AMKMUL = 12;
  atrial_natriuretic_peptide_AMM1LM = 0.005;
  atrial_natriuretic_peptide_AMM4 = 0.005;
  atrial_natriuretic_peptide_AMNALL = 0.04;
  atrial_natriuretic_peptide_AMNAM = 0.8;
  atrial_natriuretic_peptide_AMNAUL = 15;
  atrial_natriuretic_peptide_AMT = 60;
  atrial_natriuretic_peptide_ANCSNS = 0.4;
  atrial_natriuretic_peptide_ANGINF = 0;
  atrial_natriuretic_peptide_ANGKNS = 0;
  atrial_natriuretic_peptide_ANMALD = 2.5;
  atrial_natriuretic_peptide_ANMAM = 1.4;
  atrial_natriuretic_peptide_ANMARL = 0.86;
  atrial_natriuretic_peptide_ANMEM = 1.6;
  atrial_natriuretic_peptide_ANMKEL = 0.3;
  atrial_natriuretic_peptide_ANMKEM = 2;
  atrial_natriuretic_peptide_ANMLL = 0.7;
  atrial_natriuretic_peptide_ANMNAM = 1;
  atrial_natriuretic_peptide_ANMSLT = 2;
  atrial_natriuretic_peptide_ANMTM = 1.5;
  atrial_natriuretic_peptide_ANMUL = 1.8;
  atrial_natriuretic_peptide_ANPTC = 4;
  atrial_natriuretic_peptide_ANPXAF = 1.5;
  atrial_natriuretic_peptide_ANPXUL = 10;
  atrial_natriuretic_peptide_ANT = 12;
  atrial_natriuretic_peptide_ANULL = 0.8;
  atrial_natriuretic_peptide_ANUM = 6;
  atrial_natriuretic_peptide_ANUVM = 0;
  atrial_natriuretic_peptide_ANV = 5000;
  atrial_natriuretic_peptide_ANXM = 0;
  atrial_natriuretic_peptide_ANY = -0.2;
  atrial_natriuretic_peptide_AR1LM = 0.005;
  atrial_natriuretic_peptide_AR2LM = 0.005;
  atrial_natriuretic_peptide_ARF = 0.5;
  atrial_natriuretic_peptide_AUC1 = 0.3;
  atrial_natriuretic_peptide_AUDMP = 0.3;
  atrial_natriuretic_peptide_AUK = 0.004;
  atrial_natriuretic_peptide_AUL = 1.5;
  atrial_natriuretic_peptide_AULPM = 0;
  atrial_natriuretic_peptide_AUM1 = 3;
  atrial_natriuretic_peptide_AUM2 = 1;
  atrial_natriuretic_peptide_AUMAX = 5;
  atrial_natriuretic_peptide_AUMIN = 0.4;
  atrial_natriuretic_peptide_AUMK1 = 0.3;
  atrial_natriuretic_peptide_AUN1 = 0.5;
  atrial_natriuretic_peptide_AURG = 1;
  atrial_natriuretic_peptide_AUS = 1;
  atrial_natriuretic_peptide_AUSLP = 1.5;
  atrial_natriuretic_peptide_AUTO = 0;
  atrial_natriuretic_peptide_AUTOGN = 7;
  atrial_natriuretic_peptide_AUTOSN = 0.9;
  atrial_natriuretic_peptide_AUX = 1;
  atrial_natriuretic_peptide_BAROTC = 0.16;
  atrial_natriuretic_peptide_CFC = 0.01167;
  atrial_natriuretic_peptide_CKEEX = 4;
  atrial_natriuretic_peptide_CMPTSS = 2;
  atrial_natriuretic_peptide_CN2 = 0.0212;
  atrial_natriuretic_peptide_CN7 = 0.2;
  atrial_natriuretic_peptide_CNR = 139;
  atrial_natriuretic_peptide_CPF = 0.0003;
  atrial_natriuretic_peptide_CPK = 0.000253;
  atrial_natriuretic_peptide_CPR = 40;
  atrial_natriuretic_peptide_CV = 0.1;
  atrial_natriuretic_peptide_CRRFLX = 0;
  atrial_natriuretic_peptide_DIURET = 1;
  atrial_natriuretic_peptide_DHDTR = 0.05;
  atrial_natriuretic_peptide_DTNAR = 0.675;
  atrial_natriuretic_peptide_DTNARL = 1e-6;
  atrial_natriuretic_peptide_EARK = 1;
  atrial_natriuretic_peptide_EARLL = 24;
  atrial_natriuretic_peptide_EFAFR = 0;
  atrial_natriuretic_peptide_EXC = 1;
  atrial_natriuretic_peptide_EXCML = 0.01;
  atrial_natriuretic_peptide_EXCXP = 1;
  atrial_natriuretic_peptide_EXCXP2 = 0.17;
  atrial_natriuretic_peptide_EXE = 0;
  atrial_natriuretic_peptide_GCOPF = 0.8092;
  atrial_natriuretic_peptide_GFLC = 0.0208333;
  atrial_natriuretic_peptide_GFNDMP = 3;
  atrial_natriuretic_peptide_GFNLL = 0.001;
  atrial_natriuretic_peptide_GPPD = 1;
  atrial_natriuretic_peptide_HM6 = 1850;
  atrial_natriuretic_peptide_HM8 = 4.714e-8;
  atrial_natriuretic_peptide_HTAUML = 0.4;
  atrial_natriuretic_peptide_KORGN = 1;
  atrial_natriuretic_peptide_KORNER = 0;
  atrial_natriuretic_peptide_KORREN = 0;
  atrial_natriuretic_peptide_KORTC = 10000;
  atrial_natriuretic_peptide_LPDE = 8;
  atrial_natriuretic_peptide_LPK = 2.728e-14;
  atrial_natriuretic_peptide_LPPR = 0.03;
  atrial_natriuretic_peptide_MDFL1 = 10;
  atrial_natriuretic_peptide_MDFLKM = 0.667;
  atrial_natriuretic_peptide_MDFLW2 = 0.005;
  atrial_natriuretic_peptide_MDFLWX = 0.01;
  atrial_natriuretic_peptide_MDMP = 0;
  atrial_natriuretic_peptide_O2A = 0.1;
  atrial_natriuretic_peptide_O2CHMO = 0.01;
  atrial_natriuretic_peptide_OMM = 57.1;
  atrial_natriuretic_peptide_PA4 = 1;
  atrial_natriuretic_peptide_PAEX = 2;
  atrial_natriuretic_peptide_PCE = 1;
  atrial_natriuretic_peptide_PCR = 15;
  atrial_natriuretic_peptide_PR1LL = 0;
  atrial_natriuretic_peptide_PGHF = -2;
  atrial_natriuretic_peptide_PK2 = 0.79167;
  atrial_natriuretic_peptide_PL2 = 1.8;
  atrial_natriuretic_peptide_PLDF = 4.2;
  atrial_natriuretic_peptide_PM5 = 30;
  atrial_natriuretic_peptide_PO2ADV = 0.001;
  atrial_natriuretic_peptide_POK = 0.1;
  atrial_natriuretic_peptide_POM = 0.04;
  atrial_natriuretic_peptide_POM2 = 2;
  atrial_natriuretic_peptide_PON = 0.1;
  atrial_natriuretic_peptide_POR = 35;
  atrial_natriuretic_peptide_POZ = 2;
  atrial_natriuretic_peptide_PXTP = 8;
  atrial_natriuretic_peptide_QAOLM = 0.2;
  atrial_natriuretic_peptide_QRF = 0.15;
  atrial_natriuretic_peptide_RABSC = 0.5;
  atrial_natriuretic_peptide_RAM = 96.3;
  atrial_natriuretic_peptide_RAPRSP = 0;
  atrial_natriuretic_peptide_RAR = 30.52;
  atrial_natriuretic_peptide_RCDFDP = 2000;
  atrial_natriuretic_peptide_RCDFPC = 0;
  atrial_natriuretic_peptide_REK = 1;
  atrial_natriuretic_peptide_RFABKM = 0.03;
  atrial_natriuretic_peptide_RFABDM = 0.3;
  atrial_natriuretic_peptide_RFABDP = 1;
  atrial_natriuretic_peptide_RFCDFT = 0;
  atrial_natriuretic_peptide_RKC = 5.8e-6;
  atrial_natriuretic_peptide_RNAGTC = 15;
  atrial_natriuretic_peptide_RNAUAD = 0;
  atrial_natriuretic_peptide_RPS = 0;
  atrial_natriuretic_peptide_RTPPR = 0.9;
  atrial_natriuretic_peptide_RTPPRS = 15.2;
  atrial_natriuretic_peptide_RTSPRS = 6;
  atrial_natriuretic_peptide_RVRS = 19.167;
  atrial_natriuretic_peptide_RVSM = 1;
  atrial_natriuretic_peptide_SR = 1;
  atrial_natriuretic_peptide_SR2 = 1;
  atrial_natriuretic_peptide_SRK = 5;
  atrial_natriuretic_peptide_SRK2 = 10000;
  atrial_natriuretic_peptide_STA = 0;
  atrial_natriuretic_peptide_TENSGN = 0;
  atrial_natriuretic_peptide_TENSTC = 0.05;
  atrial_natriuretic_peptide_TIMETR = 0;
  atrial_natriuretic_peptide_TRNSFS = 0;
  atrial_natriuretic_peptide_TRPL = 0;
  atrial_natriuretic_peptide_TSSLML = 0.15;
  atrial_natriuretic_peptide_TSSLTC = 0.005;
  atrial_natriuretic_peptide_TVDDL = 30;
  atrial_natriuretic_peptide_U = 4;
  atrial_natriuretic_peptide_VID1 = 0.01;
  atrial_natriuretic_peptide_VIDML = 0.01;
  atrial_natriuretic_peptide_VNTSTM = 1;
  atrial_natriuretic_peptide_VP1 = 0.01;
  atrial_natriuretic_peptide_VPTISS = 0.0175;
  atrial_natriuretic_peptide_VTSF = 6;
  atrial_natriuretic_peptide_VV9 = 2.51;
  atrial_natriuretic_peptide_X = 4;
  atrial_natriuretic_peptide_Z = 1;
  atrial_natriuretic_peptide_Z4 = 0.5;
  atrial_natriuretic_peptide_Z5 = 0.3;
  atrial_natriuretic_peptide_Z6 = 20;
  atrial_natriuretic_peptide_Z7 = 5;
  atrial_natriuretic_peptide_Z10 = 45;
  atrial_natriuretic_peptide_Z11 = 0.01;
  atrial_natriuretic_peptide_Z12 = 5;
  atrial_natriuretic_peptide_Z13 = 0.625;
  atrial_natriuretic_peptide_Z14 = 5;
  atrial_natriuretic_peptide_Z16 = 5;
  atrial_natriuretic_peptide_Z18 = 5;
  atrial_natriuretic_peptide_Z19 = 5;
  atrial_natriuretic_peptide_KID = 0.08;
  atrial_natriuretic_peptide_URFORM = 0.24;
  atrial_natriuretic_peptide_AUV = 0.55;
  atrial_natriuretic_peptide_AUY = 0;
  atrial_natriuretic_peptide_O2M = 164;
  atrial_natriuretic_peptide_NID = 0.1;
  atrial_natriuretic_peptide_ATRFBM = 0;
  atrial_natriuretic_peptide_GBL = 0;
  atrial_natriuretic_peptide_RNAUGN = 0.6;
  atrial_natriuretic_peptide_RNAULL = 0.3;
  atrial_natriuretic_peptide_RNAUUL = 10;
  atrial_natriuretic_peptide_HSR = 1;
  atrial_natriuretic_peptide_HSL = 1;
  atrial_natriuretic_peptide_HMK = 90;
  atrial_natriuretic_peptide_PO2AMB = 150;
  atrial_natriuretic_peptide_HKM = 0.53333;
  atrial_natriuretic_peptide_DR = 0;
  atrial_natriuretic_peptide_ANPKNS = 0;
  atrial_natriuretic_peptide_RMULT1 = 1;
  atrial_natriuretic_peptide_GLPCA = 1;
  atrial_natriuretic_peptide_RFN = 1.22057;
  atrial_natriuretic_peptide_RFABX = 0.8;
  atrial_natriuretic_peptide_ANPINF = 0;
  atrial_natriuretic_peptide_FIS = 0;
  atrial_natriuretic_peptide_CPPD = 31.9719;
  atrial_natriuretic_peptide_TRRBC = 0;
  atrial_natriuretic_peptide_HYL = 60;
  atrial_natriuretic_peptide_ATRVM = 0;
  atrial_natriuretic_peptide_ADHC_init = 1;
  atrial_natriuretic_peptide_AHY_init = 0.301963;
  atrial_natriuretic_peptide_AMC_init = 1;
  atrial_natriuretic_peptide_AMM1T_init = 1.00269;
  atrial_natriuretic_peptide_AMM2_init = 1.09071;
  atrial_natriuretic_peptide_ANC_init = 0.859476;
  atrial_natriuretic_peptide_ANPC_init = 1;
  atrial_natriuretic_peptide_ANX1_init = 0;
  atrial_natriuretic_peptide_AR1T_init = 1.02127;
  atrial_natriuretic_peptide_AR2T_init = 1.01179;
  atrial_natriuretic_peptide_AR3T_init = 1.1448;
  atrial_natriuretic_peptide_AU1_init = 1.00007;
  atrial_natriuretic_peptide_AU4_init = -0.060024;
  atrial_natriuretic_peptide_AU6_init = 1.00132;
  atrial_natriuretic_peptide_DTKA_init = 0.0367573;
  atrial_natriuretic_peptide_HMD1_init = 1;
  atrial_natriuretic_peptide_HPL_init = 1.00163;
  atrial_natriuretic_peptide_HPR_init = 1.00237;
  atrial_natriuretic_peptide_KTOT_init = 3622.54;
  atrial_natriuretic_peptide_NAE_init = 2109.91;
  atrial_natriuretic_peptide_O2VAD1_init = 2.368e-7;
  atrial_natriuretic_peptide_OSV_init = 0.694163;
  atrial_natriuretic_peptide_OVA_init = 204.497;
  atrial_natriuretic_peptide_OVS_init = 0.699673;
  atrial_natriuretic_peptide_PAR1_init = 103.525;
  atrial_natriuretic_peptide_PC_init = 16.9144;
  atrial_natriuretic_peptide_PLUR_init = 159.549;
  atrial_natriuretic_peptide_PPR1_init = 0.419998;
  atrial_natriuretic_peptide_PRP_init = 216.243;
  atrial_natriuretic_peptide_QO2T_init = 72.2362;
  atrial_natriuretic_peptide_QOM1_init = 48.0839;
  atrial_natriuretic_peptide_RNAUG3_init = 0;
  atrial_natriuretic_peptide_TSP_init = 279.945;
  atrial_natriuretic_peptide_TVD_init = 0.000980838;
  atrial_natriuretic_peptide_VAS1_init = 0.862514;
  atrial_natriuretic_peptide_VIC_init = 25.0404;
  atrial_natriuretic_peptide_VLA1_init = 0.379883;
  atrial_natriuretic_peptide_VPA1_init = 0.38131;
  atrial_natriuretic_peptide_VPF1_init = 0.0123238;
  atrial_natriuretic_peptide_VP_init = 3.00449;
  atrial_natriuretic_peptide_VRA1_init = 0.100043;
  atrial_natriuretic_peptide_VRC_init = 2.00439;
  atrial_natriuretic_peptide_VTS2_init = 0;
  atrial_natriuretic_peptide_VTW_init = 39.8952;
  atrial_natriuretic_peptide_VV6_init = 0.0101913;
  atrial_natriuretic_peptide_VV7_init = 0.00366525;
  atrial_natriuretic_peptide_VVS1_init = 3.28246;
  atrial_natriuretic_peptide_ANPC = atrial_natriuretic_peptide_ANPC_init;
  time_ = ;
  PLA = ;
  PRA = ;

  // Assignment rules:
  ANPX := ;
  atrial_natriuretic_peptide_ANP := (atrial_natriuretic_peptide_total_ANP_secreted_ANPL + atrial_natriuretic_peptide_total_ANP_secreted_ANPR2)/3;
  atrial_natriuretic_peptide_total_ANP_secreted_ANPL := ;
  atrial_natriuretic_peptide_total_ANP_secreted_ANPR2 := ;
  atrial_natriuretic_peptide_ANP1 := ;
  atrial_natriuretic_peptide_ANP_effect_on_renal_afferent_arteriolar_resistance_ANPX1 := atrial_natriuretic_peptide_ANPXUL - atrial_natriuretic_peptide_ANPXUL/(0.5555556*(1 + atrial_natriuretic_peptide_ANPC));

  // Rate rules:
  atrial_natriuretic_peptide_ANPC' = (atrial_natriuretic_peptide_ANP1 - atrial_natriuretic_peptide_ANPC)/atrial_natriuretic_peptide_ANPTC;
end
