// SBML level 2 version 4

model atrial_natriuretic_peptide_CellML1_0_model____main()
  // Originally created by libAntimony v1.4 (using libSBML 4.1.0-b2)

  // Compartments:
  compartment default_compartment = 1;

  // Parameters:
  PLA = 2;
  PRA = 0.00852183;
  atrial_natriuretic_peptide_ANPKNS = 0;
  atrial_natriuretic_peptide_ANPINF = 0;
  atrial_natriuretic_peptide_ANPTC = 4;
  atrial_natriuretic_peptide_ANPXUL = 10;
  atrial_natriuretic_peptide_ANPC = 1;
  time_ = ;

  // Assignment rules:
  atrial_natriuretic_peptide_ANP := (atrial_natriuretic_peptide_total_ANP_secreted_ANPL + atrial_natriuretic_peptide_total_ANP_secreted_ANPR2)/3;
  atrial_natriuretic_peptide_total_ANP_secreted_ANPL := ;
  atrial_natriuretic_peptide_total_ANP_secreted_ANPR2 := ;
  atrial_natriuretic_peptide_ANP1 := ;
  atrial_natriuretic_peptide_ANPX := ;
  atrial_natriuretic_peptide_ANP_effect_on_renal_afferent_arteriolar_resistance_ANPX1 := atrial_natriuretic_peptide_ANPXUL - atrial_natriuretic_peptide_ANPXUL/(0.5555556*(1 + atrial_natriuretic_peptide_ANPC));

  // Rate rules:
  atrial_natriuretic_peptide_ANPC' = (atrial_natriuretic_peptide_ANP1 - atrial_natriuretic_peptide_ANPC)/atrial_natriuretic_peptide_ANPTC;
end
