// SBML level 2 version 4

model autonomics_parent_model____main()
  // Originally created by libAntimony v1.4 (using libSBML 4.1.0-b2)

  // Compartments:
  compartment default_compartment = 1;

  // Parameters:
  PA = 103.525;
  PO2ART = 97.0439;
  PLA = 2;
  PRA = 0.00852183;
  PPA = 15.6376;
  A1K = 0.5;
  A2K = 60;
  A3K = 40000;
  A4K = 0.1;
  A4K2 = 40000;
  AARK = 1;
  AARLL = 4;
  ADHINF = 0;
  ADHKLL = 0.2;
  ADHKUL = 5;
  ADHPAM = 0.3;
  ADHPUL = 85;
  ADHTC = 15;
  ADHVLL = 0.93617;
  ADHVUL = 2.5;
  AH10 = 0.333;
  AH11 = 1000;
  AH9 = 1;
  AHMNAR = 0.3;
  AHTHM = 2;
  ALCLK = 0.3;
  ALDINF = 0;
  ALDKNS = 0;
  ALDMM = 2.5;
  AM1LL = 0;
  AM1UL = 5;
  AMCSNS = 0.65;
  AMKM = 0.5;
  AMKMUL = 12;
  AMM1LM = 0.005;
  AMM4 = 0.005;
  AMNALL = 0.04;
  AMNAM = 0.8;
  AMNAUL = 15;
  AMT = 60;
  ANCSNS = 0.4;
  ANGINF = 0;
  ANGKNS = 0;
  ANMALD = 2.5;
  ANMAM = 1.4;
  ANMARL = 0.86;
  ANMEM = 1.6;
  ANMKEL = 0.3;
  ANMKEM = 2;
  ANMLL = 0.7;
  ANMNAM = 1;
  ANMSLT = 2;
  ANMTM = 1.5;
  ANMUL = 1.8;
  ANPTC = 4;
  ANPXAF = 1.5;
  ANPXUL = 10;
  ANT = 12;
  ANULL = 0.8;
  ANUM = 6;
  ANUVM = 0;
  ANV = 5000;
  ANXM = 0;
  ANY = -0.2;
  AR1LM = 0.005;
  AR2LM = 0.005;
  ARF = 0.5;
  AUC1 = 0.3;
  AUDMP = 0.3;
  AUK = 0.004;
  AUL = 1.5;
  AULPM = 0;
  AUM1 = 3;
  AUM2 = 1;
  AUMAX = 5;
  AUMIN = 0.4;
  AUMK1 = 0.3;
  AUN1 = 0.5;
  AURG = 1;
  AUS = 1;
  AUSLP = 1.5;
  AUTO = 0;
  AUTOGN = 7;
  AUTOSN = 0.9;
  AUX = 1;
  BAROTC = 0.16;
  CFC = 0.01167;
  CKEEX = 4;
  CMPTSS = 2;
  CN2 = 0.0212;
  CN7 = 0.2;
  CNR = 139;
  CPF = 0.0003;
  CPK = 0.000253;
  CPR = 40;
  CV = 0.1;
  CRRFLX = 0;
  DIURET = 1;
  DHDTR = 0.05;
  DTNAR = 0.675;
  DTNARL = 1e-6;
  EARK = 1;
  EARLL = 24;
  EFAFR = 0;
  EXC = 1;
  EXCML = 0.01;
  EXCXP = 1;
  EXCXP2 = 0.17;
  EXE = 0;
  GCOPF = 0.8092;
  GFLC = 0.0208333;
  GFNDMP = 3;
  GFNLL = 0.001;
  GPPD = 1;
  HM6 = 1850;
  HM8 = 4.714e-8;
  HTAUML = 0.4;
  KORGN = 1;
  KORNER = 0;
  KORREN = 0;
  KORTC = 10000;
  LPDE = 8;
  LPK = 2.728e-14;
  LPPR = 0.03;
  MDFL1 = 10;
  MDFLKM = 0.667;
  MDFLW2 = 0.005;
  MDFLWX = 0.01;
  MDMP = 0;
  O2A = 0.1;
  O2CHMO = 0.01;
  OMM = 57.1;
  PA4 = 1;
  PAEX = 2;
  PCE = 1;
  PCR = 15;
  PR1LL = 0;
  PGHF = -2;
  PK2 = 0.79167;
  PL2 = 1.8;
  PLDF = 4.2;
  PM5 = 30;
  PO2ADV = 0.001;
  POK = 0.1;
  POM = 0.04;
  POM2 = 2;
  PON = 0.1;
  POR = 35;
  POZ = 2;
  PXTP = 8;
  QAOLM = 0.2;
  QRF = 0.15;
  RABSC = 0.5;
  RAM = 96.3;
  RAPRSP = 0;
  RAR = 30.52;
  RCDFDP = 2000;
  RCDFPC = 0;
  REK = 1;
  RFABKM = 0.03;
  RFABDM = 0.3;
  RFABDP = 1;
  RFCDFT = 0;
  RKC = 5.8e-6;
  RNAGTC = 15;
  RNAUAD = 0;
  RPS = 0;
  RTPPR = 0.9;
  RTPPRS = 15.2;
  RTSPRS = 6;
  RVRS = 19.167;
  RVSM = 1;
  SR = 1;
  SR2 = 1;
  SRK = 5;
  SRK2 = 10000;
  STA = 0;
  TENSGN = 0;
  TENSTC = 0.05;
  TIMETR = 0;
  TRNSFS = 0;
  TRPL = 0;
  TSSLML = 0.15;
  TSSLTC = 0.005;
  TVDDL = 30;
  U = 4;
  VID1 = 0.01;
  VIDML = 0.01;
  VNTSTM = 1;
  VP1 = 0.01;
  VPTISS = 0.0175;
  VTSF = 6;
  VV9 = 2.51;
  X = 4;
  Z = 1;
  Z4 = 0.5;
  Z5 = 0.3;
  Z6 = 20;
  Z7 = 5;
  Z10 = 45;
  Z11 = 0.01;
  Z12 = 5;
  Z13 = 0.625;
  Z14 = 5;
  Z16 = 5;
  Z18 = 5;
  Z19 = 5;
  KID = 0.08;
  URFORM = 0.24;
  AUV = 0.55;
  AUY = 0;
  O2M = 164;
  NID = 0.1;
  ATRFBM = 0;
  GBL = 0;
  RNAUGN = 0.6;
  RNAULL = 0.3;
  RNAUUL = 10;
  HSR = 1;
  HSL = 1;
  HMK = 90;
  PO2AMB = 150;
  HKM = 0.53333;
  DR = 0;
  ANPKNS = 0;
  RMULT1 = 1;
  GLPCA = 1;
  RFN = 1.22057;
  RFABX = 0.8;
  ANPINF = 0;
  FIS = 0;
  CPPD = 31.9719;
  TRRBC = 0;
  HYL = 60;
  ATRVM = 0;
  ADHC_init = 1;
  AHY_init = 0.301963;
  AMC_init = 1;
  AMM1T_init = 1.00269;
  AMM2_init = 1.09071;
  ANC_init = 0.859476;
  ANPC_init = 1;
  ANX1_init = 0;
  AR1T_init = 1.02127;
  AR2T_init = 1.01179;
  AR3T_init = 1.1448;
  AU1_init = 1.00007;
  AU4_init = -0.060024;
  AU6_init = 1.00132;
  DTKA_init = 0.0367573;
  HMD1_init = 1;
  HPL_init = 1.00163;
  HPR_init = 1.00237;
  KTOT_init = 3622.54;
  NAE_init = 2109.91;
  O2VAD1_init = 2.368e-7;
  OSV_init = 0.694163;
  OVA_init = 204.497;
  OVS_init = 0.699673;
  PAR1_init = 103.525;
  PC_init = 16.9144;
  PLUR_init = 159.549;
  PPR1_init = 0.419998;
  PRP_init = 216.243;
  QO2T_init = 72.2362;
  QOM1_init = 48.0839;
  RNAUG3_init = 0;
  TSP_init = 279.945;
  TVD_init = 0.000980838;
  VAS1_init = 0.862514;
  VIC_init = 25.0404;
  VLA1_init = 0.379883;
  VPA1_init = 0.38131;
  VPF1_init = 0.0123238;
  VP_init = 3.00449;
  VRA1_init = 0.100043;
  VRC_init = 2.00439;
  VTS2_init = 0;
  VTW_init = 39.8952;
  VV6_init = 0.0101913;
  VV7_init = 0.00366525;
  VVS1_init = 3.28246;
  autonomics_A1K = 0.5;
  autonomics_A2K = 60;
  autonomics_A3K = 40000;
  autonomics_A4K = 0.1;
  autonomics_A4K2 = 40000;
  autonomics_AARK = 1;
  autonomics_AARLL = 4;
  autonomics_ADHINF = 0;
  autonomics_ADHKLL = 0.2;
  autonomics_ADHKUL = 5;
  autonomics_ADHPAM = 0.3;
  autonomics_ADHPUL = 85;
  autonomics_ADHTC = 15;
  autonomics_ADHVLL = 0.93617;
  autonomics_ADHVUL = 2.5;
  autonomics_AH10 = 0.333;
  autonomics_AH11 = 1000;
  autonomics_AH9 = 1;
  autonomics_AHMNAR = 0.3;
  autonomics_AHTHM = 2;
  autonomics_ALCLK = 0.3;
  autonomics_ALDINF = 0;
  autonomics_ALDKNS = 0;
  autonomics_ALDMM = 2.5;
  autonomics_AM1LL = 0;
  autonomics_AM1UL = 5;
  autonomics_AMCSNS = 0.65;
  autonomics_AMKM = 0.5;
  autonomics_AMKMUL = 12;
  autonomics_AMM1LM = 0.005;
  autonomics_AMM4 = 0.005;
  autonomics_AMNALL = 0.04;
  autonomics_AMNAM = 0.8;
  autonomics_AMNAUL = 15;
  autonomics_AMT = 60;
  autonomics_ANCSNS = 0.4;
  autonomics_ANGINF = 0;
  autonomics_ANGKNS = 0;
  autonomics_ANMALD = 2.5;
  autonomics_ANMAM = 1.4;
  autonomics_ANMARL = 0.86;
  autonomics_ANMEM = 1.6;
  autonomics_ANMKEL = 0.3;
  autonomics_ANMKEM = 2;
  autonomics_ANMLL = 0.7;
  autonomics_ANMNAM = 1;
  autonomics_ANMSLT = 2;
  autonomics_ANMTM = 1.5;
  autonomics_ANMUL = 1.8;
  autonomics_ANPTC = 4;
  autonomics_ANPXAF = 1.5;
  autonomics_ANPXUL = 10;
  autonomics_ANT = 12;
  autonomics_ANULL = 0.8;
  autonomics_ANUM = 6;
  autonomics_ANUVM = 0;
  autonomics_ANV = 5000;
  autonomics_ANXM = 0;
  autonomics_ANY = -0.2;
  autonomics_AR1LM = 0.005;
  autonomics_AR2LM = 0.005;
  autonomics_ARF = 0.5;
  autonomics_AUC1 = 0.3;
  autonomics_AUDMP = 0.3;
  autonomics_AUK = 0.004;
  autonomics_AUL = 1.5;
  autonomics_AULPM = 0;
  autonomics_AUM1 = 3;
  autonomics_AUM2 = 1;
  autonomics_AUMAX = 5;
  autonomics_AUMIN = 0.4;
  autonomics_AUMK1 = 0.3;
  autonomics_AUN1 = 0.5;
  autonomics_AURG = 1;
  autonomics_AUS = 1;
  autonomics_AUSLP = 1.5;
  autonomics_AUTO = 0;
  autonomics_AUTOGN = 7;
  autonomics_AUTOSN = 0.9;
  autonomics_AUX = 1;
  autonomics_BAROTC = 0.16;
  autonomics_CFC = 0.01167;
  autonomics_CKEEX = 4;
  autonomics_CMPTSS = 2;
  autonomics_CN2 = 0.0212;
  autonomics_CN7 = 0.2;
  autonomics_CNR = 139;
  autonomics_CPF = 0.0003;
  autonomics_CPK = 0.000253;
  autonomics_CPR = 40;
  autonomics_CV = 0.1;
  autonomics_CRRFLX = 0;
  autonomics_DIURET = 1;
  autonomics_DHDTR = 0.05;
  autonomics_DTNAR = 0.675;
  autonomics_DTNARL = 1e-6;
  autonomics_EARK = 1;
  autonomics_EARLL = 24;
  autonomics_EFAFR = 0;
  autonomics_EXC = 1;
  autonomics_EXCML = 0.01;
  autonomics_EXCXP = 1;
  autonomics_EXCXP2 = 0.17;
  autonomics_EXE = 0;
  autonomics_GCOPF = 0.8092;
  autonomics_GFLC = 0.0208333;
  autonomics_GFNDMP = 3;
  autonomics_GFNLL = 0.001;
  autonomics_GPPD = 1;
  autonomics_HM6 = 1850;
  autonomics_HM8 = 4.714e-8;
  autonomics_HTAUML = 0.4;
  autonomics_KORGN = 1;
  autonomics_KORNER = 0;
  autonomics_KORREN = 0;
  autonomics_KORTC = 10000;
  autonomics_LPDE = 8;
  autonomics_LPK = 2.728e-14;
  autonomics_LPPR = 0.03;
  autonomics_MDFL1 = 10;
  autonomics_MDFLKM = 0.667;
  autonomics_MDFLW2 = 0.005;
  autonomics_MDFLWX = 0.01;
  autonomics_MDMP = 0;
  autonomics_O2A = 0.1;
  autonomics_O2CHMO = 0.01;
  autonomics_OMM = 57.1;
  autonomics_PA4 = 1;
  autonomics_PAEX = 2;
  autonomics_PCE = 1;
  autonomics_PCR = 15;
  autonomics_PR1LL = 0;
  autonomics_PGHF = -2;
  autonomics_PK2 = 0.79167;
  autonomics_PL2 = 1.8;
  autonomics_PLDF = 4.2;
  autonomics_PM5 = 30;
  autonomics_PO2ADV = 0.001;
  autonomics_POK = 0.1;
  autonomics_POM = 0.04;
  autonomics_POM2 = 2;
  autonomics_PON = 0.1;
  autonomics_POR = 35;
  autonomics_POZ = 2;
  autonomics_PXTP = 8;
  autonomics_QAOLM = 0.2;
  autonomics_QRF = 0.15;
  autonomics_RABSC = 0.5;
  autonomics_RAM = 96.3;
  autonomics_RAPRSP = 0;
  autonomics_RAR = 30.52;
  autonomics_RCDFDP = 2000;
  autonomics_RCDFPC = 0;
  autonomics_REK = 1;
  autonomics_RFABKM = 0.03;
  autonomics_RFABDM = 0.3;
  autonomics_RFABDP = 1;
  autonomics_RFCDFT = 0;
  autonomics_RKC = 5.8e-6;
  autonomics_RNAGTC = 15;
  autonomics_RNAUAD = 0;
  autonomics_RPS = 0;
  autonomics_RTPPR = 0.9;
  autonomics_RTPPRS = 15.2;
  autonomics_RTSPRS = 6;
  autonomics_RVRS = 19.167;
  autonomics_RVSM = 1;
  autonomics_SR = 1;
  autonomics_SR2 = 1;
  autonomics_SRK = 5;
  autonomics_SRK2 = 10000;
  autonomics_STA = 0;
  autonomics_TENSGN = 0;
  autonomics_TENSTC = 0.05;
  autonomics_TIMETR = 0;
  autonomics_TRNSFS = 0;
  autonomics_TRPL = 0;
  autonomics_TSSLML = 0.15;
  autonomics_TSSLTC = 0.005;
  autonomics_TVDDL = 30;
  autonomics_U = 4;
  autonomics_VID1 = 0.01;
  autonomics_VIDML = 0.01;
  autonomics_VNTSTM = 1;
  autonomics_VP1 = 0.01;
  autonomics_VPTISS = 0.0175;
  autonomics_VTSF = 6;
  autonomics_VV9 = 2.51;
  autonomics_X = 4;
  autonomics_Z = 1;
  autonomics_Z4 = 0.5;
  autonomics_Z5 = 0.3;
  autonomics_Z6 = 20;
  autonomics_Z7 = 5;
  autonomics_Z10 = 45;
  autonomics_Z11 = 0.01;
  autonomics_Z12 = 5;
  autonomics_Z13 = 0.625;
  autonomics_Z14 = 5;
  autonomics_Z16 = 5;
  autonomics_Z18 = 5;
  autonomics_Z19 = 5;
  autonomics_KID = 0.08;
  autonomics_URFORM = 0.24;
  autonomics_AUV = 0.55;
  autonomics_AUY = 0;
  autonomics_O2M = 164;
  autonomics_NID = 0.1;
  autonomics_ATRFBM = 0;
  autonomics_GBL = 0;
  autonomics_RNAUGN = 0.6;
  autonomics_RNAULL = 0.3;
  autonomics_RNAUUL = 10;
  autonomics_HSR = 1;
  autonomics_HSL = 1;
  autonomics_HMK = 90;
  autonomics_PO2AMB = 150;
  autonomics_HKM = 0.53333;
  autonomics_DR = 0;
  autonomics_ANPKNS = 0;
  autonomics_RMULT1 = 1;
  autonomics_GLPCA = 1;
  autonomics_RFN = 1.22057;
  autonomics_RFABX = 0.8;
  autonomics_ANPINF = 0;
  autonomics_FIS = 0;
  autonomics_CPPD = 31.9719;
  autonomics_TRRBC = 0;
  autonomics_HYL = 60;
  autonomics_ATRVM = 0;
  autonomics_ADHC_init = 1;
  autonomics_AHY_init = 0.301963;
  autonomics_AMC_init = 1;
  autonomics_AMM1T_init = 1.00269;
  autonomics_AMM2_init = 1.09071;
  autonomics_ANC_init = 0.859476;
  autonomics_ANPC_init = 1;
  autonomics_ANX1_init = 0;
  autonomics_AR1T_init = 1.02127;
  autonomics_AR2T_init = 1.01179;
  autonomics_AR3T_init = 1.1448;
  autonomics_AU1_init = 1.00007;
  autonomics_AU4_init = -0.060024;
  autonomics_AU6_init = 1.00132;
  autonomics_DTKA_init = 0.0367573;
  autonomics_HMD1_init = 1;
  autonomics_HPL_init = 1.00163;
  autonomics_HPR_init = 1.00237;
  autonomics_KTOT_init = 3622.54;
  autonomics_NAE_init = 2109.91;
  autonomics_O2VAD1_init = 2.368e-7;
  autonomics_OSV_init = 0.694163;
  autonomics_OVA_init = 204.497;
  autonomics_OVS_init = 0.699673;
  autonomics_PAR1_init = 103.525;
  autonomics_PC_init = 16.9144;
  autonomics_PLUR_init = 159.549;
  autonomics_PPR1_init = 0.419998;
  autonomics_PRP_init = 216.243;
  autonomics_QO2T_init = 72.2362;
  autonomics_QOM1_init = 48.0839;
  autonomics_RNAUG3_init = 0;
  autonomics_TSP_init = 279.945;
  autonomics_TVD_init = 0.000980838;
  autonomics_VAS1_init = 0.862514;
  autonomics_VIC_init = 25.0404;
  autonomics_VLA1_init = 0.379883;
  autonomics_VPA1_init = 0.38131;
  autonomics_VPF1_init = 0.0123238;
  autonomics_VP_init = 3.00449;
  autonomics_VRA1_init = 0.100043;
  autonomics_VRC_init = 2.00439;
  autonomics_VTS2_init = 0;
  autonomics_VTW_init = 39.8952;
  autonomics_VV6_init = 0.0101913;
  autonomics_VV7_init = 0.00366525;
  autonomics_VVS1_init = 3.28246;
  autonomics_arterial_baroreceptor_reflex_AU4 = autonomics_AU4_init;
  autonomics_arterial_baroreceptor_reflex_AU6 = autonomics_AU6_init;
  autonomics_actual_autonomic_stimulation_AU1 = autonomics_AU1_init;
  time_ = ;

  // Assignment rules:
  PA1 := ;
  VVR := autonomics_VV9 - AU*autonomics_AUL + autonomics_AUL;
  AUH := autonomics_autonomic_drive_on_target_organs_and_tissues_AUO*autonomics_AUV + 1;
  AUR := autonomics_autonomic_drive_on_target_organs_and_tissues_AUO*autonomics_AUS + 1;
  AUM := (autonomics_autonomic_drive_on_target_organs_and_tissues_AUO*autonomics_AUM1 + 1)^autonomics_AUM2;
  AOM := autonomics_autonomic_drive_on_target_organs_and_tissues_AUO*autonomics_O2A + 1;
  AVE := autonomics_autonomic_drive_on_target_organs_and_tissues_AUO*autonomics_AUY + 1;
  AU := ;
  autonomics_AUC := ;
  autonomics_AUC3 := autonomics_AUC + autonomics_chemoreceptors_effect_of_art_PO2_AUC2;
  autonomics_chemoreceptors_effect_of_art_PO2_AUC2 := ;
  autonomics_AU6C := autonomics_arterial_baroreceptor_reflex_AU6;
  autonomics_arterial_baroreceptor_reflex_AUB := ;
  autonomics_arterial_baroreceptor_reflex_A1B := (autonomics_arterial_baroreceptor_reflex_AUB - 1)*autonomics_AUX + 1;
  autonomics_arterial_baroreceptor_reflex_AU6A := autonomics_arterial_baroreceptor_reflex_A1B - autonomics_arterial_baroreceptor_reflex_AU4;
  autonomics_AUN := ;
  autonomics_AULP := (15/(PLA + PRA + PPA) - 1)*autonomics_AULPM + 1;
  autonomics_AUEX := autonomics_EXC^autonomics_EXCXP;
  autonomics_AUTTL := ;
  autonomics_total_autonomic_stimulation_AUTTL1 := (autonomics_AUEX*autonomics_AULP*(autonomics_AUC3 + autonomics_AU6C + autonomics_AUN) - 1)*autonomics_EXCML + 1;
  autonomics_actual_autonomic_stimulation_DAU := (autonomics_AUTTL - autonomics_actual_autonomic_stimulation_AU1)/autonomics_AUDMP;
  autonomics_actual_autonomic_stimulation_AUT := autonomics_AUMAX - (autonomics_AUMAX - 1)/exp(autonomics_AUSLP*(autonomics_actual_autonomic_stimulation_AU1 - 1));
  autonomics_autonomic_drive_on_target_organs_and_tissues_AUO := AU - 1;

  // Rate rules:
  autonomics_arterial_baroreceptor_reflex_AU6' = (autonomics_arterial_baroreceptor_reflex_AU6A - autonomics_arterial_baroreceptor_reflex_AU6)/autonomics_BAROTC;
  autonomics_actual_autonomic_stimulation_AU1' = autonomics_actual_autonomic_stimulation_DAU;
end
