// SBML level 2 version 4

model autonomics_CellML1_0_model____main()
  // Originally created by libAntimony v1.3 (using libSBML 4.1.0-b2)

  // Compartments:
  compartment default_compartment = 1;

  // Parameters:
  PA = 103.525;
  PO2ART = 97.0439;
  PLA = 2;
  PRA = 0.00852183;
  PPA = 15.6376;
  autonomics_VV9 = 2.51;
  autonomics_AUL = 1.5;
  autonomics_AULPM = 0;
  autonomics_AUY = 0;
  autonomics_AUV = 0.55;
  autonomics_AUS = 1;
  autonomics_O2A = 0.1;
  autonomics_AUM1 = 3;
  autonomics_AUM2 = 1;
  autonomics_AUDMP = 0.3;
  autonomics_AUMAX = 5;
  autonomics_AUMIN = 0.4;
  autonomics_AUSLP = 1.5;
  autonomics_EXC = 1;
  autonomics_EXCML = 0.01;
  autonomics_EXCXP = 1;
  autonomics_AUN1 = 0.5;
  autonomics_MDMP = 0;
  autonomics_BAROTC = 0.16;
  autonomics_AUK = 0.004;
  autonomics_AUX = 1;
  autonomics_O2CHMO = 0.01;
  autonomics_AUC1 = 0.3;
  autonomics_CRRFLX = 0;
  autonomics_EXE = 0;
  autonomics_arterial_baroreceptor_reflex_AU4 = -0.060024;
  autonomics_arterial_baroreceptor_reflex_AU6 = 1.00132;
  autonomics_actual_autonomic_stimulation_AU1 = 1.00007;
  time_ = ;

  // Assignment rules:
  autonomics_PA1 := ;
  autonomics_AUC := ;
  autonomics_AUC3 := autonomics_AUC + autonomics_chemoreceptors_effect_of_art_PO2_AUC2;
  autonomics_chemoreceptors_effect_of_art_PO2_AUC2 := ;
  autonomics_AU6C := autonomics_arterial_baroreceptor_reflex_AU6;
  autonomics_arterial_baroreceptor_reflex_AUB := ;
  autonomics_arterial_baroreceptor_reflex_A1B := (autonomics_arterial_baroreceptor_reflex_AUB - 1)*autonomics_AUX + 1;
  autonomics_arterial_baroreceptor_reflex_AU6A := autonomics_arterial_baroreceptor_reflex_A1B - autonomics_arterial_baroreceptor_reflex_AU4;
  autonomics_AUN := ;
  autonomics_AULP := (15/(PLA + PRA + PPA) - 1)*autonomics_AULPM + 1;
  autonomics_AUEX := autonomics_EXC^autonomics_EXCXP;
  autonomics_AUTTL := ;
  autonomics_total_autonomic_stimulation_AUTTL1 := (autonomics_AUEX*autonomics_AULP*(autonomics_AUC3 + autonomics_AU6C + autonomics_AUN) - 1)*autonomics_EXCML + 1;
  autonomics_AU := ;
  autonomics_actual_autonomic_stimulation_DAU := (autonomics_AUTTL - autonomics_actual_autonomic_stimulation_AU1)/autonomics_AUDMP;
  autonomics_actual_autonomic_stimulation_AUT := autonomics_AUMAX - (autonomics_AUMAX - 1)/exp(autonomics_AUSLP*(autonomics_actual_autonomic_stimulation_AU1 - 1));
  autonomics_VVR := autonomics_VV9 - autonomics_AU*autonomics_AUL + autonomics_AUL;
  autonomics_AUH := autonomics_autonomic_drive_on_target_organs_and_tissues_AUO*autonomics_AUV + 1;
  autonomics_AUR := autonomics_autonomic_drive_on_target_organs_and_tissues_AUO*autonomics_AUS + 1;
  autonomics_AOM := autonomics_autonomic_drive_on_target_organs_and_tissues_AUO*autonomics_O2A + 1;
  autonomics_AUM := (autonomics_autonomic_drive_on_target_organs_and_tissues_AUO*autonomics_AUM1 + 1)^autonomics_AUM2;
  autonomics_AVE := autonomics_autonomic_drive_on_target_organs_and_tissues_AUO*autonomics_AUY + 1;
  autonomics_autonomic_drive_on_target_organs_and_tissues_AUO := autonomics_AU - 1;

  // Rate rules:
  autonomics_arterial_baroreceptor_reflex_AU6' = (autonomics_arterial_baroreceptor_reflex_AU6A - autonomics_arterial_baroreceptor_reflex_AU6)/autonomics_BAROTC;
  autonomics_actual_autonomic_stimulation_AU1' = autonomics_actual_autonomic_stimulation_DAU;
end
