// SBML level 2 version 4

model capillary_dynamics_CellML1_0_model____main()
  // Originally created by libAntimony v1.3 (using libSBML 4.1.0-b2)

  // Compartments:
  compartment default_compartment = 1;

  // Parameters:
  VEC = 14.8548;
  PPD = 4.4805e-6;
  RVS = 2.77751;
  DFP = -4.078e-7;
  VPF = 0.0123238;
  BFN = 2.79521;
  PVS = 3.71612;
  capillary_dynamics_CFC = 0.01167;
  capillary_dynamics_TRPL = 0;
  capillary_dynamics_CPR = 40;
  capillary_dynamics_LPDE = 8;
  capillary_dynamics_PCE = 1;
  capillary_dynamics_PCR = 15;
  capillary_dynamics_LPK = 2.728e-14;
  capillary_dynamics_LPPR = 0.03;
  capillary_dynamics_CPK = 0.000253;
  capillary_dynamics_TSSLML = 0.15;
  capillary_dynamics_TSSLTC = 0.005;
  capillary_dynamics_HYL = 60;
  capillary_dynamics_CMPTSS = 2;
  capillary_dynamics_PGHF = -2;
  capillary_dynamics_GCOPF = 0.8092;
  capillary_dynamics_VTSF = 6;
  capillary_dynamics_PLDF = 4.2;
  capillary_dynamics_VP = 3.00449;
  capillary_dynamics_PRP = 216.243;
  capillary_dynamics_interstitial_fluid_volume_VTS2 = 0;
  capillary_dynamics_TSP = 279.945;
  time_ = ;

  // Assignment rules:
  capillary_dynamics_PC := RVS*1.7*BFN + PVS;
  capillary_dynamics_PGH := capillary_dynamics_CHY*capillary_dynamics_PGHF + capillary_dynamics_PTT;
  capillary_dynamics_PTC := capillary_dynamics_POSHYL*capillary_dynamics_PTCPR*capillary_dynamics_GCOPF;
  capillary_dynamics_PPC := 0.28*capillary_dynamics_CPP + 0.0019*capillary_dynamics_CPP^2;
  capillary_dynamics_VTCPL := (capillary_dynamics_plasma_leakage_PRCD*capillary_dynamics_CPK)^capillary_dynamics_PCE;
  capillary_dynamics_VTC := (capillary_dynamics_PC - capillary_dynamics_PPC - capillary_dynamics_PGH + capillary_dynamics_PTC)*capillary_dynamics_CFC + capillary_dynamics_VTCPL;
  capillary_dynamics_VTL := ;
  capillary_dynamics_plasma_volume_VPD := capillary_dynamics_VTL - capillary_dynamics_VTC - DFP + capillary_dynamics_TRPL;
  capillary_dynamics_CPP := capillary_dynamics_PRP/capillary_dynamics_VP;
  capillary_dynamics_DLP := capillary_dynamics_LPPR - capillary_dynamics_protein_destruction_and_formation_CPPD^capillary_dynamics_LPDE*capillary_dynamics_LPK;
  capillary_dynamics_protein_destruction_and_formation_CPPD := ;
  capillary_dynamics_plasma_leakage_PRCD := ;
  capillary_dynamics_CPI := capillary_dynamics_TSP/capillary_dynamics_VTS;
  capillary_dynamics_DPC := capillary_dynamics_VTCPL*capillary_dynamics_CPP + (capillary_dynamics_CPP - capillary_dynamics_CPI)*0.00104;
  capillary_dynamics_DPL := capillary_dynamics_CPI*capillary_dynamics_VTL;
  capillary_dynamics_total_plasma_protein_DPP := capillary_dynamics_DLP + capillary_dynamics_DPL - capillary_dynamics_DPC - PPD + capillary_dynamics_TRPL*72;
  capillary_dynamics_VTS := VEC - capillary_dynamics_VP - VPF;
  capillary_dynamics_VTS1 := capillary_dynamics_VTS - capillary_dynamics_interstitial_fluid_volume_VTS2;
  capillary_dynamics_total_interstitial_protein_DPI := capillary_dynamics_DPC - capillary_dynamics_DPL;
  capillary_dynamics_PTCPR := 0.28*capillary_dynamics_CPI + 0.0019*capillary_dynamics_CPI^2;
  capillary_dynamics_PTT := ((capillary_dynamics_VTS1 - capillary_dynamics_VTSF)/capillary_dynamics_VTSF)^2*1;
  capillary_dynamics_CHY := (capillary_dynamics_HYL/capillary_dynamics_VTS/5)^capillary_dynamics_CMPTSS;
  capillary_dynamics_POSHYL := capillary_dynamics_CHY*2;
  capillary_dynamics_PIF := capillary_dynamics_PGH - capillary_dynamics_POSHYL;
  capillary_dynamics_PTS := capillary_dynamics_PTT - capillary_dynamics_PIF;
  capillary_dynamics_lymph_flow_PLD1 := capillary_dynamics_PIF + capillary_dynamics_PLDF - capillary_dynamics_PTT;
  capillary_dynamics_lymph_flow_PLD := ;
  capillary_dynamics_VG := ;
  capillary_dynamics_VIF := capillary_dynamics_VTS - capillary_dynamics_VG;

  // Rate rules:
  capillary_dynamics_VP' = capillary_dynamics_plasma_volume_VPD;
  capillary_dynamics_PRP' = capillary_dynamics_total_plasma_protein_DPP;
  capillary_dynamics_interstitial_fluid_volume_VTS2' = ((capillary_dynamics_VTS - 12)*capillary_dynamics_TSSLML - capillary_dynamics_interstitial_fluid_volume_VTS2)*capillary_dynamics_TSSLTC;
  capillary_dynamics_TSP' = capillary_dynamics_total_interstitial_protein_DPI;
end
