// SBML level 2 version 4

model circulatory_dynamics_model____main()
  // Originally created by libAntimony v1.3 (using libSBML 4.1.0-b2)

  // Compartments:
  compartment default_compartment = 1;

  // Parameters:
  circulatory_dynamics_A1K = 0.5;
  circulatory_dynamics_A2K = 60;
  circulatory_dynamics_A3K = 40000;
  circulatory_dynamics_A4K = 0.1;
  circulatory_dynamics_A4K2 = 40000;
  circulatory_dynamics_AARK = 1;
  circulatory_dynamics_AARLL = 4;
  circulatory_dynamics_ADHINF = 0;
  circulatory_dynamics_ADHKLL = 0.2;
  circulatory_dynamics_ADHKUL = 5;
  circulatory_dynamics_ADHPAM = 0.3;
  circulatory_dynamics_ADHPUL = 85;
  circulatory_dynamics_ADHTC = 15;
  circulatory_dynamics_ADHVLL = 0.93617;
  circulatory_dynamics_ADHVUL = 2.5;
  circulatory_dynamics_AH10 = 0.333;
  circulatory_dynamics_AH11 = 1000;
  circulatory_dynamics_AH9 = 1;
  circulatory_dynamics_AHMNAR = 0.3;
  circulatory_dynamics_AHTHM = 2;
  circulatory_dynamics_ALCLK = 0.3;
  circulatory_dynamics_ALDINF = 0;
  circulatory_dynamics_ALDKNS = 0;
  circulatory_dynamics_ALDMM = 2.5;
  circulatory_dynamics_AM1LL = 0;
  circulatory_dynamics_AM1UL = 5;
  circulatory_dynamics_AMCSNS = 0.65;
  circulatory_dynamics_AMKM = 0.5;
  circulatory_dynamics_AMKMUL = 12;
  circulatory_dynamics_AMM1LM = 0.005;
  circulatory_dynamics_AMM4 = 0.005;
  circulatory_dynamics_AMNALL = 0.04;
  circulatory_dynamics_AMNAM = 0.8;
  circulatory_dynamics_AMNAUL = 15;
  circulatory_dynamics_AMT = 60;
  circulatory_dynamics_ANCSNS = 0.4;
  circulatory_dynamics_ANGINF = 0;
  circulatory_dynamics_ANGKNS = 0;
  circulatory_dynamics_ANMALD = 2.5;
  circulatory_dynamics_ANMAM = 1.4;
  circulatory_dynamics_ANMARL = 0.86;
  circulatory_dynamics_ANMEM = 1.6;
  circulatory_dynamics_ANMKEL = 0.3;
  circulatory_dynamics_ANMKEM = 2;
  circulatory_dynamics_ANMLL = 0.7;
  circulatory_dynamics_ANMNAM = 1;
  circulatory_dynamics_ANMSLT = 2;
  circulatory_dynamics_ANMTM = 1.5;
  circulatory_dynamics_ANMUL = 1.8;
  circulatory_dynamics_ANPTC = 4;
  circulatory_dynamics_ANPXAF = 1.5;
  circulatory_dynamics_ANPXUL = 10;
  circulatory_dynamics_ANT = 12;
  circulatory_dynamics_ANULL = 0.8;
  circulatory_dynamics_ANUM = 6;
  circulatory_dynamics_ANUVM = 0;
  circulatory_dynamics_ANV = 5000;
  circulatory_dynamics_ANXM = 0;
  circulatory_dynamics_ANY = -0.2;
  circulatory_dynamics_AR1LM = 0.005;
  circulatory_dynamics_AR2LM = 0.005;
  circulatory_dynamics_ARF = 0.5;
  circulatory_dynamics_AUC1 = 0.3;
  circulatory_dynamics_AUDMP = 0.3;
  circulatory_dynamics_AUK = 0.004;
  circulatory_dynamics_AUL = 1.5;
  circulatory_dynamics_AULPM = 0;
  circulatory_dynamics_AUM1 = 3;
  circulatory_dynamics_AUM2 = 1;
  circulatory_dynamics_AUMAX = 5;
  circulatory_dynamics_AUMIN = 0.4;
  circulatory_dynamics_AUMK1 = 0.3;
  circulatory_dynamics_AUN1 = 0.5;
  circulatory_dynamics_AURG = 1;
  circulatory_dynamics_AUS = 1;
  circulatory_dynamics_AUSLP = 1.5;
  circulatory_dynamics_AUTO = 0;
  circulatory_dynamics_AUTOGN = 7;
  circulatory_dynamics_AUTOSN = 0.9;
  circulatory_dynamics_AUX = 1;
  circulatory_dynamics_BAROTC = 0.16;
  circulatory_dynamics_CFC = 0.01167;
  circulatory_dynamics_CKEEX = 4;
  circulatory_dynamics_CMPTSS = 2;
  circulatory_dynamics_CN2 = 0.0212;
  circulatory_dynamics_CN7 = 0.2;
  circulatory_dynamics_CNR = 139;
  circulatory_dynamics_CPF = 0.0003;
  circulatory_dynamics_CPK = 0.000253;
  circulatory_dynamics_CPR = 40;
  circulatory_dynamics_CV = 0.1;
  circulatory_dynamics_CRRFLX = 0;
  circulatory_dynamics_DIURET = 1;
  circulatory_dynamics_DHDTR = 0.05;
  circulatory_dynamics_DTNAR = 0.675;
  circulatory_dynamics_DTNARL = 1e-6;
  circulatory_dynamics_EARK = 1;
  circulatory_dynamics_EARLL = 24;
  circulatory_dynamics_EFAFR = 0;
  circulatory_dynamics_EXC = 1;
  circulatory_dynamics_EXCML = 0.01;
  circulatory_dynamics_EXCXP = 1;
  circulatory_dynamics_EXCXP2 = 0.17;
  circulatory_dynamics_EXE = 0;
  circulatory_dynamics_GCOPF = 0.8092;
  circulatory_dynamics_GFLC = 0.0208333;
  circulatory_dynamics_GFNDMP = 3;
  circulatory_dynamics_GFNLL = 0.001;
  circulatory_dynamics_GPPD = 1;
  circulatory_dynamics_HM6 = 1850;
  circulatory_dynamics_HM8 = 4.714e-8;
  circulatory_dynamics_HTAUML = 0.4;
  circulatory_dynamics_KORGN = 1;
  circulatory_dynamics_KORNER = 0;
  circulatory_dynamics_KORREN = 0;
  circulatory_dynamics_KORTC = 10000;
  circulatory_dynamics_LPDE = 8;
  circulatory_dynamics_LPK = 2.728e-14;
  circulatory_dynamics_LPPR = 0.03;
  circulatory_dynamics_MDFL1 = 10;
  circulatory_dynamics_MDFLKM = 0.667;
  circulatory_dynamics_MDFLW2 = 0.005;
  circulatory_dynamics_MDFLWX = 0.01;
  circulatory_dynamics_MDMP = 0;
  circulatory_dynamics_O2A = 0.1;
  circulatory_dynamics_O2CHMO = 0.01;
  circulatory_dynamics_OMM = 57.1;
  circulatory_dynamics_PA4 = 1;
  circulatory_dynamics_PAEX = 2;
  circulatory_dynamics_PCE = 1;
  circulatory_dynamics_PCR = 15;
  circulatory_dynamics_PR1LL = 0;
  circulatory_dynamics_PGHF = -2;
  circulatory_dynamics_PK2 = 0.79167;
  circulatory_dynamics_PL2 = 1.8;
  circulatory_dynamics_PLDF = 4.2;
  circulatory_dynamics_PM5 = 30;
  circulatory_dynamics_PO2ADV = 0.001;
  circulatory_dynamics_POK = 0.1;
  circulatory_dynamics_POM = 0.04;
  circulatory_dynamics_POM2 = 2;
  circulatory_dynamics_PON = 0.1;
  circulatory_dynamics_POR = 35;
  circulatory_dynamics_POZ = 2;
  circulatory_dynamics_PXTP = 8;
  circulatory_dynamics_QAOLM = 0.2;
  circulatory_dynamics_QRF = 0.15;
  circulatory_dynamics_RABSC = 0.5;
  circulatory_dynamics_RAM = 96.3;
  circulatory_dynamics_RAPRSP = 0;
  circulatory_dynamics_RAR = 30.52;
  circulatory_dynamics_RCDFDP = 2000;
  circulatory_dynamics_RCDFPC = 0;
  circulatory_dynamics_REK = 1;
  circulatory_dynamics_RFABKM = 0.03;
  circulatory_dynamics_RFABDM = 0.3;
  circulatory_dynamics_RFABDP = 1;
  circulatory_dynamics_RFCDFT = 0;
  circulatory_dynamics_RKC = 5.8e-6;
  circulatory_dynamics_RNAGTC = 15;
  circulatory_dynamics_RNAUAD = 0;
  circulatory_dynamics_RPS = 0;
  circulatory_dynamics_RTPPR = 0.9;
  circulatory_dynamics_RTPPRS = 15.2;
  circulatory_dynamics_RTSPRS = 6;
  circulatory_dynamics_RVRS = 19.167;
  circulatory_dynamics_RVSM = 1;
  circulatory_dynamics_SR = 1;
  circulatory_dynamics_SR2 = 1;
  circulatory_dynamics_SRK = 5;
  circulatory_dynamics_SRK2 = 10000;
  circulatory_dynamics_STA = 0;
  circulatory_dynamics_TENSGN = 0;
  circulatory_dynamics_TENSTC = 0.05;
  circulatory_dynamics_TIMETR = 0;
  circulatory_dynamics_TRNSFS = 0;
  circulatory_dynamics_TRPL = 0;
  circulatory_dynamics_TSSLML = 0.15;
  circulatory_dynamics_TSSLTC = 0.005;
  circulatory_dynamics_TVDDL = 30;
  circulatory_dynamics_U = 4;
  circulatory_dynamics_VID1 = 0.01;
  circulatory_dynamics_VIDML = 0.01;
  circulatory_dynamics_VNTSTM = 1;
  circulatory_dynamics_VP1 = 0.01;
  circulatory_dynamics_VPTISS = 0.0175;
  circulatory_dynamics_VTSF = 6;
  circulatory_dynamics_VV9 = 2.51;
  circulatory_dynamics_X = 4;
  circulatory_dynamics_Z = 1;
  circulatory_dynamics_Z4 = 0.5;
  circulatory_dynamics_Z5 = 0.3;
  circulatory_dynamics_Z6 = 20;
  circulatory_dynamics_Z7 = 5;
  circulatory_dynamics_Z10 = 45;
  circulatory_dynamics_Z11 = 0.01;
  circulatory_dynamics_Z12 = 5;
  circulatory_dynamics_Z13 = 0.625;
  circulatory_dynamics_Z14 = 5;
  circulatory_dynamics_Z16 = 5;
  circulatory_dynamics_Z18 = 5;
  circulatory_dynamics_Z19 = 5;
  circulatory_dynamics_KID = 0.08;
  circulatory_dynamics_URFORM = 0.24;
  circulatory_dynamics_AUV = 0.55;
  circulatory_dynamics_AUY = 0;
  circulatory_dynamics_O2M = 164;
  circulatory_dynamics_NID = 0.1;
  circulatory_dynamics_ATRFBM = 0;
  circulatory_dynamics_GBL = 0;
  circulatory_dynamics_RNAUGN = 0.6;
  circulatory_dynamics_RNAULL = 0.3;
  circulatory_dynamics_RNAUUL = 10;
  circulatory_dynamics_HSR = 1;
  circulatory_dynamics_HSL = 1;
  circulatory_dynamics_HMK = 90;
  circulatory_dynamics_PO2AMB = 150;
  circulatory_dynamics_HKM = 0.53333;
  circulatory_dynamics_DR = 0;
  circulatory_dynamics_ANPKNS = 0;
  circulatory_dynamics_RMULT1 = 1;
  circulatory_dynamics_GLPCA = 1;
  circulatory_dynamics_RFN = 1.22057;
  circulatory_dynamics_RFABX = 0.8;
  circulatory_dynamics_ANPINF = 0;
  circulatory_dynamics_FIS = 0;
  circulatory_dynamics_CPPD = 31.9719;
  circulatory_dynamics_TRRBC = 0;
  circulatory_dynamics_HYL = 60;
  circulatory_dynamics_ATRVM = 0;
  circulatory_dynamics_ADHC_init = 1;
  circulatory_dynamics_AHY_init = 0.301963;
  circulatory_dynamics_AMC_init = 1;
  circulatory_dynamics_AMM1T_init = 1.00269;
  circulatory_dynamics_AMM2_init = 1.09071;
  circulatory_dynamics_ANC_init = 0.859476;
  circulatory_dynamics_ANPC_init = 1;
  circulatory_dynamics_ANX1_init = 0;
  circulatory_dynamics_AR1T_init = 1.02127;
  circulatory_dynamics_AR2T_init = 1.01179;
  circulatory_dynamics_AR3T_init = 1.1448;
  circulatory_dynamics_AU1_init = 1.00007;
  circulatory_dynamics_AU4_init = -0.060024;
  circulatory_dynamics_AU6_init = 1.00132;
  circulatory_dynamics_DTKA_init = 0.0367573;
  circulatory_dynamics_HMD1_init = 1;
  circulatory_dynamics_HPL_init = 1.00163;
  circulatory_dynamics_HPR_init = 1.00237;
  circulatory_dynamics_KTOT_init = 3622.54;
  circulatory_dynamics_NAE_init = 2109.91;
  circulatory_dynamics_O2VAD1_init = 2.368e-7;
  circulatory_dynamics_OSV_init = 0.694163;
  circulatory_dynamics_OVA_init = 204.497;
  circulatory_dynamics_OVS_init = 0.699673;
  circulatory_dynamics_PAR1_init = 103.525;
  circulatory_dynamics_PC_init = 16.9144;
  circulatory_dynamics_PLUR_init = 159.549;
  circulatory_dynamics_PPR1_init = 0.419998;
  circulatory_dynamics_PRP_init = 216.243;
  circulatory_dynamics_QO2T_init = 72.2362;
  circulatory_dynamics_QOM1_init = 48.0839;
  circulatory_dynamics_RNAUG3_init = 0;
  circulatory_dynamics_TSP_init = 279.945;
  circulatory_dynamics_TVD_init = 0.000980838;
  circulatory_dynamics_VAS1_init = 0.862514;
  circulatory_dynamics_VIC_init = 25.0404;
  circulatory_dynamics_VLA1_init = 0.379883;
  circulatory_dynamics_VPA1_init = 0.38131;
  circulatory_dynamics_VPF1_init = 0.0123238;
  circulatory_dynamics_VP_init = 3.00449;
  circulatory_dynamics_VRA1_init = 0.100043;
  circulatory_dynamics_VRC_init = 2.00439;
  circulatory_dynamics_VTS2_init = 0;
  circulatory_dynamics_VTW_init = 39.8952;
  circulatory_dynamics_VV6_init = 0.0101913;
  circulatory_dynamics_VV7_init = 0.00366525;
  circulatory_dynamics_VVS1_init = 3.28246;
  circulatory_dynamics_VVS1 = circulatory_dynamics_VVS1_init;
  circulatory_dynamics_VAS1 = circulatory_dynamics_VAS1_init;
  circulatory_dynamics_VLA1 = circulatory_dynamics_VLA1_init;
  circulatory_dynamics_VPA1 = circulatory_dynamics_VPA1_init;
  circulatory_dynamics_VRA1 = circulatory_dynamics_VRA1_init;
  time_ = ;
  ADHMV = ;
  AMM = ;
  ANU = ;
  ANUVN = ;
  ARM = ;
  ATRRFB = ;
  ATRVFB = ;
  AU = ;
  AUH = ;
  AUM = ;
  AVE = ;
  HMD = ;
  HPL = ;
  HPR = ;
  MYOGRS = ;
  OSA = ;
  PAMK = ;
  PC = ;
  RBF = ;
  VIM = ;
  VP = ;
  VRC = ;
  VV6 = ;
  VV7 = ;
  VVR = ;

  // Assignment rules:
  BFM := circulatory_dynamics_PGS/circulatory_dynamics_RSM;
  BFN := circulatory_dynamics_PGS/circulatory_dynamics_RSN;
  PA := circulatory_dynamics_arterial_pressure_and_pressure_gradient_VAE/0.00355;
  PLA := circulatory_dynamics_left_atrial_pressure_VLE/0.01;
  PPA := circulatory_dynamics_pulmonary_vasculature_pressure_VPE/0.0048;
  PRA := circulatory_dynamics_right_atrial_pressure_VRE/0.005;
  PVS := ;
  QAO := circulatory_dynamics_SYSFLO + circulatory_dynamics_FISFLO;
  QLO := ;
  QRO := circulatory_dynamics_right_ventricular_output_QRN*circulatory_dynamics_HPEF;
  RPA := 1/circulatory_dynamics_pulmonary_arterial_resistance_CPA;
  RPV := 1/(circulatory_dynamics_pulmonary_venous_resistance_PL1*0.0357);
  RVS := AVE*circulatory_dynamics_venous_resistance_RV1*VIM*ANUVN;
  VVE := ;
  circulatory_dynamics_VBD := (VP + VRC - circulatory_dynamics_VVS1 - circulatory_dynamics_VAS1 - circulatory_dynamics_VLA1 - circulatory_dynamics_VPA1 - circulatory_dynamics_VRA1)/2;
  circulatory_dynamics_QVO := circulatory_dynamics_rate_of_blood_flow_from_veins_to_right_atrium_PGV/circulatory_dynamics_RVG;
  circulatory_dynamics_VRA := circulatory_dynamics_VRA1 + circulatory_dynamics_VBD*0.0574;
  circulatory_dynamics_right_atrial_blood_volume_DRA := circulatory_dynamics_QVO - QRO;
  circulatory_dynamics_right_atrial_pressure_VRE := circulatory_dynamics_VRA - 0.1;
  circulatory_dynamics_PRA1 := (PRA + 8)*(circulatory_dynamics_HTAUML*(AU - 1) + 1) - 8;
  circulatory_dynamics_RVM := ;
  circulatory_dynamics_pressure_effect_on_right_ventricular_pumping_PP2 := PPA/AUH/OSA;
  circulatory_dynamics_QLN := ;
  circulatory_dynamics_HPEF := (1 - circulatory_dynamics_QRF)*AUH*circulatory_dynamics_RVM*circulatory_dynamics_HSR*HMD*HPR + circulatory_dynamics_QRF*QLO/circulatory_dynamics_QLN;
  circulatory_dynamics_right_ventricular_output_QRN := ;
  circulatory_dynamics_QPO := circulatory_dynamics_PGL/circulatory_dynamics_RPT;
  circulatory_dynamics_VPA := circulatory_dynamics_VPA1 + circulatory_dynamics_VBD*0.155;
  circulatory_dynamics_pulmonary_vasculature_blood_volume_DPA := QRO - circulatory_dynamics_QPO;
  circulatory_dynamics_pulmonary_vasculature_pressure_VPE := circulatory_dynamics_VPA - 0.30625;
  circulatory_dynamics_pulmonary_arterial_resistance_PP1T := 0.026*PPA;
  circulatory_dynamics_pulmonary_arterial_resistance_PP1 := ;
  circulatory_dynamics_pulmonary_arterial_resistance_CPA := circulatory_dynamics_pulmonary_arterial_resistance_PP1^0.5;
  circulatory_dynamics_pulmonary_venous_resistance_PL1 := PLA + 18;
  circulatory_dynamics_RPT := RPV + RPA;
  circulatory_dynamics_PGL := PPA - PLA;
  circulatory_dynamics_VLA := circulatory_dynamics_VLA1 + circulatory_dynamics_VBD*0.128;
  circulatory_dynamics_left_atrial_blood_volume_DLA := circulatory_dynamics_QPO - QLO;
  circulatory_dynamics_left_atrial_pressure_VLE := circulatory_dynamics_VLA - 0.38;
  circulatory_dynamics_PLA1 := (PLA + 4)*(circulatory_dynamics_HTAUML*(AU - 1) + 1) - 4;
  circulatory_dynamics_LVM := ;
  circulatory_dynamics_pumping_effectiveness_of_left_ventricle_PA2 := PA/(AUH*OSA);
  circulatory_dynamics_QLOT := circulatory_dynamics_LVM*circulatory_dynamics_QLN*AUH*circulatory_dynamics_HSL*HMD*HPL;
  circulatory_dynamics_left_ventricular_output_QLO1 := (PLA - PA)/3;
  circulatory_dynamics_VVS := circulatory_dynamics_VVS1 + circulatory_dynamics_VBD*0.3986;
  circulatory_dynamics_venous_blood_volume_DVS := QAO - circulatory_dynamics_QVO;
  circulatory_dynamics_VVA := (ANU - 1)*circulatory_dynamics_ANY;
  circulatory_dynamics_venous_excess_volume_VVE1 := circulatory_dynamics_VVS - VVR - circulatory_dynamics_VVA - VV7 - VV6 - ATRVFB;
  circulatory_dynamics_venous_average_pressure_PVS1 := 3.7 + (VVE - 0.74)/circulatory_dynamics_CV;
  circulatory_dynamics_PR1 := ;
  circulatory_dynamics_RVG := 0.74/(PVS/(VIM*3.7))^0.5;
  circulatory_dynamics_rate_of_blood_flow_from_veins_to_right_atrium_PGV := PVS - circulatory_dynamics_PR1;
  circulatory_dynamics_venous_resistance_CN3 := ((PC - 17)*circulatory_dynamics_CN7 + 17)*circulatory_dynamics_CN2;
  circulatory_dynamics_venous_resistance_RV1 := circulatory_dynamics_RVSM/circulatory_dynamics_venous_resistance_CN3;
  circulatory_dynamics_NNRVR := RVS*1.79;
  circulatory_dynamics_VAS := circulatory_dynamics_VAS1 + circulatory_dynamics_VBD*0.261;
  circulatory_dynamics_arterial_blood_volume_DAS := QLO - QAO;
  circulatory_dynamics_PAG := PA - PRA;
  circulatory_dynamics_arterial_pressure_and_pressure_gradient_VAE := circulatory_dynamics_VAS - 0.495;
  circulatory_dynamics_PAM := (PA/100)^circulatory_dynamics_PAEX;
  circulatory_dynamics_R1 := ANU*ADHMV*AUM*VIM*PAMK/circulatory_dynamics_PAM/ATRRFB;
  circulatory_dynamics_NNRAR := circulatory_dynamics_RAR*ARM*circulatory_dynamics_R1*MYOGRS*circulatory_dynamics_RMULT1;
  circulatory_dynamics_PGS := PA - PVS;
  circulatory_dynamics_RSM := circulatory_dynamics_RAM*AMM*circulatory_dynamics_R1*MYOGRS*circulatory_dynamics_RMULT1;
  circulatory_dynamics_RSN := circulatory_dynamics_NNRAR + circulatory_dynamics_NNRVR;
  circulatory_dynamics_FISFLO := circulatory_dynamics_PAG*circulatory_dynamics_FIS;
  circulatory_dynamics_SYSFLO := BFM + BFN + RBF;
  circulatory_dynamics_RTP := circulatory_dynamics_PAG/QAO;

  // Rate rules:
  circulatory_dynamics_VVS1' = circulatory_dynamics_venous_blood_volume_DVS;
  circulatory_dynamics_VAS1' = circulatory_dynamics_arterial_blood_volume_DAS;
  circulatory_dynamics_VLA1' = circulatory_dynamics_left_atrial_blood_volume_DLA;
  circulatory_dynamics_VPA1' = circulatory_dynamics_pulmonary_vasculature_blood_volume_DPA;
  circulatory_dynamics_VRA1' = circulatory_dynamics_right_atrial_blood_volume_DRA;
end
