// SBML level 2 version 4

model circulatory_dynamics_CellML1_0_model____main()
  // Originally created by libAntimony v1.3 (using libSBML 4.1.0-b2)

  // Compartments:
  compartment default_compartment = 1;

  // Parameters:
  ADHMV = 1;
  AMM = 1;
  ANU = 0.925271;
  ANUVN = 1;
  ARM = 1.16463;
  ATRRFB = 1;
  ATRVFB = 0;
  AU = 1.00022;
  AUH = 1.00012;
  AUM = 1.00066;
  AVE = 1;
  HMD = 1;
  HPL = 1.00163;
  HPR = 1.00237;
  MYOGRS = 1;
  OSA = 0.97287;
  PAMK = 1;
  PC = 16.9144;
  RBF = 1.22057;
  VIM = 1.00076;
  VP = 3.00449;
  VRC = 2.00439;
  VV6 = 0.0101913;
  VV7 = 0.00366525;
  VVR = 2.50967;
  circulatory_dynamics_HTAUML = 0.4;
  circulatory_dynamics_QRF = 0.15;
  circulatory_dynamics_HSR = 1;
  circulatory_dynamics_HSL = 1;
  circulatory_dynamics_ANY = -0.2;
  circulatory_dynamics_CV = 0.1;
  circulatory_dynamics_PR1LL = 0;
  circulatory_dynamics_RVSM = 1;
  circulatory_dynamics_CN2 = 0.0212;
  circulatory_dynamics_CN7 = 0.2;
  circulatory_dynamics_PAEX = 2;
  circulatory_dynamics_RAR = 30.52;
  circulatory_dynamics_RMULT1 = 1;
  circulatory_dynamics_RAM = 96.3;
  circulatory_dynamics_FIS = 0;
  circulatory_dynamics_VVS1 = 3.28246;
  circulatory_dynamics_VAS1 = 0.862514;
  circulatory_dynamics_VLA1 = 0.379883;
  circulatory_dynamics_VPA1 = 0.38131;
  circulatory_dynamics_VRA1 = 0.100043;
  time_ = ;

  // Assignment rules:
  circulatory_dynamics_VBD := (VP + VRC - circulatory_dynamics_VVS1 - circulatory_dynamics_VAS1 - circulatory_dynamics_VLA1 - circulatory_dynamics_VPA1 - circulatory_dynamics_VRA1)/2;
  circulatory_dynamics_QVO := circulatory_dynamics_rate_of_blood_flow_from_veins_to_right_atrium_PGV/circulatory_dynamics_RVG;
  circulatory_dynamics_QRO := circulatory_dynamics_right_ventricular_output_QRN*circulatory_dynamics_HPEF;
  circulatory_dynamics_VRA := circulatory_dynamics_VRA1 + circulatory_dynamics_VBD*0.0574;
  circulatory_dynamics_right_atrial_blood_volume_DRA := circulatory_dynamics_QVO - circulatory_dynamics_QRO;
  circulatory_dynamics_PRA := circulatory_dynamics_right_atrial_pressure_VRE/0.005;
  circulatory_dynamics_right_atrial_pressure_VRE := circulatory_dynamics_VRA - 0.1;
  circulatory_dynamics_PRA1 := (circulatory_dynamics_PRA + 8)*(circulatory_dynamics_HTAUML*(AU - 1) + 1) - 8;
  circulatory_dynamics_PPA := circulatory_dynamics_pulmonary_vasculature_pressure_VPE/0.0048;
  circulatory_dynamics_RVM := ;
  circulatory_dynamics_pressure_effect_on_right_ventricular_pumping_PP2 := circulatory_dynamics_PPA/AUH/OSA;
  circulatory_dynamics_QLO := ;
  circulatory_dynamics_QLN := ;
  circulatory_dynamics_HPEF := (1 - circulatory_dynamics_QRF)*AUH*circulatory_dynamics_RVM*circulatory_dynamics_HSR*HMD*HPR + circulatory_dynamics_QRF*circulatory_dynamics_QLO/circulatory_dynamics_QLN;
  circulatory_dynamics_right_ventricular_output_QRN := ;
  circulatory_dynamics_QPO := circulatory_dynamics_PGL/circulatory_dynamics_RPT;
  circulatory_dynamics_VPA := circulatory_dynamics_VPA1 + circulatory_dynamics_VBD*0.155;
  circulatory_dynamics_pulmonary_vasculature_blood_volume_DPA := circulatory_dynamics_QRO - circulatory_dynamics_QPO;
  circulatory_dynamics_pulmonary_vasculature_pressure_VPE := circulatory_dynamics_VPA - 0.30625;
  circulatory_dynamics_RPA := 1/circulatory_dynamics_pulmonary_arterial_resistance_CPA;
  circulatory_dynamics_pulmonary_arterial_resistance_PP1T := 0.026*circulatory_dynamics_PPA;
  circulatory_dynamics_pulmonary_arterial_resistance_PP1 := ;
  circulatory_dynamics_pulmonary_arterial_resistance_CPA := circulatory_dynamics_pulmonary_arterial_resistance_PP1^0.5;
  circulatory_dynamics_PLA := circulatory_dynamics_left_atrial_pressure_VLE/0.01;
  circulatory_dynamics_RPV := 1/(circulatory_dynamics_pulmonary_venous_resistance_PL1*0.0357);
  circulatory_dynamics_pulmonary_venous_resistance_PL1 := circulatory_dynamics_PLA + 18;
  circulatory_dynamics_RPT := circulatory_dynamics_RPV + circulatory_dynamics_RPA;
  circulatory_dynamics_PGL := circulatory_dynamics_PPA - circulatory_dynamics_PLA;
  circulatory_dynamics_VLA := circulatory_dynamics_VLA1 + circulatory_dynamics_VBD*0.128;
  circulatory_dynamics_left_atrial_blood_volume_DLA := circulatory_dynamics_QPO - circulatory_dynamics_QLO;
  circulatory_dynamics_left_atrial_pressure_VLE := circulatory_dynamics_VLA - 0.38;
  circulatory_dynamics_PLA1 := (circulatory_dynamics_PLA + 4)*(circulatory_dynamics_HTAUML*(AU - 1) + 1) - 4;
  circulatory_dynamics_PA := circulatory_dynamics_arterial_pressure_and_pressure_gradient_VAE/0.00355;
  circulatory_dynamics_LVM := ;
  circulatory_dynamics_pumping_effectiveness_of_left_ventricle_PA2 := circulatory_dynamics_PA/(AUH*OSA);
  circulatory_dynamics_QLOT := circulatory_dynamics_LVM*circulatory_dynamics_QLN*AUH*circulatory_dynamics_HSL*HMD*HPL;
  circulatory_dynamics_left_ventricular_output_QLO1 := (circulatory_dynamics_PLA - circulatory_dynamics_PA)/3;
  circulatory_dynamics_QAO := circulatory_dynamics_SYSFLO + circulatory_dynamics_FISFLO;
  circulatory_dynamics_VVS := circulatory_dynamics_VVS1 + circulatory_dynamics_VBD*0.3986;
  circulatory_dynamics_venous_blood_volume_DVS := circulatory_dynamics_QAO - circulatory_dynamics_QVO;
  circulatory_dynamics_VVA := (ANU - 1)*circulatory_dynamics_ANY;
  circulatory_dynamics_VVE := ;
  circulatory_dynamics_venous_excess_volume_VVE1 := circulatory_dynamics_VVS - VVR - circulatory_dynamics_VVA - VV7 - VV6 - ATRVFB;
  circulatory_dynamics_PVS := ;
  circulatory_dynamics_venous_average_pressure_PVS1 := 3.7 + (circulatory_dynamics_VVE - 0.74)/circulatory_dynamics_CV;
  circulatory_dynamics_PR1 := ;
  circulatory_dynamics_RVG := 0.74/(circulatory_dynamics_PVS/(VIM*3.7))^0.5;
  circulatory_dynamics_rate_of_blood_flow_from_veins_to_right_atrium_PGV := circulatory_dynamics_PVS - circulatory_dynamics_PR1;
  circulatory_dynamics_RVS := AVE*circulatory_dynamics_venous_resistance_RV1*VIM*ANUVN;
  circulatory_dynamics_venous_resistance_CN3 := ((PC - 17)*circulatory_dynamics_CN7 + 17)*circulatory_dynamics_CN2;
  circulatory_dynamics_venous_resistance_RV1 := circulatory_dynamics_RVSM/circulatory_dynamics_venous_resistance_CN3;
  circulatory_dynamics_NNRVR := circulatory_dynamics_RVS*1.79;
  circulatory_dynamics_VAS := circulatory_dynamics_VAS1 + circulatory_dynamics_VBD*0.261;
  circulatory_dynamics_arterial_blood_volume_DAS := circulatory_dynamics_QLO - circulatory_dynamics_QAO;
  circulatory_dynamics_PAG := circulatory_dynamics_PA - circulatory_dynamics_PRA;
  circulatory_dynamics_arterial_pressure_and_pressure_gradient_VAE := circulatory_dynamics_VAS - 0.495;
  circulatory_dynamics_PAM := (circulatory_dynamics_PA/100)^circulatory_dynamics_PAEX;
  circulatory_dynamics_R1 := ANU*ADHMV*AUM*VIM*PAMK/circulatory_dynamics_PAM/ATRRFB;
  circulatory_dynamics_NNRAR := circulatory_dynamics_RAR*ARM*circulatory_dynamics_R1*MYOGRS*circulatory_dynamics_RMULT1;
  circulatory_dynamics_PGS := circulatory_dynamics_PA - circulatory_dynamics_PVS;
  circulatory_dynamics_RSM := circulatory_dynamics_RAM*AMM*circulatory_dynamics_R1*MYOGRS*circulatory_dynamics_RMULT1;
  circulatory_dynamics_RSN := circulatory_dynamics_NNRAR + circulatory_dynamics_NNRVR;
  circulatory_dynamics_BFM := circulatory_dynamics_PGS/circulatory_dynamics_RSM;
  circulatory_dynamics_BFN := circulatory_dynamics_PGS/circulatory_dynamics_RSN;
  circulatory_dynamics_FISFLO := circulatory_dynamics_PAG*circulatory_dynamics_FIS;
  circulatory_dynamics_SYSFLO := circulatory_dynamics_BFM + circulatory_dynamics_BFN + RBF;
  circulatory_dynamics_RTP := circulatory_dynamics_PAG/circulatory_dynamics_QAO;

  // Rate rules:
  circulatory_dynamics_VVS1' = circulatory_dynamics_venous_blood_volume_DVS;
  circulatory_dynamics_VAS1' = circulatory_dynamics_arterial_blood_volume_DAS;
  circulatory_dynamics_VLA1' = circulatory_dynamics_left_atrial_blood_volume_DLA;
  circulatory_dynamics_VPA1' = circulatory_dynamics_pulmonary_vasculature_blood_volume_DPA;
  circulatory_dynamics_VRA1' = circulatory_dynamics_right_atrial_blood_volume_DRA;
end
