// SBML level 2 version 4

model electrolytes_parent_model____main()
  // Originally created by libAntimony v1.4 (using libSBML 4.1.0-b2)

  // Compartments:
  compartment default_compartment = 1;

  // Parameters:
  AMK = 1.037;
  TVD = 0.000980838;
  STH = 0.977181;
  NOD = 0.0959449;
  KOD = 0.0804374;
  VUD = 0.000989;
  A1K = 0.5;
  A2K = 60;
  A3K = 40000;
  A4K = 0.1;
  A4K2 = 40000;
  AARK = 1;
  AARLL = 4;
  ADHINF = 0;
  ADHKLL = 0.2;
  ADHKUL = 5;
  ADHPAM = 0.3;
  ADHPUL = 85;
  ADHTC = 15;
  ADHVLL = 0.93617;
  ADHVUL = 2.5;
  AH10 = 0.333;
  AH11 = 1000;
  AH9 = 1;
  AHMNAR = 0.3;
  AHTHM = 2;
  ALCLK = 0.3;
  ALDINF = 0;
  ALDKNS = 0;
  ALDMM = 2.5;
  AM1LL = 0;
  AM1UL = 5;
  AMCSNS = 0.65;
  AMKM = 0.5;
  AMKMUL = 12;
  AMM1LM = 0.005;
  AMM4 = 0.005;
  AMNALL = 0.04;
  AMNAM = 0.8;
  AMNAUL = 15;
  AMT = 60;
  ANCSNS = 0.4;
  ANGINF = 0;
  ANGKNS = 0;
  ANMALD = 2.5;
  ANMAM = 1.4;
  ANMARL = 0.86;
  ANMEM = 1.6;
  ANMKEL = 0.3;
  ANMKEM = 2;
  ANMLL = 0.7;
  ANMNAM = 1;
  ANMSLT = 2;
  ANMTM = 1.5;
  ANMUL = 1.8;
  ANPTC = 4;
  ANPXAF = 1.5;
  ANPXUL = 10;
  ANT = 12;
  ANULL = 0.8;
  ANUM = 6;
  ANUVM = 0;
  ANV = 5000;
  ANXM = 0;
  ANY = -0.2;
  AR1LM = 0.005;
  AR2LM = 0.005;
  ARF = 0.5;
  AUC1 = 0.3;
  AUDMP = 0.3;
  AUK = 0.004;
  AUL = 1.5;
  AULPM = 0;
  AUM1 = 3;
  AUM2 = 1;
  AUMAX = 5;
  AUMIN = 0.4;
  AUMK1 = 0.3;
  AUN1 = 0.5;
  AURG = 1;
  AUS = 1;
  AUSLP = 1.5;
  AUTO = 0;
  AUTOGN = 7;
  AUTOSN = 0.9;
  AUX = 1;
  BAROTC = 0.16;
  CFC = 0.01167;
  CKEEX = 4;
  CMPTSS = 2;
  CN2 = 0.0212;
  CN7 = 0.2;
  CNR = 139;
  CPF = 0.0003;
  CPK = 0.000253;
  CPR = 40;
  CV = 0.1;
  CRRFLX = 0;
  DIURET = 1;
  DHDTR = 0.05;
  DTNAR = 0.675;
  DTNARL = 1e-6;
  EARK = 1;
  EARLL = 24;
  EFAFR = 0;
  EXC = 1;
  EXCML = 0.01;
  EXCXP = 1;
  EXCXP2 = 0.17;
  EXE = 0;
  GCOPF = 0.8092;
  GFLC = 0.0208333;
  GFNDMP = 3;
  GFNLL = 0.001;
  GPPD = 1;
  HM6 = 1850;
  HM8 = 4.714e-8;
  HTAUML = 0.4;
  KORGN = 1;
  KORNER = 0;
  KORREN = 0;
  KORTC = 10000;
  LPDE = 8;
  LPK = 2.728e-14;
  LPPR = 0.03;
  MDFL1 = 10;
  MDFLKM = 0.667;
  MDFLW2 = 0.005;
  MDFLWX = 0.01;
  MDMP = 0;
  O2A = 0.1;
  O2CHMO = 0.01;
  OMM = 57.1;
  PA4 = 1;
  PAEX = 2;
  PCE = 1;
  PCR = 15;
  PR1LL = 0;
  PGHF = -2;
  PK2 = 0.79167;
  PL2 = 1.8;
  PLDF = 4.2;
  PM5 = 30;
  PO2ADV = 0.001;
  POK = 0.1;
  POM = 0.04;
  POM2 = 2;
  PON = 0.1;
  POR = 35;
  POZ = 2;
  PXTP = 8;
  QAOLM = 0.2;
  QRF = 0.15;
  RABSC = 0.5;
  RAM = 96.3;
  RAPRSP = 0;
  RAR = 30.52;
  RCDFDP = 2000;
  RCDFPC = 0;
  REK = 1;
  RFABKM = 0.03;
  RFABDM = 0.3;
  RFABDP = 1;
  RFCDFT = 0;
  RKC = 5.8e-6;
  RNAGTC = 15;
  RNAUAD = 0;
  RPS = 0;
  RTPPR = 0.9;
  RTPPRS = 15.2;
  RTSPRS = 6;
  RVRS = 19.167;
  RVSM = 1;
  SR = 1;
  SR2 = 1;
  SRK = 5;
  SRK2 = 10000;
  STA = 0;
  TENSGN = 0;
  TENSTC = 0.05;
  TIMETR = 0;
  TRNSFS = 0;
  TRPL = 0;
  TSSLML = 0.15;
  TSSLTC = 0.005;
  TVDDL = 30;
  U = 4;
  VID1 = 0.01;
  VIDML = 0.01;
  VNTSTM = 1;
  VP1 = 0.01;
  VPTISS = 0.0175;
  VTSF = 6;
  VV9 = 2.51;
  X = 4;
  Z = 1;
  Z4 = 0.5;
  Z5 = 0.3;
  Z6 = 20;
  Z7 = 5;
  Z10 = 45;
  Z11 = 0.01;
  Z12 = 5;
  Z13 = 0.625;
  Z14 = 5;
  Z16 = 5;
  Z18 = 5;
  Z19 = 5;
  KID = 0.08;
  URFORM = 0.24;
  AUV = 0.55;
  AUY = 0;
  O2M = 164;
  NID = 0.1;
  ATRFBM = 0;
  GBL = 0;
  RNAUGN = 0.6;
  RNAULL = 0.3;
  RNAUUL = 10;
  HSR = 1;
  HSL = 1;
  HMK = 90;
  PO2AMB = 150;
  HKM = 0.53333;
  DR = 0;
  ANPKNS = 0;
  RMULT1 = 1;
  GLPCA = 1;
  RFN = 1.22057;
  RFABX = 0.8;
  ANPINF = 0;
  FIS = 0;
  CPPD = 31.9719;
  TRRBC = 0;
  HYL = 60;
  ATRVM = 0;
  ADHC_init = 1;
  AHY_init = 0.301963;
  AMC_init = 1;
  AMM1T_init = 1.00269;
  AMM2_init = 1.09071;
  ANC_init = 0.859476;
  ANPC_init = 1;
  ANX1_init = 0;
  AR1T_init = 1.02127;
  AR2T_init = 1.01179;
  AR3T_init = 1.1448;
  AU1_init = 1.00007;
  AU4_init = -0.060024;
  AU6_init = 1.00132;
  DTKA_init = 0.0367573;
  HMD1_init = 1;
  HPL_init = 1.00163;
  HPR_init = 1.00237;
  KTOT_init = 3622.54;
  NAE_init = 2109.91;
  O2VAD1_init = 2.368e-7;
  OSV_init = 0.694163;
  OVA_init = 204.497;
  OVS_init = 0.699673;
  PAR1_init = 103.525;
  PC_init = 16.9144;
  PLUR_init = 159.549;
  PPR1_init = 0.419998;
  PRP_init = 216.243;
  QO2T_init = 72.2362;
  QOM1_init = 48.0839;
  RNAUG3_init = 0;
  TSP_init = 279.945;
  TVD_init = 0.000980838;
  VAS1_init = 0.862514;
  VIC_init = 25.0404;
  VLA1_init = 0.379883;
  VPA1_init = 0.38131;
  VPF1_init = 0.0123238;
  VP_init = 3.00449;
  VRA1_init = 0.100043;
  VRC_init = 2.00439;
  VTS2_init = 0;
  VTW_init = 39.8952;
  VV6_init = 0.0101913;
  VV7_init = 0.00366525;
  VVS1_init = 3.28246;
  VTW = electrolytes_VTW_init;
  electrolytes_A1K = 0.5;
  electrolytes_A2K = 60;
  electrolytes_A3K = 40000;
  electrolytes_A4K = 0.1;
  electrolytes_A4K2 = 40000;
  electrolytes_AARK = 1;
  electrolytes_AARLL = 4;
  electrolytes_ADHINF = 0;
  electrolytes_ADHKLL = 0.2;
  electrolytes_ADHKUL = 5;
  electrolytes_ADHPAM = 0.3;
  electrolytes_ADHPUL = 85;
  electrolytes_ADHTC = 15;
  electrolytes_ADHVLL = 0.93617;
  electrolytes_ADHVUL = 2.5;
  electrolytes_AH10 = 0.333;
  electrolytes_AH11 = 1000;
  electrolytes_AH9 = 1;
  electrolytes_AHMNAR = 0.3;
  electrolytes_AHTHM = 2;
  electrolytes_ALCLK = 0.3;
  electrolytes_ALDINF = 0;
  electrolytes_ALDKNS = 0;
  electrolytes_ALDMM = 2.5;
  electrolytes_AM1LL = 0;
  electrolytes_AM1UL = 5;
  electrolytes_AMCSNS = 0.65;
  electrolytes_AMKM = 0.5;
  electrolytes_AMKMUL = 12;
  electrolytes_AMM1LM = 0.005;
  electrolytes_AMM4 = 0.005;
  electrolytes_AMNALL = 0.04;
  electrolytes_AMNAM = 0.8;
  electrolytes_AMNAUL = 15;
  electrolytes_AMT = 60;
  electrolytes_ANCSNS = 0.4;
  electrolytes_ANGINF = 0;
  electrolytes_ANGKNS = 0;
  electrolytes_ANMALD = 2.5;
  electrolytes_ANMAM = 1.4;
  electrolytes_ANMARL = 0.86;
  electrolytes_ANMEM = 1.6;
  electrolytes_ANMKEL = 0.3;
  electrolytes_ANMKEM = 2;
  electrolytes_ANMLL = 0.7;
  electrolytes_ANMNAM = 1;
  electrolytes_ANMSLT = 2;
  electrolytes_ANMTM = 1.5;
  electrolytes_ANMUL = 1.8;
  electrolytes_ANPTC = 4;
  electrolytes_ANPXAF = 1.5;
  electrolytes_ANPXUL = 10;
  electrolytes_ANT = 12;
  electrolytes_ANULL = 0.8;
  electrolytes_ANUM = 6;
  electrolytes_ANUVM = 0;
  electrolytes_ANV = 5000;
  electrolytes_ANXM = 0;
  electrolytes_ANY = -0.2;
  electrolytes_AR1LM = 0.005;
  electrolytes_AR2LM = 0.005;
  electrolytes_ARF = 0.5;
  electrolytes_AUC1 = 0.3;
  electrolytes_AUDMP = 0.3;
  electrolytes_AUK = 0.004;
  electrolytes_AUL = 1.5;
  electrolytes_AULPM = 0;
  electrolytes_AUM1 = 3;
  electrolytes_AUM2 = 1;
  electrolytes_AUMAX = 5;
  electrolytes_AUMIN = 0.4;
  electrolytes_AUMK1 = 0.3;
  electrolytes_AUN1 = 0.5;
  electrolytes_AURG = 1;
  electrolytes_AUS = 1;
  electrolytes_AUSLP = 1.5;
  electrolytes_AUTO = 0;
  electrolytes_AUTOGN = 7;
  electrolytes_AUTOSN = 0.9;
  electrolytes_AUX = 1;
  electrolytes_BAROTC = 0.16;
  electrolytes_CFC = 0.01167;
  electrolytes_CKEEX = 4;
  electrolytes_CMPTSS = 2;
  electrolytes_CN2 = 0.0212;
  electrolytes_CN7 = 0.2;
  electrolytes_CNR = 139;
  electrolytes_CPF = 0.0003;
  electrolytes_CPK = 0.000253;
  electrolytes_CPR = 40;
  electrolytes_CV = 0.1;
  electrolytes_CRRFLX = 0;
  electrolytes_DIURET = 1;
  electrolytes_DHDTR = 0.05;
  electrolytes_DTNAR = 0.675;
  electrolytes_DTNARL = 1e-6;
  electrolytes_EARK = 1;
  electrolytes_EARLL = 24;
  electrolytes_EFAFR = 0;
  electrolytes_EXC = 1;
  electrolytes_EXCML = 0.01;
  electrolytes_EXCXP = 1;
  electrolytes_EXCXP2 = 0.17;
  electrolytes_EXE = 0;
  electrolytes_GCOPF = 0.8092;
  electrolytes_GFLC = 0.0208333;
  electrolytes_GFNDMP = 3;
  electrolytes_GFNLL = 0.001;
  electrolytes_GPPD = 1;
  electrolytes_HM6 = 1850;
  electrolytes_HM8 = 4.714e-8;
  electrolytes_HTAUML = 0.4;
  electrolytes_KORGN = 1;
  electrolytes_KORNER = 0;
  electrolytes_KORREN = 0;
  electrolytes_KORTC = 10000;
  electrolytes_LPDE = 8;
  electrolytes_LPK = 2.728e-14;
  electrolytes_LPPR = 0.03;
  electrolytes_MDFL1 = 10;
  electrolytes_MDFLKM = 0.667;
  electrolytes_MDFLW2 = 0.005;
  electrolytes_MDFLWX = 0.01;
  electrolytes_MDMP = 0;
  electrolytes_O2A = 0.1;
  electrolytes_O2CHMO = 0.01;
  electrolytes_OMM = 57.1;
  electrolytes_PA4 = 1;
  electrolytes_PAEX = 2;
  electrolytes_PCE = 1;
  electrolytes_PCR = 15;
  electrolytes_PR1LL = 0;
  electrolytes_PGHF = -2;
  electrolytes_PK2 = 0.79167;
  electrolytes_PL2 = 1.8;
  electrolytes_PLDF = 4.2;
  electrolytes_PM5 = 30;
  electrolytes_PO2ADV = 0.001;
  electrolytes_POK = 0.1;
  electrolytes_POM = 0.04;
  electrolytes_POM2 = 2;
  electrolytes_PON = 0.1;
  electrolytes_POR = 35;
  electrolytes_POZ = 2;
  electrolytes_PXTP = 8;
  electrolytes_QAOLM = 0.2;
  electrolytes_QRF = 0.15;
  electrolytes_RABSC = 0.5;
  electrolytes_RAM = 96.3;
  electrolytes_RAPRSP = 0;
  electrolytes_RAR = 30.52;
  electrolytes_RCDFDP = 2000;
  electrolytes_RCDFPC = 0;
  electrolytes_REK = 1;
  electrolytes_RFABKM = 0.03;
  electrolytes_RFABDM = 0.3;
  electrolytes_RFABDP = 1;
  electrolytes_RFCDFT = 0;
  electrolytes_RKC = 5.8e-6;
  electrolytes_RNAGTC = 15;
  electrolytes_RNAUAD = 0;
  electrolytes_RPS = 0;
  electrolytes_RTPPR = 0.9;
  electrolytes_RTPPRS = 15.2;
  electrolytes_RTSPRS = 6;
  electrolytes_RVRS = 19.167;
  electrolytes_RVSM = 1;
  electrolytes_SR = 1;
  electrolytes_SR2 = 1;
  electrolytes_SRK = 5;
  electrolytes_SRK2 = 10000;
  electrolytes_STA = 0;
  electrolytes_TENSGN = 0;
  electrolytes_TENSTC = 0.05;
  electrolytes_TIMETR = 0;
  electrolytes_TRNSFS = 0;
  electrolytes_TRPL = 0;
  electrolytes_TSSLML = 0.15;
  electrolytes_TSSLTC = 0.005;
  electrolytes_TVDDL = 30;
  electrolytes_U = 4;
  electrolytes_VID1 = 0.01;
  electrolytes_VIDML = 0.01;
  electrolytes_VNTSTM = 1;
  electrolytes_VP1 = 0.01;
  electrolytes_VPTISS = 0.0175;
  electrolytes_VTSF = 6;
  electrolytes_VV9 = 2.51;
  electrolytes_X = 4;
  electrolytes_Z = 1;
  electrolytes_Z4 = 0.5;
  electrolytes_Z5 = 0.3;
  electrolytes_Z6 = 20;
  electrolytes_Z7 = 5;
  electrolytes_Z10 = 45;
  electrolytes_Z11 = 0.01;
  electrolytes_Z12 = 5;
  electrolytes_Z13 = 0.625;
  electrolytes_Z14 = 5;
  electrolytes_Z16 = 5;
  electrolytes_Z18 = 5;
  electrolytes_Z19 = 5;
  electrolytes_KID = 0.08;
  electrolytes_URFORM = 0.24;
  electrolytes_AUV = 0.55;
  electrolytes_AUY = 0;
  electrolytes_O2M = 164;
  electrolytes_NID = 0.1;
  electrolytes_ATRFBM = 0;
  electrolytes_GBL = 0;
  electrolytes_RNAUGN = 0.6;
  electrolytes_RNAULL = 0.3;
  electrolytes_RNAUUL = 10;
  electrolytes_HSR = 1;
  electrolytes_HSL = 1;
  electrolytes_HMK = 90;
  electrolytes_PO2AMB = 150;
  electrolytes_HKM = 0.53333;
  electrolytes_DR = 0;
  electrolytes_ANPKNS = 0;
  electrolytes_RMULT1 = 1;
  electrolytes_GLPCA = 1;
  electrolytes_RFN = 1.22057;
  electrolytes_RFABX = 0.8;
  electrolytes_ANPINF = 0;
  electrolytes_FIS = 0;
  electrolytes_CPPD = 31.9719;
  electrolytes_TRRBC = 0;
  electrolytes_HYL = 60;
  electrolytes_ATRVM = 0;
  electrolytes_ADHC_init = 1;
  electrolytes_AHY_init = 0.301963;
  electrolytes_AMC_init = 1;
  electrolytes_AMM1T_init = 1.00269;
  electrolytes_AMM2_init = 1.09071;
  electrolytes_ANC_init = 0.859476;
  electrolytes_ANPC_init = 1;
  electrolytes_ANX1_init = 0;
  electrolytes_AR1T_init = 1.02127;
  electrolytes_AR2T_init = 1.01179;
  electrolytes_AR3T_init = 1.1448;
  electrolytes_AU1_init = 1.00007;
  electrolytes_AU4_init = -0.060024;
  electrolytes_AU6_init = 1.00132;
  electrolytes_DTKA_init = 0.0367573;
  electrolytes_HMD1_init = 1;
  electrolytes_HPL_init = 1.00163;
  electrolytes_HPR_init = 1.00237;
  electrolytes_KTOT_init = 3622.54;
  electrolytes_NAE_init = 2109.91;
  electrolytes_O2VAD1_init = 2.368e-7;
  electrolytes_OSV_init = 0.694163;
  electrolytes_OVA_init = 204.497;
  electrolytes_OVS_init = 0.699673;
  electrolytes_PAR1_init = 103.525;
  electrolytes_PC_init = 16.9144;
  electrolytes_PLUR_init = 159.549;
  electrolytes_PPR1_init = 0.419998;
  electrolytes_PRP_init = 216.243;
  electrolytes_QO2T_init = 72.2362;
  electrolytes_QOM1_init = 48.0839;
  electrolytes_RNAUG3_init = 0;
  electrolytes_TSP_init = 279.945;
  electrolytes_TVD_init = 0.000980838;
  electrolytes_VAS1_init = 0.862514;
  electrolytes_VIC_init = 25.0404;
  electrolytes_VLA1_init = 0.379883;
  electrolytes_VPA1_init = 0.38131;
  electrolytes_VPF1_init = 0.0123238;
  electrolytes_VP_init = 3.00449;
  electrolytes_VRA1_init = 0.100043;
  electrolytes_VRC_init = 2.00439;
  electrolytes_VTS2_init = 0;
  electrolytes_VTW_init = 39.8952;
  electrolytes_VV6_init = 0.0101913;
  electrolytes_VV7_init = 0.00366525;
  electrolytes_VVS1_init = 3.28246;
  electrolytes_extracellular_Na_concentration_NAE = electrolytes_NAE_init;
  electrolytes_KTOT = electrolytes_KTOT_init;
  electrolytes_VIC = electrolytes_VIC_init;
  time_ = ;

  // Assignment rules:
  CKE := electrolytes_KE/VEC;
  VEC := VTW - electrolytes_VIC;
  CNA := electrolytes_extracellular_Na_concentration_NAE/VEC;
  electrolytes_extracellular_Na_concentration_NED := electrolytes_NID*STH - NOD + electrolytes_TRPL*142;
  electrolytes_AMK1 := (AMK - 1)*electrolytes_ALCLK + 1;
  electrolytes_KE := (electrolytes_KTOT - 3000)/(electrolytes_AMK1*9.3333);
  electrolytes_extracellular_K_concentration_KTOTD := electrolytes_KID - KOD;
  electrolytes_CKI := electrolytes_intracellular_K_concentration_KI/electrolytes_VIC;
  electrolytes_intracellular_K_concentration_KI := electrolytes_KTOT - electrolytes_KE;
  electrolytes_VID := electrolytes_intracellular_fluid_volume_CCD*electrolytes_VIDML;
  electrolytes_intracellular_fluid_volume_CCD := electrolytes_CKI - CNA;

  // Rate rules:
  VTW' = TVD - VUD;
  electrolytes_extracellular_Na_concentration_NAE' = electrolytes_extracellular_Na_concentration_NED;
  electrolytes_KTOT' = electrolytes_extracellular_K_concentration_KTOTD;
  electrolytes_VIC' = electrolytes_VID;
end
