// SBML level 2 version 4

model heart_hypertrophy_or_deterioration_CellML1_0_model____main()
  // Originally created by libAntimony v1.3 (using libSBML 4.1.0-b2)

  // Compartments:
  compartment default_compartment = 1;

  // Parameters:
  QAO = 5.00707;
  PA = 103.525;
  POT = 35.1148;
  PPA = 15.6376;
  heart_hypertrophy_or_deterioration_HSL = 1;
  heart_hypertrophy_or_deterioration_Z13 = 0.625;
  heart_hypertrophy_or_deterioration_HSR = 1;
  heart_hypertrophy_or_deterioration_DHDTR = 0.05;
  heart_hypertrophy_or_deterioration_HPL = 1.00163;
  heart_hypertrophy_or_deterioration_HPR = 1.00237;
  heart_hypertrophy_or_deterioration_heart_deterioration_HMD1 = 1;
  time_ = ;

  // Assignment rules:
  heart_hypertrophy_or_deterioration_HMD := ;
  heart_hypertrophy_or_deterioration_heart_deterioration_DHM := (POT - 10)*heart_hypertrophy_or_deterioration_DHDTR;

  // Rate rules:
  heart_hypertrophy_or_deterioration_HPL' = ((PA*QAO/(500*heart_hypertrophy_or_deterioration_HSL))^heart_hypertrophy_or_deterioration_Z13 - heart_hypertrophy_or_deterioration_HPL)/57600;
  heart_hypertrophy_or_deterioration_HPR' = ((PPA*QAO/(75*heart_hypertrophy_or_deterioration_HSR))^heart_hypertrophy_or_deterioration_Z13 - heart_hypertrophy_or_deterioration_HPR)/57600;
  heart_hypertrophy_or_deterioration_heart_deterioration_HMD1' = heart_hypertrophy_or_deterioration_heart_deterioration_DHM;
end
