// SBML level 2 version 4

model heart_hypertrophy_or_deterioration_parent_model____main()
  // Originally created by libAntimony v1.3 (using libSBML 4.1.0-b2)

  // Compartments:
  compartment default_compartment = 1;

  // Parameters:
  QAO = 5.00707;
  PA = 103.525;
  POT = 35.1148;
  PPA = 15.6376;
  A1K = 0.5;
  A2K = 60;
  A3K = 40000;
  A4K = 0.1;
  A4K2 = 40000;
  AARK = 1;
  AARLL = 4;
  ADHINF = 0;
  ADHKLL = 0.2;
  ADHKUL = 5;
  ADHPAM = 0.3;
  ADHPUL = 85;
  ADHTC = 15;
  ADHVLL = 0.93617;
  ADHVUL = 2.5;
  AH10 = 0.333;
  AH11 = 1000;
  AH9 = 1;
  AHMNAR = 0.3;
  AHTHM = 2;
  ALCLK = 0.3;
  ALDINF = 0;
  ALDKNS = 0;
  ALDMM = 2.5;
  AM1LL = 0;
  AM1UL = 5;
  AMCSNS = 0.65;
  AMKM = 0.5;
  AMKMUL = 12;
  AMM1LM = 0.005;
  AMM4 = 0.005;
  AMNALL = 0.04;
  AMNAM = 0.8;
  AMNAUL = 15;
  AMT = 60;
  ANCSNS = 0.4;
  ANGINF = 0;
  ANGKNS = 0;
  ANMALD = 2.5;
  ANMAM = 1.4;
  ANMARL = 0.86;
  ANMEM = 1.6;
  ANMKEL = 0.3;
  ANMKEM = 2;
  ANMLL = 0.7;
  ANMNAM = 1;
  ANMSLT = 2;
  ANMTM = 1.5;
  ANMUL = 1.8;
  ANPTC = 4;
  ANPXAF = 1.5;
  ANPXUL = 10;
  ANT = 12;
  ANULL = 0.8;
  ANUM = 6;
  ANUVM = 0;
  ANV = 5000;
  ANXM = 0;
  ANY = -0.2;
  AR1LM = 0.005;
  AR2LM = 0.005;
  ARF = 0.5;
  AUC1 = 0.3;
  AUDMP = 0.3;
  AUK = 0.004;
  AUL = 1.5;
  AULPM = 0;
  AUM1 = 3;
  AUM2 = 1;
  AUMAX = 5;
  AUMIN = 0.4;
  AUMK1 = 0.3;
  AUN1 = 0.5;
  AURG = 1;
  AUS = 1;
  AUSLP = 1.5;
  AUTO = 0;
  AUTOGN = 7;
  AUTOSN = 0.9;
  AUX = 1;
  BAROTC = 0.16;
  CFC = 0.01167;
  CKEEX = 4;
  CMPTSS = 2;
  CN2 = 0.0212;
  CN7 = 0.2;
  CNR = 139;
  CPF = 0.0003;
  CPK = 0.000253;
  CPR = 40;
  CV = 0.1;
  CRRFLX = 0;
  DIURET = 1;
  DHDTR = 0.05;
  DTNAR = 0.675;
  DTNARL = 1e-6;
  EARK = 1;
  EARLL = 24;
  EFAFR = 0;
  EXC = 1;
  EXCML = 0.01;
  EXCXP = 1;
  EXCXP2 = 0.17;
  EXE = 0;
  GCOPF = 0.8092;
  GFLC = 0.0208333;
  GFNDMP = 3;
  GFNLL = 0.001;
  GPPD = 1;
  HM6 = 1850;
  HM8 = 4.714e-8;
  HTAUML = 0.4;
  KORGN = 1;
  KORNER = 0;
  KORREN = 0;
  KORTC = 10000;
  LPDE = 8;
  LPK = 2.728e-14;
  LPPR = 0.03;
  MDFL1 = 10;
  MDFLKM = 0.667;
  MDFLW2 = 0.005;
  MDFLWX = 0.01;
  MDMP = 0;
  O2A = 0.1;
  O2CHMO = 0.01;
  OMM = 57.1;
  PA4 = 1;
  PAEX = 2;
  PCE = 1;
  PCR = 15;
  PR1LL = 0;
  PGHF = -2;
  PK2 = 0.79167;
  PL2 = 1.8;
  PLDF = 4.2;
  PM5 = 30;
  PO2ADV = 0.001;
  POK = 0.1;
  POM = 0.04;
  POM2 = 2;
  PON = 0.1;
  POR = 35;
  POZ = 2;
  PXTP = 8;
  QAOLM = 0.2;
  QRF = 0.15;
  RABSC = 0.5;
  RAM = 96.3;
  RAPRSP = 0;
  RAR = 30.52;
  RCDFDP = 2000;
  RCDFPC = 0;
  REK = 1;
  RFABKM = 0.03;
  RFABDM = 0.3;
  RFABDP = 1;
  RFCDFT = 0;
  RKC = 5.8e-6;
  RNAGTC = 15;
  RNAUAD = 0;
  RPS = 0;
  RTPPR = 0.9;
  RTPPRS = 15.2;
  RTSPRS = 6;
  RVRS = 19.167;
  RVSM = 1;
  SR = 1;
  SR2 = 1;
  SRK = 5;
  SRK2 = 10000;
  STA = 0;
  TENSGN = 0;
  TENSTC = 0.05;
  TIMETR = 0;
  TRNSFS = 0;
  TRPL = 0;
  TSSLML = 0.15;
  TSSLTC = 0.005;
  TVDDL = 30;
  U = 4;
  VID1 = 0.01;
  VIDML = 0.01;
  VNTSTM = 1;
  VP1 = 0.01;
  VPTISS = 0.0175;
  VTSF = 6;
  VV9 = 2.51;
  X = 4;
  Z = 1;
  Z4 = 0.5;
  Z5 = 0.3;
  Z6 = 20;
  Z7 = 5;
  Z10 = 45;
  Z11 = 0.01;
  Z12 = 5;
  Z13 = 0.625;
  Z14 = 5;
  Z16 = 5;
  Z18 = 5;
  Z19 = 5;
  KID = 0.08;
  URFORM = 0.24;
  AUV = 0.55;
  AUY = 0;
  O2M = 164;
  NID = 0.1;
  ATRFBM = 0;
  GBL = 0;
  RNAUGN = 0.6;
  RNAULL = 0.3;
  RNAUUL = 10;
  HSR = 1;
  HSL = 1;
  HMK = 90;
  PO2AMB = 150;
  HKM = 0.53333;
  DR = 0;
  ANPKNS = 0;
  RMULT1 = 1;
  GLPCA = 1;
  RFN = 1.22057;
  RFABX = 0.8;
  ANPINF = 0;
  FIS = 0;
  CPPD = 31.9719;
  TRRBC = 0;
  HYL = 60;
  ATRVM = 0;
  ADHC_init = 1;
  AHY_init = 0.301963;
  AMC_init = 1;
  AMM1T_init = 1.00269;
  AMM2_init = 1.09071;
  ANC_init = 0.859476;
  ANPC_init = 1;
  ANX1_init = 0;
  AR1T_init = 1.02127;
  AR2T_init = 1.01179;
  AR3T_init = 1.1448;
  AU1_init = 1.00007;
  AU4_init = -0.060024;
  AU6_init = 1.00132;
  DTKA_init = 0.0367573;
  HMD1_init = 1;
  HPL_init = 1.00163;
  HPR_init = 1.00237;
  KTOT_init = 3622.54;
  NAE_init = 2109.91;
  O2VAD1_init = 2.368e-7;
  OSV_init = 0.694163;
  OVA_init = 204.497;
  OVS_init = 0.699673;
  PAR1_init = 103.525;
  PC_init = 16.9144;
  PLUR_init = 159.549;
  PPR1_init = 0.419998;
  PRP_init = 216.243;
  QO2T_init = 72.2362;
  QOM1_init = 48.0839;
  RNAUG3_init = 0;
  TSP_init = 279.945;
  TVD_init = 0.000980838;
  VAS1_init = 0.862514;
  VIC_init = 25.0404;
  VLA1_init = 0.379883;
  VPA1_init = 0.38131;
  VPF1_init = 0.0123238;
  VP_init = 3.00449;
  VRA1_init = 0.100043;
  VRC_init = 2.00439;
  VTS2_init = 0;
  VTW_init = 39.8952;
  VV6_init = 0.0101913;
  VV7_init = 0.00366525;
  VVS1_init = 3.28246;
  HPL = heart_hypertrophy_or_deterioration_HPL_init;
  HPR = heart_hypertrophy_or_deterioration_HPR_init;
  heart_hypertrophy_or_deterioration_A1K = 0.5;
  heart_hypertrophy_or_deterioration_A2K = 60;
  heart_hypertrophy_or_deterioration_A3K = 40000;
  heart_hypertrophy_or_deterioration_A4K = 0.1;
  heart_hypertrophy_or_deterioration_A4K2 = 40000;
  heart_hypertrophy_or_deterioration_AARK = 1;
  heart_hypertrophy_or_deterioration_AARLL = 4;
  heart_hypertrophy_or_deterioration_ADHINF = 0;
  heart_hypertrophy_or_deterioration_ADHKLL = 0.2;
  heart_hypertrophy_or_deterioration_ADHKUL = 5;
  heart_hypertrophy_or_deterioration_ADHPAM = 0.3;
  heart_hypertrophy_or_deterioration_ADHPUL = 85;
  heart_hypertrophy_or_deterioration_ADHTC = 15;
  heart_hypertrophy_or_deterioration_ADHVLL = 0.93617;
  heart_hypertrophy_or_deterioration_ADHVUL = 2.5;
  heart_hypertrophy_or_deterioration_AH10 = 0.333;
  heart_hypertrophy_or_deterioration_AH11 = 1000;
  heart_hypertrophy_or_deterioration_AH9 = 1;
  heart_hypertrophy_or_deterioration_AHMNAR = 0.3;
  heart_hypertrophy_or_deterioration_AHTHM = 2;
  heart_hypertrophy_or_deterioration_ALCLK = 0.3;
  heart_hypertrophy_or_deterioration_ALDINF = 0;
  heart_hypertrophy_or_deterioration_ALDKNS = 0;
  heart_hypertrophy_or_deterioration_ALDMM = 2.5;
  heart_hypertrophy_or_deterioration_AM1LL = 0;
  heart_hypertrophy_or_deterioration_AM1UL = 5;
  heart_hypertrophy_or_deterioration_AMCSNS = 0.65;
  heart_hypertrophy_or_deterioration_AMKM = 0.5;
  heart_hypertrophy_or_deterioration_AMKMUL = 12;
  heart_hypertrophy_or_deterioration_AMM1LM = 0.005;
  heart_hypertrophy_or_deterioration_AMM4 = 0.005;
  heart_hypertrophy_or_deterioration_AMNALL = 0.04;
  heart_hypertrophy_or_deterioration_AMNAM = 0.8;
  heart_hypertrophy_or_deterioration_AMNAUL = 15;
  heart_hypertrophy_or_deterioration_AMT = 60;
  heart_hypertrophy_or_deterioration_ANCSNS = 0.4;
  heart_hypertrophy_or_deterioration_ANGINF = 0;
  heart_hypertrophy_or_deterioration_ANGKNS = 0;
  heart_hypertrophy_or_deterioration_ANMALD = 2.5;
  heart_hypertrophy_or_deterioration_ANMAM = 1.4;
  heart_hypertrophy_or_deterioration_ANMARL = 0.86;
  heart_hypertrophy_or_deterioration_ANMEM = 1.6;
  heart_hypertrophy_or_deterioration_ANMKEL = 0.3;
  heart_hypertrophy_or_deterioration_ANMKEM = 2;
  heart_hypertrophy_or_deterioration_ANMLL = 0.7;
  heart_hypertrophy_or_deterioration_ANMNAM = 1;
  heart_hypertrophy_or_deterioration_ANMSLT = 2;
  heart_hypertrophy_or_deterioration_ANMTM = 1.5;
  heart_hypertrophy_or_deterioration_ANMUL = 1.8;
  heart_hypertrophy_or_deterioration_ANPTC = 4;
  heart_hypertrophy_or_deterioration_ANPXAF = 1.5;
  heart_hypertrophy_or_deterioration_ANPXUL = 10;
  heart_hypertrophy_or_deterioration_ANT = 12;
  heart_hypertrophy_or_deterioration_ANULL = 0.8;
  heart_hypertrophy_or_deterioration_ANUM = 6;
  heart_hypertrophy_or_deterioration_ANUVM = 0;
  heart_hypertrophy_or_deterioration_ANV = 5000;
  heart_hypertrophy_or_deterioration_ANXM = 0;
  heart_hypertrophy_or_deterioration_ANY = -0.2;
  heart_hypertrophy_or_deterioration_AR1LM = 0.005;
  heart_hypertrophy_or_deterioration_AR2LM = 0.005;
  heart_hypertrophy_or_deterioration_ARF = 0.5;
  heart_hypertrophy_or_deterioration_AUC1 = 0.3;
  heart_hypertrophy_or_deterioration_AUDMP = 0.3;
  heart_hypertrophy_or_deterioration_AUK = 0.004;
  heart_hypertrophy_or_deterioration_AUL = 1.5;
  heart_hypertrophy_or_deterioration_AULPM = 0;
  heart_hypertrophy_or_deterioration_AUM1 = 3;
  heart_hypertrophy_or_deterioration_AUM2 = 1;
  heart_hypertrophy_or_deterioration_AUMAX = 5;
  heart_hypertrophy_or_deterioration_AUMIN = 0.4;
  heart_hypertrophy_or_deterioration_AUMK1 = 0.3;
  heart_hypertrophy_or_deterioration_AUN1 = 0.5;
  heart_hypertrophy_or_deterioration_AURG = 1;
  heart_hypertrophy_or_deterioration_AUS = 1;
  heart_hypertrophy_or_deterioration_AUSLP = 1.5;
  heart_hypertrophy_or_deterioration_AUTO = 0;
  heart_hypertrophy_or_deterioration_AUTOGN = 7;
  heart_hypertrophy_or_deterioration_AUTOSN = 0.9;
  heart_hypertrophy_or_deterioration_AUX = 1;
  heart_hypertrophy_or_deterioration_BAROTC = 0.16;
  heart_hypertrophy_or_deterioration_CFC = 0.01167;
  heart_hypertrophy_or_deterioration_CKEEX = 4;
  heart_hypertrophy_or_deterioration_CMPTSS = 2;
  heart_hypertrophy_or_deterioration_CN2 = 0.0212;
  heart_hypertrophy_or_deterioration_CN7 = 0.2;
  heart_hypertrophy_or_deterioration_CNR = 139;
  heart_hypertrophy_or_deterioration_CPF = 0.0003;
  heart_hypertrophy_or_deterioration_CPK = 0.000253;
  heart_hypertrophy_or_deterioration_CPR = 40;
  heart_hypertrophy_or_deterioration_CV = 0.1;
  heart_hypertrophy_or_deterioration_CRRFLX = 0;
  heart_hypertrophy_or_deterioration_DIURET = 1;
  heart_hypertrophy_or_deterioration_DHDTR = 0.05;
  heart_hypertrophy_or_deterioration_DTNAR = 0.675;
  heart_hypertrophy_or_deterioration_DTNARL = 1e-6;
  heart_hypertrophy_or_deterioration_EARK = 1;
  heart_hypertrophy_or_deterioration_EARLL = 24;
  heart_hypertrophy_or_deterioration_EFAFR = 0;
  heart_hypertrophy_or_deterioration_EXC = 1;
  heart_hypertrophy_or_deterioration_EXCML = 0.01;
  heart_hypertrophy_or_deterioration_EXCXP = 1;
  heart_hypertrophy_or_deterioration_EXCXP2 = 0.17;
  heart_hypertrophy_or_deterioration_EXE = 0;
  heart_hypertrophy_or_deterioration_GCOPF = 0.8092;
  heart_hypertrophy_or_deterioration_GFLC = 0.0208333;
  heart_hypertrophy_or_deterioration_GFNDMP = 3;
  heart_hypertrophy_or_deterioration_GFNLL = 0.001;
  heart_hypertrophy_or_deterioration_GPPD = 1;
  heart_hypertrophy_or_deterioration_HM6 = 1850;
  heart_hypertrophy_or_deterioration_HM8 = 4.714e-8;
  heart_hypertrophy_or_deterioration_HTAUML = 0.4;
  heart_hypertrophy_or_deterioration_KORGN = 1;
  heart_hypertrophy_or_deterioration_KORNER = 0;
  heart_hypertrophy_or_deterioration_KORREN = 0;
  heart_hypertrophy_or_deterioration_KORTC = 10000;
  heart_hypertrophy_or_deterioration_LPDE = 8;
  heart_hypertrophy_or_deterioration_LPK = 2.728e-14;
  heart_hypertrophy_or_deterioration_LPPR = 0.03;
  heart_hypertrophy_or_deterioration_MDFL1 = 10;
  heart_hypertrophy_or_deterioration_MDFLKM = 0.667;
  heart_hypertrophy_or_deterioration_MDFLW2 = 0.005;
  heart_hypertrophy_or_deterioration_MDFLWX = 0.01;
  heart_hypertrophy_or_deterioration_MDMP = 0;
  heart_hypertrophy_or_deterioration_O2A = 0.1;
  heart_hypertrophy_or_deterioration_O2CHMO = 0.01;
  heart_hypertrophy_or_deterioration_OMM = 57.1;
  heart_hypertrophy_or_deterioration_PA4 = 1;
  heart_hypertrophy_or_deterioration_PAEX = 2;
  heart_hypertrophy_or_deterioration_PCE = 1;
  heart_hypertrophy_or_deterioration_PCR = 15;
  heart_hypertrophy_or_deterioration_PR1LL = 0;
  heart_hypertrophy_or_deterioration_PGHF = -2;
  heart_hypertrophy_or_deterioration_PK2 = 0.79167;
  heart_hypertrophy_or_deterioration_PL2 = 1.8;
  heart_hypertrophy_or_deterioration_PLDF = 4.2;
  heart_hypertrophy_or_deterioration_PM5 = 30;
  heart_hypertrophy_or_deterioration_PO2ADV = 0.001;
  heart_hypertrophy_or_deterioration_POK = 0.1;
  heart_hypertrophy_or_deterioration_POM = 0.04;
  heart_hypertrophy_or_deterioration_POM2 = 2;
  heart_hypertrophy_or_deterioration_PON = 0.1;
  heart_hypertrophy_or_deterioration_POR = 35;
  heart_hypertrophy_or_deterioration_POZ = 2;
  heart_hypertrophy_or_deterioration_PXTP = 8;
  heart_hypertrophy_or_deterioration_QAOLM = 0.2;
  heart_hypertrophy_or_deterioration_QRF = 0.15;
  heart_hypertrophy_or_deterioration_RABSC = 0.5;
  heart_hypertrophy_or_deterioration_RAM = 96.3;
  heart_hypertrophy_or_deterioration_RAPRSP = 0;
  heart_hypertrophy_or_deterioration_RAR = 30.52;
  heart_hypertrophy_or_deterioration_RCDFDP = 2000;
  heart_hypertrophy_or_deterioration_RCDFPC = 0;
  heart_hypertrophy_or_deterioration_REK = 1;
  heart_hypertrophy_or_deterioration_RFABKM = 0.03;
  heart_hypertrophy_or_deterioration_RFABDM = 0.3;
  heart_hypertrophy_or_deterioration_RFABDP = 1;
  heart_hypertrophy_or_deterioration_RFCDFT = 0;
  heart_hypertrophy_or_deterioration_RKC = 5.8e-6;
  heart_hypertrophy_or_deterioration_RNAGTC = 15;
  heart_hypertrophy_or_deterioration_RNAUAD = 0;
  heart_hypertrophy_or_deterioration_RPS = 0;
  heart_hypertrophy_or_deterioration_RTPPR = 0.9;
  heart_hypertrophy_or_deterioration_RTPPRS = 15.2;
  heart_hypertrophy_or_deterioration_RTSPRS = 6;
  heart_hypertrophy_or_deterioration_RVRS = 19.167;
  heart_hypertrophy_or_deterioration_RVSM = 1;
  heart_hypertrophy_or_deterioration_SR = 1;
  heart_hypertrophy_or_deterioration_SR2 = 1;
  heart_hypertrophy_or_deterioration_SRK = 5;
  heart_hypertrophy_or_deterioration_SRK2 = 10000;
  heart_hypertrophy_or_deterioration_STA = 0;
  heart_hypertrophy_or_deterioration_TENSGN = 0;
  heart_hypertrophy_or_deterioration_TENSTC = 0.05;
  heart_hypertrophy_or_deterioration_TIMETR = 0;
  heart_hypertrophy_or_deterioration_TRNSFS = 0;
  heart_hypertrophy_or_deterioration_TRPL = 0;
  heart_hypertrophy_or_deterioration_TSSLML = 0.15;
  heart_hypertrophy_or_deterioration_TSSLTC = 0.005;
  heart_hypertrophy_or_deterioration_TVDDL = 30;
  heart_hypertrophy_or_deterioration_U = 4;
  heart_hypertrophy_or_deterioration_VID1 = 0.01;
  heart_hypertrophy_or_deterioration_VIDML = 0.01;
  heart_hypertrophy_or_deterioration_VNTSTM = 1;
  heart_hypertrophy_or_deterioration_VP1 = 0.01;
  heart_hypertrophy_or_deterioration_VPTISS = 0.0175;
  heart_hypertrophy_or_deterioration_VTSF = 6;
  heart_hypertrophy_or_deterioration_VV9 = 2.51;
  heart_hypertrophy_or_deterioration_X = 4;
  heart_hypertrophy_or_deterioration_Z = 1;
  heart_hypertrophy_or_deterioration_Z4 = 0.5;
  heart_hypertrophy_or_deterioration_Z5 = 0.3;
  heart_hypertrophy_or_deterioration_Z6 = 20;
  heart_hypertrophy_or_deterioration_Z7 = 5;
  heart_hypertrophy_or_deterioration_Z10 = 45;
  heart_hypertrophy_or_deterioration_Z11 = 0.01;
  heart_hypertrophy_or_deterioration_Z12 = 5;
  heart_hypertrophy_or_deterioration_Z13 = 0.625;
  heart_hypertrophy_or_deterioration_Z14 = 5;
  heart_hypertrophy_or_deterioration_Z16 = 5;
  heart_hypertrophy_or_deterioration_Z18 = 5;
  heart_hypertrophy_or_deterioration_Z19 = 5;
  heart_hypertrophy_or_deterioration_KID = 0.08;
  heart_hypertrophy_or_deterioration_URFORM = 0.24;
  heart_hypertrophy_or_deterioration_AUV = 0.55;
  heart_hypertrophy_or_deterioration_AUY = 0;
  heart_hypertrophy_or_deterioration_O2M = 164;
  heart_hypertrophy_or_deterioration_NID = 0.1;
  heart_hypertrophy_or_deterioration_ATRFBM = 0;
  heart_hypertrophy_or_deterioration_GBL = 0;
  heart_hypertrophy_or_deterioration_RNAUGN = 0.6;
  heart_hypertrophy_or_deterioration_RNAULL = 0.3;
  heart_hypertrophy_or_deterioration_RNAUUL = 10;
  heart_hypertrophy_or_deterioration_HSR = 1;
  heart_hypertrophy_or_deterioration_HSL = 1;
  heart_hypertrophy_or_deterioration_HMK = 90;
  heart_hypertrophy_or_deterioration_PO2AMB = 150;
  heart_hypertrophy_or_deterioration_HKM = 0.53333;
  heart_hypertrophy_or_deterioration_DR = 0;
  heart_hypertrophy_or_deterioration_ANPKNS = 0;
  heart_hypertrophy_or_deterioration_RMULT1 = 1;
  heart_hypertrophy_or_deterioration_GLPCA = 1;
  heart_hypertrophy_or_deterioration_RFN = 1.22057;
  heart_hypertrophy_or_deterioration_RFABX = 0.8;
  heart_hypertrophy_or_deterioration_ANPINF = 0;
  heart_hypertrophy_or_deterioration_FIS = 0;
  heart_hypertrophy_or_deterioration_CPPD = 31.9719;
  heart_hypertrophy_or_deterioration_TRRBC = 0;
  heart_hypertrophy_or_deterioration_HYL = 60;
  heart_hypertrophy_or_deterioration_ATRVM = 0;
  heart_hypertrophy_or_deterioration_ADHC_init = 1;
  heart_hypertrophy_or_deterioration_AHY_init = 0.301963;
  heart_hypertrophy_or_deterioration_AMC_init = 1;
  heart_hypertrophy_or_deterioration_AMM1T_init = 1.00269;
  heart_hypertrophy_or_deterioration_AMM2_init = 1.09071;
  heart_hypertrophy_or_deterioration_ANC_init = 0.859476;
  heart_hypertrophy_or_deterioration_ANPC_init = 1;
  heart_hypertrophy_or_deterioration_ANX1_init = 0;
  heart_hypertrophy_or_deterioration_AR1T_init = 1.02127;
  heart_hypertrophy_or_deterioration_AR2T_init = 1.01179;
  heart_hypertrophy_or_deterioration_AR3T_init = 1.1448;
  heart_hypertrophy_or_deterioration_AU1_init = 1.00007;
  heart_hypertrophy_or_deterioration_AU4_init = -0.060024;
  heart_hypertrophy_or_deterioration_AU6_init = 1.00132;
  heart_hypertrophy_or_deterioration_DTKA_init = 0.0367573;
  heart_hypertrophy_or_deterioration_HMD1_init = 1;
  heart_hypertrophy_or_deterioration_HPL_init = 1.00163;
  heart_hypertrophy_or_deterioration_HPR_init = 1.00237;
  heart_hypertrophy_or_deterioration_KTOT_init = 3622.54;
  heart_hypertrophy_or_deterioration_NAE_init = 2109.91;
  heart_hypertrophy_or_deterioration_O2VAD1_init = 2.368e-7;
  heart_hypertrophy_or_deterioration_OSV_init = 0.694163;
  heart_hypertrophy_or_deterioration_OVA_init = 204.497;
  heart_hypertrophy_or_deterioration_OVS_init = 0.699673;
  heart_hypertrophy_or_deterioration_PAR1_init = 103.525;
  heart_hypertrophy_or_deterioration_PC_init = 16.9144;
  heart_hypertrophy_or_deterioration_PLUR_init = 159.549;
  heart_hypertrophy_or_deterioration_PPR1_init = 0.419998;
  heart_hypertrophy_or_deterioration_PRP_init = 216.243;
  heart_hypertrophy_or_deterioration_QO2T_init = 72.2362;
  heart_hypertrophy_or_deterioration_QOM1_init = 48.0839;
  heart_hypertrophy_or_deterioration_RNAUG3_init = 0;
  heart_hypertrophy_or_deterioration_TSP_init = 279.945;
  heart_hypertrophy_or_deterioration_TVD_init = 0.000980838;
  heart_hypertrophy_or_deterioration_VAS1_init = 0.862514;
  heart_hypertrophy_or_deterioration_VIC_init = 25.0404;
  heart_hypertrophy_or_deterioration_VLA1_init = 0.379883;
  heart_hypertrophy_or_deterioration_VPA1_init = 0.38131;
  heart_hypertrophy_or_deterioration_VPF1_init = 0.0123238;
  heart_hypertrophy_or_deterioration_VP_init = 3.00449;
  heart_hypertrophy_or_deterioration_VRA1_init = 0.100043;
  heart_hypertrophy_or_deterioration_VRC_init = 2.00439;
  heart_hypertrophy_or_deterioration_VTS2_init = 0;
  heart_hypertrophy_or_deterioration_VTW_init = 39.8952;
  heart_hypertrophy_or_deterioration_VV6_init = 0.0101913;
  heart_hypertrophy_or_deterioration_VV7_init = 0.00366525;
  heart_hypertrophy_or_deterioration_VVS1_init = 3.28246;
  heart_hypertrophy_or_deterioration_heart_deterioration_HMD1 = heart_hypertrophy_or_deterioration_HMD1_init;
  time_ = ;

  // Assignment rules:
  HMD := ;
  heart_hypertrophy_or_deterioration_heart_deterioration_DHM := (POT - 10)*heart_hypertrophy_or_deterioration_DHDTR;

  // Rate rules:
  HPL' = ((PA*QAO/(500*heart_hypertrophy_or_deterioration_HSL))^heart_hypertrophy_or_deterioration_Z13 - HPL)/57600;
  HPR' = ((PPA*QAO/(75*heart_hypertrophy_or_deterioration_HSR))^heart_hypertrophy_or_deterioration_Z13 - HPR)/57600;
  heart_hypertrophy_or_deterioration_heart_deterioration_HMD1' = heart_hypertrophy_or_deterioration_heart_deterioration_DHM;
end
