// SBML level 2 version 4

model kidney_parent_model____main()
  // Originally created by libAntimony v1.4 (using libSBML 4.1.0-b2)

  // Compartments:
  compartment default_compartment = 1;

  // Parameters:
  PA = 103.525;
  AUM = 1.00066;
  ANM = 0.987545;
  MYOGRS = 1;
  PAMKRN = 1;
  HM1 = 0.39984739;
  PPC = 29.9941;
  VTW = 39.8952;
  CNA = 142.035;
  ADHMK = 1;
  AMNA = 1;
  CKE = 4.44092;
  AMK = 1.037;
  ANPX = 1;
  A1K = 0.5;
  A2K = 60;
  A3K = 40000;
  A4K = 0.1;
  A4K2 = 40000;
  AARK = 1;
  AARLL = 4;
  ADHINF = 0;
  ADHKLL = 0.2;
  ADHKUL = 5;
  ADHPAM = 0.3;
  ADHPUL = 85;
  ADHTC = 15;
  ADHVLL = 0.93617;
  ADHVUL = 2.5;
  AH10 = 0.333;
  AH11 = 1000;
  AH9 = 1;
  AHMNAR = 0.3;
  AHTHM = 2;
  ALCLK = 0.3;
  ALDINF = 0;
  ALDKNS = 0;
  ALDMM = 2.5;
  AM1LL = 0;
  AM1UL = 5;
  AMCSNS = 0.65;
  AMKM = 0.5;
  AMKMUL = 12;
  AMM1LM = 0.005;
  AMM4 = 0.005;
  AMNALL = 0.04;
  AMNAM = 0.8;
  AMNAUL = 15;
  AMT = 60;
  ANCSNS = 0.4;
  ANGINF = 0;
  ANGKNS = 0;
  ANMALD = 2.5;
  ANMAM = 1.4;
  ANMARL = 0.86;
  ANMEM = 1.6;
  ANMKEL = 0.3;
  ANMKEM = 2;
  ANMLL = 0.7;
  ANMNAM = 1;
  ANMSLT = 2;
  ANMTM = 1.5;
  ANMUL = 1.8;
  ANPTC = 4;
  ANPXAF = 1.5;
  ANPXUL = 10;
  ANT = 12;
  ANULL = 0.8;
  ANUM = 6;
  ANUVM = 0;
  ANV = 5000;
  ANXM = 0;
  ANY = -0.2;
  AR1LM = 0.005;
  AR2LM = 0.005;
  ARF = 0.5;
  AUC1 = 0.3;
  AUDMP = 0.3;
  AUK = 0.004;
  AUL = 1.5;
  AULPM = 0;
  AUM1 = 3;
  AUM2 = 1;
  AUMAX = 5;
  AUMIN = 0.4;
  AUMK1 = 0.3;
  AUN1 = 0.5;
  AURG = 1;
  AUS = 1;
  AUSLP = 1.5;
  AUTO = 0;
  AUTOGN = 7;
  AUTOSN = 0.9;
  AUX = 1;
  BAROTC = 0.16;
  CFC = 0.01167;
  CKEEX = 4;
  CMPTSS = 2;
  CN2 = 0.0212;
  CN7 = 0.2;
  CNR = 139;
  CPF = 0.0003;
  CPK = 0.000253;
  CPR = 40;
  CV = 0.1;
  CRRFLX = 0;
  DIURET = 1;
  DHDTR = 0.05;
  DTNAR = 0.675;
  DTNARL = 1e-6;
  EARK = 1;
  EARLL = 24;
  EFAFR = 0;
  EXC = 1;
  EXCML = 0.01;
  EXCXP = 1;
  EXCXP2 = 0.17;
  EXE = 0;
  GCOPF = 0.8092;
  GFLC = 0.0208333;
  GFNDMP = 3;
  GFNLL = 0.001;
  GPPD = 1;
  HM6 = 1850;
  HM8 = 4.714e-8;
  HTAUML = 0.4;
  KORGN = 1;
  KORNER = 0;
  KORREN = 0;
  KORTC = 10000;
  LPDE = 8;
  LPK = 2.728e-14;
  LPPR = 0.03;
  MDFL1 = 10;
  MDFLKM = 0.667;
  MDFLW2 = 0.005;
  MDFLWX = 0.01;
  MDMP = 0;
  O2A = 0.1;
  O2CHMO = 0.01;
  OMM = 57.1;
  PA4 = 1;
  PAEX = 2;
  PCE = 1;
  PCR = 15;
  PR1LL = 0;
  PGHF = -2;
  PK2 = 0.79167;
  PL2 = 1.8;
  PLDF = 4.2;
  PM5 = 30;
  PO2ADV = 0.001;
  POK = 0.1;
  POM = 0.04;
  POM2 = 2;
  PON = 0.1;
  POR = 35;
  POZ = 2;
  PXTP = 8;
  QAOLM = 0.2;
  QRF = 0.15;
  RABSC = 0.5;
  RAM = 96.3;
  RAPRSP = 0;
  RAR = 30.52;
  RCDFDP = 2000;
  RCDFPC = 0;
  REK = 1;
  RFABKM = 0.03;
  RFABDM = 0.3;
  RFABDP = 1;
  RFCDFT = 0;
  RKC = 5.8e-6;
  RNAGTC = 15;
  RNAUAD = 0;
  RPS = 0;
  RTPPR = 0.9;
  RTPPRS = 15.2;
  RTSPRS = 6;
  RVRS = 19.167;
  RVSM = 1;
  SR = 1;
  SR2 = 1;
  SRK = 5;
  SRK2 = 10000;
  STA = 0;
  TENSGN = 0;
  TENSTC = 0.05;
  TIMETR = 0;
  TRNSFS = 0;
  TRPL = 0;
  TSSLML = 0.15;
  TSSLTC = 0.005;
  TVDDL = 30;
  U = 4;
  VID1 = 0.01;
  VIDML = 0.01;
  VNTSTM = 1;
  VP1 = 0.01;
  VPTISS = 0.0175;
  VTSF = 6;
  VV9 = 2.51;
  X = 4;
  Z = 1;
  Z4 = 0.5;
  Z5 = 0.3;
  Z6 = 20;
  Z7 = 5;
  Z10 = 45;
  Z11 = 0.01;
  Z12 = 5;
  Z13 = 0.625;
  Z14 = 5;
  Z16 = 5;
  Z18 = 5;
  Z19 = 5;
  KID = 0.08;
  URFORM = 0.24;
  AUV = 0.55;
  AUY = 0;
  O2M = 164;
  NID = 0.1;
  ATRFBM = 0;
  GBL = 0;
  RNAUGN = 0.6;
  RNAULL = 0.3;
  RNAUUL = 10;
  HSR = 1;
  HSL = 1;
  HMK = 90;
  PO2AMB = 150;
  HKM = 0.53333;
  DR = 0;
  ANPKNS = 0;
  RMULT1 = 1;
  GLPCA = 1;
  RFN = 1.22057;
  RFABX = 0.8;
  ANPINF = 0;
  FIS = 0;
  CPPD = 31.9719;
  TRRBC = 0;
  HYL = 60;
  ATRVM = 0;
  ADHC_init = 1;
  AHY_init = 0.301963;
  AMC_init = 1;
  AMM1T_init = 1.00269;
  AMM2_init = 1.09071;
  ANC_init = 0.859476;
  ANPC_init = 1;
  ANX1_init = 0;
  AR1T_init = 1.02127;
  AR2T_init = 1.01179;
  AR3T_init = 1.1448;
  AU1_init = 1.00007;
  AU4_init = -0.060024;
  AU6_init = 1.00132;
  DTKA_init = 0.0367573;
  HMD1_init = 1;
  HPL_init = 1.00163;
  HPR_init = 1.00237;
  KTOT_init = 3622.54;
  NAE_init = 2109.91;
  O2VAD1_init = 2.368e-7;
  OSV_init = 0.694163;
  OVA_init = 204.497;
  OVS_init = 0.699673;
  PAR1_init = 103.525;
  PC_init = 16.9144;
  PLUR_init = 159.549;
  PPR1_init = 0.419998;
  PRP_init = 216.243;
  QO2T_init = 72.2362;
  QOM1_init = 48.0839;
  RNAUG3_init = 0;
  TSP_init = 279.945;
  TVD_init = 0.000980838;
  VAS1_init = 0.862514;
  VIC_init = 25.0404;
  VLA1_init = 0.379883;
  VPA1_init = 0.38131;
  VPF1_init = 0.0123238;
  VP_init = 3.00449;
  VRA1_init = 0.100043;
  VRC_init = 2.00439;
  VTS2_init = 0;
  VTW_init = 39.8952;
  VV6_init = 0.0101913;
  VV7_init = 0.00366525;
  VVS1_init = 3.28246;
  kidney_A1K = 0.5;
  kidney_A2K = 60;
  kidney_A3K = 40000;
  kidney_A4K = 0.1;
  kidney_A4K2 = 40000;
  kidney_AARK = 1;
  kidney_AARLL = 4;
  kidney_ADHINF = 0;
  kidney_ADHKLL = 0.2;
  kidney_ADHKUL = 5;
  kidney_ADHPAM = 0.3;
  kidney_ADHPUL = 85;
  kidney_ADHTC = 15;
  kidney_ADHVLL = 0.93617;
  kidney_ADHVUL = 2.5;
  kidney_AH10 = 0.333;
  kidney_AH11 = 1000;
  kidney_AH9 = 1;
  kidney_AHMNAR = 0.3;
  kidney_AHTHM = 2;
  kidney_ALCLK = 0.3;
  kidney_ALDINF = 0;
  kidney_ALDKNS = 0;
  kidney_ALDMM = 2.5;
  kidney_AM1LL = 0;
  kidney_AM1UL = 5;
  kidney_AMCSNS = 0.65;
  kidney_AMKM = 0.5;
  kidney_AMKMUL = 12;
  kidney_AMM1LM = 0.005;
  kidney_AMM4 = 0.005;
  kidney_AMNALL = 0.04;
  kidney_AMNAM = 0.8;
  kidney_AMNAUL = 15;
  kidney_AMT = 60;
  kidney_ANCSNS = 0.4;
  kidney_ANGINF = 0;
  kidney_ANGKNS = 0;
  kidney_ANMALD = 2.5;
  kidney_ANMAM = 1.4;
  kidney_ANMARL = 0.86;
  kidney_ANMEM = 1.6;
  kidney_ANMKEL = 0.3;
  kidney_ANMKEM = 2;
  kidney_ANMLL = 0.7;
  kidney_ANMNAM = 1;
  kidney_ANMSLT = 2;
  kidney_ANMTM = 1.5;
  kidney_ANMUL = 1.8;
  kidney_ANPTC = 4;
  kidney_ANPXAF = 1.5;
  kidney_ANPXUL = 10;
  kidney_ANT = 12;
  kidney_ANULL = 0.8;
  kidney_ANUM = 6;
  kidney_ANUVM = 0;
  kidney_ANV = 5000;
  kidney_ANXM = 0;
  kidney_ANY = -0.2;
  kidney_AR1LM = 0.005;
  kidney_AR2LM = 0.005;
  kidney_ARF = 0.5;
  kidney_AUC1 = 0.3;
  kidney_AUDMP = 0.3;
  kidney_AUK = 0.004;
  kidney_AUL = 1.5;
  kidney_AULPM = 0;
  kidney_AUM1 = 3;
  kidney_AUM2 = 1;
  kidney_AUMAX = 5;
  kidney_AUMIN = 0.4;
  kidney_AUMK1 = 0.3;
  kidney_AUN1 = 0.5;
  kidney_AURG = 1;
  kidney_AUS = 1;
  kidney_AUSLP = 1.5;
  kidney_AUTO = 0;
  kidney_AUTOGN = 7;
  kidney_AUTOSN = 0.9;
  kidney_AUX = 1;
  kidney_BAROTC = 0.16;
  kidney_CFC = 0.01167;
  kidney_CKEEX = 4;
  kidney_CMPTSS = 2;
  kidney_CN2 = 0.0212;
  kidney_CN7 = 0.2;
  kidney_CNR = 139;
  kidney_CPF = 0.0003;
  kidney_CPK = 0.000253;
  kidney_CPR = 40;
  kidney_CV = 0.1;
  kidney_CRRFLX = 0;
  kidney_DIURET = 1;
  kidney_DHDTR = 0.05;
  kidney_DTNAR = 0.675;
  kidney_DTNARL = 1e-6;
  kidney_EARK = 1;
  kidney_EARLL = 24;
  kidney_EFAFR = 0;
  kidney_EXC = 1;
  kidney_EXCML = 0.01;
  kidney_EXCXP = 1;
  kidney_EXCXP2 = 0.17;
  kidney_EXE = 0;
  kidney_GCOPF = 0.8092;
  kidney_GFLC = 0.0208333;
  kidney_GFNDMP = 3;
  kidney_GFNLL = 0.001;
  kidney_GPPD = 1;
  kidney_HM6 = 1850;
  kidney_HM8 = 4.714e-8;
  kidney_HTAUML = 0.4;
  kidney_KORGN = 1;
  kidney_KORNER = 0;
  kidney_KORREN = 0;
  kidney_KORTC = 10000;
  kidney_LPDE = 8;
  kidney_LPK = 2.728e-14;
  kidney_LPPR = 0.03;
  kidney_MDFL1 = 10;
  kidney_MDFLKM = 0.667;
  kidney_MDFLW2 = 0.005;
  kidney_MDFLWX = 0.01;
  kidney_MDMP = 0;
  kidney_O2A = 0.1;
  kidney_O2CHMO = 0.01;
  kidney_OMM = 57.1;
  kidney_PA4 = 1;
  kidney_PAEX = 2;
  kidney_PCE = 1;
  kidney_PCR = 15;
  kidney_PR1LL = 0;
  kidney_PGHF = -2;
  kidney_PK2 = 0.79167;
  kidney_PL2 = 1.8;
  kidney_PLDF = 4.2;
  kidney_PM5 = 30;
  kidney_PO2ADV = 0.001;
  kidney_POK = 0.1;
  kidney_POM = 0.04;
  kidney_POM2 = 2;
  kidney_PON = 0.1;
  kidney_POR = 35;
  kidney_POZ = 2;
  kidney_PXTP = 8;
  kidney_QAOLM = 0.2;
  kidney_QRF = 0.15;
  kidney_RABSC = 0.5;
  kidney_RAM = 96.3;
  kidney_RAPRSP = 0;
  kidney_RAR = 30.52;
  kidney_RCDFDP = 2000;
  kidney_RCDFPC = 0;
  kidney_REK = 1;
  kidney_RFABKM = 0.03;
  kidney_RFABDM = 0.3;
  kidney_RFABDP = 1;
  kidney_RFCDFT = 0;
  kidney_RKC = 5.8e-6;
  kidney_RNAGTC = 15;
  kidney_RNAUAD = 0;
  kidney_RPS = 0;
  kidney_RTPPR = 0.9;
  kidney_RTPPRS = 15.2;
  kidney_RTSPRS = 6;
  kidney_RVRS = 19.167;
  kidney_RVSM = 1;
  kidney_SR = 1;
  kidney_SR2 = 1;
  kidney_SRK = 5;
  kidney_SRK2 = 10000;
  kidney_STA = 0;
  kidney_TENSGN = 0;
  kidney_TENSTC = 0.05;
  kidney_TIMETR = 0;
  kidney_TRNSFS = 0;
  kidney_TRPL = 0;
  kidney_TSSLML = 0.15;
  kidney_TSSLTC = 0.005;
  kidney_TVDDL = 30;
  kidney_U = 4;
  kidney_VID1 = 0.01;
  kidney_VIDML = 0.01;
  kidney_VNTSTM = 1;
  kidney_VP1 = 0.01;
  kidney_VPTISS = 0.0175;
  kidney_VTSF = 6;
  kidney_VV9 = 2.51;
  kidney_X = 4;
  kidney_Z = 1;
  kidney_Z4 = 0.5;
  kidney_Z5 = 0.3;
  kidney_Z6 = 20;
  kidney_Z7 = 5;
  kidney_Z10 = 45;
  kidney_Z11 = 0.01;
  kidney_Z12 = 5;
  kidney_Z13 = 0.625;
  kidney_Z14 = 5;
  kidney_Z16 = 5;
  kidney_Z18 = 5;
  kidney_Z19 = 5;
  kidney_KID = 0.08;
  kidney_URFORM = 0.24;
  kidney_AUV = 0.55;
  kidney_AUY = 0;
  kidney_O2M = 164;
  kidney_NID = 0.1;
  kidney_ATRFBM = 0;
  kidney_GBL = 0;
  kidney_RNAUGN = 0.6;
  kidney_RNAULL = 0.3;
  kidney_RNAUUL = 10;
  kidney_HSR = 1;
  kidney_HSL = 1;
  kidney_HMK = 90;
  kidney_PO2AMB = 150;
  kidney_HKM = 0.53333;
  kidney_DR = 0;
  kidney_ANPKNS = 0;
  kidney_RMULT1 = 1;
  kidney_GLPCA = 1;
  kidney_RFN0 = 1.22057;
  kidney_RFABX = 0.8;
  kidney_ANPINF = 0;
  kidney_FIS = 0;
  kidney_CPPD = 31.9719;
  kidney_TRRBC = 0;
  kidney_HYL = 60;
  kidney_ATRVM = 0;
  kidney_ADHC_init = 1;
  kidney_AHY_init = 0.301963;
  kidney_AMC_init = 1;
  kidney_AMM1T_init = 1.00269;
  kidney_AMM2_init = 1.09071;
  kidney_ANC_init = 0.859476;
  kidney_ANPC_init = 1;
  kidney_ANX1_init = 0;
  kidney_AR1T_init = 1.02127;
  kidney_AR2T_init = 1.01179;
  kidney_AR3T_init = 1.1448;
  kidney_AU1_init = 1.00007;
  kidney_AU4_init = -0.060024;
  kidney_AU6_init = 1.00132;
  kidney_DTKA_init = 0.0367573;
  kidney_HMD1_init = 1;
  kidney_HPL_init = 1.00163;
  kidney_HPR_init = 1.00237;
  kidney_KTOT_init = 3622.54;
  kidney_NAE_init = 2109.91;
  kidney_O2VAD1_init = 2.368e-7;
  kidney_OSV_init = 0.694163;
  kidney_OVA_init = 204.497;
  kidney_OVS_init = 0.699673;
  kidney_PAR1_init = 103.525;
  kidney_PC_init = 16.9144;
  kidney_PLUR_init = 159.549;
  kidney_PPR1_init = 0.419998;
  kidney_PRP_init = 216.243;
  kidney_QO2T_init = 72.2362;
  kidney_QOM1_init = 48.0839;
  kidney_RNAUG3_init = 0;
  kidney_TSP_init = 279.945;
  kidney_TVD_init = 0.000980838;
  kidney_VAS1_init = 0.862514;
  kidney_VIC_init = 25.0404;
  kidney_VLA1_init = 0.379883;
  kidney_VPA1_init = 0.38131;
  kidney_VPF1_init = 0.0123238;
  kidney_VP_init = 3.00449;
  kidney_VRA1_init = 0.100043;
  kidney_VRC_init = 2.00439;
  kidney_VTS2_init = 0;
  kidney_VTW_init = 39.8952;
  kidney_VV6_init = 0.0101913;
  kidney_VV7_init = 0.00366525;
  kidney_VVS1_init = 3.28246;
  kidney_perfusion_pressure_PAR1 = kidney_PAR1_init;
  kidney_renal_autoregulatory_feedback_factor_RNAUG3 = kidney_RNAUG3_init;
  kidney_PLUR = kidney_PLUR_init;
  kidney_DTKA = kidney_DTKA_init;
  time_ = ;
  kidney_GLPC0 = ;
  kidney_GFN0 = ;

  // Assignment rules:
  RBF := kidney_REK*kidney_RFN;
  MDFLW := ;
  NOD := kidney_NODN*kidney_REK;
  KOD := kidney_KODN*kidney_REK;
  VUD := kidney_VUDN*kidney_REK;
  kidney_PAR := ;
  kidney_RNAUG2 := kidney_renal_autoregulatory_feedback_factor_RNAUG1 - kidney_renal_autoregulatory_feedback_factor_RNAUG3;
  kidney_renal_autoregulatory_feedback_factor_RNAUG1 := ;
  kidney_renal_autoregulatory_feedback_factor_RNAUG1T := (MDFLW - 1)*kidney_RNAUGN + 1;
  kidney_AUMK := ;
  kidney_autonomic_effect_on_AAR_AUMKT := (AUM - 1)*kidney_ARF + 1;
  kidney_ANMAR := ;
  kidney_angiotensin_effect_on_AAR_ANMAR1 := (ANM - 1)*kidney_ANMAM + 1;
  kidney_AAR1 := kidney_AARK*PAMKRN*kidney_AUMK*kidney_RNAUG2*kidney_ANMAR*40*MYOGRS;
  kidney_AAR := ;
  kidney_atrial_natriuretic_peptide_effect_on_AAR_AART := kidney_AAR1 - ANPX*kidney_ANPXAF + kidney_ANPXAF;
  kidney_AUMK2 := (kidney_AUMK - 1)*kidney_AUMK1 + 1;
  kidney_ANMER := (ANM - 1)*kidney_ANMEM + 1;
  kidney_RNAUG4 := (kidney_RNAUG2 - 1)*kidney_EFAFR + 1;
  kidney_EAR := ;
  kidney_EAR_calculation_EAR1 := 43.333*kidney_EARK*kidney_ANMER*kidney_RNAUG4*MYOGRS*kidney_AUMK2;
  kidney_RR := kidney_AAR + kidney_EAR;
  kidney_RFN := kidney_PAR/kidney_RR;
  kidney_GFN := ;
  kidney_GLPC := ;
  kidney_glomerular_colloid_osmotic_pressure_EFAFPR := ;
  kidney_glomerular_colloid_osmotic_pressure_EFAFPR1 := kidney_RFN*(1 - HM1)/(kidney_RFN*(1 - HM1) - kidney_GFN);
  kidney_GLP := kidney_PAR - kidney_glomerular_pressure_APD;
  kidney_glomerular_pressure_APD := kidney_AAR*kidney_RFN;
  kidney_GFR := kidney_GFN*kidney_REK;
  kidney_glomerular_filtration_rate_PFL := kidney_GLP - kidney_GLPC0 - kidney_PXTP;
  kidney_glomerular_filtration_rate_GFN1 := kidney_glomerular_filtration_rate_PFL*kidney_GFLC;
  kidney_UROD := kidney_DTURI*kidney_REK;
  kidney_proximal_tubular_and_macula_densa_flow_PTFL := kidney_GFN0*8;
  kidney_proximal_tubular_and_macula_densa_flow_MDFLWT := (kidney_proximal_tubular_and_macula_densa_flow_PTFL - 1)*kidney_MDFL1 + 1;
  kidney_RTSPPC := ;
  kidney_renal_tissue_osmotic_pressure_RTSPPC1 := kidney_GLPC*kidney_RTPPR - kidney_RTPPRS;
  kidney_PLURC := kidney_PLUR/VTW;
  kidney_RCPRS := ((kidney_RFN - 1.2)*kidney_RFABX + 1.2)*kidney_RVRS;
  kidney_RFABD := ;
  kidney_peritubular_capillary_reabsorption_factor_RABSPR := kidney_GLPC + kidney_RTSPRS - kidney_RCPRS - kidney_RTSPPC;
  kidney_peritubular_capillary_reabsorption_factor_RFAB1 := kidney_peritubular_capillary_reabsorption_factor_RABSPR*kidney_RABSC;
  kidney_peritubular_capillary_reabsorption_factor_RFAB := kidney_peritubular_capillary_reabsorption_factor_RFAB1;
  kidney_peritubular_capillary_reabsorption_factor_RFABD1 := (kidney_peritubular_capillary_reabsorption_factor_RFAB - 1)*kidney_RFABDM + 1;
  kidney_DTNAI := MDFLW*CNA*0.0061619;
  kidney_DTNARA := ;
  kidney_Na_reabsorption_into_distal_tubules_DTNARA1 := AMNA*kidney_RFABD*kidney_DTNAR/kidney_DIURET*((ADHMK - 1)*kidney_AHMNAR + 1);
  kidney_DTNANG := ;
  kidney_angiotensin_induced_Na_reabsorption_into_distal_tubules_DTNANG1 := ((ANM - 1)*kidney_ANMNAM + 1)*0.1;
  kidney_DTKI := kidney_DTNAI*CKE/CNA;
  kidney_RFABK := (kidney_RFABD - 1)*kidney_RFABKM;
  kidney_MDFLK := ;
  kidney_effect_of_fluid_flow_on_distal_K_reabsorption_MDFLK1 := (MDFLW - 1)*kidney_MDFLKM + 1;
  kidney_KODN := ;
  kidney_VUDN := kidney_OSMOPN/(600*ADHMK) + kidney_normal_urine_volume_OSMOP1/360;
  kidney_DTKSC := (CKE/4.4)^kidney_CKEEX*AMK*0.08*kidney_MDFLK/kidney_K_secretion_from_distal_tubules_ANMKE;
  kidney_K_secretion_from_distal_tubules_ANMKE1 := (ANM - 1)*kidney_ANMKEM + 1;
  kidney_K_secretion_from_distal_tubules_ANMKE := ;
  kidney_NODN := ;
  kidney_normal_Na_excretion_NODN1 := kidney_DTNAI - kidney_DTNARA - kidney_DTNANG;
  kidney_normal_K_excretion_KODN1 := kidney_DTKI + kidney_DTKSC - kidney_DTKA - kidney_RFABK;
  kidney_DTURI := kidney_GFN^2*kidney_PLURC*3.84;
  kidney_OSMOPN1 := kidney_DTURI + 2*(kidney_NODN + kidney_KODN);
  kidney_OSMOPN := ;
  kidney_normal_urine_volume_OSMOP1T := kidney_OSMOPN1 - 0.6;
  kidney_normal_urine_volume_OSMOP1 := ;

  // Rate rules:
  kidney_perfusion_pressure_PAR1' = (100 + (PA - 100)*kidney_RCDFPC - kidney_perfusion_pressure_PAR1)/kidney_RCDFDP;
  kidney_renal_autoregulatory_feedback_factor_RNAUG3' = (kidney_RNAUG2 - 1)*kidney_RNAUAD;
  kidney_PLUR' = kidney_URFORM - kidney_UROD;
  kidney_DTKA' = (kidney_KODN/kidney_VUDN*0.0004518 - kidney_DTKA)*1;
end
