// SBML level 2 version 4

model muscle_autoregulatory_local_blood_flow_control_CellML1_0_model____main()
  // Originally created by libAntimony v1.4 (using libSBML 4.1.0-b2)

  // Compartments:
  compartment default_compartment = 1;

  // Parameters:
  PMO = 38.0666;
  muscle_autoregulatory_local_blood_flow_control_POM = 0.04;
  muscle_autoregulatory_local_blood_flow_control_A4K = 0.1;
  muscle_autoregulatory_local_blood_flow_control_AMM4 = 0.005;
  muscle_autoregulatory_local_blood_flow_control_POM2 = 2;
  muscle_autoregulatory_local_blood_flow_control_A4K2 = 40000;
  muscle_autoregulatory_local_blood_flow_control_M_ST_time_delay_and_limit_AMM1T = 1.00269;
  muscle_autoregulatory_local_blood_flow_control_AMM2 = 1.09071;
  time_ = ;

  // Assignment rules:
  muscle_autoregulatory_local_blood_flow_control_PDO := PMO - 38;
  muscle_autoregulatory_local_blood_flow_control_POE := muscle_autoregulatory_local_blood_flow_control_PDO*muscle_autoregulatory_local_blood_flow_control_POM + 1;
  muscle_autoregulatory_local_blood_flow_control_AMM1 := ;
  muscle_autoregulatory_local_blood_flow_control_POF := muscle_autoregulatory_local_blood_flow_control_POM2*muscle_autoregulatory_local_blood_flow_control_PDO + 1;
  muscle_autoregulatory_local_blood_flow_control_AMM := muscle_autoregulatory_local_blood_flow_control_AMM1*muscle_autoregulatory_local_blood_flow_control_AMM2;

  // Rate rules:
  muscle_autoregulatory_local_blood_flow_control_M_ST_time_delay_and_limit_AMM1T' = (muscle_autoregulatory_local_blood_flow_control_POE*1 - muscle_autoregulatory_local_blood_flow_control_M_ST_time_delay_and_limit_AMM1T)/muscle_autoregulatory_local_blood_flow_control_A4K;
  muscle_autoregulatory_local_blood_flow_control_AMM2' = (muscle_autoregulatory_local_blood_flow_control_POF*1 - muscle_autoregulatory_local_blood_flow_control_AMM2)/muscle_autoregulatory_local_blood_flow_control_A4K2;
end
