// SBML level 2 version 4

model non_muscle_autoregulatory_local_blood_flow_control_model____main()
  // Originally created by libAntimony v1.3 (using libSBML 4.1.0-b2)

  // Compartments:
  compartment default_compartment = 1;

  // Parameters:
  non_muscle_autoregulatory_local_blood_flow_control_A1K = 0.5;
  non_muscle_autoregulatory_local_blood_flow_control_A2K = 60;
  non_muscle_autoregulatory_local_blood_flow_control_A3K = 40000;
  non_muscle_autoregulatory_local_blood_flow_control_A4K = 0.1;
  non_muscle_autoregulatory_local_blood_flow_control_A4K2 = 40000;
  non_muscle_autoregulatory_local_blood_flow_control_AARK = 1;
  non_muscle_autoregulatory_local_blood_flow_control_AARLL = 4;
  non_muscle_autoregulatory_local_blood_flow_control_ADHINF = 0;
  non_muscle_autoregulatory_local_blood_flow_control_ADHKLL = 0.2;
  non_muscle_autoregulatory_local_blood_flow_control_ADHKUL = 5;
  non_muscle_autoregulatory_local_blood_flow_control_ADHPAM = 0.3;
  non_muscle_autoregulatory_local_blood_flow_control_ADHPUL = 85;
  non_muscle_autoregulatory_local_blood_flow_control_ADHTC = 15;
  non_muscle_autoregulatory_local_blood_flow_control_ADHVLL = 0.93617;
  non_muscle_autoregulatory_local_blood_flow_control_ADHVUL = 2.5;
  non_muscle_autoregulatory_local_blood_flow_control_AH10 = 0.333;
  non_muscle_autoregulatory_local_blood_flow_control_AH11 = 1000;
  non_muscle_autoregulatory_local_blood_flow_control_AH9 = 1;
  non_muscle_autoregulatory_local_blood_flow_control_AHMNAR = 0.3;
  non_muscle_autoregulatory_local_blood_flow_control_AHTHM = 2;
  non_muscle_autoregulatory_local_blood_flow_control_ALCLK = 0.3;
  non_muscle_autoregulatory_local_blood_flow_control_ALDINF = 0;
  non_muscle_autoregulatory_local_blood_flow_control_ALDKNS = 0;
  non_muscle_autoregulatory_local_blood_flow_control_ALDMM = 2.5;
  non_muscle_autoregulatory_local_blood_flow_control_AM1LL = 0;
  non_muscle_autoregulatory_local_blood_flow_control_AM1UL = 5;
  non_muscle_autoregulatory_local_blood_flow_control_AMCSNS = 0.65;
  non_muscle_autoregulatory_local_blood_flow_control_AMKM = 0.5;
  non_muscle_autoregulatory_local_blood_flow_control_AMKMUL = 12;
  non_muscle_autoregulatory_local_blood_flow_control_AMM1LM = 0.005;
  non_muscle_autoregulatory_local_blood_flow_control_AMM4 = 0.005;
  non_muscle_autoregulatory_local_blood_flow_control_AMNALL = 0.04;
  non_muscle_autoregulatory_local_blood_flow_control_AMNAM = 0.8;
  non_muscle_autoregulatory_local_blood_flow_control_AMNAUL = 15;
  non_muscle_autoregulatory_local_blood_flow_control_AMT = 60;
  non_muscle_autoregulatory_local_blood_flow_control_ANCSNS = 0.4;
  non_muscle_autoregulatory_local_blood_flow_control_ANGINF = 0;
  non_muscle_autoregulatory_local_blood_flow_control_ANGKNS = 0;
  non_muscle_autoregulatory_local_blood_flow_control_ANMALD = 2.5;
  non_muscle_autoregulatory_local_blood_flow_control_ANMAM = 1.4;
  non_muscle_autoregulatory_local_blood_flow_control_ANMARL = 0.86;
  non_muscle_autoregulatory_local_blood_flow_control_ANMEM = 1.6;
  non_muscle_autoregulatory_local_blood_flow_control_ANMKEL = 0.3;
  non_muscle_autoregulatory_local_blood_flow_control_ANMKEM = 2;
  non_muscle_autoregulatory_local_blood_flow_control_ANMLL = 0.7;
  non_muscle_autoregulatory_local_blood_flow_control_ANMNAM = 1;
  non_muscle_autoregulatory_local_blood_flow_control_ANMSLT = 2;
  non_muscle_autoregulatory_local_blood_flow_control_ANMTM = 1.5;
  non_muscle_autoregulatory_local_blood_flow_control_ANMUL = 1.8;
  non_muscle_autoregulatory_local_blood_flow_control_ANPTC = 4;
  non_muscle_autoregulatory_local_blood_flow_control_ANPXAF = 1.5;
  non_muscle_autoregulatory_local_blood_flow_control_ANPXUL = 10;
  non_muscle_autoregulatory_local_blood_flow_control_ANT = 12;
  non_muscle_autoregulatory_local_blood_flow_control_ANULL = 0.8;
  non_muscle_autoregulatory_local_blood_flow_control_ANUM = 6;
  non_muscle_autoregulatory_local_blood_flow_control_ANUVM = 0;
  non_muscle_autoregulatory_local_blood_flow_control_ANV = 5000;
  non_muscle_autoregulatory_local_blood_flow_control_ANXM = 0;
  non_muscle_autoregulatory_local_blood_flow_control_ANY = -0.2;
  non_muscle_autoregulatory_local_blood_flow_control_AR1LM = 0.005;
  non_muscle_autoregulatory_local_blood_flow_control_AR2LM = 0.005;
  non_muscle_autoregulatory_local_blood_flow_control_ARF = 0.5;
  non_muscle_autoregulatory_local_blood_flow_control_AUC1 = 0.3;
  non_muscle_autoregulatory_local_blood_flow_control_AUDMP = 0.3;
  non_muscle_autoregulatory_local_blood_flow_control_AUK = 0.004;
  non_muscle_autoregulatory_local_blood_flow_control_AUL = 1.5;
  non_muscle_autoregulatory_local_blood_flow_control_AULPM = 0;
  non_muscle_autoregulatory_local_blood_flow_control_AUM1 = 3;
  non_muscle_autoregulatory_local_blood_flow_control_AUM2 = 1;
  non_muscle_autoregulatory_local_blood_flow_control_AUMAX = 5;
  non_muscle_autoregulatory_local_blood_flow_control_AUMIN = 0.4;
  non_muscle_autoregulatory_local_blood_flow_control_AUMK1 = 0.3;
  non_muscle_autoregulatory_local_blood_flow_control_AUN1 = 0.5;
  non_muscle_autoregulatory_local_blood_flow_control_AURG = 1;
  non_muscle_autoregulatory_local_blood_flow_control_AUS = 1;
  non_muscle_autoregulatory_local_blood_flow_control_AUSLP = 1.5;
  non_muscle_autoregulatory_local_blood_flow_control_AUTO = 0;
  non_muscle_autoregulatory_local_blood_flow_control_AUTOGN = 7;
  non_muscle_autoregulatory_local_blood_flow_control_AUTOSN = 0.9;
  non_muscle_autoregulatory_local_blood_flow_control_AUX = 1;
  non_muscle_autoregulatory_local_blood_flow_control_BAROTC = 0.16;
  non_muscle_autoregulatory_local_blood_flow_control_CFC = 0.01167;
  non_muscle_autoregulatory_local_blood_flow_control_CKEEX = 4;
  non_muscle_autoregulatory_local_blood_flow_control_CMPTSS = 2;
  non_muscle_autoregulatory_local_blood_flow_control_CN2 = 0.0212;
  non_muscle_autoregulatory_local_blood_flow_control_CN7 = 0.2;
  non_muscle_autoregulatory_local_blood_flow_control_CNR = 139;
  non_muscle_autoregulatory_local_blood_flow_control_CPF = 0.0003;
  non_muscle_autoregulatory_local_blood_flow_control_CPK = 0.000253;
  non_muscle_autoregulatory_local_blood_flow_control_CPR = 40;
  non_muscle_autoregulatory_local_blood_flow_control_CV = 0.1;
  non_muscle_autoregulatory_local_blood_flow_control_CRRFLX = 0;
  non_muscle_autoregulatory_local_blood_flow_control_DIURET = 1;
  non_muscle_autoregulatory_local_blood_flow_control_DHDTR = 0.05;
  non_muscle_autoregulatory_local_blood_flow_control_DTNAR = 0.675;
  non_muscle_autoregulatory_local_blood_flow_control_DTNARL = 1e-6;
  non_muscle_autoregulatory_local_blood_flow_control_EARK = 1;
  non_muscle_autoregulatory_local_blood_flow_control_EARLL = 24;
  non_muscle_autoregulatory_local_blood_flow_control_EFAFR = 0;
  non_muscle_autoregulatory_local_blood_flow_control_EXC = 1;
  non_muscle_autoregulatory_local_blood_flow_control_EXCML = 0.01;
  non_muscle_autoregulatory_local_blood_flow_control_EXCXP = 1;
  non_muscle_autoregulatory_local_blood_flow_control_EXCXP2 = 0.17;
  non_muscle_autoregulatory_local_blood_flow_control_EXE = 0;
  non_muscle_autoregulatory_local_blood_flow_control_GCOPF = 0.8092;
  non_muscle_autoregulatory_local_blood_flow_control_GFLC = 0.0208333;
  non_muscle_autoregulatory_local_blood_flow_control_GFNDMP = 3;
  non_muscle_autoregulatory_local_blood_flow_control_GFNLL = 0.001;
  non_muscle_autoregulatory_local_blood_flow_control_GPPD = 1;
  non_muscle_autoregulatory_local_blood_flow_control_HM6 = 1850;
  non_muscle_autoregulatory_local_blood_flow_control_HM8 = 4.714e-8;
  non_muscle_autoregulatory_local_blood_flow_control_HTAUML = 0.4;
  non_muscle_autoregulatory_local_blood_flow_control_KORGN = 1;
  non_muscle_autoregulatory_local_blood_flow_control_KORNER = 0;
  non_muscle_autoregulatory_local_blood_flow_control_KORREN = 0;
  non_muscle_autoregulatory_local_blood_flow_control_KORTC = 10000;
  non_muscle_autoregulatory_local_blood_flow_control_LPDE = 8;
  non_muscle_autoregulatory_local_blood_flow_control_LPK = 2.728e-14;
  non_muscle_autoregulatory_local_blood_flow_control_LPPR = 0.03;
  non_muscle_autoregulatory_local_blood_flow_control_MDFL1 = 10;
  non_muscle_autoregulatory_local_blood_flow_control_MDFLKM = 0.667;
  non_muscle_autoregulatory_local_blood_flow_control_MDFLW2 = 0.005;
  non_muscle_autoregulatory_local_blood_flow_control_MDFLWX = 0.01;
  non_muscle_autoregulatory_local_blood_flow_control_MDMP = 0;
  non_muscle_autoregulatory_local_blood_flow_control_O2A = 0.1;
  non_muscle_autoregulatory_local_blood_flow_control_O2CHMO = 0.01;
  non_muscle_autoregulatory_local_blood_flow_control_OMM = 57.1;
  non_muscle_autoregulatory_local_blood_flow_control_PA4 = 1;
  non_muscle_autoregulatory_local_blood_flow_control_PAEX = 2;
  non_muscle_autoregulatory_local_blood_flow_control_PCE = 1;
  non_muscle_autoregulatory_local_blood_flow_control_PCR = 15;
  non_muscle_autoregulatory_local_blood_flow_control_PR1LL = 0;
  non_muscle_autoregulatory_local_blood_flow_control_PGHF = -2;
  non_muscle_autoregulatory_local_blood_flow_control_PK2 = 0.79167;
  non_muscle_autoregulatory_local_blood_flow_control_PL2 = 1.8;
  non_muscle_autoregulatory_local_blood_flow_control_PLDF = 4.2;
  non_muscle_autoregulatory_local_blood_flow_control_PM5 = 30;
  non_muscle_autoregulatory_local_blood_flow_control_PO2ADV = 0.001;
  non_muscle_autoregulatory_local_blood_flow_control_POK = 0.1;
  non_muscle_autoregulatory_local_blood_flow_control_POM = 0.04;
  non_muscle_autoregulatory_local_blood_flow_control_POM2 = 2;
  non_muscle_autoregulatory_local_blood_flow_control_PON = 0.1;
  non_muscle_autoregulatory_local_blood_flow_control_POR = 35;
  non_muscle_autoregulatory_local_blood_flow_control_POZ = 2;
  non_muscle_autoregulatory_local_blood_flow_control_PXTP = 8;
  non_muscle_autoregulatory_local_blood_flow_control_QAOLM = 0.2;
  non_muscle_autoregulatory_local_blood_flow_control_QRF = 0.15;
  non_muscle_autoregulatory_local_blood_flow_control_RABSC = 0.5;
  non_muscle_autoregulatory_local_blood_flow_control_RAM = 96.3;
  non_muscle_autoregulatory_local_blood_flow_control_RAPRSP = 0;
  non_muscle_autoregulatory_local_blood_flow_control_RAR = 30.52;
  non_muscle_autoregulatory_local_blood_flow_control_RCDFDP = 2000;
  non_muscle_autoregulatory_local_blood_flow_control_RCDFPC = 0;
  non_muscle_autoregulatory_local_blood_flow_control_REK = 1;
  non_muscle_autoregulatory_local_blood_flow_control_RFABKM = 0.03;
  non_muscle_autoregulatory_local_blood_flow_control_RFABDM = 0.3;
  non_muscle_autoregulatory_local_blood_flow_control_RFABDP = 1;
  non_muscle_autoregulatory_local_blood_flow_control_RFCDFT = 0;
  non_muscle_autoregulatory_local_blood_flow_control_RKC = 5.8e-6;
  non_muscle_autoregulatory_local_blood_flow_control_RNAGTC = 15;
  non_muscle_autoregulatory_local_blood_flow_control_RNAUAD = 0;
  non_muscle_autoregulatory_local_blood_flow_control_RPS = 0;
  non_muscle_autoregulatory_local_blood_flow_control_RTPPR = 0.9;
  non_muscle_autoregulatory_local_blood_flow_control_RTPPRS = 15.2;
  non_muscle_autoregulatory_local_blood_flow_control_RTSPRS = 6;
  non_muscle_autoregulatory_local_blood_flow_control_RVRS = 19.167;
  non_muscle_autoregulatory_local_blood_flow_control_RVSM = 1;
  non_muscle_autoregulatory_local_blood_flow_control_SR = 1;
  non_muscle_autoregulatory_local_blood_flow_control_SR2 = 1;
  non_muscle_autoregulatory_local_blood_flow_control_SRK = 5;
  non_muscle_autoregulatory_local_blood_flow_control_SRK2 = 10000;
  non_muscle_autoregulatory_local_blood_flow_control_STA = 0;
  non_muscle_autoregulatory_local_blood_flow_control_TENSGN = 0;
  non_muscle_autoregulatory_local_blood_flow_control_TENSTC = 0.05;
  non_muscle_autoregulatory_local_blood_flow_control_TIMETR = 0;
  non_muscle_autoregulatory_local_blood_flow_control_TRNSFS = 0;
  non_muscle_autoregulatory_local_blood_flow_control_TRPL = 0;
  non_muscle_autoregulatory_local_blood_flow_control_TSSLML = 0.15;
  non_muscle_autoregulatory_local_blood_flow_control_TSSLTC = 0.005;
  non_muscle_autoregulatory_local_blood_flow_control_TVDDL = 30;
  non_muscle_autoregulatory_local_blood_flow_control_U = 4;
  non_muscle_autoregulatory_local_blood_flow_control_VID1 = 0.01;
  non_muscle_autoregulatory_local_blood_flow_control_VIDML = 0.01;
  non_muscle_autoregulatory_local_blood_flow_control_VNTSTM = 1;
  non_muscle_autoregulatory_local_blood_flow_control_VP1 = 0.01;
  non_muscle_autoregulatory_local_blood_flow_control_VPTISS = 0.0175;
  non_muscle_autoregulatory_local_blood_flow_control_VTSF = 6;
  non_muscle_autoregulatory_local_blood_flow_control_VV9 = 2.51;
  non_muscle_autoregulatory_local_blood_flow_control_X = 4;
  non_muscle_autoregulatory_local_blood_flow_control_Z = 1;
  non_muscle_autoregulatory_local_blood_flow_control_Z4 = 0.5;
  non_muscle_autoregulatory_local_blood_flow_control_Z5 = 0.3;
  non_muscle_autoregulatory_local_blood_flow_control_Z6 = 20;
  non_muscle_autoregulatory_local_blood_flow_control_Z7 = 5;
  non_muscle_autoregulatory_local_blood_flow_control_Z10 = 45;
  non_muscle_autoregulatory_local_blood_flow_control_Z11 = 0.01;
  non_muscle_autoregulatory_local_blood_flow_control_Z12 = 5;
  non_muscle_autoregulatory_local_blood_flow_control_Z13 = 0.625;
  non_muscle_autoregulatory_local_blood_flow_control_Z14 = 5;
  non_muscle_autoregulatory_local_blood_flow_control_Z16 = 5;
  non_muscle_autoregulatory_local_blood_flow_control_Z18 = 5;
  non_muscle_autoregulatory_local_blood_flow_control_Z19 = 5;
  non_muscle_autoregulatory_local_blood_flow_control_KID = 0.08;
  non_muscle_autoregulatory_local_blood_flow_control_URFORM = 0.24;
  non_muscle_autoregulatory_local_blood_flow_control_AUV = 0.55;
  non_muscle_autoregulatory_local_blood_flow_control_AUY = 0;
  non_muscle_autoregulatory_local_blood_flow_control_O2M = 164;
  non_muscle_autoregulatory_local_blood_flow_control_NID = 0.1;
  non_muscle_autoregulatory_local_blood_flow_control_ATRFBM = 0;
  non_muscle_autoregulatory_local_blood_flow_control_GBL = 0;
  non_muscle_autoregulatory_local_blood_flow_control_RNAUGN = 0.6;
  non_muscle_autoregulatory_local_blood_flow_control_RNAULL = 0.3;
  non_muscle_autoregulatory_local_blood_flow_control_RNAUUL = 10;
  non_muscle_autoregulatory_local_blood_flow_control_HSR = 1;
  non_muscle_autoregulatory_local_blood_flow_control_HSL = 1;
  non_muscle_autoregulatory_local_blood_flow_control_HMK = 90;
  non_muscle_autoregulatory_local_blood_flow_control_PO2AMB = 150;
  non_muscle_autoregulatory_local_blood_flow_control_HKM = 0.53333;
  non_muscle_autoregulatory_local_blood_flow_control_DR = 0;
  non_muscle_autoregulatory_local_blood_flow_control_ANPKNS = 0;
  non_muscle_autoregulatory_local_blood_flow_control_RMULT1 = 1;
  non_muscle_autoregulatory_local_blood_flow_control_GLPCA = 1;
  non_muscle_autoregulatory_local_blood_flow_control_RFN = 1.22057;
  non_muscle_autoregulatory_local_blood_flow_control_RFABX = 0.8;
  non_muscle_autoregulatory_local_blood_flow_control_ANPINF = 0;
  non_muscle_autoregulatory_local_blood_flow_control_FIS = 0;
  non_muscle_autoregulatory_local_blood_flow_control_CPPD = 31.9719;
  non_muscle_autoregulatory_local_blood_flow_control_TRRBC = 0;
  non_muscle_autoregulatory_local_blood_flow_control_HYL = 60;
  non_muscle_autoregulatory_local_blood_flow_control_ATRVM = 0;
  non_muscle_autoregulatory_local_blood_flow_control_ADHC_init = 1;
  non_muscle_autoregulatory_local_blood_flow_control_AHY_init = 0.301963;
  non_muscle_autoregulatory_local_blood_flow_control_AMC_init = 1;
  non_muscle_autoregulatory_local_blood_flow_control_AMM1T_init = 1.00269;
  non_muscle_autoregulatory_local_blood_flow_control_AMM2_init = 1.09071;
  non_muscle_autoregulatory_local_blood_flow_control_ANC_init = 0.859476;
  non_muscle_autoregulatory_local_blood_flow_control_ANPC_init = 1;
  non_muscle_autoregulatory_local_blood_flow_control_ANX1_init = 0;
  non_muscle_autoregulatory_local_blood_flow_control_AR1T_init = 1.02127;
  non_muscle_autoregulatory_local_blood_flow_control_AR2T_init = 1.01179;
  non_muscle_autoregulatory_local_blood_flow_control_AR3T_init = 1.1448;
  non_muscle_autoregulatory_local_blood_flow_control_AU1_init = 1.00007;
  non_muscle_autoregulatory_local_blood_flow_control_AU4_init = -0.060024;
  non_muscle_autoregulatory_local_blood_flow_control_AU6_init = 1.00132;
  non_muscle_autoregulatory_local_blood_flow_control_DTKA_init = 0.0367573;
  non_muscle_autoregulatory_local_blood_flow_control_HMD1_init = 1;
  non_muscle_autoregulatory_local_blood_flow_control_HPL_init = 1.00163;
  non_muscle_autoregulatory_local_blood_flow_control_HPR_init = 1.00237;
  non_muscle_autoregulatory_local_blood_flow_control_KTOT_init = 3622.54;
  non_muscle_autoregulatory_local_blood_flow_control_NAE_init = 2109.91;
  non_muscle_autoregulatory_local_blood_flow_control_O2VAD1_init = 2.368e-7;
  non_muscle_autoregulatory_local_blood_flow_control_OSV_init = 0.694163;
  non_muscle_autoregulatory_local_blood_flow_control_OVA_init = 204.497;
  non_muscle_autoregulatory_local_blood_flow_control_OVS_init = 0.699673;
  non_muscle_autoregulatory_local_blood_flow_control_PAR1_init = 103.525;
  non_muscle_autoregulatory_local_blood_flow_control_PC_init = 16.9144;
  non_muscle_autoregulatory_local_blood_flow_control_PLUR_init = 159.549;
  non_muscle_autoregulatory_local_blood_flow_control_PPR1_init = 0.419998;
  non_muscle_autoregulatory_local_blood_flow_control_PRP_init = 216.243;
  non_muscle_autoregulatory_local_blood_flow_control_QO2T_init = 72.2362;
  non_muscle_autoregulatory_local_blood_flow_control_QOM1_init = 48.0839;
  non_muscle_autoregulatory_local_blood_flow_control_RNAUG3_init = 0;
  non_muscle_autoregulatory_local_blood_flow_control_TSP_init = 279.945;
  non_muscle_autoregulatory_local_blood_flow_control_TVD_init = 0.000980838;
  non_muscle_autoregulatory_local_blood_flow_control_VAS1_init = 0.862514;
  non_muscle_autoregulatory_local_blood_flow_control_VIC_init = 25.0404;
  non_muscle_autoregulatory_local_blood_flow_control_VLA1_init = 0.379883;
  non_muscle_autoregulatory_local_blood_flow_control_VPA1_init = 0.38131;
  non_muscle_autoregulatory_local_blood_flow_control_VPF1_init = 0.0123238;
  non_muscle_autoregulatory_local_blood_flow_control_VP_init = 3.00449;
  non_muscle_autoregulatory_local_blood_flow_control_VRA1_init = 0.100043;
  non_muscle_autoregulatory_local_blood_flow_control_VRC_init = 2.00439;
  non_muscle_autoregulatory_local_blood_flow_control_VTS2_init = 0;
  non_muscle_autoregulatory_local_blood_flow_control_VTW_init = 39.8952;
  non_muscle_autoregulatory_local_blood_flow_control_VV6_init = 0.0101913;
  non_muscle_autoregulatory_local_blood_flow_control_VV7_init = 0.00366525;
  non_muscle_autoregulatory_local_blood_flow_control_VVS1_init = 3.28246;
  non_muscle_autoregulatory_local_blood_flow_control_NM_ST_time_delay_and_damping_AR1T = non_muscle_autoregulatory_local_blood_flow_control_AR1T_init;
  non_muscle_autoregulatory_local_blood_flow_control_NM_I_time_delay_and_limit_AR2T = non_muscle_autoregulatory_local_blood_flow_control_AR2T_init;
  non_muscle_autoregulatory_local_blood_flow_control_NM_LT_time_delay_and_limit_AR3T = non_muscle_autoregulatory_local_blood_flow_control_AR3T_init;
  time_ = ;
  POT = ;

  // Assignment rules:
  ARM := (non_muscle_autoregulatory_local_blood_flow_control_ARM1 - 1)*non_muscle_autoregulatory_local_blood_flow_control_AUTOSN + 1;
  non_muscle_autoregulatory_local_blood_flow_control_POD := POT - non_muscle_autoregulatory_local_blood_flow_control_POR;
  non_muscle_autoregulatory_local_blood_flow_control_POB := non_muscle_autoregulatory_local_blood_flow_control_POD*non_muscle_autoregulatory_local_blood_flow_control_POK + 1;
  non_muscle_autoregulatory_local_blood_flow_control_AR1 := ;
  non_muscle_autoregulatory_local_blood_flow_control_POA := non_muscle_autoregulatory_local_blood_flow_control_PON*non_muscle_autoregulatory_local_blood_flow_control_POD + 1;
  non_muscle_autoregulatory_local_blood_flow_control_AR2 := ;
  non_muscle_autoregulatory_local_blood_flow_control_POC := non_muscle_autoregulatory_local_blood_flow_control_POZ*non_muscle_autoregulatory_local_blood_flow_control_POD + 1;
  non_muscle_autoregulatory_local_blood_flow_control_AR3 := ;
  non_muscle_autoregulatory_local_blood_flow_control_ARM1 := non_muscle_autoregulatory_local_blood_flow_control_AR1*non_muscle_autoregulatory_local_blood_flow_control_AR2*non_muscle_autoregulatory_local_blood_flow_control_AR3;

  // Rate rules:
  non_muscle_autoregulatory_local_blood_flow_control_NM_ST_time_delay_and_damping_AR1T' = (non_muscle_autoregulatory_local_blood_flow_control_POB*1 - non_muscle_autoregulatory_local_blood_flow_control_NM_ST_time_delay_and_damping_AR1T)/non_muscle_autoregulatory_local_blood_flow_control_A1K;
  non_muscle_autoregulatory_local_blood_flow_control_NM_I_time_delay_and_limit_AR2T' = (non_muscle_autoregulatory_local_blood_flow_control_POA*1 - non_muscle_autoregulatory_local_blood_flow_control_NM_I_time_delay_and_limit_AR2T)/non_muscle_autoregulatory_local_blood_flow_control_A2K;
  non_muscle_autoregulatory_local_blood_flow_control_NM_LT_time_delay_and_limit_AR3T' = (non_muscle_autoregulatory_local_blood_flow_control_POC*1 - non_muscle_autoregulatory_local_blood_flow_control_NM_LT_time_delay_and_limit_AR3T)/non_muscle_autoregulatory_local_blood_flow_control_A3K;
end
