// SBML level 2 version 4

model non_muscle_O2_delivery_CellML1_0_model____main()
  // Originally created by libAntimony v1.4 (using libSBML 4.1.0-b2)

  // Compartments:
  compartment default_compartment = 1;

  // Parameters:
  BFN = 2.79521;
  OVA = 204.497;
  HM = 40.0381;
  AOM = 1.00002;
  non_muscle_O2_delivery_O2M = 164;
  non_muscle_O2_delivery_volume_of_O2_in_NM_tissue_QO2T = 72.2362;
  time_ = ;
  non_muscle_O2_delivery_POV0 = ;

  // Assignment rules:
  non_muscle_O2_delivery_O2ARTN := OVA*BFN;
  non_muscle_O2_delivery_DOB := (non_muscle_O2_delivery_POV0 - non_muscle_O2_delivery_POT)*12.857*BFN;
  non_muscle_O2_delivery_POV := non_muscle_O2_delivery_NM_venous_O2_content_OSV*57.14;
  non_muscle_O2_delivery_NM_venous_O2_content_OSV := (non_muscle_O2_delivery_O2ARTN - non_muscle_O2_delivery_DOB)/(HM*5.25*BFN);
  non_muscle_O2_delivery_POT := non_muscle_O2_delivery_QO2*0.48611;
  non_muscle_O2_delivery_MO2 := AOM*non_muscle_O2_delivery_O2M*(1 - (35.0001 - non_muscle_O2_delivery_O2_consumption_by_NM_tissue_P1O)^3/42875);
  non_muscle_O2_delivery_O2_consumption_by_NM_tissue_P1O := ;
  non_muscle_O2_delivery_QO2 := ;
  non_muscle_O2_delivery_volume_of_O2_in_NM_tissue_DO2N := ;
  non_muscle_O2_delivery_volume_of_O2_in_NM_tissue_DO2N1 := non_muscle_O2_delivery_DOB - non_muscle_O2_delivery_MO2;

  // Rate rules:
  non_muscle_O2_delivery_volume_of_O2_in_NM_tissue_QO2T' = non_muscle_O2_delivery_volume_of_O2_in_NM_tissue_DO2N;
end
