// SBML level 2 version 4

model pulmonary_fluid_dynamics_CellML1_0_model____main()
  // Originally created by libAntimony v1.4 (using libSBML 4.1.0-b2)

  // Compartments:
  compartment default_compartment = 1;

  // Parameters:
  PPC = 29.9941;
  PPA = 15.6376;
  PLA = 2;
  CPP = 71.9719;
  RPV = 1.55719;
  RPA = 1.5683;
  pulmonary_fluid_dynamics_CPF = 0.0003;
  pulmonary_fluid_dynamics_pulmonary_interstitial_free_fluid_volume_VPF1 = 0.0123238;
  pulmonary_fluid_dynamics_concentration_of_protein_in_pulmonary_interstitium_PPR1 = 0.419998;
  time_ = ;

  // Assignment rules:
  pulmonary_fluid_dynamics_PCP := (PPA - PLA)*RPV/(RPV + RPA) + PLA;
  pulmonary_fluid_dynamics_POS := pulmonary_fluid_dynamics_CPN*0.4;
  pulmonary_fluid_dynamics_PPI := 2 - 0.15/pulmonary_fluid_dynamics_VPF;
  pulmonary_fluid_dynamics_PFI := (pulmonary_fluid_dynamics_PCP - pulmonary_fluid_dynamics_PPI + pulmonary_fluid_dynamics_POS - PPC)*pulmonary_fluid_dynamics_CPF;
  pulmonary_fluid_dynamics_PLF := (pulmonary_fluid_dynamics_PPI + 11)*0.0003;
  pulmonary_fluid_dynamics_DFP := pulmonary_fluid_dynamics_pulmonary_interstitial_free_fluid_volume_DFZ;
  pulmonary_fluid_dynamics_VPF := ;
  pulmonary_fluid_dynamics_pulmonary_interstitial_free_fluid_volume_DFZ := pulmonary_fluid_dynamics_PFI - pulmonary_fluid_dynamics_PLF;
  pulmonary_fluid_dynamics_PPO := pulmonary_fluid_dynamics_PLF*pulmonary_fluid_dynamics_CPN;
  pulmonary_fluid_dynamics_PPN := (CPP - pulmonary_fluid_dynamics_CPN)*0.000225;
  pulmonary_fluid_dynamics_PPD := pulmonary_fluid_dynamics_concentration_of_protein_in_pulmonary_interstitium_PPZ;
  pulmonary_fluid_dynamics_CPN := pulmonary_fluid_dynamics_concentration_of_protein_in_pulmonary_interstitium_PPR/pulmonary_fluid_dynamics_VPF;
  pulmonary_fluid_dynamics_concentration_of_protein_in_pulmonary_interstitium_PPZ := pulmonary_fluid_dynamics_PPN - pulmonary_fluid_dynamics_PPO;
  pulmonary_fluid_dynamics_concentration_of_protein_in_pulmonary_interstitium_PPR := ;

  // Rate rules:
  pulmonary_fluid_dynamics_pulmonary_interstitial_free_fluid_volume_VPF1' = pulmonary_fluid_dynamics_DFP;
  pulmonary_fluid_dynamics_concentration_of_protein_in_pulmonary_interstitium_PPR1' = pulmonary_fluid_dynamics_PPD;
end
