// SBML level 2 version 4

model pulmonary_fluid_dynamics_parent_model____main()
  // Originally created by libAntimony v1.4 (using libSBML 4.1.0-b2)

  // Compartments:
  compartment default_compartment = 1;

  // Parameters:
  PPC = 29.9941;
  PPA = 15.6376;
  PLA = 2;
  CPP = 71.9719;
  RPV = 1.55719;
  RPA = 1.5683;
  A1K = 0.5;
  A2K = 60;
  A3K = 40000;
  A4K = 0.1;
  A4K2 = 40000;
  AARK = 1;
  AARLL = 4;
  ADHINF = 0;
  ADHKLL = 0.2;
  ADHKUL = 5;
  ADHPAM = 0.3;
  ADHPUL = 85;
  ADHTC = 15;
  ADHVLL = 0.93617;
  ADHVUL = 2.5;
  AH10 = 0.333;
  AH11 = 1000;
  AH9 = 1;
  AHMNAR = 0.3;
  AHTHM = 2;
  ALCLK = 0.3;
  ALDINF = 0;
  ALDKNS = 0;
  ALDMM = 2.5;
  AM1LL = 0;
  AM1UL = 5;
  AMCSNS = 0.65;
  AMKM = 0.5;
  AMKMUL = 12;
  AMM1LM = 0.005;
  AMM4 = 0.005;
  AMNALL = 0.04;
  AMNAM = 0.8;
  AMNAUL = 15;
  AMT = 60;
  ANCSNS = 0.4;
  ANGINF = 0;
  ANGKNS = 0;
  ANMALD = 2.5;
  ANMAM = 1.4;
  ANMARL = 0.86;
  ANMEM = 1.6;
  ANMKEL = 0.3;
  ANMKEM = 2;
  ANMLL = 0.7;
  ANMNAM = 1;
  ANMSLT = 2;
  ANMTM = 1.5;
  ANMUL = 1.8;
  ANPTC = 4;
  ANPXAF = 1.5;
  ANPXUL = 10;
  ANT = 12;
  ANULL = 0.8;
  ANUM = 6;
  ANUVM = 0;
  ANV = 5000;
  ANXM = 0;
  ANY = -0.2;
  AR1LM = 0.005;
  AR2LM = 0.005;
  ARF = 0.5;
  AUC1 = 0.3;
  AUDMP = 0.3;
  AUK = 0.004;
  AUL = 1.5;
  AULPM = 0;
  AUM1 = 3;
  AUM2 = 1;
  AUMAX = 5;
  AUMIN = 0.4;
  AUMK1 = 0.3;
  AUN1 = 0.5;
  AURG = 1;
  AUS = 1;
  AUSLP = 1.5;
  AUTO = 0;
  AUTOGN = 7;
  AUTOSN = 0.9;
  AUX = 1;
  BAROTC = 0.16;
  CFC = 0.01167;
  CKEEX = 4;
  CMPTSS = 2;
  CN2 = 0.0212;
  CN7 = 0.2;
  CNR = 139;
  CPF = 0.0003;
  CPK = 0.000253;
  CPR = 40;
  CV = 0.1;
  CRRFLX = 0;
  DIURET = 1;
  DHDTR = 0.05;
  DTNAR = 0.675;
  DTNARL = 1e-6;
  EARK = 1;
  EARLL = 24;
  EFAFR = 0;
  EXC = 1;
  EXCML = 0.01;
  EXCXP = 1;
  EXCXP2 = 0.17;
  EXE = 0;
  GCOPF = 0.8092;
  GFLC = 0.0208333;
  GFNDMP = 3;
  GFNLL = 0.001;
  GPPD = 1;
  HM6 = 1850;
  HM8 = 4.714e-8;
  HTAUML = 0.4;
  KORGN = 1;
  KORNER = 0;
  KORREN = 0;
  KORTC = 10000;
  LPDE = 8;
  LPK = 2.728e-14;
  LPPR = 0.03;
  MDFL1 = 10;
  MDFLKM = 0.667;
  MDFLW2 = 0.005;
  MDFLWX = 0.01;
  MDMP = 0;
  O2A = 0.1;
  O2CHMO = 0.01;
  OMM = 57.1;
  PA4 = 1;
  PAEX = 2;
  PCE = 1;
  PCR = 15;
  PR1LL = 0;
  PGHF = -2;
  PK2 = 0.79167;
  PL2 = 1.8;
  PLDF = 4.2;
  PM5 = 30;
  PO2ADV = 0.001;
  POK = 0.1;
  POM = 0.04;
  POM2 = 2;
  PON = 0.1;
  POR = 35;
  POZ = 2;
  PXTP = 8;
  QAOLM = 0.2;
  QRF = 0.15;
  RABSC = 0.5;
  RAM = 96.3;
  RAPRSP = 0;
  RAR = 30.52;
  RCDFDP = 2000;
  RCDFPC = 0;
  REK = 1;
  RFABKM = 0.03;
  RFABDM = 0.3;
  RFABDP = 1;
  RFCDFT = 0;
  RKC = 5.8e-6;
  RNAGTC = 15;
  RNAUAD = 0;
  RPS = 0;
  RTPPR = 0.9;
  RTPPRS = 15.2;
  RTSPRS = 6;
  RVRS = 19.167;
  RVSM = 1;
  SR = 1;
  SR2 = 1;
  SRK = 5;
  SRK2 = 10000;
  STA = 0;
  TENSGN = 0;
  TENSTC = 0.05;
  TIMETR = 0;
  TRNSFS = 0;
  TRPL = 0;
  TSSLML = 0.15;
  TSSLTC = 0.005;
  TVDDL = 30;
  U = 4;
  VID1 = 0.01;
  VIDML = 0.01;
  VNTSTM = 1;
  VP1 = 0.01;
  VPTISS = 0.0175;
  VTSF = 6;
  VV9 = 2.51;
  X = 4;
  Z = 1;
  Z4 = 0.5;
  Z5 = 0.3;
  Z6 = 20;
  Z7 = 5;
  Z10 = 45;
  Z11 = 0.01;
  Z12 = 5;
  Z13 = 0.625;
  Z14 = 5;
  Z16 = 5;
  Z18 = 5;
  Z19 = 5;
  KID = 0.08;
  URFORM = 0.24;
  AUV = 0.55;
  AUY = 0;
  O2M = 164;
  NID = 0.1;
  ATRFBM = 0;
  GBL = 0;
  RNAUGN = 0.6;
  RNAULL = 0.3;
  RNAUUL = 10;
  HSR = 1;
  HSL = 1;
  HMK = 90;
  PO2AMB = 150;
  HKM = 0.53333;
  DR = 0;
  ANPKNS = 0;
  RMULT1 = 1;
  GLPCA = 1;
  RFN = 1.22057;
  RFABX = 0.8;
  ANPINF = 0;
  FIS = 0;
  CPPD = 31.9719;
  TRRBC = 0;
  HYL = 60;
  ATRVM = 0;
  ADHC_init = 1;
  AHY_init = 0.301963;
  AMC_init = 1;
  AMM1T_init = 1.00269;
  AMM2_init = 1.09071;
  ANC_init = 0.859476;
  ANPC_init = 1;
  ANX1_init = 0;
  AR1T_init = 1.02127;
  AR2T_init = 1.01179;
  AR3T_init = 1.1448;
  AU1_init = 1.00007;
  AU4_init = -0.060024;
  AU6_init = 1.00132;
  DTKA_init = 0.0367573;
  HMD1_init = 1;
  HPL_init = 1.00163;
  HPR_init = 1.00237;
  KTOT_init = 3622.54;
  NAE_init = 2109.91;
  O2VAD1_init = 2.368e-7;
  OSV_init = 0.694163;
  OVA_init = 204.497;
  OVS_init = 0.699673;
  PAR1_init = 103.525;
  PC_init = 16.9144;
  PLUR_init = 159.549;
  PPR1_init = 0.419998;
  PRP_init = 216.243;
  QO2T_init = 72.2362;
  QOM1_init = 48.0839;
  RNAUG3_init = 0;
  TSP_init = 279.945;
  TVD_init = 0.000980838;
  VAS1_init = 0.862514;
  VIC_init = 25.0404;
  VLA1_init = 0.379883;
  VPA1_init = 0.38131;
  VPF1_init = 0.0123238;
  VP_init = 3.00449;
  VRA1_init = 0.100043;
  VRC_init = 2.00439;
  VTS2_init = 0;
  VTW_init = 39.8952;
  VV6_init = 0.0101913;
  VV7_init = 0.00366525;
  VVS1_init = 3.28246;
  pulmonary_fluid_dynamics_A1K = 0.5;
  pulmonary_fluid_dynamics_A2K = 60;
  pulmonary_fluid_dynamics_A3K = 40000;
  pulmonary_fluid_dynamics_A4K = 0.1;
  pulmonary_fluid_dynamics_A4K2 = 40000;
  pulmonary_fluid_dynamics_AARK = 1;
  pulmonary_fluid_dynamics_AARLL = 4;
  pulmonary_fluid_dynamics_ADHINF = 0;
  pulmonary_fluid_dynamics_ADHKLL = 0.2;
  pulmonary_fluid_dynamics_ADHKUL = 5;
  pulmonary_fluid_dynamics_ADHPAM = 0.3;
  pulmonary_fluid_dynamics_ADHPUL = 85;
  pulmonary_fluid_dynamics_ADHTC = 15;
  pulmonary_fluid_dynamics_ADHVLL = 0.93617;
  pulmonary_fluid_dynamics_ADHVUL = 2.5;
  pulmonary_fluid_dynamics_AH10 = 0.333;
  pulmonary_fluid_dynamics_AH11 = 1000;
  pulmonary_fluid_dynamics_AH9 = 1;
  pulmonary_fluid_dynamics_AHMNAR = 0.3;
  pulmonary_fluid_dynamics_AHTHM = 2;
  pulmonary_fluid_dynamics_ALCLK = 0.3;
  pulmonary_fluid_dynamics_ALDINF = 0;
  pulmonary_fluid_dynamics_ALDKNS = 0;
  pulmonary_fluid_dynamics_ALDMM = 2.5;
  pulmonary_fluid_dynamics_AM1LL = 0;
  pulmonary_fluid_dynamics_AM1UL = 5;
  pulmonary_fluid_dynamics_AMCSNS = 0.65;
  pulmonary_fluid_dynamics_AMKM = 0.5;
  pulmonary_fluid_dynamics_AMKMUL = 12;
  pulmonary_fluid_dynamics_AMM1LM = 0.005;
  pulmonary_fluid_dynamics_AMM4 = 0.005;
  pulmonary_fluid_dynamics_AMNALL = 0.04;
  pulmonary_fluid_dynamics_AMNAM = 0.8;
  pulmonary_fluid_dynamics_AMNAUL = 15;
  pulmonary_fluid_dynamics_AMT = 60;
  pulmonary_fluid_dynamics_ANCSNS = 0.4;
  pulmonary_fluid_dynamics_ANGINF = 0;
  pulmonary_fluid_dynamics_ANGKNS = 0;
  pulmonary_fluid_dynamics_ANMALD = 2.5;
  pulmonary_fluid_dynamics_ANMAM = 1.4;
  pulmonary_fluid_dynamics_ANMARL = 0.86;
  pulmonary_fluid_dynamics_ANMEM = 1.6;
  pulmonary_fluid_dynamics_ANMKEL = 0.3;
  pulmonary_fluid_dynamics_ANMKEM = 2;
  pulmonary_fluid_dynamics_ANMLL = 0.7;
  pulmonary_fluid_dynamics_ANMNAM = 1;
  pulmonary_fluid_dynamics_ANMSLT = 2;
  pulmonary_fluid_dynamics_ANMTM = 1.5;
  pulmonary_fluid_dynamics_ANMUL = 1.8;
  pulmonary_fluid_dynamics_ANPTC = 4;
  pulmonary_fluid_dynamics_ANPXAF = 1.5;
  pulmonary_fluid_dynamics_ANPXUL = 10;
  pulmonary_fluid_dynamics_ANT = 12;
  pulmonary_fluid_dynamics_ANULL = 0.8;
  pulmonary_fluid_dynamics_ANUM = 6;
  pulmonary_fluid_dynamics_ANUVM = 0;
  pulmonary_fluid_dynamics_ANV = 5000;
  pulmonary_fluid_dynamics_ANXM = 0;
  pulmonary_fluid_dynamics_ANY = -0.2;
  pulmonary_fluid_dynamics_AR1LM = 0.005;
  pulmonary_fluid_dynamics_AR2LM = 0.005;
  pulmonary_fluid_dynamics_ARF = 0.5;
  pulmonary_fluid_dynamics_AUC1 = 0.3;
  pulmonary_fluid_dynamics_AUDMP = 0.3;
  pulmonary_fluid_dynamics_AUK = 0.004;
  pulmonary_fluid_dynamics_AUL = 1.5;
  pulmonary_fluid_dynamics_AULPM = 0;
  pulmonary_fluid_dynamics_AUM1 = 3;
  pulmonary_fluid_dynamics_AUM2 = 1;
  pulmonary_fluid_dynamics_AUMAX = 5;
  pulmonary_fluid_dynamics_AUMIN = 0.4;
  pulmonary_fluid_dynamics_AUMK1 = 0.3;
  pulmonary_fluid_dynamics_AUN1 = 0.5;
  pulmonary_fluid_dynamics_AURG = 1;
  pulmonary_fluid_dynamics_AUS = 1;
  pulmonary_fluid_dynamics_AUSLP = 1.5;
  pulmonary_fluid_dynamics_AUTO = 0;
  pulmonary_fluid_dynamics_AUTOGN = 7;
  pulmonary_fluid_dynamics_AUTOSN = 0.9;
  pulmonary_fluid_dynamics_AUX = 1;
  pulmonary_fluid_dynamics_BAROTC = 0.16;
  pulmonary_fluid_dynamics_CFC = 0.01167;
  pulmonary_fluid_dynamics_CKEEX = 4;
  pulmonary_fluid_dynamics_CMPTSS = 2;
  pulmonary_fluid_dynamics_CN2 = 0.0212;
  pulmonary_fluid_dynamics_CN7 = 0.2;
  pulmonary_fluid_dynamics_CNR = 139;
  pulmonary_fluid_dynamics_CPF = 0.0003;
  pulmonary_fluid_dynamics_CPK = 0.000253;
  pulmonary_fluid_dynamics_CPR = 40;
  pulmonary_fluid_dynamics_CV = 0.1;
  pulmonary_fluid_dynamics_CRRFLX = 0;
  pulmonary_fluid_dynamics_DIURET = 1;
  pulmonary_fluid_dynamics_DHDTR = 0.05;
  pulmonary_fluid_dynamics_DTNAR = 0.675;
  pulmonary_fluid_dynamics_DTNARL = 1e-6;
  pulmonary_fluid_dynamics_EARK = 1;
  pulmonary_fluid_dynamics_EARLL = 24;
  pulmonary_fluid_dynamics_EFAFR = 0;
  pulmonary_fluid_dynamics_EXC = 1;
  pulmonary_fluid_dynamics_EXCML = 0.01;
  pulmonary_fluid_dynamics_EXCXP = 1;
  pulmonary_fluid_dynamics_EXCXP2 = 0.17;
  pulmonary_fluid_dynamics_EXE = 0;
  pulmonary_fluid_dynamics_GCOPF = 0.8092;
  pulmonary_fluid_dynamics_GFLC = 0.0208333;
  pulmonary_fluid_dynamics_GFNDMP = 3;
  pulmonary_fluid_dynamics_GFNLL = 0.001;
  pulmonary_fluid_dynamics_GPPD = 1;
  pulmonary_fluid_dynamics_HM6 = 1850;
  pulmonary_fluid_dynamics_HM8 = 4.714e-8;
  pulmonary_fluid_dynamics_HTAUML = 0.4;
  pulmonary_fluid_dynamics_KORGN = 1;
  pulmonary_fluid_dynamics_KORNER = 0;
  pulmonary_fluid_dynamics_KORREN = 0;
  pulmonary_fluid_dynamics_KORTC = 10000;
  pulmonary_fluid_dynamics_LPDE = 8;
  pulmonary_fluid_dynamics_LPK = 2.728e-14;
  pulmonary_fluid_dynamics_LPPR = 0.03;
  pulmonary_fluid_dynamics_MDFL1 = 10;
  pulmonary_fluid_dynamics_MDFLKM = 0.667;
  pulmonary_fluid_dynamics_MDFLW2 = 0.005;
  pulmonary_fluid_dynamics_MDFLWX = 0.01;
  pulmonary_fluid_dynamics_MDMP = 0;
  pulmonary_fluid_dynamics_O2A = 0.1;
  pulmonary_fluid_dynamics_O2CHMO = 0.01;
  pulmonary_fluid_dynamics_OMM = 57.1;
  pulmonary_fluid_dynamics_PA4 = 1;
  pulmonary_fluid_dynamics_PAEX = 2;
  pulmonary_fluid_dynamics_PCE = 1;
  pulmonary_fluid_dynamics_PCR = 15;
  pulmonary_fluid_dynamics_PR1LL = 0;
  pulmonary_fluid_dynamics_PGHF = -2;
  pulmonary_fluid_dynamics_PK2 = 0.79167;
  pulmonary_fluid_dynamics_PL2 = 1.8;
  pulmonary_fluid_dynamics_PLDF = 4.2;
  pulmonary_fluid_dynamics_PM5 = 30;
  pulmonary_fluid_dynamics_PO2ADV = 0.001;
  pulmonary_fluid_dynamics_POK = 0.1;
  pulmonary_fluid_dynamics_POM = 0.04;
  pulmonary_fluid_dynamics_POM2 = 2;
  pulmonary_fluid_dynamics_PON = 0.1;
  pulmonary_fluid_dynamics_POR = 35;
  pulmonary_fluid_dynamics_POZ = 2;
  pulmonary_fluid_dynamics_PXTP = 8;
  pulmonary_fluid_dynamics_QAOLM = 0.2;
  pulmonary_fluid_dynamics_QRF = 0.15;
  pulmonary_fluid_dynamics_RABSC = 0.5;
  pulmonary_fluid_dynamics_RAM = 96.3;
  pulmonary_fluid_dynamics_RAPRSP = 0;
  pulmonary_fluid_dynamics_RAR = 30.52;
  pulmonary_fluid_dynamics_RCDFDP = 2000;
  pulmonary_fluid_dynamics_RCDFPC = 0;
  pulmonary_fluid_dynamics_REK = 1;
  pulmonary_fluid_dynamics_RFABKM = 0.03;
  pulmonary_fluid_dynamics_RFABDM = 0.3;
  pulmonary_fluid_dynamics_RFABDP = 1;
  pulmonary_fluid_dynamics_RFCDFT = 0;
  pulmonary_fluid_dynamics_RKC = 5.8e-6;
  pulmonary_fluid_dynamics_RNAGTC = 15;
  pulmonary_fluid_dynamics_RNAUAD = 0;
  pulmonary_fluid_dynamics_RPS = 0;
  pulmonary_fluid_dynamics_RTPPR = 0.9;
  pulmonary_fluid_dynamics_RTPPRS = 15.2;
  pulmonary_fluid_dynamics_RTSPRS = 6;
  pulmonary_fluid_dynamics_RVRS = 19.167;
  pulmonary_fluid_dynamics_RVSM = 1;
  pulmonary_fluid_dynamics_SR = 1;
  pulmonary_fluid_dynamics_SR2 = 1;
  pulmonary_fluid_dynamics_SRK = 5;
  pulmonary_fluid_dynamics_SRK2 = 10000;
  pulmonary_fluid_dynamics_STA = 0;
  pulmonary_fluid_dynamics_TENSGN = 0;
  pulmonary_fluid_dynamics_TENSTC = 0.05;
  pulmonary_fluid_dynamics_TIMETR = 0;
  pulmonary_fluid_dynamics_TRNSFS = 0;
  pulmonary_fluid_dynamics_TRPL = 0;
  pulmonary_fluid_dynamics_TSSLML = 0.15;
  pulmonary_fluid_dynamics_TSSLTC = 0.005;
  pulmonary_fluid_dynamics_TVDDL = 30;
  pulmonary_fluid_dynamics_U = 4;
  pulmonary_fluid_dynamics_VID1 = 0.01;
  pulmonary_fluid_dynamics_VIDML = 0.01;
  pulmonary_fluid_dynamics_VNTSTM = 1;
  pulmonary_fluid_dynamics_VP1 = 0.01;
  pulmonary_fluid_dynamics_VPTISS = 0.0175;
  pulmonary_fluid_dynamics_VTSF = 6;
  pulmonary_fluid_dynamics_VV9 = 2.51;
  pulmonary_fluid_dynamics_X = 4;
  pulmonary_fluid_dynamics_Z = 1;
  pulmonary_fluid_dynamics_Z4 = 0.5;
  pulmonary_fluid_dynamics_Z5 = 0.3;
  pulmonary_fluid_dynamics_Z6 = 20;
  pulmonary_fluid_dynamics_Z7 = 5;
  pulmonary_fluid_dynamics_Z10 = 45;
  pulmonary_fluid_dynamics_Z11 = 0.01;
  pulmonary_fluid_dynamics_Z12 = 5;
  pulmonary_fluid_dynamics_Z13 = 0.625;
  pulmonary_fluid_dynamics_Z14 = 5;
  pulmonary_fluid_dynamics_Z16 = 5;
  pulmonary_fluid_dynamics_Z18 = 5;
  pulmonary_fluid_dynamics_Z19 = 5;
  pulmonary_fluid_dynamics_KID = 0.08;
  pulmonary_fluid_dynamics_URFORM = 0.24;
  pulmonary_fluid_dynamics_AUV = 0.55;
  pulmonary_fluid_dynamics_AUY = 0;
  pulmonary_fluid_dynamics_O2M = 164;
  pulmonary_fluid_dynamics_NID = 0.1;
  pulmonary_fluid_dynamics_ATRFBM = 0;
  pulmonary_fluid_dynamics_GBL = 0;
  pulmonary_fluid_dynamics_RNAUGN = 0.6;
  pulmonary_fluid_dynamics_RNAULL = 0.3;
  pulmonary_fluid_dynamics_RNAUUL = 10;
  pulmonary_fluid_dynamics_HSR = 1;
  pulmonary_fluid_dynamics_HSL = 1;
  pulmonary_fluid_dynamics_HMK = 90;
  pulmonary_fluid_dynamics_PO2AMB = 150;
  pulmonary_fluid_dynamics_HKM = 0.53333;
  pulmonary_fluid_dynamics_DR = 0;
  pulmonary_fluid_dynamics_ANPKNS = 0;
  pulmonary_fluid_dynamics_RMULT1 = 1;
  pulmonary_fluid_dynamics_GLPCA = 1;
  pulmonary_fluid_dynamics_RFN = 1.22057;
  pulmonary_fluid_dynamics_RFABX = 0.8;
  pulmonary_fluid_dynamics_ANPINF = 0;
  pulmonary_fluid_dynamics_FIS = 0;
  pulmonary_fluid_dynamics_CPPD = 31.9719;
  pulmonary_fluid_dynamics_TRRBC = 0;
  pulmonary_fluid_dynamics_HYL = 60;
  pulmonary_fluid_dynamics_ATRVM = 0;
  pulmonary_fluid_dynamics_ADHC_init = 1;
  pulmonary_fluid_dynamics_AHY_init = 0.301963;
  pulmonary_fluid_dynamics_AMC_init = 1;
  pulmonary_fluid_dynamics_AMM1T_init = 1.00269;
  pulmonary_fluid_dynamics_AMM2_init = 1.09071;
  pulmonary_fluid_dynamics_ANC_init = 0.859476;
  pulmonary_fluid_dynamics_ANPC_init = 1;
  pulmonary_fluid_dynamics_ANX1_init = 0;
  pulmonary_fluid_dynamics_AR1T_init = 1.02127;
  pulmonary_fluid_dynamics_AR2T_init = 1.01179;
  pulmonary_fluid_dynamics_AR3T_init = 1.1448;
  pulmonary_fluid_dynamics_AU1_init = 1.00007;
  pulmonary_fluid_dynamics_AU4_init = -0.060024;
  pulmonary_fluid_dynamics_AU6_init = 1.00132;
  pulmonary_fluid_dynamics_DTKA_init = 0.0367573;
  pulmonary_fluid_dynamics_HMD1_init = 1;
  pulmonary_fluid_dynamics_HPL_init = 1.00163;
  pulmonary_fluid_dynamics_HPR_init = 1.00237;
  pulmonary_fluid_dynamics_KTOT_init = 3622.54;
  pulmonary_fluid_dynamics_NAE_init = 2109.91;
  pulmonary_fluid_dynamics_O2VAD1_init = 2.368e-7;
  pulmonary_fluid_dynamics_OSV_init = 0.694163;
  pulmonary_fluid_dynamics_OVA_init = 204.497;
  pulmonary_fluid_dynamics_OVS_init = 0.699673;
  pulmonary_fluid_dynamics_PAR1_init = 103.525;
  pulmonary_fluid_dynamics_PC_init = 16.9144;
  pulmonary_fluid_dynamics_PLUR_init = 159.549;
  pulmonary_fluid_dynamics_PPR1_init = 0.419998;
  pulmonary_fluid_dynamics_PRP_init = 216.243;
  pulmonary_fluid_dynamics_QO2T_init = 72.2362;
  pulmonary_fluid_dynamics_QOM1_init = 48.0839;
  pulmonary_fluid_dynamics_RNAUG3_init = 0;
  pulmonary_fluid_dynamics_TSP_init = 279.945;
  pulmonary_fluid_dynamics_TVD_init = 0.000980838;
  pulmonary_fluid_dynamics_VAS1_init = 0.862514;
  pulmonary_fluid_dynamics_VIC_init = 25.0404;
  pulmonary_fluid_dynamics_VLA1_init = 0.379883;
  pulmonary_fluid_dynamics_VPA1_init = 0.38131;
  pulmonary_fluid_dynamics_VPF1_init = 0.0123238;
  pulmonary_fluid_dynamics_VP_init = 3.00449;
  pulmonary_fluid_dynamics_VRA1_init = 0.100043;
  pulmonary_fluid_dynamics_VRC_init = 2.00439;
  pulmonary_fluid_dynamics_VTS2_init = 0;
  pulmonary_fluid_dynamics_VTW_init = 39.8952;
  pulmonary_fluid_dynamics_VV6_init = 0.0101913;
  pulmonary_fluid_dynamics_VV7_init = 0.00366525;
  pulmonary_fluid_dynamics_VVS1_init = 3.28246;
  pulmonary_fluid_dynamics_pulmonary_interstitial_free_fluid_volume_VPF1 = pulmonary_fluid_dynamics_VPF1_init;
  pulmonary_fluid_dynamics_concentration_of_protein_in_pulmonary_interstitium_PPR1 = pulmonary_fluid_dynamics_PPR1_init;
  time_ = ;

  // Assignment rules:
  DFP := pulmonary_fluid_dynamics_pulmonary_interstitial_free_fluid_volume_DFZ;
  VPF := ;
  PPD := pulmonary_fluid_dynamics_concentration_of_protein_in_pulmonary_interstitium_PPZ;
  pulmonary_fluid_dynamics_PCP := (PPA - PLA)*RPV/(RPV + RPA) + PLA;
  pulmonary_fluid_dynamics_POS := pulmonary_fluid_dynamics_CPN*0.4;
  pulmonary_fluid_dynamics_PPI := 2 - 0.15/VPF;
  pulmonary_fluid_dynamics_PFI := (pulmonary_fluid_dynamics_PCP - pulmonary_fluid_dynamics_PPI + pulmonary_fluid_dynamics_POS - PPC)*pulmonary_fluid_dynamics_CPF;
  pulmonary_fluid_dynamics_PLF := (pulmonary_fluid_dynamics_PPI + 11)*0.0003;
  pulmonary_fluid_dynamics_pulmonary_interstitial_free_fluid_volume_DFZ := pulmonary_fluid_dynamics_PFI - pulmonary_fluid_dynamics_PLF;
  pulmonary_fluid_dynamics_PPO := pulmonary_fluid_dynamics_PLF*pulmonary_fluid_dynamics_CPN;
  pulmonary_fluid_dynamics_PPN := (CPP - pulmonary_fluid_dynamics_CPN)*0.000225;
  pulmonary_fluid_dynamics_CPN := pulmonary_fluid_dynamics_concentration_of_protein_in_pulmonary_interstitium_PPR/VPF;
  pulmonary_fluid_dynamics_concentration_of_protein_in_pulmonary_interstitium_PPZ := pulmonary_fluid_dynamics_PPN - pulmonary_fluid_dynamics_PPO;
  pulmonary_fluid_dynamics_concentration_of_protein_in_pulmonary_interstitium_PPR := ;

  // Rate rules:
  pulmonary_fluid_dynamics_pulmonary_interstitial_free_fluid_volume_VPF1' = DFP;
  pulmonary_fluid_dynamics_concentration_of_protein_in_pulmonary_interstitium_PPR1' = PPD;
end
