// SBML level 2 version 4

model pulmonary_O2_uptake_parent_model____main()
  // Originally created by libAntimony v1.4 (using libSBML 4.1.0-b2)

  // Compartments:
  compartment default_compartment = 1;

  // Parameters:
  VPF = 0.0123238;
  DOB = 163.508;
  RMO = 56.8057;
  QRO = 4.97838;
  HM = 40.0381;
  A1K = 0.5;
  A2K = 60;
  A3K = 40000;
  A4K = 0.1;
  A4K2 = 40000;
  AARK = 1;
  AARLL = 4;
  ADHINF = 0;
  ADHKLL = 0.2;
  ADHKUL = 5;
  ADHPAM = 0.3;
  ADHPUL = 85;
  ADHTC = 15;
  ADHVLL = 0.93617;
  ADHVUL = 2.5;
  AH10 = 0.333;
  AH11 = 1000;
  AH9 = 1;
  AHMNAR = 0.3;
  AHTHM = 2;
  ALCLK = 0.3;
  ALDINF = 0;
  ALDKNS = 0;
  ALDMM = 2.5;
  AM1LL = 0;
  AM1UL = 5;
  AMCSNS = 0.65;
  AMKM = 0.5;
  AMKMUL = 12;
  AMM1LM = 0.005;
  AMM4 = 0.005;
  AMNALL = 0.04;
  AMNAM = 0.8;
  AMNAUL = 15;
  AMT = 60;
  ANCSNS = 0.4;
  ANGINF = 0;
  ANGKNS = 0;
  ANMALD = 2.5;
  ANMAM = 1.4;
  ANMARL = 0.86;
  ANMEM = 1.6;
  ANMKEL = 0.3;
  ANMKEM = 2;
  ANMLL = 0.7;
  ANMNAM = 1;
  ANMSLT = 2;
  ANMTM = 1.5;
  ANMUL = 1.8;
  ANPTC = 4;
  ANPXAF = 1.5;
  ANPXUL = 10;
  ANT = 12;
  ANULL = 0.8;
  ANUM = 6;
  ANUVM = 0;
  ANV = 5000;
  ANXM = 0;
  ANY = -0.2;
  AR1LM = 0.005;
  AR2LM = 0.005;
  ARF = 0.5;
  AUC1 = 0.3;
  AUDMP = 0.3;
  AUK = 0.004;
  AUL = 1.5;
  AULPM = 0;
  AUM1 = 3;
  AUM2 = 1;
  AUMAX = 5;
  AUMIN = 0.4;
  AUMK1 = 0.3;
  AUN1 = 0.5;
  AURG = 1;
  AUS = 1;
  AUSLP = 1.5;
  AUTO = 0;
  AUTOGN = 7;
  AUTOSN = 0.9;
  AUX = 1;
  BAROTC = 0.16;
  CFC = 0.01167;
  CKEEX = 4;
  CMPTSS = 2;
  CN2 = 0.0212;
  CN7 = 0.2;
  CNR = 139;
  CPF = 0.0003;
  CPK = 0.000253;
  CPR = 40;
  CV = 0.1;
  CRRFLX = 0;
  DIURET = 1;
  DHDTR = 0.05;
  DTNAR = 0.675;
  DTNARL = 1e-6;
  EARK = 1;
  EARLL = 24;
  EFAFR = 0;
  EXC = 1;
  EXCML = 0.01;
  EXCXP = 1;
  EXCXP2 = 0.17;
  EXE = 0;
  GCOPF = 0.8092;
  GFLC = 0.0208333;
  GFNDMP = 3;
  GFNLL = 0.001;
  GPPD = 1;
  HM6 = 1850;
  HM8 = 4.714e-8;
  HTAUML = 0.4;
  KORGN = 1;
  KORNER = 0;
  KORREN = 0;
  KORTC = 10000;
  LPDE = 8;
  LPK = 2.728e-14;
  LPPR = 0.03;
  MDFL1 = 10;
  MDFLKM = 0.667;
  MDFLW2 = 0.005;
  MDFLWX = 0.01;
  MDMP = 0;
  O2A = 0.1;
  O2CHMO = 0.01;
  OMM = 57.1;
  PA4 = 1;
  PAEX = 2;
  PCE = 1;
  PCR = 15;
  PR1LL = 0;
  PGHF = -2;
  PK2 = 0.79167;
  PL2 = 1.8;
  PLDF = 4.2;
  PM5 = 30;
  PO2ADV = 0.001;
  POK = 0.1;
  POM = 0.04;
  POM2 = 2;
  PON = 0.1;
  POR = 35;
  POZ = 2;
  PXTP = 8;
  QAOLM = 0.2;
  QRF = 0.15;
  RABSC = 0.5;
  RAM = 96.3;
  RAPRSP = 0;
  RAR = 30.52;
  RCDFDP = 2000;
  RCDFPC = 0;
  REK = 1;
  RFABKM = 0.03;
  RFABDM = 0.3;
  RFABDP = 1;
  RFCDFT = 0;
  RKC = 5.8e-6;
  RNAGTC = 15;
  RNAUAD = 0;
  RPS = 0;
  RTPPR = 0.9;
  RTPPRS = 15.2;
  RTSPRS = 6;
  RVRS = 19.167;
  RVSM = 1;
  SR = 1;
  SR2 = 1;
  SRK = 5;
  SRK2 = 10000;
  STA = 0;
  TENSGN = 0;
  TENSTC = 0.05;
  TIMETR = 0;
  TRNSFS = 0;
  TRPL = 0;
  TSSLML = 0.15;
  TSSLTC = 0.005;
  TVDDL = 30;
  U = 4;
  VID1 = 0.01;
  VIDML = 0.01;
  VNTSTM = 1;
  VP1 = 0.01;
  VPTISS = 0.0175;
  VTSF = 6;
  VV9 = 2.51;
  X = 4;
  Z = 1;
  Z4 = 0.5;
  Z5 = 0.3;
  Z6 = 20;
  Z7 = 5;
  Z10 = 45;
  Z11 = 0.01;
  Z12 = 5;
  Z13 = 0.625;
  Z14 = 5;
  Z16 = 5;
  Z18 = 5;
  Z19 = 5;
  KID = 0.08;
  URFORM = 0.24;
  AUV = 0.55;
  AUY = 0;
  O2M = 164;
  NID = 0.1;
  ATRFBM = 0;
  GBL = 0;
  RNAUGN = 0.6;
  RNAULL = 0.3;
  RNAUUL = 10;
  HSR = 1;
  HSL = 1;
  HMK = 90;
  PO2AMB = 150;
  HKM = 0.53333;
  DR = 0;
  ANPKNS = 0;
  RMULT1 = 1;
  GLPCA = 1;
  RFN = 1.22057;
  RFABX = 0.8;
  ANPINF = 0;
  FIS = 0;
  CPPD = 31.9719;
  TRRBC = 0;
  HYL = 60;
  ATRVM = 0;
  ADHC_init = 1;
  AHY_init = 0.301963;
  AMC_init = 1;
  AMM1T_init = 1.00269;
  AMM2_init = 1.09071;
  ANC_init = 0.859476;
  ANPC_init = 1;
  ANX1_init = 0;
  AR1T_init = 1.02127;
  AR2T_init = 1.01179;
  AR3T_init = 1.1448;
  AU1_init = 1.00007;
  AU4_init = -0.060024;
  AU6_init = 1.00132;
  DTKA_init = 0.0367573;
  HMD1_init = 1;
  HPL_init = 1.00163;
  HPR_init = 1.00237;
  KTOT_init = 3622.54;
  NAE_init = 2109.91;
  O2VAD1_init = 2.368e-7;
  OSV_init = 0.694163;
  OVA_init = 204.497;
  OVS_init = 0.699673;
  PAR1_init = 103.525;
  PC_init = 16.9144;
  PLUR_init = 159.549;
  PPR1_init = 0.419998;
  PRP_init = 216.243;
  QO2T_init = 72.2362;
  QOM1_init = 48.0839;
  RNAUG3_init = 0;
  TSP_init = 279.945;
  TVD_init = 0.000980838;
  VAS1_init = 0.862514;
  VIC_init = 25.0404;
  VLA1_init = 0.379883;
  VPA1_init = 0.38131;
  VPF1_init = 0.0123238;
  VP_init = 3.00449;
  VRA1_init = 0.100043;
  VRC_init = 2.00439;
  VTS2_init = 0;
  VTW_init = 39.8952;
  VV6_init = 0.0101913;
  VV7_init = 0.00366525;
  VVS1_init = 3.28246;
  OVA = pulmonary_O2_uptake_OVA_init;
  pulmonary_O2_uptake_A1K = 0.5;
  pulmonary_O2_uptake_A2K = 60;
  pulmonary_O2_uptake_A3K = 40000;
  pulmonary_O2_uptake_A4K = 0.1;
  pulmonary_O2_uptake_A4K2 = 40000;
  pulmonary_O2_uptake_AARK = 1;
  pulmonary_O2_uptake_AARLL = 4;
  pulmonary_O2_uptake_ADHINF = 0;
  pulmonary_O2_uptake_ADHKLL = 0.2;
  pulmonary_O2_uptake_ADHKUL = 5;
  pulmonary_O2_uptake_ADHPAM = 0.3;
  pulmonary_O2_uptake_ADHPUL = 85;
  pulmonary_O2_uptake_ADHTC = 15;
  pulmonary_O2_uptake_ADHVLL = 0.93617;
  pulmonary_O2_uptake_ADHVUL = 2.5;
  pulmonary_O2_uptake_AH10 = 0.333;
  pulmonary_O2_uptake_AH11 = 1000;
  pulmonary_O2_uptake_AH9 = 1;
  pulmonary_O2_uptake_AHMNAR = 0.3;
  pulmonary_O2_uptake_AHTHM = 2;
  pulmonary_O2_uptake_ALCLK = 0.3;
  pulmonary_O2_uptake_ALDINF = 0;
  pulmonary_O2_uptake_ALDKNS = 0;
  pulmonary_O2_uptake_ALDMM = 2.5;
  pulmonary_O2_uptake_AM1LL = 0;
  pulmonary_O2_uptake_AM1UL = 5;
  pulmonary_O2_uptake_AMCSNS = 0.65;
  pulmonary_O2_uptake_AMKM = 0.5;
  pulmonary_O2_uptake_AMKMUL = 12;
  pulmonary_O2_uptake_AMM1LM = 0.005;
  pulmonary_O2_uptake_AMM4 = 0.005;
  pulmonary_O2_uptake_AMNALL = 0.04;
  pulmonary_O2_uptake_AMNAM = 0.8;
  pulmonary_O2_uptake_AMNAUL = 15;
  pulmonary_O2_uptake_AMT = 60;
  pulmonary_O2_uptake_ANCSNS = 0.4;
  pulmonary_O2_uptake_ANGINF = 0;
  pulmonary_O2_uptake_ANGKNS = 0;
  pulmonary_O2_uptake_ANMALD = 2.5;
  pulmonary_O2_uptake_ANMAM = 1.4;
  pulmonary_O2_uptake_ANMARL = 0.86;
  pulmonary_O2_uptake_ANMEM = 1.6;
  pulmonary_O2_uptake_ANMKEL = 0.3;
  pulmonary_O2_uptake_ANMKEM = 2;
  pulmonary_O2_uptake_ANMLL = 0.7;
  pulmonary_O2_uptake_ANMNAM = 1;
  pulmonary_O2_uptake_ANMSLT = 2;
  pulmonary_O2_uptake_ANMTM = 1.5;
  pulmonary_O2_uptake_ANMUL = 1.8;
  pulmonary_O2_uptake_ANPTC = 4;
  pulmonary_O2_uptake_ANPXAF = 1.5;
  pulmonary_O2_uptake_ANPXUL = 10;
  pulmonary_O2_uptake_ANT = 12;
  pulmonary_O2_uptake_ANULL = 0.8;
  pulmonary_O2_uptake_ANUM = 6;
  pulmonary_O2_uptake_ANUVM = 0;
  pulmonary_O2_uptake_ANV = 5000;
  pulmonary_O2_uptake_ANXM = 0;
  pulmonary_O2_uptake_ANY = -0.2;
  pulmonary_O2_uptake_AR1LM = 0.005;
  pulmonary_O2_uptake_AR2LM = 0.005;
  pulmonary_O2_uptake_ARF = 0.5;
  pulmonary_O2_uptake_AUC1 = 0.3;
  pulmonary_O2_uptake_AUDMP = 0.3;
  pulmonary_O2_uptake_AUK = 0.004;
  pulmonary_O2_uptake_AUL = 1.5;
  pulmonary_O2_uptake_AULPM = 0;
  pulmonary_O2_uptake_AUM1 = 3;
  pulmonary_O2_uptake_AUM2 = 1;
  pulmonary_O2_uptake_AUMAX = 5;
  pulmonary_O2_uptake_AUMIN = 0.4;
  pulmonary_O2_uptake_AUMK1 = 0.3;
  pulmonary_O2_uptake_AUN1 = 0.5;
  pulmonary_O2_uptake_AURG = 1;
  pulmonary_O2_uptake_AUS = 1;
  pulmonary_O2_uptake_AUSLP = 1.5;
  pulmonary_O2_uptake_AUTO = 0;
  pulmonary_O2_uptake_AUTOGN = 7;
  pulmonary_O2_uptake_AUTOSN = 0.9;
  pulmonary_O2_uptake_AUX = 1;
  pulmonary_O2_uptake_BAROTC = 0.16;
  pulmonary_O2_uptake_CFC = 0.01167;
  pulmonary_O2_uptake_CKEEX = 4;
  pulmonary_O2_uptake_CMPTSS = 2;
  pulmonary_O2_uptake_CN2 = 0.0212;
  pulmonary_O2_uptake_CN7 = 0.2;
  pulmonary_O2_uptake_CNR = 139;
  pulmonary_O2_uptake_CPF = 0.0003;
  pulmonary_O2_uptake_CPK = 0.000253;
  pulmonary_O2_uptake_CPR = 40;
  pulmonary_O2_uptake_CV = 0.1;
  pulmonary_O2_uptake_CRRFLX = 0;
  pulmonary_O2_uptake_DIURET = 1;
  pulmonary_O2_uptake_DHDTR = 0.05;
  pulmonary_O2_uptake_DTNAR = 0.675;
  pulmonary_O2_uptake_DTNARL = 1e-6;
  pulmonary_O2_uptake_EARK = 1;
  pulmonary_O2_uptake_EARLL = 24;
  pulmonary_O2_uptake_EFAFR = 0;
  pulmonary_O2_uptake_EXC = 1;
  pulmonary_O2_uptake_EXCML = 0.01;
  pulmonary_O2_uptake_EXCXP = 1;
  pulmonary_O2_uptake_EXCXP2 = 0.17;
  pulmonary_O2_uptake_EXE = 0;
  pulmonary_O2_uptake_GCOPF = 0.8092;
  pulmonary_O2_uptake_GFLC = 0.0208333;
  pulmonary_O2_uptake_GFNDMP = 3;
  pulmonary_O2_uptake_GFNLL = 0.001;
  pulmonary_O2_uptake_GPPD = 1;
  pulmonary_O2_uptake_HM6 = 1850;
  pulmonary_O2_uptake_HM8 = 4.714e-8;
  pulmonary_O2_uptake_HTAUML = 0.4;
  pulmonary_O2_uptake_KORGN = 1;
  pulmonary_O2_uptake_KORNER = 0;
  pulmonary_O2_uptake_KORREN = 0;
  pulmonary_O2_uptake_KORTC = 10000;
  pulmonary_O2_uptake_LPDE = 8;
  pulmonary_O2_uptake_LPK = 2.728e-14;
  pulmonary_O2_uptake_LPPR = 0.03;
  pulmonary_O2_uptake_MDFL1 = 10;
  pulmonary_O2_uptake_MDFLKM = 0.667;
  pulmonary_O2_uptake_MDFLW2 = 0.005;
  pulmonary_O2_uptake_MDFLWX = 0.01;
  pulmonary_O2_uptake_MDMP = 0;
  pulmonary_O2_uptake_O2A = 0.1;
  pulmonary_O2_uptake_O2CHMO = 0.01;
  pulmonary_O2_uptake_OMM = 57.1;
  pulmonary_O2_uptake_PA4 = 1;
  pulmonary_O2_uptake_PAEX = 2;
  pulmonary_O2_uptake_PCE = 1;
  pulmonary_O2_uptake_PCR = 15;
  pulmonary_O2_uptake_PR1LL = 0;
  pulmonary_O2_uptake_PGHF = -2;
  pulmonary_O2_uptake_PK2 = 0.79167;
  pulmonary_O2_uptake_PL2 = 1.8;
  pulmonary_O2_uptake_PLDF = 4.2;
  pulmonary_O2_uptake_PM5 = 30;
  pulmonary_O2_uptake_PO2ADV = 0.001;
  pulmonary_O2_uptake_POK = 0.1;
  pulmonary_O2_uptake_POM = 0.04;
  pulmonary_O2_uptake_POM2 = 2;
  pulmonary_O2_uptake_PON = 0.1;
  pulmonary_O2_uptake_POR = 35;
  pulmonary_O2_uptake_POZ = 2;
  pulmonary_O2_uptake_PXTP = 8;
  pulmonary_O2_uptake_QAOLM = 0.2;
  pulmonary_O2_uptake_QRF = 0.15;
  pulmonary_O2_uptake_RABSC = 0.5;
  pulmonary_O2_uptake_RAM = 96.3;
  pulmonary_O2_uptake_RAPRSP = 0;
  pulmonary_O2_uptake_RAR = 30.52;
  pulmonary_O2_uptake_RCDFDP = 2000;
  pulmonary_O2_uptake_RCDFPC = 0;
  pulmonary_O2_uptake_REK = 1;
  pulmonary_O2_uptake_RFABKM = 0.03;
  pulmonary_O2_uptake_RFABDM = 0.3;
  pulmonary_O2_uptake_RFABDP = 1;
  pulmonary_O2_uptake_RFCDFT = 0;
  pulmonary_O2_uptake_RKC = 5.8e-6;
  pulmonary_O2_uptake_RNAGTC = 15;
  pulmonary_O2_uptake_RNAUAD = 0;
  pulmonary_O2_uptake_RPS = 0;
  pulmonary_O2_uptake_RTPPR = 0.9;
  pulmonary_O2_uptake_RTPPRS = 15.2;
  pulmonary_O2_uptake_RTSPRS = 6;
  pulmonary_O2_uptake_RVRS = 19.167;
  pulmonary_O2_uptake_RVSM = 1;
  pulmonary_O2_uptake_SR = 1;
  pulmonary_O2_uptake_SR2 = 1;
  pulmonary_O2_uptake_SRK = 5;
  pulmonary_O2_uptake_SRK2 = 10000;
  pulmonary_O2_uptake_STA = 0;
  pulmonary_O2_uptake_TENSGN = 0;
  pulmonary_O2_uptake_TENSTC = 0.05;
  pulmonary_O2_uptake_TIMETR = 0;
  pulmonary_O2_uptake_TRNSFS = 0;
  pulmonary_O2_uptake_TRPL = 0;
  pulmonary_O2_uptake_TSSLML = 0.15;
  pulmonary_O2_uptake_TSSLTC = 0.005;
  pulmonary_O2_uptake_TVDDL = 30;
  pulmonary_O2_uptake_U = 4;
  pulmonary_O2_uptake_VID1 = 0.01;
  pulmonary_O2_uptake_VIDML = 0.01;
  pulmonary_O2_uptake_VNTSTM = 1;
  pulmonary_O2_uptake_VP1 = 0.01;
  pulmonary_O2_uptake_VPTISS = 0.0175;
  pulmonary_O2_uptake_VTSF = 6;
  pulmonary_O2_uptake_VV9 = 2.51;
  pulmonary_O2_uptake_X = 4;
  pulmonary_O2_uptake_Z = 1;
  pulmonary_O2_uptake_Z4 = 0.5;
  pulmonary_O2_uptake_Z5 = 0.3;
  pulmonary_O2_uptake_Z6 = 20;
  pulmonary_O2_uptake_Z7 = 5;
  pulmonary_O2_uptake_Z10 = 45;
  pulmonary_O2_uptake_Z11 = 0.01;
  pulmonary_O2_uptake_Z12 = 5;
  pulmonary_O2_uptake_Z13 = 0.625;
  pulmonary_O2_uptake_Z14 = 5;
  pulmonary_O2_uptake_Z16 = 5;
  pulmonary_O2_uptake_Z18 = 5;
  pulmonary_O2_uptake_Z19 = 5;
  pulmonary_O2_uptake_KID = 0.08;
  pulmonary_O2_uptake_URFORM = 0.24;
  pulmonary_O2_uptake_AUV = 0.55;
  pulmonary_O2_uptake_AUY = 0;
  pulmonary_O2_uptake_O2M = 164;
  pulmonary_O2_uptake_NID = 0.1;
  pulmonary_O2_uptake_ATRFBM = 0;
  pulmonary_O2_uptake_GBL = 0;
  pulmonary_O2_uptake_RNAUGN = 0.6;
  pulmonary_O2_uptake_RNAULL = 0.3;
  pulmonary_O2_uptake_RNAUUL = 10;
  pulmonary_O2_uptake_HSR = 1;
  pulmonary_O2_uptake_HSL = 1;
  pulmonary_O2_uptake_HMK = 90;
  pulmonary_O2_uptake_PO2AMB = 150;
  pulmonary_O2_uptake_HKM = 0.53333;
  pulmonary_O2_uptake_DR = 0;
  pulmonary_O2_uptake_ANPKNS = 0;
  pulmonary_O2_uptake_RMULT1 = 1;
  pulmonary_O2_uptake_GLPCA = 1;
  pulmonary_O2_uptake_RFN = 1.22057;
  pulmonary_O2_uptake_RFABX = 0.8;
  pulmonary_O2_uptake_ANPINF = 0;
  pulmonary_O2_uptake_FIS = 0;
  pulmonary_O2_uptake_CPPD = 31.9719;
  pulmonary_O2_uptake_TRRBC = 0;
  pulmonary_O2_uptake_HYL = 60;
  pulmonary_O2_uptake_ATRVM = 0;
  pulmonary_O2_uptake_ADHC_init = 1;
  pulmonary_O2_uptake_AHY_init = 0.301963;
  pulmonary_O2_uptake_AMC_init = 1;
  pulmonary_O2_uptake_AMM1T_init = 1.00269;
  pulmonary_O2_uptake_AMM2_init = 1.09071;
  pulmonary_O2_uptake_ANC_init = 0.859476;
  pulmonary_O2_uptake_ANPC_init = 1;
  pulmonary_O2_uptake_ANX1_init = 0;
  pulmonary_O2_uptake_AR1T_init = 1.02127;
  pulmonary_O2_uptake_AR2T_init = 1.01179;
  pulmonary_O2_uptake_AR3T_init = 1.1448;
  pulmonary_O2_uptake_AU1_init = 1.00007;
  pulmonary_O2_uptake_AU4_init = -0.060024;
  pulmonary_O2_uptake_AU6_init = 1.00132;
  pulmonary_O2_uptake_DTKA_init = 0.0367573;
  pulmonary_O2_uptake_HMD1_init = 1;
  pulmonary_O2_uptake_HPL_init = 1.00163;
  pulmonary_O2_uptake_HPR_init = 1.00237;
  pulmonary_O2_uptake_KTOT_init = 3622.54;
  pulmonary_O2_uptake_NAE_init = 2109.91;
  pulmonary_O2_uptake_O2VAD1_init = 2.368e-7;
  pulmonary_O2_uptake_OSV_init = 0.694163;
  pulmonary_O2_uptake_OVA_init = 204.497;
  pulmonary_O2_uptake_OVS_init = 0.699673;
  pulmonary_O2_uptake_PAR1_init = 103.525;
  pulmonary_O2_uptake_PC_init = 16.9144;
  pulmonary_O2_uptake_PLUR_init = 159.549;
  pulmonary_O2_uptake_PPR1_init = 0.419998;
  pulmonary_O2_uptake_PRP_init = 216.243;
  pulmonary_O2_uptake_QO2T_init = 72.2362;
  pulmonary_O2_uptake_QOM1_init = 48.0839;
  pulmonary_O2_uptake_RNAUG3_init = 0;
  pulmonary_O2_uptake_TSP_init = 279.945;
  pulmonary_O2_uptake_TVD_init = 0.000980838;
  pulmonary_O2_uptake_VAS1_init = 0.862514;
  pulmonary_O2_uptake_VIC_init = 25.0404;
  pulmonary_O2_uptake_VLA1_init = 0.379883;
  pulmonary_O2_uptake_VPA1_init = 0.38131;
  pulmonary_O2_uptake_VPF1_init = 0.0123238;
  pulmonary_O2_uptake_VP_init = 3.00449;
  pulmonary_O2_uptake_VRA1_init = 0.100043;
  pulmonary_O2_uptake_VRC_init = 2.00439;
  pulmonary_O2_uptake_VTS2_init = 0;
  pulmonary_O2_uptake_VTW_init = 39.8952;
  pulmonary_O2_uptake_VV6_init = 0.0101913;
  pulmonary_O2_uptake_VV7_init = 0.00366525;
  pulmonary_O2_uptake_VVS1_init = 3.28246;
  pulmonary_O2_uptake_progressive_chemoreceptor_adaptation_of_alveolar_ventilation_O2VAD1 = pulmonary_O2_uptake_O2VAD1_init;
  time_ = ;

  // Assignment rules:
  PO2ART := ;
  OSA := OVA/HM/5.25;
  pulmonary_O2_uptake_O2UTIL := DOB + RMO;
  pulmonary_O2_uptake_O2VAD2 := pulmonary_O2_uptake_progressive_chemoreceptor_adaptation_of_alveolar_ventilation_O2VAD1 + 1;
  pulmonary_O2_uptake_O2VTS2 := 1/pulmonary_O2_uptake_acute_chemoreceptor_adaptation_of_alveolar_ventilation_O2VTST;
  pulmonary_O2_uptake_ALVENT := pulmonary_O2_uptake_O2UTIL*pulmonary_O2_uptake_VNTSTM*0.026667*pulmonary_O2_uptake_O2VTS2*pulmonary_O2_uptake_O2VAD2;
  pulmonary_O2_uptake_PO2ALV := pulmonary_O2_uptake_PO2AMB - pulmonary_O2_uptake_O2UTIL/pulmonary_O2_uptake_ALVENT/0.761;
  pulmonary_O2_uptake_O2DFS := (pulmonary_O2_uptake_PO2ALV - PO2ART)*pulmonary_O2_uptake_respiratory_O2_diffusion_into_capillaries_RSPDFC;
  pulmonary_O2_uptake_respiratory_O2_diffusion_into_capillaries_RSPDFC := pulmonary_O2_uptake_PL2/(pulmonary_O2_uptake_VPTISS + VPF);
  pulmonary_O2_uptake_O2_volume_of_arterial_blood_DOVA := (pulmonary_O2_uptake_O2DFS - pulmonary_O2_uptake_O2UTIL)/(QRO*1);
  pulmonary_O2_uptake_acute_chemoreceptor_adaptation_of_alveolar_ventilation_O2VTST := ;
  pulmonary_O2_uptake_acute_chemoreceptor_adaptation_of_alveolar_ventilation_O2VTST1 := (PO2ART - 67)/30;
  pulmonary_O2_uptake_progressive_chemoreceptor_adaptation_of_alveolar_ventilation_DO2VAD := ((pulmonary_O2_uptake_O2VTS2 - 1)*3 - pulmonary_O2_uptake_progressive_chemoreceptor_adaptation_of_alveolar_ventilation_O2VAD1)*0.0005;

  // Rate rules:
  OVA' = pulmonary_O2_uptake_O2_volume_of_arterial_blood_DOVA;
  pulmonary_O2_uptake_progressive_chemoreceptor_adaptation_of_alveolar_ventilation_O2VAD1' = pulmonary_O2_uptake_progressive_chemoreceptor_adaptation_of_alveolar_ventilation_DO2VAD;
end
