// SBML level 2 version 4

model red_cells_and_viscosity_CellML1_0_model____main()
  // Originally created by libAntimony v1.3 (using libSBML 4.1.0-b2)

  // Compartments:
  compartment default_compartment = 1;

  // Parameters:
  VP = 3.00449;
  red_cells_and_viscosity_HMK = 90;
  red_cells_and_viscosity_HKM = 0.53333;
  red_cells_and_viscosity_PO2AMB = 150;
  red_cells_and_viscosity_HM6 = 1850;
  red_cells_and_viscosity_HM8 = 4.714e-8;
  red_cells_and_viscosity_REK = 1;
  red_cells_and_viscosity_RKC = 5.8e-6;
  red_cells_and_viscosity_TRRBC = 0;
  red_cells_and_viscosity_VRC = 2.00439;
  time_ = ;

  // Assignment rules:
  red_cells_and_viscosity_HM := 100*red_cells_and_viscosity_HM1;
  red_cells_and_viscosity_HM1 := red_cells_and_viscosity_VRC/red_cells_and_viscosity_hematocrit_fraction_VB;
  red_cells_and_viscosity_hematocrit_fraction_VB := VP + red_cells_and_viscosity_VRC;
  red_cells_and_viscosity_VIE := red_cells_and_viscosity_HM/((red_cells_and_viscosity_HMK - red_cells_and_viscosity_HM)*red_cells_and_viscosity_HKM);
  red_cells_and_viscosity_VIM := 0.3333*red_cells_and_viscosity_blood_viscosity_VIB;
  red_cells_and_viscosity_blood_viscosity_VIB := red_cells_and_viscosity_VIE + 1.5;
  red_cells_and_viscosity_HM7 := red_cells_and_viscosity_HM6 - red_cells_and_viscosity_oxygen_stimulation_HM5;
  red_cells_and_viscosity_oxygen_stimulation_PO2AM1 := ;
  red_cells_and_viscosity_oxygen_stimulation_HM3 := (red_cells_and_viscosity_oxygen_stimulation_PO2AM1 - 40)*red_cells_and_viscosity_HM;
  red_cells_and_viscosity_oxygen_stimulation_HM4 := red_cells_and_viscosity_PO2AMB - 40;
  red_cells_and_viscosity_oxygen_stimulation_HM5 := ;
  red_cells_and_viscosity_RC1 := ;
  red_cells_and_viscosity_RC2 := red_cells_and_viscosity_VRC*red_cells_and_viscosity_RKC*red_cells_and_viscosity_VIM;
  red_cells_and_viscosity_RBC_volume_RCD := red_cells_and_viscosity_RC1 - red_cells_and_viscosity_RC2 + red_cells_and_viscosity_TRRBC;

  // Rate rules:
  red_cells_and_viscosity_VRC' = red_cells_and_viscosity_RBC_volume_RCD;
end
