// SBML level 2 version 4

model stress_relaxation_CellML1_0_model____main()
  // Originally created by libAntimony v1.4 (using libSBML 4.1.0-b2)

  // Compartments:
  compartment default_compartment = 1;

  // Parameters:
  VVE = 0.743224;
  stress_relaxation_SR = 1;
  stress_relaxation_SR2 = 1;
  stress_relaxation_SRK = 5;
  stress_relaxation_SRK2 = 10000;
  stress_relaxation_VV7 = 0.00366525;
  stress_relaxation_VV6 = 0.0101913;
  time_ = ;

  // Rate rules:
  stress_relaxation_VV7' = ((VVE - 0.74)*stress_relaxation_SR - stress_relaxation_VV7)/stress_relaxation_SRK;
  stress_relaxation_VV6' = ((VVE - 0.74)*stress_relaxation_SR2 - stress_relaxation_VV6)/stress_relaxation_SRK2;
end
