// SBML level 2 version 4

model stress_relaxation_parent_model____main()
  // Originally created by libAntimony v1.3 (using libSBML 4.1.0-b2)

  // Compartments:
  compartment default_compartment = 1;

  // Parameters:
  VVE = 0.743224;
  A1K = 0.5;
  A2K = 60;
  A3K = 40000;
  A4K = 0.1;
  A4K2 = 40000;
  AARK = 1;
  AARLL = 4;
  ADHINF = 0;
  ADHKLL = 0.2;
  ADHKUL = 5;
  ADHPAM = 0.3;
  ADHPUL = 85;
  ADHTC = 15;
  ADHVLL = 0.93617;
  ADHVUL = 2.5;
  AH10 = 0.333;
  AH11 = 1000;
  AH9 = 1;
  AHMNAR = 0.3;
  AHTHM = 2;
  ALCLK = 0.3;
  ALDINF = 0;
  ALDKNS = 0;
  ALDMM = 2.5;
  AM1LL = 0;
  AM1UL = 5;
  AMCSNS = 0.65;
  AMKM = 0.5;
  AMKMUL = 12;
  AMM1LM = 0.005;
  AMM4 = 0.005;
  AMNALL = 0.04;
  AMNAM = 0.8;
  AMNAUL = 15;
  AMT = 60;
  ANCSNS = 0.4;
  ANGINF = 0;
  ANGKNS = 0;
  ANMALD = 2.5;
  ANMAM = 1.4;
  ANMARL = 0.86;
  ANMEM = 1.6;
  ANMKEL = 0.3;
  ANMKEM = 2;
  ANMLL = 0.7;
  ANMNAM = 1;
  ANMSLT = 2;
  ANMTM = 1.5;
  ANMUL = 1.8;
  ANPTC = 4;
  ANPXAF = 1.5;
  ANPXUL = 10;
  ANT = 12;
  ANULL = 0.8;
  ANUM = 6;
  ANUVM = 0;
  ANV = 5000;
  ANXM = 0;
  ANY = -0.2;
  AR1LM = 0.005;
  AR2LM = 0.005;
  ARF = 0.5;
  AUC1 = 0.3;
  AUDMP = 0.3;
  AUK = 0.004;
  AUL = 1.5;
  AULPM = 0;
  AUM1 = 3;
  AUM2 = 1;
  AUMAX = 5;
  AUMIN = 0.4;
  AUMK1 = 0.3;
  AUN1 = 0.5;
  AURG = 1;
  AUS = 1;
  AUSLP = 1.5;
  AUTO = 0;
  AUTOGN = 7;
  AUTOSN = 0.9;
  AUX = 1;
  BAROTC = 0.16;
  CFC = 0.01167;
  CKEEX = 4;
  CMPTSS = 2;
  CN2 = 0.0212;
  CN7 = 0.2;
  CNR = 139;
  CPF = 0.0003;
  CPK = 0.000253;
  CPR = 40;
  CV = 0.1;
  CRRFLX = 0;
  DIURET = 1;
  DHDTR = 0.05;
  DTNAR = 0.675;
  DTNARL = 1e-6;
  EARK = 1;
  EARLL = 24;
  EFAFR = 0;
  EXC = 1;
  EXCML = 0.01;
  EXCXP = 1;
  EXCXP2 = 0.17;
  EXE = 0;
  GCOPF = 0.8092;
  GFLC = 0.0208333;
  GFNDMP = 3;
  GFNLL = 0.001;
  GPPD = 1;
  HM6 = 1850;
  HM8 = 4.714e-8;
  HTAUML = 0.4;
  KORGN = 1;
  KORNER = 0;
  KORREN = 0;
  KORTC = 10000;
  LPDE = 8;
  LPK = 2.728e-14;
  LPPR = 0.03;
  MDFL1 = 10;
  MDFLKM = 0.667;
  MDFLW2 = 0.005;
  MDFLWX = 0.01;
  MDMP = 0;
  O2A = 0.1;
  O2CHMO = 0.01;
  OMM = 57.1;
  PA4 = 1;
  PAEX = 2;
  PCE = 1;
  PCR = 15;
  PR1LL = 0;
  PGHF = -2;
  PK2 = 0.79167;
  PL2 = 1.8;
  PLDF = 4.2;
  PM5 = 30;
  PO2ADV = 0.001;
  POK = 0.1;
  POM = 0.04;
  POM2 = 2;
  PON = 0.1;
  POR = 35;
  POZ = 2;
  PXTP = 8;
  QAOLM = 0.2;
  QRF = 0.15;
  RABSC = 0.5;
  RAM = 96.3;
  RAPRSP = 0;
  RAR = 30.52;
  RCDFDP = 2000;
  RCDFPC = 0;
  REK = 1;
  RFABKM = 0.03;
  RFABDM = 0.3;
  RFABDP = 1;
  RFCDFT = 0;
  RKC = 5.8e-6;
  RNAGTC = 15;
  RNAUAD = 0;
  RPS = 0;
  RTPPR = 0.9;
  RTPPRS = 15.2;
  RTSPRS = 6;
  RVRS = 19.167;
  RVSM = 1;
  SR = 1;
  SR2 = 1;
  SRK = 5;
  SRK2 = 10000;
  STA = 0;
  TENSGN = 0;
  TENSTC = 0.05;
  TIMETR = 0;
  TRNSFS = 0;
  TRPL = 0;
  TSSLML = 0.15;
  TSSLTC = 0.005;
  TVDDL = 30;
  U = 4;
  VID1 = 0.01;
  VIDML = 0.01;
  VNTSTM = 1;
  VP1 = 0.01;
  VPTISS = 0.0175;
  VTSF = 6;
  VV9 = 2.51;
  X = 4;
  Z = 1;
  Z4 = 0.5;
  Z5 = 0.3;
  Z6 = 20;
  Z7 = 5;
  Z10 = 45;
  Z11 = 0.01;
  Z12 = 5;
  Z13 = 0.625;
  Z14 = 5;
  Z16 = 5;
  Z18 = 5;
  Z19 = 5;
  KID = 0.08;
  URFORM = 0.24;
  AUV = 0.55;
  AUY = 0;
  O2M = 164;
  NID = 0.1;
  ATRFBM = 0;
  GBL = 0;
  RNAUGN = 0.6;
  RNAULL = 0.3;
  RNAUUL = 10;
  HSR = 1;
  HSL = 1;
  HMK = 90;
  PO2AMB = 150;
  HKM = 0.53333;
  DR = 0;
  ANPKNS = 0;
  RMULT1 = 1;
  GLPCA = 1;
  RFN = 1.22057;
  RFABX = 0.8;
  ANPINF = 0;
  FIS = 0;
  CPPD = 31.9719;
  TRRBC = 0;
  HYL = 60;
  ATRVM = 0;
  ADHC_init = 1;
  AHY_init = 0.301963;
  AMC_init = 1;
  AMM1T_init = 1.00269;
  AMM2_init = 1.09071;
  ANC_init = 0.859476;
  ANPC_init = 1;
  ANX1_init = 0;
  AR1T_init = 1.02127;
  AR2T_init = 1.01179;
  AR3T_init = 1.1448;
  AU1_init = 1.00007;
  AU4_init = -0.060024;
  AU6_init = 1.00132;
  DTKA_init = 0.0367573;
  HMD1_init = 1;
  HPL_init = 1.00163;
  HPR_init = 1.00237;
  KTOT_init = 3622.54;
  NAE_init = 2109.91;
  O2VAD1_init = 2.368e-7;
  OSV_init = 0.694163;
  OVA_init = 204.497;
  OVS_init = 0.699673;
  PAR1_init = 103.525;
  PC_init = 16.9144;
  PLUR_init = 159.549;
  PPR1_init = 0.419998;
  PRP_init = 216.243;
  QO2T_init = 72.2362;
  QOM1_init = 48.0839;
  RNAUG3_init = 0;
  TSP_init = 279.945;
  TVD_init = 0.000980838;
  VAS1_init = 0.862514;
  VIC_init = 25.0404;
  VLA1_init = 0.379883;
  VPA1_init = 0.38131;
  VPF1_init = 0.0123238;
  VP_init = 3.00449;
  VRA1_init = 0.100043;
  VRC_init = 2.00439;
  VTS2_init = 0;
  VTW_init = 39.8952;
  VV6_init = 0.0101913;
  VV7_init = 0.00366525;
  VVS1_init = 3.28246;
  VV6 = stress_relaxation_VV6_init;
  VV7 = stress_relaxation_VV7_init;
  stress_relaxation_A1K = 0.5;
  stress_relaxation_A2K = 60;
  stress_relaxation_A3K = 40000;
  stress_relaxation_A4K = 0.1;
  stress_relaxation_A4K2 = 40000;
  stress_relaxation_AARK = 1;
  stress_relaxation_AARLL = 4;
  stress_relaxation_ADHINF = 0;
  stress_relaxation_ADHKLL = 0.2;
  stress_relaxation_ADHKUL = 5;
  stress_relaxation_ADHPAM = 0.3;
  stress_relaxation_ADHPUL = 85;
  stress_relaxation_ADHTC = 15;
  stress_relaxation_ADHVLL = 0.93617;
  stress_relaxation_ADHVUL = 2.5;
  stress_relaxation_AH10 = 0.333;
  stress_relaxation_AH11 = 1000;
  stress_relaxation_AH9 = 1;
  stress_relaxation_AHMNAR = 0.3;
  stress_relaxation_AHTHM = 2;
  stress_relaxation_ALCLK = 0.3;
  stress_relaxation_ALDINF = 0;
  stress_relaxation_ALDKNS = 0;
  stress_relaxation_ALDMM = 2.5;
  stress_relaxation_AM1LL = 0;
  stress_relaxation_AM1UL = 5;
  stress_relaxation_AMCSNS = 0.65;
  stress_relaxation_AMKM = 0.5;
  stress_relaxation_AMKMUL = 12;
  stress_relaxation_AMM1LM = 0.005;
  stress_relaxation_AMM4 = 0.005;
  stress_relaxation_AMNALL = 0.04;
  stress_relaxation_AMNAM = 0.8;
  stress_relaxation_AMNAUL = 15;
  stress_relaxation_AMT = 60;
  stress_relaxation_ANCSNS = 0.4;
  stress_relaxation_ANGINF = 0;
  stress_relaxation_ANGKNS = 0;
  stress_relaxation_ANMALD = 2.5;
  stress_relaxation_ANMAM = 1.4;
  stress_relaxation_ANMARL = 0.86;
  stress_relaxation_ANMEM = 1.6;
  stress_relaxation_ANMKEL = 0.3;
  stress_relaxation_ANMKEM = 2;
  stress_relaxation_ANMLL = 0.7;
  stress_relaxation_ANMNAM = 1;
  stress_relaxation_ANMSLT = 2;
  stress_relaxation_ANMTM = 1.5;
  stress_relaxation_ANMUL = 1.8;
  stress_relaxation_ANPTC = 4;
  stress_relaxation_ANPXAF = 1.5;
  stress_relaxation_ANPXUL = 10;
  stress_relaxation_ANT = 12;
  stress_relaxation_ANULL = 0.8;
  stress_relaxation_ANUM = 6;
  stress_relaxation_ANUVM = 0;
  stress_relaxation_ANV = 5000;
  stress_relaxation_ANXM = 0;
  stress_relaxation_ANY = -0.2;
  stress_relaxation_AR1LM = 0.005;
  stress_relaxation_AR2LM = 0.005;
  stress_relaxation_ARF = 0.5;
  stress_relaxation_AUC1 = 0.3;
  stress_relaxation_AUDMP = 0.3;
  stress_relaxation_AUK = 0.004;
  stress_relaxation_AUL = 1.5;
  stress_relaxation_AULPM = 0;
  stress_relaxation_AUM1 = 3;
  stress_relaxation_AUM2 = 1;
  stress_relaxation_AUMAX = 5;
  stress_relaxation_AUMIN = 0.4;
  stress_relaxation_AUMK1 = 0.3;
  stress_relaxation_AUN1 = 0.5;
  stress_relaxation_AURG = 1;
  stress_relaxation_AUS = 1;
  stress_relaxation_AUSLP = 1.5;
  stress_relaxation_AUTO = 0;
  stress_relaxation_AUTOGN = 7;
  stress_relaxation_AUTOSN = 0.9;
  stress_relaxation_AUX = 1;
  stress_relaxation_BAROTC = 0.16;
  stress_relaxation_CFC = 0.01167;
  stress_relaxation_CKEEX = 4;
  stress_relaxation_CMPTSS = 2;
  stress_relaxation_CN2 = 0.0212;
  stress_relaxation_CN7 = 0.2;
  stress_relaxation_CNR = 139;
  stress_relaxation_CPF = 0.0003;
  stress_relaxation_CPK = 0.000253;
  stress_relaxation_CPR = 40;
  stress_relaxation_CV = 0.1;
  stress_relaxation_CRRFLX = 0;
  stress_relaxation_DIURET = 1;
  stress_relaxation_DHDTR = 0.05;
  stress_relaxation_DTNAR = 0.675;
  stress_relaxation_DTNARL = 1e-6;
  stress_relaxation_EARK = 1;
  stress_relaxation_EARLL = 24;
  stress_relaxation_EFAFR = 0;
  stress_relaxation_EXC = 1;
  stress_relaxation_EXCML = 0.01;
  stress_relaxation_EXCXP = 1;
  stress_relaxation_EXCXP2 = 0.17;
  stress_relaxation_EXE = 0;
  stress_relaxation_GCOPF = 0.8092;
  stress_relaxation_GFLC = 0.0208333;
  stress_relaxation_GFNDMP = 3;
  stress_relaxation_GFNLL = 0.001;
  stress_relaxation_GPPD = 1;
  stress_relaxation_HM6 = 1850;
  stress_relaxation_HM8 = 4.714e-8;
  stress_relaxation_HTAUML = 0.4;
  stress_relaxation_KORGN = 1;
  stress_relaxation_KORNER = 0;
  stress_relaxation_KORREN = 0;
  stress_relaxation_KORTC = 10000;
  stress_relaxation_LPDE = 8;
  stress_relaxation_LPK = 2.728e-14;
  stress_relaxation_LPPR = 0.03;
  stress_relaxation_MDFL1 = 10;
  stress_relaxation_MDFLKM = 0.667;
  stress_relaxation_MDFLW2 = 0.005;
  stress_relaxation_MDFLWX = 0.01;
  stress_relaxation_MDMP = 0;
  stress_relaxation_O2A = 0.1;
  stress_relaxation_O2CHMO = 0.01;
  stress_relaxation_OMM = 57.1;
  stress_relaxation_PA4 = 1;
  stress_relaxation_PAEX = 2;
  stress_relaxation_PCE = 1;
  stress_relaxation_PCR = 15;
  stress_relaxation_PR1LL = 0;
  stress_relaxation_PGHF = -2;
  stress_relaxation_PK2 = 0.79167;
  stress_relaxation_PL2 = 1.8;
  stress_relaxation_PLDF = 4.2;
  stress_relaxation_PM5 = 30;
  stress_relaxation_PO2ADV = 0.001;
  stress_relaxation_POK = 0.1;
  stress_relaxation_POM = 0.04;
  stress_relaxation_POM2 = 2;
  stress_relaxation_PON = 0.1;
  stress_relaxation_POR = 35;
  stress_relaxation_POZ = 2;
  stress_relaxation_PXTP = 8;
  stress_relaxation_QAOLM = 0.2;
  stress_relaxation_QRF = 0.15;
  stress_relaxation_RABSC = 0.5;
  stress_relaxation_RAM = 96.3;
  stress_relaxation_RAPRSP = 0;
  stress_relaxation_RAR = 30.52;
  stress_relaxation_RCDFDP = 2000;
  stress_relaxation_RCDFPC = 0;
  stress_relaxation_REK = 1;
  stress_relaxation_RFABKM = 0.03;
  stress_relaxation_RFABDM = 0.3;
  stress_relaxation_RFABDP = 1;
  stress_relaxation_RFCDFT = 0;
  stress_relaxation_RKC = 5.8e-6;
  stress_relaxation_RNAGTC = 15;
  stress_relaxation_RNAUAD = 0;
  stress_relaxation_RPS = 0;
  stress_relaxation_RTPPR = 0.9;
  stress_relaxation_RTPPRS = 15.2;
  stress_relaxation_RTSPRS = 6;
  stress_relaxation_RVRS = 19.167;
  stress_relaxation_RVSM = 1;
  stress_relaxation_SR = 1;
  stress_relaxation_SR2 = 1;
  stress_relaxation_SRK = 5;
  stress_relaxation_SRK2 = 10000;
  stress_relaxation_STA = 0;
  stress_relaxation_TENSGN = 0;
  stress_relaxation_TENSTC = 0.05;
  stress_relaxation_TIMETR = 0;
  stress_relaxation_TRNSFS = 0;
  stress_relaxation_TRPL = 0;
  stress_relaxation_TSSLML = 0.15;
  stress_relaxation_TSSLTC = 0.005;
  stress_relaxation_TVDDL = 30;
  stress_relaxation_U = 4;
  stress_relaxation_VID1 = 0.01;
  stress_relaxation_VIDML = 0.01;
  stress_relaxation_VNTSTM = 1;
  stress_relaxation_VP1 = 0.01;
  stress_relaxation_VPTISS = 0.0175;
  stress_relaxation_VTSF = 6;
  stress_relaxation_VV9 = 2.51;
  stress_relaxation_X = 4;
  stress_relaxation_Z = 1;
  stress_relaxation_Z4 = 0.5;
  stress_relaxation_Z5 = 0.3;
  stress_relaxation_Z6 = 20;
  stress_relaxation_Z7 = 5;
  stress_relaxation_Z10 = 45;
  stress_relaxation_Z11 = 0.01;
  stress_relaxation_Z12 = 5;
  stress_relaxation_Z13 = 0.625;
  stress_relaxation_Z14 = 5;
  stress_relaxation_Z16 = 5;
  stress_relaxation_Z18 = 5;
  stress_relaxation_Z19 = 5;
  stress_relaxation_KID = 0.08;
  stress_relaxation_URFORM = 0.24;
  stress_relaxation_AUV = 0.55;
  stress_relaxation_AUY = 0;
  stress_relaxation_O2M = 164;
  stress_relaxation_NID = 0.1;
  stress_relaxation_ATRFBM = 0;
  stress_relaxation_GBL = 0;
  stress_relaxation_RNAUGN = 0.6;
  stress_relaxation_RNAULL = 0.3;
  stress_relaxation_RNAUUL = 10;
  stress_relaxation_HSR = 1;
  stress_relaxation_HSL = 1;
  stress_relaxation_HMK = 90;
  stress_relaxation_PO2AMB = 150;
  stress_relaxation_HKM = 0.53333;
  stress_relaxation_DR = 0;
  stress_relaxation_ANPKNS = 0;
  stress_relaxation_RMULT1 = 1;
  stress_relaxation_GLPCA = 1;
  stress_relaxation_RFN = 1.22057;
  stress_relaxation_RFABX = 0.8;
  stress_relaxation_ANPINF = 0;
  stress_relaxation_FIS = 0;
  stress_relaxation_CPPD = 31.9719;
  stress_relaxation_TRRBC = 0;
  stress_relaxation_HYL = 60;
  stress_relaxation_ATRVM = 0;
  stress_relaxation_ADHC_init = 1;
  stress_relaxation_AHY_init = 0.301963;
  stress_relaxation_AMC_init = 1;
  stress_relaxation_AMM1T_init = 1.00269;
  stress_relaxation_AMM2_init = 1.09071;
  stress_relaxation_ANC_init = 0.859476;
  stress_relaxation_ANPC_init = 1;
  stress_relaxation_ANX1_init = 0;
  stress_relaxation_AR1T_init = 1.02127;
  stress_relaxation_AR2T_init = 1.01179;
  stress_relaxation_AR3T_init = 1.1448;
  stress_relaxation_AU1_init = 1.00007;
  stress_relaxation_AU4_init = -0.060024;
  stress_relaxation_AU6_init = 1.00132;
  stress_relaxation_DTKA_init = 0.0367573;
  stress_relaxation_HMD1_init = 1;
  stress_relaxation_HPL_init = 1.00163;
  stress_relaxation_HPR_init = 1.00237;
  stress_relaxation_KTOT_init = 3622.54;
  stress_relaxation_NAE_init = 2109.91;
  stress_relaxation_O2VAD1_init = 2.368e-7;
  stress_relaxation_OSV_init = 0.694163;
  stress_relaxation_OVA_init = 204.497;
  stress_relaxation_OVS_init = 0.699673;
  stress_relaxation_PAR1_init = 103.525;
  stress_relaxation_PC_init = 16.9144;
  stress_relaxation_PLUR_init = 159.549;
  stress_relaxation_PPR1_init = 0.419998;
  stress_relaxation_PRP_init = 216.243;
  stress_relaxation_QO2T_init = 72.2362;
  stress_relaxation_QOM1_init = 48.0839;
  stress_relaxation_RNAUG3_init = 0;
  stress_relaxation_TSP_init = 279.945;
  stress_relaxation_TVD_init = 0.000980838;
  stress_relaxation_VAS1_init = 0.862514;
  stress_relaxation_VIC_init = 25.0404;
  stress_relaxation_VLA1_init = 0.379883;
  stress_relaxation_VPA1_init = 0.38131;
  stress_relaxation_VPF1_init = 0.0123238;
  stress_relaxation_VP_init = 3.00449;
  stress_relaxation_VRA1_init = 0.100043;
  stress_relaxation_VRC_init = 2.00439;
  stress_relaxation_VTS2_init = 0;
  stress_relaxation_VTW_init = 39.8952;
  stress_relaxation_VV6_init = 0.0101913;
  stress_relaxation_VV7_init = 0.00366525;
  stress_relaxation_VVS1_init = 3.28246;
  time_ = ;

  // Rate rules:
  VV6' = ((VVE - 0.74)*stress_relaxation_SR2 - VV6)/stress_relaxation_SRK2;
  VV7' = ((VVE - 0.74)*stress_relaxation_SR - VV7)/stress_relaxation_SRK;
end
