// SBML level 2 version 4

model thirst_drinking_and_salt_appetite_CellML1_0_model____main()
  // Originally created by libAntimony v1.3 (using libSBML 4.1.0-b2)

  // Compartments:
  compartment default_compartment = 1;

  // Parameters:
  ADHC = 1;
  ANM = 0.987545;
  POT = 35.1148;
  thirst_drinking_and_salt_appetite_Z10 = 45;
  thirst_drinking_and_salt_appetite_Z11 = 0.01;
  thirst_drinking_and_salt_appetite_ANMSLT = 2;
  thirst_drinking_and_salt_appetite_AHTHM = 2;
  thirst_drinking_and_salt_appetite_ANMTM = 1.5;
  thirst_drinking_and_salt_appetite_DR = 0;
  thirst_drinking_and_salt_appetite_TVDDL = 30;
  thirst_drinking_and_salt_appetite_TVD = 0.000980838;
  time_ = ;

  // Assignment rules:
  thirst_drinking_and_salt_appetite_STH := ;
  thirst_drinking_and_salt_appetite_effect_of_salt_appetite_stimulation_on_thirst_ANMSML := (ANM - 1)*thirst_drinking_and_salt_appetite_ANMSLT + 1;
  thirst_drinking_and_salt_appetite_effect_of_salt_appetite_stimulation_on_thirst_STH1 := (thirst_drinking_and_salt_appetite_Z10 - POT)^2*thirst_drinking_and_salt_appetite_Z11*thirst_drinking_and_salt_appetite_effect_of_salt_appetite_stimulation_on_thirst_ANMSML;
  thirst_drinking_and_salt_appetite_AHCM := (ADHC - 1)*thirst_drinking_and_salt_appetite_AHTHM + 1;
  thirst_drinking_and_salt_appetite_ANMTH := (ANM - 1)*thirst_drinking_and_salt_appetite_ANMTM*0.001;
  thirst_drinking_and_salt_appetite_rate_of_fluid_intake_AHTH := ;
  thirst_drinking_and_salt_appetite_rate_of_fluid_intake_AHTH1 := thirst_drinking_and_salt_appetite_AHCM*thirst_drinking_and_salt_appetite_STH*0.001;
  thirst_drinking_and_salt_appetite_rate_of_fluid_intake_TVZ := ;
  thirst_drinking_and_salt_appetite_rate_of_fluid_intake_TVZ1 := (thirst_drinking_and_salt_appetite_ANMTH + thirst_drinking_and_salt_appetite_rate_of_fluid_intake_AHTH)*1;

  // Rate rules:
  thirst_drinking_and_salt_appetite_TVD' = (thirst_drinking_and_salt_appetite_rate_of_fluid_intake_TVZ + thirst_drinking_and_salt_appetite_DR - thirst_drinking_and_salt_appetite_TVD)/thirst_drinking_and_salt_appetite_TVDDL;
end
