// SBML level 2 version 4

model thirst_drinking_and_salt_appetite_parent_model____main()
  // Originally created by libAntimony v1.3 (using libSBML 4.1.0-b2)

  // Compartments:
  compartment default_compartment = 1;

  // Parameters:
  ADHC = 1;
  ANM = 0.987545;
  POT = 35.1148;
  A1K = 0.5;
  A2K = 60;
  A3K = 40000;
  A4K = 0.1;
  A4K2 = 40000;
  AARK = 1;
  AARLL = 4;
  ADHINF = 0;
  ADHKLL = 0.2;
  ADHKUL = 5;
  ADHPAM = 0.3;
  ADHPUL = 85;
  ADHTC = 15;
  ADHVLL = 0.93617;
  ADHVUL = 2.5;
  AH10 = 0.333;
  AH11 = 1000;
  AH9 = 1;
  AHMNAR = 0.3;
  AHTHM = 2;
  ALCLK = 0.3;
  ALDINF = 0;
  ALDKNS = 0;
  ALDMM = 2.5;
  AM1LL = 0;
  AM1UL = 5;
  AMCSNS = 0.65;
  AMKM = 0.5;
  AMKMUL = 12;
  AMM1LM = 0.005;
  AMM4 = 0.005;
  AMNALL = 0.04;
  AMNAM = 0.8;
  AMNAUL = 15;
  AMT = 60;
  ANCSNS = 0.4;
  ANGINF = 0;
  ANGKNS = 0;
  ANMALD = 2.5;
  ANMAM = 1.4;
  ANMARL = 0.86;
  ANMEM = 1.6;
  ANMKEL = 0.3;
  ANMKEM = 2;
  ANMLL = 0.7;
  ANMNAM = 1;
  ANMSLT = 2;
  ANMTM = 1.5;
  ANMUL = 1.8;
  ANPTC = 4;
  ANPXAF = 1.5;
  ANPXUL = 10;
  ANT = 12;
  ANULL = 0.8;
  ANUM = 6;
  ANUVM = 0;
  ANV = 5000;
  ANXM = 0;
  ANY = -0.2;
  AR1LM = 0.005;
  AR2LM = 0.005;
  ARF = 0.5;
  AUC1 = 0.3;
  AUDMP = 0.3;
  AUK = 0.004;
  AUL = 1.5;
  AULPM = 0;
  AUM1 = 3;
  AUM2 = 1;
  AUMAX = 5;
  AUMIN = 0.4;
  AUMK1 = 0.3;
  AUN1 = 0.5;
  AURG = 1;
  AUS = 1;
  AUSLP = 1.5;
  AUTO = 0;
  AUTOGN = 7;
  AUTOSN = 0.9;
  AUX = 1;
  BAROTC = 0.16;
  CFC = 0.01167;
  CKEEX = 4;
  CMPTSS = 2;
  CN2 = 0.0212;
  CN7 = 0.2;
  CNR = 139;
  CPF = 0.0003;
  CPK = 0.000253;
  CPR = 40;
  CV = 0.1;
  CRRFLX = 0;
  DIURET = 1;
  DHDTR = 0.05;
  DTNAR = 0.675;
  DTNARL = 1e-6;
  EARK = 1;
  EARLL = 24;
  EFAFR = 0;
  EXC = 1;
  EXCML = 0.01;
  EXCXP = 1;
  EXCXP2 = 0.17;
  EXE = 0;
  GCOPF = 0.8092;
  GFLC = 0.0208333;
  GFNDMP = 3;
  GFNLL = 0.001;
  GPPD = 1;
  HM6 = 1850;
  HM8 = 4.714e-8;
  HTAUML = 0.4;
  KORGN = 1;
  KORNER = 0;
  KORREN = 0;
  KORTC = 10000;
  LPDE = 8;
  LPK = 2.728e-14;
  LPPR = 0.03;
  MDFL1 = 10;
  MDFLKM = 0.667;
  MDFLW2 = 0.005;
  MDFLWX = 0.01;
  MDMP = 0;
  O2A = 0.1;
  O2CHMO = 0.01;
  OMM = 57.1;
  PA4 = 1;
  PAEX = 2;
  PCE = 1;
  PCR = 15;
  PR1LL = 0;
  PGHF = -2;
  PK2 = 0.79167;
  PL2 = 1.8;
  PLDF = 4.2;
  PM5 = 30;
  PO2ADV = 0.001;
  POK = 0.1;
  POM = 0.04;
  POM2 = 2;
  PON = 0.1;
  POR = 35;
  POZ = 2;
  PXTP = 8;
  QAOLM = 0.2;
  QRF = 0.15;
  RABSC = 0.5;
  RAM = 96.3;
  RAPRSP = 0;
  RAR = 30.52;
  RCDFDP = 2000;
  RCDFPC = 0;
  REK = 1;
  RFABKM = 0.03;
  RFABDM = 0.3;
  RFABDP = 1;
  RFCDFT = 0;
  RKC = 5.8e-6;
  RNAGTC = 15;
  RNAUAD = 0;
  RPS = 0;
  RTPPR = 0.9;
  RTPPRS = 15.2;
  RTSPRS = 6;
  RVRS = 19.167;
  RVSM = 1;
  SR = 1;
  SR2 = 1;
  SRK = 5;
  SRK2 = 10000;
  STA = 0;
  TENSGN = 0;
  TENSTC = 0.05;
  TIMETR = 0;
  TRNSFS = 0;
  TRPL = 0;
  TSSLML = 0.15;
  TSSLTC = 0.005;
  TVDDL = 30;
  U = 4;
  VID1 = 0.01;
  VIDML = 0.01;
  VNTSTM = 1;
  VP1 = 0.01;
  VPTISS = 0.0175;
  VTSF = 6;
  VV9 = 2.51;
  X = 4;
  Z = 1;
  Z4 = 0.5;
  Z5 = 0.3;
  Z6 = 20;
  Z7 = 5;
  Z10 = 45;
  Z11 = 0.01;
  Z12 = 5;
  Z13 = 0.625;
  Z14 = 5;
  Z16 = 5;
  Z18 = 5;
  Z19 = 5;
  KID = 0.08;
  URFORM = 0.24;
  AUV = 0.55;
  AUY = 0;
  O2M = 164;
  NID = 0.1;
  ATRFBM = 0;
  GBL = 0;
  RNAUGN = 0.6;
  RNAULL = 0.3;
  RNAUUL = 10;
  HSR = 1;
  HSL = 1;
  HMK = 90;
  PO2AMB = 150;
  HKM = 0.53333;
  DR = 0;
  ANPKNS = 0;
  RMULT1 = 1;
  GLPCA = 1;
  RFN = 1.22057;
  RFABX = 0.8;
  ANPINF = 0;
  FIS = 0;
  CPPD = 31.9719;
  TRRBC = 0;
  HYL = 60;
  ATRVM = 0;
  ADHC_init = 1;
  AHY_init = 0.301963;
  AMC_init = 1;
  AMM1T_init = 1.00269;
  AMM2_init = 1.09071;
  ANC_init = 0.859476;
  ANPC_init = 1;
  ANX1_init = 0;
  AR1T_init = 1.02127;
  AR2T_init = 1.01179;
  AR3T_init = 1.1448;
  AU1_init = 1.00007;
  AU4_init = -0.060024;
  AU6_init = 1.00132;
  DTKA_init = 0.0367573;
  HMD1_init = 1;
  HPL_init = 1.00163;
  HPR_init = 1.00237;
  KTOT_init = 3622.54;
  NAE_init = 2109.91;
  O2VAD1_init = 2.368e-7;
  OSV_init = 0.694163;
  OVA_init = 204.497;
  OVS_init = 0.699673;
  PAR1_init = 103.525;
  PC_init = 16.9144;
  PLUR_init = 159.549;
  PPR1_init = 0.419998;
  PRP_init = 216.243;
  QO2T_init = 72.2362;
  QOM1_init = 48.0839;
  RNAUG3_init = 0;
  TSP_init = 279.945;
  TVD_init = 0.000980838;
  VAS1_init = 0.862514;
  VIC_init = 25.0404;
  VLA1_init = 0.379883;
  VPA1_init = 0.38131;
  VPF1_init = 0.0123238;
  VP_init = 3.00449;
  VRA1_init = 0.100043;
  VRC_init = 2.00439;
  VTS2_init = 0;
  VTW_init = 39.8952;
  VV6_init = 0.0101913;
  VV7_init = 0.00366525;
  VVS1_init = 3.28246;
  TVD = thirst_drinking_and_salt_appetite_TVD_init;
  thirst_drinking_and_salt_appetite_A1K = 0.5;
  thirst_drinking_and_salt_appetite_A2K = 60;
  thirst_drinking_and_salt_appetite_A3K = 40000;
  thirst_drinking_and_salt_appetite_A4K = 0.1;
  thirst_drinking_and_salt_appetite_A4K2 = 40000;
  thirst_drinking_and_salt_appetite_AARK = 1;
  thirst_drinking_and_salt_appetite_AARLL = 4;
  thirst_drinking_and_salt_appetite_ADHINF = 0;
  thirst_drinking_and_salt_appetite_ADHKLL = 0.2;
  thirst_drinking_and_salt_appetite_ADHKUL = 5;
  thirst_drinking_and_salt_appetite_ADHPAM = 0.3;
  thirst_drinking_and_salt_appetite_ADHPUL = 85;
  thirst_drinking_and_salt_appetite_ADHTC = 15;
  thirst_drinking_and_salt_appetite_ADHVLL = 0.93617;
  thirst_drinking_and_salt_appetite_ADHVUL = 2.5;
  thirst_drinking_and_salt_appetite_AH10 = 0.333;
  thirst_drinking_and_salt_appetite_AH11 = 1000;
  thirst_drinking_and_salt_appetite_AH9 = 1;
  thirst_drinking_and_salt_appetite_AHMNAR = 0.3;
  thirst_drinking_and_salt_appetite_AHTHM = 2;
  thirst_drinking_and_salt_appetite_ALCLK = 0.3;
  thirst_drinking_and_salt_appetite_ALDINF = 0;
  thirst_drinking_and_salt_appetite_ALDKNS = 0;
  thirst_drinking_and_salt_appetite_ALDMM = 2.5;
  thirst_drinking_and_salt_appetite_AM1LL = 0;
  thirst_drinking_and_salt_appetite_AM1UL = 5;
  thirst_drinking_and_salt_appetite_AMCSNS = 0.65;
  thirst_drinking_and_salt_appetite_AMKM = 0.5;
  thirst_drinking_and_salt_appetite_AMKMUL = 12;
  thirst_drinking_and_salt_appetite_AMM1LM = 0.005;
  thirst_drinking_and_salt_appetite_AMM4 = 0.005;
  thirst_drinking_and_salt_appetite_AMNALL = 0.04;
  thirst_drinking_and_salt_appetite_AMNAM = 0.8;
  thirst_drinking_and_salt_appetite_AMNAUL = 15;
  thirst_drinking_and_salt_appetite_AMT = 60;
  thirst_drinking_and_salt_appetite_ANCSNS = 0.4;
  thirst_drinking_and_salt_appetite_ANGINF = 0;
  thirst_drinking_and_salt_appetite_ANGKNS = 0;
  thirst_drinking_and_salt_appetite_ANMALD = 2.5;
  thirst_drinking_and_salt_appetite_ANMAM = 1.4;
  thirst_drinking_and_salt_appetite_ANMARL = 0.86;
  thirst_drinking_and_salt_appetite_ANMEM = 1.6;
  thirst_drinking_and_salt_appetite_ANMKEL = 0.3;
  thirst_drinking_and_salt_appetite_ANMKEM = 2;
  thirst_drinking_and_salt_appetite_ANMLL = 0.7;
  thirst_drinking_and_salt_appetite_ANMNAM = 1;
  thirst_drinking_and_salt_appetite_ANMSLT = 2;
  thirst_drinking_and_salt_appetite_ANMTM = 1.5;
  thirst_drinking_and_salt_appetite_ANMUL = 1.8;
  thirst_drinking_and_salt_appetite_ANPTC = 4;
  thirst_drinking_and_salt_appetite_ANPXAF = 1.5;
  thirst_drinking_and_salt_appetite_ANPXUL = 10;
  thirst_drinking_and_salt_appetite_ANT = 12;
  thirst_drinking_and_salt_appetite_ANULL = 0.8;
  thirst_drinking_and_salt_appetite_ANUM = 6;
  thirst_drinking_and_salt_appetite_ANUVM = 0;
  thirst_drinking_and_salt_appetite_ANV = 5000;
  thirst_drinking_and_salt_appetite_ANXM = 0;
  thirst_drinking_and_salt_appetite_ANY = -0.2;
  thirst_drinking_and_salt_appetite_AR1LM = 0.005;
  thirst_drinking_and_salt_appetite_AR2LM = 0.005;
  thirst_drinking_and_salt_appetite_ARF = 0.5;
  thirst_drinking_and_salt_appetite_AUC1 = 0.3;
  thirst_drinking_and_salt_appetite_AUDMP = 0.3;
  thirst_drinking_and_salt_appetite_AUK = 0.004;
  thirst_drinking_and_salt_appetite_AUL = 1.5;
  thirst_drinking_and_salt_appetite_AULPM = 0;
  thirst_drinking_and_salt_appetite_AUM1 = 3;
  thirst_drinking_and_salt_appetite_AUM2 = 1;
  thirst_drinking_and_salt_appetite_AUMAX = 5;
  thirst_drinking_and_salt_appetite_AUMIN = 0.4;
  thirst_drinking_and_salt_appetite_AUMK1 = 0.3;
  thirst_drinking_and_salt_appetite_AUN1 = 0.5;
  thirst_drinking_and_salt_appetite_AURG = 1;
  thirst_drinking_and_salt_appetite_AUS = 1;
  thirst_drinking_and_salt_appetite_AUSLP = 1.5;
  thirst_drinking_and_salt_appetite_AUTO = 0;
  thirst_drinking_and_salt_appetite_AUTOGN = 7;
  thirst_drinking_and_salt_appetite_AUTOSN = 0.9;
  thirst_drinking_and_salt_appetite_AUX = 1;
  thirst_drinking_and_salt_appetite_BAROTC = 0.16;
  thirst_drinking_and_salt_appetite_CFC = 0.01167;
  thirst_drinking_and_salt_appetite_CKEEX = 4;
  thirst_drinking_and_salt_appetite_CMPTSS = 2;
  thirst_drinking_and_salt_appetite_CN2 = 0.0212;
  thirst_drinking_and_salt_appetite_CN7 = 0.2;
  thirst_drinking_and_salt_appetite_CNR = 139;
  thirst_drinking_and_salt_appetite_CPF = 0.0003;
  thirst_drinking_and_salt_appetite_CPK = 0.000253;
  thirst_drinking_and_salt_appetite_CPR = 40;
  thirst_drinking_and_salt_appetite_CV = 0.1;
  thirst_drinking_and_salt_appetite_CRRFLX = 0;
  thirst_drinking_and_salt_appetite_DIURET = 1;
  thirst_drinking_and_salt_appetite_DHDTR = 0.05;
  thirst_drinking_and_salt_appetite_DTNAR = 0.675;
  thirst_drinking_and_salt_appetite_DTNARL = 1e-6;
  thirst_drinking_and_salt_appetite_EARK = 1;
  thirst_drinking_and_salt_appetite_EARLL = 24;
  thirst_drinking_and_salt_appetite_EFAFR = 0;
  thirst_drinking_and_salt_appetite_EXC = 1;
  thirst_drinking_and_salt_appetite_EXCML = 0.01;
  thirst_drinking_and_salt_appetite_EXCXP = 1;
  thirst_drinking_and_salt_appetite_EXCXP2 = 0.17;
  thirst_drinking_and_salt_appetite_EXE = 0;
  thirst_drinking_and_salt_appetite_GCOPF = 0.8092;
  thirst_drinking_and_salt_appetite_GFLC = 0.0208333;
  thirst_drinking_and_salt_appetite_GFNDMP = 3;
  thirst_drinking_and_salt_appetite_GFNLL = 0.001;
  thirst_drinking_and_salt_appetite_GPPD = 1;
  thirst_drinking_and_salt_appetite_HM6 = 1850;
  thirst_drinking_and_salt_appetite_HM8 = 4.714e-8;
  thirst_drinking_and_salt_appetite_HTAUML = 0.4;
  thirst_drinking_and_salt_appetite_KORGN = 1;
  thirst_drinking_and_salt_appetite_KORNER = 0;
  thirst_drinking_and_salt_appetite_KORREN = 0;
  thirst_drinking_and_salt_appetite_KORTC = 10000;
  thirst_drinking_and_salt_appetite_LPDE = 8;
  thirst_drinking_and_salt_appetite_LPK = 2.728e-14;
  thirst_drinking_and_salt_appetite_LPPR = 0.03;
  thirst_drinking_and_salt_appetite_MDFL1 = 10;
  thirst_drinking_and_salt_appetite_MDFLKM = 0.667;
  thirst_drinking_and_salt_appetite_MDFLW2 = 0.005;
  thirst_drinking_and_salt_appetite_MDFLWX = 0.01;
  thirst_drinking_and_salt_appetite_MDMP = 0;
  thirst_drinking_and_salt_appetite_O2A = 0.1;
  thirst_drinking_and_salt_appetite_O2CHMO = 0.01;
  thirst_drinking_and_salt_appetite_OMM = 57.1;
  thirst_drinking_and_salt_appetite_PA4 = 1;
  thirst_drinking_and_salt_appetite_PAEX = 2;
  thirst_drinking_and_salt_appetite_PCE = 1;
  thirst_drinking_and_salt_appetite_PCR = 15;
  thirst_drinking_and_salt_appetite_PR1LL = 0;
  thirst_drinking_and_salt_appetite_PGHF = -2;
  thirst_drinking_and_salt_appetite_PK2 = 0.79167;
  thirst_drinking_and_salt_appetite_PL2 = 1.8;
  thirst_drinking_and_salt_appetite_PLDF = 4.2;
  thirst_drinking_and_salt_appetite_PM5 = 30;
  thirst_drinking_and_salt_appetite_PO2ADV = 0.001;
  thirst_drinking_and_salt_appetite_POK = 0.1;
  thirst_drinking_and_salt_appetite_POM = 0.04;
  thirst_drinking_and_salt_appetite_POM2 = 2;
  thirst_drinking_and_salt_appetite_PON = 0.1;
  thirst_drinking_and_salt_appetite_POR = 35;
  thirst_drinking_and_salt_appetite_POZ = 2;
  thirst_drinking_and_salt_appetite_PXTP = 8;
  thirst_drinking_and_salt_appetite_QAOLM = 0.2;
  thirst_drinking_and_salt_appetite_QRF = 0.15;
  thirst_drinking_and_salt_appetite_RABSC = 0.5;
  thirst_drinking_and_salt_appetite_RAM = 96.3;
  thirst_drinking_and_salt_appetite_RAPRSP = 0;
  thirst_drinking_and_salt_appetite_RAR = 30.52;
  thirst_drinking_and_salt_appetite_RCDFDP = 2000;
  thirst_drinking_and_salt_appetite_RCDFPC = 0;
  thirst_drinking_and_salt_appetite_REK = 1;
  thirst_drinking_and_salt_appetite_RFABKM = 0.03;
  thirst_drinking_and_salt_appetite_RFABDM = 0.3;
  thirst_drinking_and_salt_appetite_RFABDP = 1;
  thirst_drinking_and_salt_appetite_RFCDFT = 0;
  thirst_drinking_and_salt_appetite_RKC = 5.8e-6;
  thirst_drinking_and_salt_appetite_RNAGTC = 15;
  thirst_drinking_and_salt_appetite_RNAUAD = 0;
  thirst_drinking_and_salt_appetite_RPS = 0;
  thirst_drinking_and_salt_appetite_RTPPR = 0.9;
  thirst_drinking_and_salt_appetite_RTPPRS = 15.2;
  thirst_drinking_and_salt_appetite_RTSPRS = 6;
  thirst_drinking_and_salt_appetite_RVRS = 19.167;
  thirst_drinking_and_salt_appetite_RVSM = 1;
  thirst_drinking_and_salt_appetite_SR = 1;
  thirst_drinking_and_salt_appetite_SR2 = 1;
  thirst_drinking_and_salt_appetite_SRK = 5;
  thirst_drinking_and_salt_appetite_SRK2 = 10000;
  thirst_drinking_and_salt_appetite_STA = 0;
  thirst_drinking_and_salt_appetite_TENSGN = 0;
  thirst_drinking_and_salt_appetite_TENSTC = 0.05;
  thirst_drinking_and_salt_appetite_TIMETR = 0;
  thirst_drinking_and_salt_appetite_TRNSFS = 0;
  thirst_drinking_and_salt_appetite_TRPL = 0;
  thirst_drinking_and_salt_appetite_TSSLML = 0.15;
  thirst_drinking_and_salt_appetite_TSSLTC = 0.005;
  thirst_drinking_and_salt_appetite_TVDDL = 30;
  thirst_drinking_and_salt_appetite_U = 4;
  thirst_drinking_and_salt_appetite_VID1 = 0.01;
  thirst_drinking_and_salt_appetite_VIDML = 0.01;
  thirst_drinking_and_salt_appetite_VNTSTM = 1;
  thirst_drinking_and_salt_appetite_VP1 = 0.01;
  thirst_drinking_and_salt_appetite_VPTISS = 0.0175;
  thirst_drinking_and_salt_appetite_VTSF = 6;
  thirst_drinking_and_salt_appetite_VV9 = 2.51;
  thirst_drinking_and_salt_appetite_X = 4;
  thirst_drinking_and_salt_appetite_Z = 1;
  thirst_drinking_and_salt_appetite_Z4 = 0.5;
  thirst_drinking_and_salt_appetite_Z5 = 0.3;
  thirst_drinking_and_salt_appetite_Z6 = 20;
  thirst_drinking_and_salt_appetite_Z7 = 5;
  thirst_drinking_and_salt_appetite_Z10 = 45;
  thirst_drinking_and_salt_appetite_Z11 = 0.01;
  thirst_drinking_and_salt_appetite_Z12 = 5;
  thirst_drinking_and_salt_appetite_Z13 = 0.625;
  thirst_drinking_and_salt_appetite_Z14 = 5;
  thirst_drinking_and_salt_appetite_Z16 = 5;
  thirst_drinking_and_salt_appetite_Z18 = 5;
  thirst_drinking_and_salt_appetite_Z19 = 5;
  thirst_drinking_and_salt_appetite_KID = 0.08;
  thirst_drinking_and_salt_appetite_URFORM = 0.24;
  thirst_drinking_and_salt_appetite_AUV = 0.55;
  thirst_drinking_and_salt_appetite_AUY = 0;
  thirst_drinking_and_salt_appetite_O2M = 164;
  thirst_drinking_and_salt_appetite_NID = 0.1;
  thirst_drinking_and_salt_appetite_ATRFBM = 0;
  thirst_drinking_and_salt_appetite_GBL = 0;
  thirst_drinking_and_salt_appetite_RNAUGN = 0.6;
  thirst_drinking_and_salt_appetite_RNAULL = 0.3;
  thirst_drinking_and_salt_appetite_RNAUUL = 10;
  thirst_drinking_and_salt_appetite_HSR = 1;
  thirst_drinking_and_salt_appetite_HSL = 1;
  thirst_drinking_and_salt_appetite_HMK = 90;
  thirst_drinking_and_salt_appetite_PO2AMB = 150;
  thirst_drinking_and_salt_appetite_HKM = 0.53333;
  thirst_drinking_and_salt_appetite_DR = 0;
  thirst_drinking_and_salt_appetite_ANPKNS = 0;
  thirst_drinking_and_salt_appetite_RMULT1 = 1;
  thirst_drinking_and_salt_appetite_GLPCA = 1;
  thirst_drinking_and_salt_appetite_RFN = 1.22057;
  thirst_drinking_and_salt_appetite_RFABX = 0.8;
  thirst_drinking_and_salt_appetite_ANPINF = 0;
  thirst_drinking_and_salt_appetite_FIS = 0;
  thirst_drinking_and_salt_appetite_CPPD = 31.9719;
  thirst_drinking_and_salt_appetite_TRRBC = 0;
  thirst_drinking_and_salt_appetite_HYL = 60;
  thirst_drinking_and_salt_appetite_ATRVM = 0;
  thirst_drinking_and_salt_appetite_ADHC_init = 1;
  thirst_drinking_and_salt_appetite_AHY_init = 0.301963;
  thirst_drinking_and_salt_appetite_AMC_init = 1;
  thirst_drinking_and_salt_appetite_AMM1T_init = 1.00269;
  thirst_drinking_and_salt_appetite_AMM2_init = 1.09071;
  thirst_drinking_and_salt_appetite_ANC_init = 0.859476;
  thirst_drinking_and_salt_appetite_ANPC_init = 1;
  thirst_drinking_and_salt_appetite_ANX1_init = 0;
  thirst_drinking_and_salt_appetite_AR1T_init = 1.02127;
  thirst_drinking_and_salt_appetite_AR2T_init = 1.01179;
  thirst_drinking_and_salt_appetite_AR3T_init = 1.1448;
  thirst_drinking_and_salt_appetite_AU1_init = 1.00007;
  thirst_drinking_and_salt_appetite_AU4_init = -0.060024;
  thirst_drinking_and_salt_appetite_AU6_init = 1.00132;
  thirst_drinking_and_salt_appetite_DTKA_init = 0.0367573;
  thirst_drinking_and_salt_appetite_HMD1_init = 1;
  thirst_drinking_and_salt_appetite_HPL_init = 1.00163;
  thirst_drinking_and_salt_appetite_HPR_init = 1.00237;
  thirst_drinking_and_salt_appetite_KTOT_init = 3622.54;
  thirst_drinking_and_salt_appetite_NAE_init = 2109.91;
  thirst_drinking_and_salt_appetite_O2VAD1_init = 2.368e-7;
  thirst_drinking_and_salt_appetite_OSV_init = 0.694163;
  thirst_drinking_and_salt_appetite_OVA_init = 204.497;
  thirst_drinking_and_salt_appetite_OVS_init = 0.699673;
  thirst_drinking_and_salt_appetite_PAR1_init = 103.525;
  thirst_drinking_and_salt_appetite_PC_init = 16.9144;
  thirst_drinking_and_salt_appetite_PLUR_init = 159.549;
  thirst_drinking_and_salt_appetite_PPR1_init = 0.419998;
  thirst_drinking_and_salt_appetite_PRP_init = 216.243;
  thirst_drinking_and_salt_appetite_QO2T_init = 72.2362;
  thirst_drinking_and_salt_appetite_QOM1_init = 48.0839;
  thirst_drinking_and_salt_appetite_RNAUG3_init = 0;
  thirst_drinking_and_salt_appetite_TSP_init = 279.945;
  thirst_drinking_and_salt_appetite_TVD_init = 0.000980838;
  thirst_drinking_and_salt_appetite_VAS1_init = 0.862514;
  thirst_drinking_and_salt_appetite_VIC_init = 25.0404;
  thirst_drinking_and_salt_appetite_VLA1_init = 0.379883;
  thirst_drinking_and_salt_appetite_VPA1_init = 0.38131;
  thirst_drinking_and_salt_appetite_VPF1_init = 0.0123238;
  thirst_drinking_and_salt_appetite_VP_init = 3.00449;
  thirst_drinking_and_salt_appetite_VRA1_init = 0.100043;
  thirst_drinking_and_salt_appetite_VRC_init = 2.00439;
  thirst_drinking_and_salt_appetite_VTS2_init = 0;
  thirst_drinking_and_salt_appetite_VTW_init = 39.8952;
  thirst_drinking_and_salt_appetite_VV6_init = 0.0101913;
  thirst_drinking_and_salt_appetite_VV7_init = 0.00366525;
  thirst_drinking_and_salt_appetite_VVS1_init = 3.28246;
  time_ = ;

  // Assignment rules:
  STH := ;
  thirst_drinking_and_salt_appetite_effect_of_salt_appetite_stimulation_on_thirst_ANMSML := (ANM - 1)*thirst_drinking_and_salt_appetite_ANMSLT + 1;
  thirst_drinking_and_salt_appetite_effect_of_salt_appetite_stimulation_on_thirst_STH1 := (thirst_drinking_and_salt_appetite_Z10 - POT)^2*thirst_drinking_and_salt_appetite_Z11*thirst_drinking_and_salt_appetite_effect_of_salt_appetite_stimulation_on_thirst_ANMSML;
  thirst_drinking_and_salt_appetite_AHCM := (ADHC - 1)*thirst_drinking_and_salt_appetite_AHTHM + 1;
  thirst_drinking_and_salt_appetite_ANMTH := (ANM - 1)*thirst_drinking_and_salt_appetite_ANMTM*0.001;
  thirst_drinking_and_salt_appetite_rate_of_fluid_intake_AHTH := ;
  thirst_drinking_and_salt_appetite_rate_of_fluid_intake_AHTH1 := thirst_drinking_and_salt_appetite_AHCM*STH*0.001;
  thirst_drinking_and_salt_appetite_rate_of_fluid_intake_TVZ := ;
  thirst_drinking_and_salt_appetite_rate_of_fluid_intake_TVZ1 := (thirst_drinking_and_salt_appetite_ANMTH + thirst_drinking_and_salt_appetite_rate_of_fluid_intake_AHTH)*1;

  // Rate rules:
  TVD' = (thirst_drinking_and_salt_appetite_rate_of_fluid_intake_TVZ + thirst_drinking_and_salt_appetite_DR - TVD)/thirst_drinking_and_salt_appetite_TVDDL;
end
