// SBML level 2 version 4

model volume_receptors_CellML1_0_model____main()
  // Originally created by libAntimony v1.3 (using libSBML 4.1.0-b2)

  // Compartments:
  compartment default_compartment = 1;

  // Parameters:
  PRA = 0.00852183;
  volume_receptors_AH10 = 0.333;
  volume_receptors_AH11 = 1000;
  volume_receptors_AH9 = 1;
  volume_receptors_ATRFBM = 0;
  volume_receptors_ATRVM = 0;
  volume_receptors_AHY = 0.301963;
  time_ = ;

  // Assignment rules:
  volume_receptors_AHZ := ;
  volume_receptors_effect_of_pressure_on_volume_receptors_AHZ1 := abs(PRA)^volume_receptors_AH10*volume_receptors_AH9;
  volume_receptors_AH7 := volume_receptors_AHZ - volume_receptors_AHY;
  volume_receptors_ATRRFB := volume_receptors_AH7*volume_receptors_ATRFBM + 1;
  volume_receptors_ATRVFB := volume_receptors_AH7*volume_receptors_ATRVM;

  // Rate rules:
  volume_receptors_AHY' = (volume_receptors_AHZ - volume_receptors_AHY)/volume_receptors_AH11;
end
