// SBML level 2 version 4

model volume_receptors_parent_model____main()
  // Originally created by libAntimony v1.3 (using libSBML 4.1.0-b2)

  // Compartments:
  compartment default_compartment = 1;

  // Parameters:
  PRA = 0.00852183;
  A1K = 0.5;
  A2K = 60;
  A3K = 40000;
  A4K = 0.1;
  A4K2 = 40000;
  AARK = 1;
  AARLL = 4;
  ADHINF = 0;
  ADHKLL = 0.2;
  ADHKUL = 5;
  ADHPAM = 0.3;
  ADHPUL = 85;
  ADHTC = 15;
  ADHVLL = 0.93617;
  ADHVUL = 2.5;
  AH10 = 0.333;
  AH11 = 1000;
  AH9 = 1;
  AHMNAR = 0.3;
  AHTHM = 2;
  ALCLK = 0.3;
  ALDINF = 0;
  ALDKNS = 0;
  ALDMM = 2.5;
  AM1LL = 0;
  AM1UL = 5;
  AMCSNS = 0.65;
  AMKM = 0.5;
  AMKMUL = 12;
  AMM1LM = 0.005;
  AMM4 = 0.005;
  AMNALL = 0.04;
  AMNAM = 0.8;
  AMNAUL = 15;
  AMT = 60;
  ANCSNS = 0.4;
  ANGINF = 0;
  ANGKNS = 0;
  ANMALD = 2.5;
  ANMAM = 1.4;
  ANMARL = 0.86;
  ANMEM = 1.6;
  ANMKEL = 0.3;
  ANMKEM = 2;
  ANMLL = 0.7;
  ANMNAM = 1;
  ANMSLT = 2;
  ANMTM = 1.5;
  ANMUL = 1.8;
  ANPTC = 4;
  ANPXAF = 1.5;
  ANPXUL = 10;
  ANT = 12;
  ANULL = 0.8;
  ANUM = 6;
  ANUVM = 0;
  ANV = 5000;
  ANXM = 0;
  ANY = -0.2;
  AR1LM = 0.005;
  AR2LM = 0.005;
  ARF = 0.5;
  AUC1 = 0.3;
  AUDMP = 0.3;
  AUK = 0.004;
  AUL = 1.5;
  AULPM = 0;
  AUM1 = 3;
  AUM2 = 1;
  AUMAX = 5;
  AUMIN = 0.4;
  AUMK1 = 0.3;
  AUN1 = 0.5;
  AURG = 1;
  AUS = 1;
  AUSLP = 1.5;
  AUTO = 0;
  AUTOGN = 7;
  AUTOSN = 0.9;
  AUX = 1;
  BAROTC = 0.16;
  CFC = 0.01167;
  CKEEX = 4;
  CMPTSS = 2;
  CN2 = 0.0212;
  CN7 = 0.2;
  CNR = 139;
  CPF = 0.0003;
  CPK = 0.000253;
  CPR = 40;
  CV = 0.1;
  CRRFLX = 0;
  DIURET = 1;
  DHDTR = 0.05;
  DTNAR = 0.675;
  DTNARL = 1e-6;
  EARK = 1;
  EARLL = 24;
  EFAFR = 0;
  EXC = 1;
  EXCML = 0.01;
  EXCXP = 1;
  EXCXP2 = 0.17;
  EXE = 0;
  GCOPF = 0.8092;
  GFLC = 0.0208333;
  GFNDMP = 3;
  GFNLL = 0.001;
  GPPD = 1;
  HM6 = 1850;
  HM8 = 4.714e-8;
  HTAUML = 0.4;
  KORGN = 1;
  KORNER = 0;
  KORREN = 0;
  KORTC = 10000;
  LPDE = 8;
  LPK = 2.728e-14;
  LPPR = 0.03;
  MDFL1 = 10;
  MDFLKM = 0.667;
  MDFLW2 = 0.005;
  MDFLWX = 0.01;
  MDMP = 0;
  O2A = 0.1;
  O2CHMO = 0.01;
  OMM = 57.1;
  PA4 = 1;
  PAEX = 2;
  PCE = 1;
  PCR = 15;
  PR1LL = 0;
  PGHF = -2;
  PK2 = 0.79167;
  PL2 = 1.8;
  PLDF = 4.2;
  PM5 = 30;
  PO2ADV = 0.001;
  POK = 0.1;
  POM = 0.04;
  POM2 = 2;
  PON = 0.1;
  POR = 35;
  POZ = 2;
  PXTP = 8;
  QAOLM = 0.2;
  QRF = 0.15;
  RABSC = 0.5;
  RAM = 96.3;
  RAPRSP = 0;
  RAR = 30.52;
  RCDFDP = 2000;
  RCDFPC = 0;
  REK = 1;
  RFABKM = 0.03;
  RFABDM = 0.3;
  RFABDP = 1;
  RFCDFT = 0;
  RKC = 5.8e-6;
  RNAGTC = 15;
  RNAUAD = 0;
  RPS = 0;
  RTPPR = 0.9;
  RTPPRS = 15.2;
  RTSPRS = 6;
  RVRS = 19.167;
  RVSM = 1;
  SR = 1;
  SR2 = 1;
  SRK = 5;
  SRK2 = 10000;
  STA = 0;
  TENSGN = 0;
  TENSTC = 0.05;
  TIMETR = 0;
  TRNSFS = 0;
  TRPL = 0;
  TSSLML = 0.15;
  TSSLTC = 0.005;
  TVDDL = 30;
  U = 4;
  VID1 = 0.01;
  VIDML = 0.01;
  VNTSTM = 1;
  VP1 = 0.01;
  VPTISS = 0.0175;
  VTSF = 6;
  VV9 = 2.51;
  X = 4;
  Z = 1;
  Z4 = 0.5;
  Z5 = 0.3;
  Z6 = 20;
  Z7 = 5;
  Z10 = 45;
  Z11 = 0.01;
  Z12 = 5;
  Z13 = 0.625;
  Z14 = 5;
  Z16 = 5;
  Z18 = 5;
  Z19 = 5;
  KID = 0.08;
  URFORM = 0.24;
  AUV = 0.55;
  AUY = 0;
  O2M = 164;
  NID = 0.1;
  ATRFBM = 0;
  GBL = 0;
  RNAUGN = 0.6;
  RNAULL = 0.3;
  RNAUUL = 10;
  HSR = 1;
  HSL = 1;
  HMK = 90;
  PO2AMB = 150;
  HKM = 0.53333;
  DR = 0;
  ANPKNS = 0;
  RMULT1 = 1;
  GLPCA = 1;
  RFN = 1.22057;
  RFABX = 0.8;
  ANPINF = 0;
  FIS = 0;
  CPPD = 31.9719;
  TRRBC = 0;
  HYL = 60;
  ATRVM = 0;
  ADHC_init = 1;
  AHY_init = 0.301963;
  AMC_init = 1;
  AMM1T_init = 1.00269;
  AMM2_init = 1.09071;
  ANC_init = 0.859476;
  ANPC_init = 1;
  ANX1_init = 0;
  AR1T_init = 1.02127;
  AR2T_init = 1.01179;
  AR3T_init = 1.1448;
  AU1_init = 1.00007;
  AU4_init = -0.060024;
  AU6_init = 1.00132;
  DTKA_init = 0.0367573;
  HMD1_init = 1;
  HPL_init = 1.00163;
  HPR_init = 1.00237;
  KTOT_init = 3622.54;
  NAE_init = 2109.91;
  O2VAD1_init = 2.368e-7;
  OSV_init = 0.694163;
  OVA_init = 204.497;
  OVS_init = 0.699673;
  PAR1_init = 103.525;
  PC_init = 16.9144;
  PLUR_init = 159.549;
  PPR1_init = 0.419998;
  PRP_init = 216.243;
  QO2T_init = 72.2362;
  QOM1_init = 48.0839;
  RNAUG3_init = 0;
  TSP_init = 279.945;
  TVD_init = 0.000980838;
  VAS1_init = 0.862514;
  VIC_init = 25.0404;
  VLA1_init = 0.379883;
  VPA1_init = 0.38131;
  VPF1_init = 0.0123238;
  VP_init = 3.00449;
  VRA1_init = 0.100043;
  VRC_init = 2.00439;
  VTS2_init = 0;
  VTW_init = 39.8952;
  VV6_init = 0.0101913;
  VV7_init = 0.00366525;
  VVS1_init = 3.28246;
  volume_receptors_A1K = 0.5;
  volume_receptors_A2K = 60;
  volume_receptors_A3K = 40000;
  volume_receptors_A4K = 0.1;
  volume_receptors_A4K2 = 40000;
  volume_receptors_AARK = 1;
  volume_receptors_AARLL = 4;
  volume_receptors_ADHINF = 0;
  volume_receptors_ADHKLL = 0.2;
  volume_receptors_ADHKUL = 5;
  volume_receptors_ADHPAM = 0.3;
  volume_receptors_ADHPUL = 85;
  volume_receptors_ADHTC = 15;
  volume_receptors_ADHVLL = 0.93617;
  volume_receptors_ADHVUL = 2.5;
  volume_receptors_AH10 = 0.333;
  volume_receptors_AH11 = 1000;
  volume_receptors_AH9 = 1;
  volume_receptors_AHMNAR = 0.3;
  volume_receptors_AHTHM = 2;
  volume_receptors_ALCLK = 0.3;
  volume_receptors_ALDINF = 0;
  volume_receptors_ALDKNS = 0;
  volume_receptors_ALDMM = 2.5;
  volume_receptors_AM1LL = 0;
  volume_receptors_AM1UL = 5;
  volume_receptors_AMCSNS = 0.65;
  volume_receptors_AMKM = 0.5;
  volume_receptors_AMKMUL = 12;
  volume_receptors_AMM1LM = 0.005;
  volume_receptors_AMM4 = 0.005;
  volume_receptors_AMNALL = 0.04;
  volume_receptors_AMNAM = 0.8;
  volume_receptors_AMNAUL = 15;
  volume_receptors_AMT = 60;
  volume_receptors_ANCSNS = 0.4;
  volume_receptors_ANGINF = 0;
  volume_receptors_ANGKNS = 0;
  volume_receptors_ANMALD = 2.5;
  volume_receptors_ANMAM = 1.4;
  volume_receptors_ANMARL = 0.86;
  volume_receptors_ANMEM = 1.6;
  volume_receptors_ANMKEL = 0.3;
  volume_receptors_ANMKEM = 2;
  volume_receptors_ANMLL = 0.7;
  volume_receptors_ANMNAM = 1;
  volume_receptors_ANMSLT = 2;
  volume_receptors_ANMTM = 1.5;
  volume_receptors_ANMUL = 1.8;
  volume_receptors_ANPTC = 4;
  volume_receptors_ANPXAF = 1.5;
  volume_receptors_ANPXUL = 10;
  volume_receptors_ANT = 12;
  volume_receptors_ANULL = 0.8;
  volume_receptors_ANUM = 6;
  volume_receptors_ANUVM = 0;
  volume_receptors_ANV = 5000;
  volume_receptors_ANXM = 0;
  volume_receptors_ANY = -0.2;
  volume_receptors_AR1LM = 0.005;
  volume_receptors_AR2LM = 0.005;
  volume_receptors_ARF = 0.5;
  volume_receptors_AUC1 = 0.3;
  volume_receptors_AUDMP = 0.3;
  volume_receptors_AUK = 0.004;
  volume_receptors_AUL = 1.5;
  volume_receptors_AULPM = 0;
  volume_receptors_AUM1 = 3;
  volume_receptors_AUM2 = 1;
  volume_receptors_AUMAX = 5;
  volume_receptors_AUMIN = 0.4;
  volume_receptors_AUMK1 = 0.3;
  volume_receptors_AUN1 = 0.5;
  volume_receptors_AURG = 1;
  volume_receptors_AUS = 1;
  volume_receptors_AUSLP = 1.5;
  volume_receptors_AUTO = 0;
  volume_receptors_AUTOGN = 7;
  volume_receptors_AUTOSN = 0.9;
  volume_receptors_AUX = 1;
  volume_receptors_BAROTC = 0.16;
  volume_receptors_CFC = 0.01167;
  volume_receptors_CKEEX = 4;
  volume_receptors_CMPTSS = 2;
  volume_receptors_CN2 = 0.0212;
  volume_receptors_CN7 = 0.2;
  volume_receptors_CNR = 139;
  volume_receptors_CPF = 0.0003;
  volume_receptors_CPK = 0.000253;
  volume_receptors_CPR = 40;
  volume_receptors_CV = 0.1;
  volume_receptors_CRRFLX = 0;
  volume_receptors_DIURET = 1;
  volume_receptors_DHDTR = 0.05;
  volume_receptors_DTNAR = 0.675;
  volume_receptors_DTNARL = 1e-6;
  volume_receptors_EARK = 1;
  volume_receptors_EARLL = 24;
  volume_receptors_EFAFR = 0;
  volume_receptors_EXC = 1;
  volume_receptors_EXCML = 0.01;
  volume_receptors_EXCXP = 1;
  volume_receptors_EXCXP2 = 0.17;
  volume_receptors_EXE = 0;
  volume_receptors_GCOPF = 0.8092;
  volume_receptors_GFLC = 0.0208333;
  volume_receptors_GFNDMP = 3;
  volume_receptors_GFNLL = 0.001;
  volume_receptors_GPPD = 1;
  volume_receptors_HM6 = 1850;
  volume_receptors_HM8 = 4.714e-8;
  volume_receptors_HTAUML = 0.4;
  volume_receptors_KORGN = 1;
  volume_receptors_KORNER = 0;
  volume_receptors_KORREN = 0;
  volume_receptors_KORTC = 10000;
  volume_receptors_LPDE = 8;
  volume_receptors_LPK = 2.728e-14;
  volume_receptors_LPPR = 0.03;
  volume_receptors_MDFL1 = 10;
  volume_receptors_MDFLKM = 0.667;
  volume_receptors_MDFLW2 = 0.005;
  volume_receptors_MDFLWX = 0.01;
  volume_receptors_MDMP = 0;
  volume_receptors_O2A = 0.1;
  volume_receptors_O2CHMO = 0.01;
  volume_receptors_OMM = 57.1;
  volume_receptors_PA4 = 1;
  volume_receptors_PAEX = 2;
  volume_receptors_PCE = 1;
  volume_receptors_PCR = 15;
  volume_receptors_PR1LL = 0;
  volume_receptors_PGHF = -2;
  volume_receptors_PK2 = 0.79167;
  volume_receptors_PL2 = 1.8;
  volume_receptors_PLDF = 4.2;
  volume_receptors_PM5 = 30;
  volume_receptors_PO2ADV = 0.001;
  volume_receptors_POK = 0.1;
  volume_receptors_POM = 0.04;
  volume_receptors_POM2 = 2;
  volume_receptors_PON = 0.1;
  volume_receptors_POR = 35;
  volume_receptors_POZ = 2;
  volume_receptors_PXTP = 8;
  volume_receptors_QAOLM = 0.2;
  volume_receptors_QRF = 0.15;
  volume_receptors_RABSC = 0.5;
  volume_receptors_RAM = 96.3;
  volume_receptors_RAPRSP = 0;
  volume_receptors_RAR = 30.52;
  volume_receptors_RCDFDP = 2000;
  volume_receptors_RCDFPC = 0;
  volume_receptors_REK = 1;
  volume_receptors_RFABKM = 0.03;
  volume_receptors_RFABDM = 0.3;
  volume_receptors_RFABDP = 1;
  volume_receptors_RFCDFT = 0;
  volume_receptors_RKC = 5.8e-6;
  volume_receptors_RNAGTC = 15;
  volume_receptors_RNAUAD = 0;
  volume_receptors_RPS = 0;
  volume_receptors_RTPPR = 0.9;
  volume_receptors_RTPPRS = 15.2;
  volume_receptors_RTSPRS = 6;
  volume_receptors_RVRS = 19.167;
  volume_receptors_RVSM = 1;
  volume_receptors_SR = 1;
  volume_receptors_SR2 = 1;
  volume_receptors_SRK = 5;
  volume_receptors_SRK2 = 10000;
  volume_receptors_STA = 0;
  volume_receptors_TENSGN = 0;
  volume_receptors_TENSTC = 0.05;
  volume_receptors_TIMETR = 0;
  volume_receptors_TRNSFS = 0;
  volume_receptors_TRPL = 0;
  volume_receptors_TSSLML = 0.15;
  volume_receptors_TSSLTC = 0.005;
  volume_receptors_TVDDL = 30;
  volume_receptors_U = 4;
  volume_receptors_VID1 = 0.01;
  volume_receptors_VIDML = 0.01;
  volume_receptors_VNTSTM = 1;
  volume_receptors_VP1 = 0.01;
  volume_receptors_VPTISS = 0.0175;
  volume_receptors_VTSF = 6;
  volume_receptors_VV9 = 2.51;
  volume_receptors_X = 4;
  volume_receptors_Z = 1;
  volume_receptors_Z4 = 0.5;
  volume_receptors_Z5 = 0.3;
  volume_receptors_Z6 = 20;
  volume_receptors_Z7 = 5;
  volume_receptors_Z10 = 45;
  volume_receptors_Z11 = 0.01;
  volume_receptors_Z12 = 5;
  volume_receptors_Z13 = 0.625;
  volume_receptors_Z14 = 5;
  volume_receptors_Z16 = 5;
  volume_receptors_Z18 = 5;
  volume_receptors_Z19 = 5;
  volume_receptors_KID = 0.08;
  volume_receptors_URFORM = 0.24;
  volume_receptors_AUV = 0.55;
  volume_receptors_AUY = 0;
  volume_receptors_O2M = 164;
  volume_receptors_NID = 0.1;
  volume_receptors_ATRFBM = 0;
  volume_receptors_GBL = 0;
  volume_receptors_RNAUGN = 0.6;
  volume_receptors_RNAULL = 0.3;
  volume_receptors_RNAUUL = 10;
  volume_receptors_HSR = 1;
  volume_receptors_HSL = 1;
  volume_receptors_HMK = 90;
  volume_receptors_PO2AMB = 150;
  volume_receptors_HKM = 0.53333;
  volume_receptors_DR = 0;
  volume_receptors_ANPKNS = 0;
  volume_receptors_RMULT1 = 1;
  volume_receptors_GLPCA = 1;
  volume_receptors_RFN = 1.22057;
  volume_receptors_RFABX = 0.8;
  volume_receptors_ANPINF = 0;
  volume_receptors_FIS = 0;
  volume_receptors_CPPD = 31.9719;
  volume_receptors_TRRBC = 0;
  volume_receptors_HYL = 60;
  volume_receptors_ATRVM = 0;
  volume_receptors_ADHC_init = 1;
  volume_receptors_AHY_init = 0.301963;
  volume_receptors_AMC_init = 1;
  volume_receptors_AMM1T_init = 1.00269;
  volume_receptors_AMM2_init = 1.09071;
  volume_receptors_ANC_init = 0.859476;
  volume_receptors_ANPC_init = 1;
  volume_receptors_ANX1_init = 0;
  volume_receptors_AR1T_init = 1.02127;
  volume_receptors_AR2T_init = 1.01179;
  volume_receptors_AR3T_init = 1.1448;
  volume_receptors_AU1_init = 1.00007;
  volume_receptors_AU4_init = -0.060024;
  volume_receptors_AU6_init = 1.00132;
  volume_receptors_DTKA_init = 0.0367573;
  volume_receptors_HMD1_init = 1;
  volume_receptors_HPL_init = 1.00163;
  volume_receptors_HPR_init = 1.00237;
  volume_receptors_KTOT_init = 3622.54;
  volume_receptors_NAE_init = 2109.91;
  volume_receptors_O2VAD1_init = 2.368e-7;
  volume_receptors_OSV_init = 0.694163;
  volume_receptors_OVA_init = 204.497;
  volume_receptors_OVS_init = 0.699673;
  volume_receptors_PAR1_init = 103.525;
  volume_receptors_PC_init = 16.9144;
  volume_receptors_PLUR_init = 159.549;
  volume_receptors_PPR1_init = 0.419998;
  volume_receptors_PRP_init = 216.243;
  volume_receptors_QO2T_init = 72.2362;
  volume_receptors_QOM1_init = 48.0839;
  volume_receptors_RNAUG3_init = 0;
  volume_receptors_TSP_init = 279.945;
  volume_receptors_TVD_init = 0.000980838;
  volume_receptors_VAS1_init = 0.862514;
  volume_receptors_VIC_init = 25.0404;
  volume_receptors_VLA1_init = 0.379883;
  volume_receptors_VPA1_init = 0.38131;
  volume_receptors_VPF1_init = 0.0123238;
  volume_receptors_VP_init = 3.00449;
  volume_receptors_VRA1_init = 0.100043;
  volume_receptors_VRC_init = 2.00439;
  volume_receptors_VTS2_init = 0;
  volume_receptors_VTW_init = 39.8952;
  volume_receptors_VV6_init = 0.0101913;
  volume_receptors_VV7_init = 0.00366525;
  volume_receptors_VVS1_init = 3.28246;
  volume_receptors_AHY = volume_receptors_AHY_init;
  time_ = ;

  // Assignment rules:
  ATRRFB := volume_receptors_AH7*volume_receptors_ATRFBM + 1;
  ATRVFB := volume_receptors_AH7*volume_receptors_ATRVM;
  volume_receptors_AHZ := ;
  volume_receptors_effect_of_pressure_on_volume_receptors_AHZ1 := abs(PRA)^volume_receptors_AH10*volume_receptors_AH9;
  volume_receptors_AH7 := volume_receptors_AHZ - volume_receptors_AHY;

  // Rate rules:
  volume_receptors_AHY' = (volume_receptors_AHZ - volume_receptors_AHY)/volume_receptors_AH11;
end
