// SBML level 2 version 4

model haugh_model_2004_version01____main()
  // Originally created by libAntimony v1.3 (using libSBML 4.1.0-b2)

  // Compartments:
  compartment default_compartment = 1;

  // Parameters:
  C0 = 0;
  kf1 = 0.1;
  kx2 = 4.83;
  k_x2 = 0.016;
  kt = 0.005;
  D0 = 0;
  L = 0.01;
  R0 = 2000;
  ke = 0.1;
  R_initial = 2000;
  krec = 0;
  Ri0 = 200;
  Vs = 10;
  kdeg = 0.05;
  kappaE = 0.2;
  model_parameters_KD = 1;
  time_ = ;

  // Assignment rules:
  kr1 := model_parameters_KD*kf1;
  k_x1 := 0.01*kr1;
  signal_signal := 2*D0/R_initial/(kappaE + 2*D0/R_initial);

  // Rate rules:
  C0' = kf1*L*R0 + k_x2*D0 - (kr1 + kx2*R0 + kt)*C0;
  D0' = kx2*R0*C0 - (k_x2 + k_x1 + ke)*D0;
  R0' = Vs + kr1*C0 + (k_x2 + 2*k_x1)*D0 + krec*Ri0 - (kf1*L + kx2*C0 + kt)*R0;
  Ri0' = kt*(R0 + C0) - (krec + kdeg)*Ri0;
end
