// SBML level 2 version 4

model heldt_circ_pbpk_2002____main()
  // Originally created by libAntimony v1.4 (using libSBML 4.1.0-b2)

  // Compartments:
  compartment default_compartment = 1;

  // Parameters:
  HR = 77;
  LAElastanceFunction_Esys = 0.145;
  LAElastanceFunction_Edia = 0.131;
  LAElastanceFunction_TsK = 0.2;
  LeftAtrium_P_LA_ext = 0;
  V_LA = 144.0389;
  LeftAtrium_V_LA_0 = 15;
  LeftAtrium_R_LA = 0.01;
  LeftAtrium_sub_X_LA = 0;
  LVTiming_PRint = 0.12;
  LVElastanceFunction_Esys = 5.6;
  LVElastanceFunction_Edia = 0.19;
  LVElastanceFunction_TsK = 0.35;
  LeftVentricle_pLVPext = 0;
  V_LV = 118.7532;
  LeftVentricle_V_LV_0 = 30;
  LeftVentricle_R_LV = 0.001;
  LeftVentricle_sub_X_LV = 0;
  Aorta_C_AO = 1.2;
  Aorta_L_AO = 5e-5;
  Aorta_R_AO = 0.01;
  Aorta_V_AO_0 = 200;
  V_AO = 302.7145;
  Aorta_F_AOalways = -6898.979;
  Aorta_sub_X_AO = 0;
  CoronaryCirc_R_CO = 1;
  CoronaryCirc_R_COV = 0.2;
  CoronaryCirc_V_CO_0 = 10;
  CoronaryCirc_C_CO = 0.1;
  V_CO = 11.40122;
  CoronaryCirc_sub_X_CO = 0;
  CarotidCirc_R_CR = 5;
  CarotidCirc_R_CRV = 0.02;
  CarotidCirc_V_CR_0 = 10;
  CarotidCirc_C_CR = 1;
  V_CR = 27.21479;
  CarotidCirc_sub_X_CR = 0;
  CarotidCirc_D_CRtissue = 1;
  CarotidCirc_V_CRtissue = 1;
  CarotidCirc_sub_X_CRtissue = 0;
  Arteries_R_AR = 1.5;
  Arteries_C_AR = 0.5;
  Arteries_V_AR_0 = 370;
  V_AR = 383.5571;
  Arteries_sub_X_AR = 0;
  Adipose_C_AD = 1.81;
  Adipose_R_AD = 1;
  Adipose_R_ADV = 0.33;
  Adipose_V_AD_0 = 75;
  V_AD = 111.6391;
  Adipose_sub_X_AD = 0;
  Muscle_C_MU = 1.81;
  Muscle_R_MU = 1;
  Muscle_R_MUV = 0.33;
  Muscle_V_MU_0 = 75;
  V_MU = 111.6391;
  Muscle_sub_X_MU = 0;
  GutIntestine_C_GI = 1.81;
  GutIntestine_R_GI = 1;
  GutIntestine_R_GIV = 0.33;
  GutIntestine_V_GI_0 = 75;
  V_GI = 111.6391;
  GutIntestine_sub_X_GI = 0;
  Liver_C_LI = 1.81;
  Liver_R_LI = 1;
  Liver_R_LIV = 0.33;
  Liver_V_LI_0 = 75;
  V_LI = 111.6391;
  Liver_sub_X_LI = 0;
  Liver_metabolism = 0;
  Kidney_C_KI = 1.81;
  Kidney_R_KI = 1;
  Kidney_V_KI_0 = 75;
  Kidney_R_KIV = 0.33;
  V_KI = 111.6391;
  Kidney_sub_X_KI = 0;
  Skin_C_SK = 1.81;
  Skin_R_SK = 1;
  Skin_R_SKV = 0.33;
  Skin_V_SK_0 = 75;
  V_SK = 111.6391;
  Skin_sub_X_SK = 0;
  OtherTissue_C_OT = 1.81;
  OtherTissue_R_OT = 1;
  OtherTissue_R_OTV = 0.33;
  OtherTissue_V_OT_0 = 75;
  V_OT = 111.6391;
  OtherTissue_sub_X_OT = 0;
  Veins_R_VEV = 0.0223;
  V_VE = 833.2917;
  Veins_C_VE = 13.24;
  Veins_V_VE_0 = 596;
  Veins_sub_X_VE = 5;
  VenaCava_R_VCV = 0.0267;
  V_VC = 1849.938;
  VenaCava_V_VC_0 = 600;
  VenaCava_C_VC = 73.88;
  VenaCava_sub_X_VC = 0;
  RAElastanceFunction_Esys = 0.11;
  RAElastanceFunction_Edia = 0.099;
  RAElastanceFunction_TsK = 0.2;
  RightAtrium_P_RA_ext = 0;
  V_RA = 152.1508;
  RightAtrium_V_RA_0 = 15;
  RightAtrium_sub_X_RA = 0;
  RVTiming_PRinterval = 0.12;
  RVElastanceFunction_Esys = 0.67;
  RVElastanceFunction_Edia = 0.104;
  RVElastanceFunction_TsK = 0.35;
  RightVentricle_P_RV_ext = 0;
  V_RV = 154.3379;
  RightVentricle_V_RV_0 = 25;
  RightVentricle_R_RV = 0.002;
  RightVentricle_sub_X_RV = 0;
  PulmonaryArtery_R_PA = 0.0227;
  PulmonaryArtery_C_PA = 2.222;
  PulmonaryArtery_V_PA_0 = 50;
  V_PA = 112.059;
  PulmonaryArtery_sub_X_PA = 0;
  V_Pa = 66.99105;
  PulmonaryArteries_C_Pa = 1.481;
  PulmonaryArteries_R_Pa = 0.053;
  PulmonaryArteries_V_Pa_0 = 30;
  PulmonaryArteries_sub_X_Pa = 0;
  Shunt_R_SH = 2;
  PulmonaryCapillaries_C_PC = 1.778;
  PulmonaryCapillaries_R_PC = 0.0379;
  PulmonaryCapillaries_R_PCV = 0.0379;
  PulmonaryCapillaries_V_PC_0 = 53;
  V_PC = 91.77842;
  PulmonaryCapillaries_sub_X_PC = 0;
  PulmonaryVein_C_PV = 5;
  PulmonaryVein_V_PV_0 = 150;
  V_PV = 239.259;
  PulmonaryVein_sub_X_PV = 0;
  time_ = ;

  // Assignment rules:
  hrf := HR/0.06;
  beattime0 := (time_ - floor(time_/hrf)*hrf)/1000;
  LAElastanceFunction_Ts := LAElastanceFunction_TsK*sqrt(hrf/1000);
  E_LA := ;
  P_PV := 1/PulmonaryVein_C_PV*(V_PV - PulmonaryVein_V_PV_0);
  F_LV := ;
  P_LA := E_LA*(V_LA - LeftAtrium_V_LA_0) + LeftAtrium_P_LA_ext;
  F_LA := (P_PV - P_LA)/LeftAtrium_R_LA;
  conc_X_LA := LeftAtrium_sub_X_LA/V_LA;
  conc_X_PV := PulmonaryVein_sub_X_PV/V_PV;
  beattime := (time_ - floor(time_/hrf)*hrf)/1000 - LVTiming_PRint;
  LVElastanceFunction_Ts := LVElastanceFunction_TsK*sqrt(hrf/1000);
  E_LV := ;
  F_AO := ;
  F_CO := ;
  P_LV := E_LV*(V_LV - LeftVentricle_V_LV_0) + LeftVentricle_pLVPext;
  conc_X_LV := LeftVentricle_sub_X_LV/V_LV;
  LeftVentricle_fiber_stress := P_LV*(1 + 3*V_LV/200);
  F_CR := (P_AO - P_CR)/CarotidCirc_R_CR;
  F_AR := (P_AO - P_AR)/Arteries_R_AR;
  P_AO := 1/Aorta_C_AO*(V_AO - Aorta_V_AO_0);
  conc_X_AO := Aorta_sub_X_AO/V_AO;
  P_RA := E_RA*(V_RA - RightAtrium_V_RA_0) + RightAtrium_P_RA_ext;
  F_COV := (P_CO - P_RA)/CoronaryCirc_R_COV;
  P_CO := 1/CoronaryCirc_C_CO*(V_CO - CoronaryCirc_V_CO_0);
  conc_X_CO := CoronaryCirc_sub_X_CO/V_CO;
  P_VC := 1/VenaCava_C_VC*(V_VC - VenaCava_V_VC_0);
  F_CRV := (P_CR - P_VC)/CarotidCirc_R_CRV;
  P_CR := 1/CarotidCirc_C_CR*(V_CR - CarotidCirc_V_CR_0);
  conc_X_CR := CarotidCirc_sub_X_CR/V_CR;
  CarotidCirc_conc_X_CRtissue := CarotidCirc_sub_X_CRtissue/CarotidCirc_V_CRtissue;
  F_AD := (P_AR - P_AD)/Adipose_R_AD;
  F_MU := (P_AR - P_MU)/Muscle_R_MU;
  F_GI := (P_AR - P_GI)/GutIntestine_R_GI;
  F_LI := (P_AR - P_LI)/Liver_R_LI;
  F_KI := (P_AR - P_KI)/Kidney_R_KI;
  F_OT := (P_AR - P_OT)/OtherTissue_R_OT;
  F_SK := (P_AR - P_SK)/Skin_R_SK;
  P_AR := 1/Arteries_C_AR*(V_AR - Arteries_V_AR_0);
  conc_X_AR := Arteries_sub_X_AR/V_AR;
  P_VE := 1/Veins_C_VE*(V_VE - Veins_V_VE_0);
  F_ADV := (P_AD - P_VE)/Adipose_R_ADV;
  P_AD := 1/Adipose_C_AD*(V_AD - Adipose_V_AD_0);
  conc_X_AD := Adipose_sub_X_AD/V_AD;
  F_MUV := (P_MU - P_VE)/Muscle_R_MUV;
  P_MU := 1/Muscle_C_MU*(V_MU - Muscle_V_MU_0);
  conc_X_MU := Muscle_sub_X_MU/V_MU;
  P_LI := 1/Liver_C_LI*(V_LI - Liver_V_LI_0);
  F_GIV := (P_GI - P_LI)/GutIntestine_R_GIV;
  P_GI := 1/GutIntestine_C_GI*(V_GI - GutIntestine_V_GI_0);
  conc_X_GI := GutIntestine_sub_X_GI/V_GI;
  F_LIV := (P_LI - P_VE)/Liver_R_LIV;
  conc_X_LI := Liver_sub_X_LI/V_LI;
  F_KIV := (P_KI - P_VE)/Kidney_R_KIV;
  P_KI := 1/Kidney_C_KI*(V_KI - Kidney_V_KI_0);
  conc_X_KI := Kidney_sub_X_KI/V_KI;
  F_SKV := (P_SK - P_VE)/Skin_R_SKV;
  P_SK := 1/Skin_C_SK*(V_SK - Skin_V_SK_0);
  conc_X_SK := Skin_sub_X_SK/V_SK;
  F_OTV := (P_OT - P_VE)/OtherTissue_R_OTV;
  P_OT := 1/OtherTissue_C_OT*(V_OT - OtherTissue_V_OT_0);
  conc_X_OT := OtherTissue_sub_X_OT/V_OT;
  F_VE := F_SKV + F_ADV + F_MUV + F_LIV + F_KIV + F_OTV;
  F_VEV := (P_VE - P_VC)/Veins_R_VEV;
  conc_X_VE := Veins_sub_X_VE/V_VE;
  F_VC := F_CRV + F_VEV;
  F_VCV := (P_VC - P_RA)/VenaCava_R_VCV;
  conc_X_VC := VenaCava_sub_X_VC/V_VC;
  time_0 := (time_ - floor(time_/hrf)*hrf)/1000;
  RAElastanceFunction_Ts := RAElastanceFunction_TsK*sqrt(hrf/1000);
  E_RA := ;
  F_RV := ;
  F_RA := F_VCV + F_COV;
  conc_X_RA := RightAtrium_sub_X_RA/V_RA;
  time_1 := (time_ - floor(time_/hrf)*hrf)/1000 - RVTiming_PRinterval;
  RVElastanceFunction_Ts := RVElastanceFunction_TsK*sqrt(hrf/1000);
  E_RV := ;
  F_PA := ;
  P_RV := E_RV*(V_RV - RightVentricle_V_RV_0) + RightVentricle_P_RV_ext;
  conc_X_RV := RightVentricle_sub_X_RV/V_RV;
  F_Pa := (P_PA - P_Pa)/PulmonaryArteries_R_Pa;
  P_PA := 1/PulmonaryArtery_C_PA*(V_PA - PulmonaryArtery_V_PA_0);
  conc_X_PA := PulmonaryArtery_sub_X_PA/V_PA;
  F_PC := (P_Pa - P_PC)/PulmonaryCapillaries_R_PC;
  F_SH := (P_Pa - P_PC)/Shunt_R_SH;
  P_Pa := 1/PulmonaryArteries_C_Pa*(V_Pa - PulmonaryArteries_V_Pa_0);
  conc_X_Pa := PulmonaryArteries_sub_X_Pa/V_Pa;
  P_PC := 1/PulmonaryCapillaries_C_PC*(V_PC - PulmonaryCapillaries_V_PC_0);
  F_PCV := (P_PC - P_PV)/PulmonaryCapillaries_R_PCV;
  conc_X_PC := PulmonaryCapillaries_sub_X_PC/V_PC;
  F_PV := F_PCV + F_SH;

  // Rate rules:
  V_LA' = (F_LA - F_LV)/1000;
  LeftAtrium_sub_X_LA' = (conc_X_PV*F_LA - conc_X_LA*F_LV)/1000;
  V_LV' = (F_LV - F_AO - F_CO)/1000;
  LeftVentricle_sub_X_LV' = (conc_X_LA*F_LV - conc_X_LV*(F_AO + F_CO))/1000;
  V_AO' = (F_AO - F_AR - F_CR)/1000;
  Aorta_F_AOalways' = (1/Aorta_L_AO*(P_LV - P_AO) - Aorta_R_AO/Aorta_L_AO*Aorta_F_AOalways)/1000;
  Aorta_sub_X_AO' = (conc_X_LV*F_AO - conc_X_AO*(F_CR + F_AR))/1000;
  V_CO' = (F_CO - F_COV)/1000;
  CoronaryCirc_sub_X_CO' = (conc_X_LV*F_CO - conc_X_CO*F_COV)/1000;
  V_CR' = (F_CR - F_CRV)/1000;
  CarotidCirc_sub_X_CR' = (conc_X_AO*F_CR - conc_X_CR*F_CRV - (conc_X_CR - CarotidCirc_conc_X_CRtissue)*CarotidCirc_D_CRtissue)/1000;
  CarotidCirc_sub_X_CRtissue' = (conc_X_CR - CarotidCirc_conc_X_CRtissue)*CarotidCirc_D_CRtissue/1000;
  V_AR' = (F_AR - F_AD - F_MU - F_GI - F_LI - F_KI - F_OT - F_SK)/1000;
  Arteries_sub_X_AR' = (conc_X_AO*F_AR - conc_X_AR*(F_SK + F_AD + F_MU + F_GI + F_LI + F_KI + F_OT))/1000;
  V_AD' = (F_AD - F_ADV)/1000;
  Adipose_sub_X_AD' = (conc_X_AR*F_AD - conc_X_AD*F_ADV)/1000;
  V_MU' = (F_MU - F_MUV)/1000;
  Muscle_sub_X_MU' = (conc_X_AR*F_MU - conc_X_MU*F_MUV)/1000;
  V_GI' = (F_GI - F_GIV)/1000;
  GutIntestine_sub_X_GI' = (conc_X_AR*F_GI - conc_X_GI*F_GIV)/1000;
  V_LI' = (F_GIV + F_LI - F_LIV)/1000;
  Liver_sub_X_LI' = (conc_X_GI*F_GIV + conc_X_AR*F_LI - conc_X_LI*F_LIV + conc_X_LI*Liver_metabolism)/1000;
  V_KI' = (F_KI - F_KIV)/1000;
  Kidney_sub_X_KI' = (conc_X_AR*F_KI - conc_X_KI*F_KIV)/1000;
  V_SK' = (F_SK - F_SKV)/1000;
  Skin_sub_X_SK' = (conc_X_AR*F_SK - conc_X_SK*F_SKV)/1000;
  V_OT' = (F_OT - F_OTV)/1000;
  OtherTissue_sub_X_OT' = (conc_X_AR*F_OT - conc_X_OT*F_OTV)/1000;
  V_VE' = (F_VE - F_VEV)/1000;
  Veins_sub_X_VE' = (conc_X_SK*F_SKV + conc_X_AD*F_ADV + conc_X_MU*F_MUV + conc_X_LI*F_LIV + conc_X_KI*F_KIV + conc_X_OT*F_OTV - conc_X_VE*F_VEV)/1000;
  V_VC' = (F_VC - F_VCV)/1000;
  VenaCava_sub_X_VC' = (conc_X_VE*F_VEV + conc_X_CR*F_CRV - conc_X_VC*F_VCV)/1000;
  V_RA' = (F_RA - F_RV)/1000;
  RightAtrium_sub_X_RA' = (conc_X_VC*F_VCV + conc_X_CO*F_COV - conc_X_RA*F_RV)/1000;
  V_RV' = (F_RV - F_PA)/1000;
  RightVentricle_sub_X_RV' = (conc_X_RA*F_RV - conc_X_RV*F_PA)/1000;
  V_PA' = (F_PA - F_Pa)/1000;
  PulmonaryArtery_sub_X_PA' = (conc_X_RV*F_PA - conc_X_PA*F_Pa)/1000;
  V_Pa' = (F_Pa - F_PC - F_SH)/1000;
  PulmonaryArteries_sub_X_Pa' = (conc_X_PA*F_Pa - conc_X_Pa*(F_PC + F_SH))/1000;
  V_PC' = (F_PC - F_PCV)/1000;
  PulmonaryCapillaries_sub_X_PC' = (conc_X_Pa*F_PC - conc_X_PC*F_PCV)/1000;
  V_PV' = (F_PV - F_LA)/1000;
  PulmonaryVein_sub_X_PV' = (conc_X_PC*F_PCV + conc_X_Pa*F_SH - conc_X_PV*F_LA)/1000;
end
