// SBML level 2 version 4

model heldt_lpc_2002____main()
  // Originally created by libAntimony v1.4 (using libSBML 4.1.0-b2)

  // Compartments:
  compartment default_compartment = 1;

  // Parameters:
  lpc_Vlvrd = 72;
  lpc_Vlvrs = 23;
  lpc_Vrvrd = 103;
  lpc_Vrvrs = 53;
  lpc_Vlard = 10;
  lpc_Vlars = 8;
  lpc_Vrard = 10;
  lpc_Vrars = 8;
  lpc_Rra = 0.001;
  lpc_Rla = 0.001;
  lpc_PRint = 0.12;
  lpc_Emaxlv = 5.6;
  lpc_Eminlv = 0.186874659;
  lpc_Emaxrv = 0.67;
  lpc_Eminrv = 0.1041641;
  lpc_Emaxra = 0.1091675;
  lpc_Eminra = 0.0992431888;
  lpc_Emaxla = 0.1446192;
  lpc_Eminla = 0.131472;
  lpc_Pbs = 0;
  lpc_Vmyo = 238;
  lpc_TsvK = 0.35;
  lpc_TsaK = 0.2;
  lpc_HR = 77;
  lpc_Vra = 78.2537;
  lpc_Vrv = 167.4806;
  lpc_Vla = 85.9126;
  lpc_Vlv = 125.360568;
  lpc_COutput = 108.5691;
  lpc_Rav = 0.0001;
  lpc_Raop = 0.0001;
  lpc_Rcrb = 6.828447;
  lpc_Raod = 0.025;
  lpc_Rtaop = 0.2;
  lpc_Rtaod = 0.3;
  lpc_Rsap = 0.025;
  lpc_Rsc = 0.1545055;
  lpc_Rsv = 0.1381298;
  lpc_Rsao = 0.5508058;
  lpc_Caop = 0.3445734;
  lpc_Caod = 1.454468;
  lpc_Csap = 1.484341;
  lpc_Csc_ = 7.982236;
  lpc_Laop = 0.00035;
  lpc_Laod = 0.00035;
  lpc_Kc = 497.7852;
  lpc_Do = 50;
  lpc_Vsa_o = 485.7625;
  lpc_Vsa_max = 577.7106;
  lpc_Kp1 = 0.03;
  lpc_Kp2 = 0.05;
  lpc_Kr = 0.01;
  lpc_tau_p = 0.1;
  lpc_Kv = 21.83;
  lpc_Vmax_sv = 3379.545;
  lpc_D2 = -5;
  lpc_K1 = 0.0968305478;
  lpc_K2 = 0.4;
  lpc_KR = 0.001;
  lpc_Ro = 0.025;
  lpc_Vo = 129.6486;
  lpc_Vmax_vc = 350.5314;
  lpc_Vmin_vc = 50.010747;
  lpc_COtau = 15;
  lpc_Pplc = -5.6;
  lpc_Px2 = 2;
  lpc_Vx8 = 8;
  lpc_Vx75 = 75;
  lpc_Vx1 = 1;
  lpc_Px1 = 1;
  lpc_F_vaso = 0.5;
  lpc_Paopc = 87.93968;
  lpc_MAP = 90.6179;
  lpc_Faop = 0.698577;
  lpc_Faod = 23.5957;
  lpc_Vaop = 31.1705;
  lpc_Vaod = 138.4476;
  lpc_Vsa = 519.7915;
  lpc_Vsap = 129.6439;
  lpc_Vsc = 256.8555;
  lpc_Vsv = 2961.6507;
  lpc_Vvc = 232.4664;
  lpc_Rpuv = 0.0001;
  lpc_Rtpap = 0.05;
  lpc_Rtpad = 0.05;
  lpc_Rpap = 0.0001;
  lpc_Rpad = 0.03;
  lpc_Rps = 4.295803;
  lpc_Rpa = 0.0565149137;
  lpc_Rpc = 0.0309026688;
  lpc_Rpv = 0.0001;
  lpc_Ctpap = 1.536593;
  lpc_Ctpad = 2.689367;
  lpc_Cpa = 3.132145;
  lpc_Cpc = 7.7147;
  lpc_Cpv = 27.87029;
  lpc_Lpa = 0.0001801907;
  lpc_Lpad = 0.0001932239;
  lpc_Vpap = 33.1398;
  lpc_Vpad = 60.11204;
  lpc_Vpa = 58.926;
  lpc_Vpc = 107.57022;
  lpc_Vpv = 293.0398;
  lpc_Fpap = 1.2282;
  lpc_Fpad = 57.1876;
  lpc_K_pcd = 1;
  lpc_phi_pcd = 40;
  lpc_Vpcd_o = 785;
  lpc_perifl = 15;
  lpc_Rcorao = 2.642367;
  lpc_Rcorea = 2.642367;
  lpc_Rcorla = 5.073345;
  lpc_Rcorsa = 5.073345;
  lpc_Rcorcap = 4.227788;
  lpc_Rcorsv = 0.4932479;
  lpc_Rcorlv = 0.4932479;
  lpc_Rcorev = 0.4932479;
  lpc_Ccorao = 0.13;
  lpc_Ccorea = 0.05507;
  lpc_Ccorla = 0.09129;
  lpc_Ccorsa = 0.15602;
  lpc_Ccorcap = 1.8;
  lpc_Ccorsv = 0.58155;
  lpc_Ccorlv = 0.68372;
  lpc_Ccorev = 0.832299;
  lpc_Vcorao = 2.76087;
  lpc_Vcorea = 4.41135;
  lpc_Vcorla = 4.992799;
  lpc_Vcorsa = 4.22047;
  lpc_Vcorcap = 8.55228;
  lpc_Vcorsv = 7.8362;
  lpc_Vcorlv = 8.213955;
  lpc_Vcorev = 8.76758;
  lpc_t = ;
  lpc_d = ;

  // Assignment rules:
  lpc_Elv := (lpc_Emaxlv - lpc_Eminlv)*lpc_ylv + lpc_Eminlv;
  lpc_Erv := (lpc_Emaxrv - lpc_Eminrv)*lpc_yrv + lpc_Eminrv;
  lpc_Era := (lpc_Emaxra - lpc_Eminra)*lpc_yra + lpc_Eminra;
  lpc_Ela := (lpc_Emaxla - lpc_Eminla)*lpc_yla + lpc_Eminla;
  lpc_Vlvr := (1 - lpc_ylv)*(lpc_Vlvrd - lpc_Vlvrs) + lpc_Vlvrs;
  lpc_Vrvr := (1 - lpc_yrv)*(lpc_Vrvrd - lpc_Vrvrs) + lpc_Vrvrs;
  lpc_Vlar := (1 - lpc_yla)*(lpc_Vlard - lpc_Vlars) + lpc_Vlars;
  lpc_Vrar := (1 - lpc_yra)*(lpc_Vrard - lpc_Vrars) + lpc_Vrars;
  lpc_Fra := ;
  lpc_Frv := ;
  lpc_Fla := ;
  lpc_Flv := ;
  lpc_Pra := (lpc_Vra - lpc_Vrar)*lpc_Era - lpc_Px2*1/(exp(lpc_Vra/lpc_Vx8) - 1);
  lpc_Prac := lpc_Pra + lpc_Ppcdc;
  lpc_Prv := (lpc_Vrv - lpc_Vrvr)*lpc_Erv - lpc_Px2*1/(exp(lpc_Vrv/lpc_Vx8) - 1);
  lpc_Prvc := lpc_Prv + lpc_Ppcdc;
  lpc_Pla := (lpc_Vla - lpc_Vlar)*lpc_Ela - lpc_Px2*1/(exp(lpc_Vla/lpc_Vx8) - 1);
  lpc_Plac := lpc_Pla + lpc_Ppcdc;
  lpc_Plv := (lpc_Vlv - lpc_Vlvr)*lpc_Elv - lpc_Px2*1/(exp(lpc_Vlv/lpc_Vx8) - 1);
  lpc_Plvc := lpc_Plv + lpc_Ppcdc;
  lpc_SV := lpc_COutput/lpc_HR*60;
  lpc_P_QRSwave := ;
  lpc_Tsv := lpc_TsvK*sqrt(1*1/lpc_HR)*7.745967;
  lpc_Tsa := lpc_TsaK*sqrt(1/lpc_HR)*7.745967;
  lpc_trela := lpc_beattime;
  lpc_trelv := lpc_beattime - lpc_PRint;
  lpc_Rvc := lpc_KR*(lpc_Vmax_vc/lpc_Vvc)^2 + lpc_Ro;
  lpc_Rsa := lpc_Rsao + lpc_Kr*exp(4*lpc_F_vaso) + lpc_Kr*(lpc_Vsa_max/lpc_Vsa)^2;
  lpc_Paop := lpc_Paopc - lpc_Pplc;
  lpc_Paod := lpc_Paodc - lpc_Pbs;
  lpc_Paodc := (lpc_Rtaod*lpc_Rcrb*lpc_Faop - lpc_Rtaod*lpc_Rcrb*lpc_Faod*0.06 + lpc_Vaod*lpc_Rcrb/lpc_Caod*0.06 - lpc_Rcrb*lpc_Px2/(exp(lpc_Vaod/lpc_Vx8) - 1)*0.06 + lpc_Pvcc*lpc_Rtaod*0.06)/(lpc_Rcrb + lpc_Rtaod)*16.66667;
  lpc_Psa_a := lpc_Kc*ln((lpc_Vsa - lpc_Vsa_o)/lpc_Do + 1);
  lpc_Psa_p := lpc_Kp1*exp(lpc_tau_p*(lpc_Vsa - lpc_Vsa_o)) + lpc_Kp2*(lpc_Vsa - lpc_Vsa_o)^2;
  lpc_Psa := lpc_F_vaso*lpc_Psa_a + (1 - lpc_F_vaso)*lpc_Psa_p;
  lpc_Psap := lpc_Vsap/lpc_Csap - lpc_Px2*1/(exp(lpc_Vsap/lpc_Vx8) - 1);
  lpc_Psc := lpc_Vsc/lpc_Csc_ - lpc_Px2*1/(exp(lpc_Vsc/lpc_Vx8) - 1);
  lpc_Psv := lpc_Kv*ln(lpc_Vmax_sv/lpc_Vsv - 0.99)*(-1);
  lpc_Pvc := ;
  lpc_Pvcc := lpc_Pvc + lpc_Pplc;
  lpc_Fsap := (lpc_Psap - lpc_Psa)/lpc_Rsap;
  lpc_Fsa := (lpc_Psa - lpc_Psc)/lpc_Rsa;
  lpc_Fsc := (lpc_Psc - lpc_Psv)/lpc_Rsc;
  lpc_Fsv := (lpc_Psv - lpc_Pvcc)/lpc_Rsv;
  lpc_Fvc := (lpc_Pvcc - lpc_Prac)/lpc_Rvc;
  lpc_Fcrb := (lpc_Paodc - lpc_Pvcc)/lpc_Rcrb;
  lpc_Vtot := lpc_Vra + lpc_Vrv + lpc_Vpap + lpc_Vpad + lpc_Vpa + lpc_Vpc + lpc_Vpv + lpc_Vla + lpc_Vlv + lpc_Vaop + lpc_Vaod + lpc_Vsa + lpc_Vsap + lpc_Vsc + lpc_Vsv + lpc_Vvc + lpc_perifl + lpc_Vcorcirc;
  lpc_SysArtVol := lpc_Vaop + lpc_Vaod + lpc_Vsa + lpc_Vsap;
  lpc_SysVenVol := lpc_Vsv + lpc_Vvc;
  lpc_PulArtVol := lpc_Vpap + lpc_Vpad + lpc_Vpa;
  lpc_PulVenVol := lpc_Vpv;
  lpc_VBcirc := lpc_Vtot - lpc_perifl;
  lpc_Ppl := lpc_Pplc - lpc_Pbs;
  lpc_Ppapc := ;
  lpc_Ppapc1 := (lpc_Rpuv*lpc_Vpap/lpc_Ctpap - lpc_Rpuv*lpc_Px2*1/(exp(lpc_Vpap/lpc_Vx8) - 1) + lpc_Prvc*lpc_Rtpap - lpc_Rpuv*lpc_Rtpap*lpc_Fpap*16.66667 + lpc_Pplc*lpc_Rpuv)/(lpc_Rtpap + lpc_Rpuv);
  lpc_Ppapc2 := lpc_Vpap/lpc_Ctpap + lpc_Pplc - lpc_Rtpap*lpc_Fpap*16.66667 - lpc_Px2*1/(exp(lpc_Vpap/lpc_Vx8) - 1);
  lpc_Ppap := lpc_Ppapc - lpc_Pplc;
  lpc_Ppad := lpc_Ppadc - lpc_Pplc;
  lpc_Ppadc := lpc_d(lpc_Vpad)/lpc_d(lpc_t)*lpc_Rtpad + lpc_Pplc + lpc_Vpad/lpc_Ctpad - lpc_Px2*1/(exp(lpc_Vpad/lpc_Vx8) - 1);
  lpc_Ppa := lpc_Vpa/lpc_Cpa - lpc_Px2*1/(exp(lpc_Vpa/lpc_Vx8) - 1);
  lpc_Ppac := lpc_Ppa + lpc_Pplc;
  lpc_Ppc := lpc_Vpc/lpc_Cpc - lpc_Px2*1/(exp(lpc_Vpc/lpc_Vx8) - 1);
  lpc_Ppcc := lpc_Ppc + lpc_Pplc;
  lpc_Ppv := lpc_Vpv/lpc_Cpv - lpc_Px2*1/(exp(lpc_Vpv/lpc_Vx8) - 1);
  lpc_Ppvc := lpc_Ppv + lpc_Pplc;
  lpc_Fps := (lpc_Ppac - lpc_Ppvc)/lpc_Rps;
  lpc_Fpa := (lpc_Ppac - lpc_Ppcc)/lpc_Rpa;
  lpc_Fpc := (lpc_Ppcc - lpc_Ppvc)/lpc_Rpc;
  lpc_Fpv := (lpc_Ppvc - lpc_Plac)/lpc_Rpv;
  lpc_Ppcd := lpc_K_pcd*exp((lpc_Vpcd - lpc_Vpcd_o)/lpc_phi_pcd) - lpc_Px2*1/(exp(lpc_Vpcd/lpc_Vx75) - 1);
  lpc_Ppcdc := lpc_Ppcd + lpc_Pplc;
  lpc_Vpcd := lpc_Vrv + lpc_Vra + lpc_Vlv + lpc_Vla + lpc_perifl + lpc_Vmyo + lpc_Vcorcirc;
  lpc_Pcorisfc := abs((lpc_Plvc - lpc_Ppcdc)/2);
  lpc_Pcoraoc := lpc_Paopc;
  lpc_Pcoreac := lpc_Pcorea + lpc_Ppcdc;
  lpc_Pcorlac := lpc_Pcorla + lpc_Pcorisfc;
  lpc_Pcorsac := lpc_Pcorsa + lpc_Pcorisfc;
  lpc_Pcorcapc := lpc_Pcorcap + lpc_Pcorisfc;
  lpc_Pcorsvc := lpc_Pcorsv + lpc_Ppcdc;
  lpc_Pcorlvc := lpc_Pcorlv + lpc_Ppcdc;
  lpc_Pcorevc := lpc_Pcorev + lpc_Ppcdc;
  lpc_Pcorao := lpc_Paop;
  lpc_Pcorea := lpc_Vcorea/lpc_Ccorea - lpc_Px1*1/(exp(lpc_Vcorea/lpc_Vx1) - 1);
  lpc_Pcorla := lpc_Vcorla/lpc_Ccorla - lpc_Px1*1/(exp(lpc_Vcorla/lpc_Vx1) - 1);
  lpc_Pcorsa := lpc_Vcorsa/lpc_Ccorsa - lpc_Px1*1/(exp(lpc_Vcorsa/lpc_Vx1) - 1);
  lpc_Pcorcap := lpc_Vcorcap/lpc_Ccorcap - lpc_Px1*1/(exp(lpc_Vcorcap/lpc_Vx1) - 1);
  lpc_Pcorsv := lpc_Vcorsv/lpc_Ccorsv - lpc_Px1*1/(exp(lpc_Vcorsv/lpc_Vx1) - 1);
  lpc_Pcorlv := lpc_Vcorlv/lpc_Ccorlv - lpc_Px1*1/(exp(lpc_Vcorlv/lpc_Vx1) - 1);
  lpc_Pcorev := lpc_Vcorev/lpc_Ccorev - lpc_Px2*1/(exp(lpc_Vcorev/lpc_Vx8) - 1);
  lpc_Vcorcirc := lpc_Vcorao + lpc_Vcorea + lpc_Vcorla + lpc_Vcorsa + lpc_Vcorcap + lpc_Vcorsv + lpc_Vcorlv + lpc_Vcorev;
  lpc_Fcorao := (lpc_Pcoraoc - lpc_Pcoreac)/lpc_Rcorao;
  lpc_Fcorea := (lpc_Pcoreac - lpc_Pcorlac)/lpc_Rcorea;
  lpc_Fcorla := (lpc_Pcorlac - lpc_Pcorsac)/lpc_Rcorla;
  lpc_Fcorsa := (lpc_Pcorsac - lpc_Pcorcapc)/lpc_Rcorsa;
  lpc_Fcorcap := (lpc_Pcorcapc - lpc_Pcorsvc)/lpc_Rcorcap;
  lpc_Fcorsv := (lpc_Pcorsvc - lpc_Pcorlvc)/lpc_Rcorsv;
  lpc_Fcorlv := (lpc_Pcorlvc - lpc_Pcorevc)/lpc_Rcorlv;
  lpc_Fcorev := (lpc_Pcorevc - lpc_Prac)/lpc_Rcorev;
  lpc_beattime := lpc_t - floor(lpc_t/hrf)*hrf;
  lpc_yla := ;
  lpc_yra := lpc_yla;
  lpc_ylv := ;
  lpc_yrv := lpc_ylv;
  hrf := 60/lpc_HR;

  // Rate rules:
  lpc_Vra' = lpc_Fvc - lpc_Fra + lpc_Fcorev;
  lpc_Vrv' = lpc_Fra - lpc_Frv;
  lpc_Vla' = lpc_Fpv - lpc_Fla;
  lpc_Vlv' = lpc_Fla - lpc_Flv;
  lpc_Paopc' = (lpc_Flv - lpc_d(lpc_Vaop)/lpc_d(lpc_t) - lpc_Faop*16.66667 - lpc_Fcorao)*(1/lpc_Ccorao + lpc_Px2/1*exp(lpc_Vcorao/lpc_Vx1)/(exp(lpc_Vcorao/lpc_Vx1) - 1)^2);
  lpc_MAP' = (lpc_Psa - lpc_MAP)/lpc_COtau;
  lpc_Faop' = (lpc_Paopc - lpc_Faop*lpc_Raop*16.66667 - lpc_Paodc)/lpc_Laop*0.06;
  lpc_Faod' = (lpc_Paodc - lpc_Faod*lpc_Raod - lpc_Psap)/lpc_Laod;
  lpc_Vaop' = (lpc_Paopc - lpc_Vaop/lpc_Caop + lpc_Px2*1/(exp(lpc_Vaop/lpc_Vx8) - 1))/lpc_Rtaop;
  lpc_Vaod' = (lpc_Faop - lpc_Faod*0.06 - lpc_Fcrb*0.06)*16.66667;
  lpc_Vsa' = lpc_Fsap - lpc_Fsa;
  lpc_Vsap' = lpc_Faod - lpc_Fsap;
  lpc_Vsc' = lpc_Fsa - lpc_Fsc;
  lpc_Vsv' = lpc_Fsc - lpc_Fsv;
  lpc_Vvc' = lpc_Fsv + lpc_Fcrb - lpc_Fvc;
  lpc_Vpap' = lpc_Frv - lpc_Fpap*16.66667;
  lpc_Vpad' = (lpc_Fpap - lpc_Fpad*0.06)*16.66667;
  lpc_Vpa' = lpc_Fpad - lpc_Fps - lpc_Fpa;
  lpc_Vpc' = lpc_Fpa - lpc_Fpc;
  lpc_Vpv' = lpc_Fpc + lpc_Fps - lpc_Fpv;
  lpc_Fpap' = (lpc_Ppapc - lpc_Ppadc - lpc_Fpap*lpc_Rpap*16.66667)/lpc_Lpa*0.06;
  lpc_Fpad' = (lpc_Ppadc - lpc_Ppac - lpc_Fpad*lpc_Rpad)/lpc_Lpad;
  lpc_Vcorao' = lpc_Flv - lpc_d(lpc_Vaop)/lpc_d(lpc_t) - lpc_Faop*16.66667 - lpc_Fcorao;
  lpc_Vcorea' = lpc_Fcorao - lpc_Fcorea;
  lpc_Vcorla' = lpc_Fcorea - lpc_Fcorla;
  lpc_Vcorsa' = lpc_Fcorla - lpc_Fcorsa;
  lpc_Vcorcap' = lpc_Fcorsa - lpc_Fcorcap;
  lpc_Vcorsv' = lpc_Fcorcap - lpc_Fcorsv;
  lpc_Vcorlv' = lpc_Fcorsv - lpc_Fcorlv;
  lpc_Vcorev' = lpc_Fcorlv - lpc_Fcorev;
end
