// SBML level 2 version 4

model hoefnagel_2002____main()
  // Originally created by libAntimony v1.4 (using libSBML 4.1.0-b2)

  // Compartments:
  compartment default_compartment = 1;

  // Parameters:
  PYR0 = 1;
  ACP0 = 0.03145;
  ACAL0 = 0.11;
  ACLAC0 = 1e-5;
  ACET0 = 1e-5;
  ATP0 = 0.1;
  ADP_A_tot = 5;
  NADH0 = 3.67;
  NAD_NAD_tot = 10;
  ACCOA0 = 0.11;
  COA_C_tot = 1;
  AC0 = 0.01;
  BUT0 = 0.01;
  ETOH0 = 0.1;
  GLC0 = 15;
  LAC0 = 0.1;
  O0 = 0.2;
  P0 = 10;
  V_GLYC_Km_GLC = 0.1;
  V_GLYC_Km_NAD = 0.1412;
  V_GLYC_Km_ADP = 0.04699;
  V_GLYC_Km_PYR = 2.5;
  V_GLYC_Km_NADH = 0.08999;
  V_GLYC_Km_ATP = 0.01867;
  V_GLYC_V_GLYC_max = 2397;
  V_LDH_Keq = 21120.69;
  V_LDH_Km_LAC = 100;
  V_LDH_Km_NAD = 2.4;
  V_LDH_Km_PYR = 1.5;
  V_LDH_Km_NADH = 0.08;
  V_LDH_V_LDH_max = 5118;
  V_PDH_Ki = 46.4159;
  V_PDH_Km_NAD = 0.4;
  V_PDH_Km_COA = 0.014;
  V_PDH_Km_PYR = 1;
  V_PDH_Km_NADH = 0.1;
  V_PDH_Km_ACCOA = 0.008;
  V_PDH_V_PDH_max = 259;
  V_PTA_Keq = 0.0065;
  V_PTA_Km_P = 2.6;
  V_PTA_Ki_P = 2.6;
  V_PTA_Ki_COA = 0.029;
  V_PTA_Km_ACP = 0.7;
  V_PTA_Ki_ACP = 0.2;
  V_PTA_Ki_ACCOA = 0.2;
  V_PTA_V_PTA_max = 42;
  V_ACK_Keq = 174.217;
  V_ACK_Km_AC = 7;
  V_ACK_Km_ATP = 0.07;
  V_ACK_Km_ADP = 0.5;
  V_ACK_Km_ACP = 0.16;
  V_ACK_V_ACK_max = 2700;
  V_ACALDH_Keq = 1;
  V_ACALDH_Km_NAD = 0.08;
  V_ACALDH_Km_NADH = 0.025;
  V_ACALDH_Km_COA = 0.008;
  V_ACALDH_Km_ACCOA = 0.007;
  V_ACALDH_Km_ACAL = 10;
  V_ACALDH_V_ACALDH_max = 97;
  V_ADH_Keq = 12354.9;
  V_ADH_Km_NAD = 0.08;
  V_ADH_Km_NADH = 0.05;
  V_ADH_Km_ETOH = 1;
  V_ADH_Km_ACAL = 0.03;
  V_ADH_V_ADH_max = 162;
  V_ALS_N = 2.4;
  V_ALS_Keq = 9000000000000;
  V_ALS_Km_ACLAC = 100;
  V_ALS_Km_PYR = 50;
  V_ALS_V_ALS_max = 600;
  V_ALDC_Km_ACLAC = 10;
  V_ALDC_Km_ACET = 100;
  V_ALDC_V_ALDC_max = 106;
  V_ACETEFF_Km_ACET = 5;
  V_ACETEFF_V_ACETEFF_max = 200;
  V_ACETDH_Keq = 1400;
  V_ACETDH_Km_NAD = 0.16;
  V_ACETDH_Km_NADH = 0.02;
  V_ACETDH_Km_BUT = 2.6;
  V_ACETDH_Km_ACET = 0.06;
  V_ACETDH_V_ACETDH_max = 105;
  V_ATPase_N = 2.58;
  V_ATPase_Km_ATP = 6.196;
  V_ATPase_V_ATPase_max = 900;
  V_NOX_Km_NAD = 1;
  V_NOX_Km_NADH = 0.041;
  V_NOX_Km_O = 0.2;
  V_NOX_V_NOX_max = 118;
  V_NEALC_k = 0.0003;
  time_ = ;

  // Assignment rules:
  V_GLYC0 := ;
  V_LDH0 := ;
  V_PDH0 := ;
  V_ALS0 := ;
  V_PTA0 := ;
  V_ACK0 := ;
  V_ACALDH0 := ;
  V_ADH0 := ;
  V_ALDC0 := ;
  V_NEALC0 := V_NEALC_k*ACLAC0;
  V_ACETDH0 := ;
  V_ACETEFF0 := ;
  V_ATPase0 := ;
  ADP0 := ADP_A_tot - ATP0;
  V_NOX0 := ;
  NAD0 := NAD_NAD_tot - NADH0;
  COA0 := COA_C_tot - ACCOA0;
  V_GLYC_temp := V_GLYC_V_GLYC_max*GLC0/V_GLYC_Km_GLC*NAD0/V_GLYC_Km_NAD*ADP0/V_GLYC_Km_ADP/((1 + GLC0/V_GLYC_Km_GLC + PYR0/V_GLYC_Km_PYR)*(1 + NAD0/V_GLYC_Km_NAD + NADH0/V_GLYC_Km_NADH)*(1 + ADP0/V_GLYC_Km_ADP + ATP0/V_GLYC_Km_ATP));
  V_LDH_temp := V_LDH_V_LDH_max/(V_LDH_Km_PYR*V_LDH_Km_NADH)*(PYR0*NADH0 - LAC0*NAD0/V_LDH_Keq)/((1 + PYR0/V_LDH_Km_PYR + LAC0/V_LDH_Km_LAC)*(1 + NADH0/V_LDH_Km_NADH + NAD0/V_LDH_Km_NAD));
  V_PDH_temp := V_PDH_V_PDH_max/(1 + V_PDH_Ki*NADH0/NAD0)*PYR0/V_PDH_Km_PYR*NAD0/V_PDH_Km_NAD*COA0/V_PDH_Km_COA/((1 + PYR0/V_PDH_Km_PYR)*(1 + NAD0/V_PDH_Km_NAD + NADH0/V_PDH_Km_NADH)*(1 + COA0/V_PDH_Km_COA + ACCOA0/V_PDH_Km_ACCOA));
  V_PTA_temp := V_PTA_V_PTA_max/(V_PTA_Ki_ACCOA*V_PTA_Km_P)*(ACCOA0*P0 - ACP0*COA0/V_PTA_Keq)/(1 + ACCOA0/V_PTA_Ki_ACCOA + P0/V_PTA_Ki_P + ACP0/V_PTA_Ki_ACP + COA0/V_PTA_Ki_COA + ACCOA0*P0/(V_PTA_Ki_ACCOA*V_PTA_Km_P) + ACP0*COA0/(V_PTA_Km_ACP*V_PTA_Ki_COA));
  V_ACK_temp := V_ACK_V_ACK_max/(V_ACK_Km_ADP*V_ACK_Km_ACP)*(ACP0*ADP0 - AC0*ATP0/V_ACK_Keq)/((1 + ACP0/V_ACK_Km_ACP + AC0/V_ACK_Km_AC)*(1 + ADP0/V_ACK_Km_ADP + ATP0/V_ACK_Km_ATP));
  V_ACALDH_temp := V_ACALDH_V_ACALDH_max/(V_ACALDH_Km_ACCOA*V_ACALDH_Km_NADH)*(ACCOA0*NADH0 - NAD0*COA0*ACAL0/V_ACALDH_Keq)/((1 + NAD0/V_ACALDH_Km_NAD + NADH0/V_ACALDH_Km_NADH)*(1 + ACCOA0/V_ACALDH_Km_ACCOA + COA0/V_ACALDH_Km_COA)*(1 + ACAL0/V_ACALDH_Km_ACAL));
  V_ADH_temp := V_ADH_V_ADH_max/(V_ADH_Km_ACAL*V_ADH_Km_NADH)*(ACAL0*NADH0 - ETOH0*NAD0/V_ADH_Keq)/((1 + NAD0/V_ADH_Km_NAD + NADH0/V_ADH_Km_NADH)*(1 + ACAL0/V_ADH_Km_ACAL + ETOH0/V_ADH_Km_ETOH));
  V_ALS_temp := V_ALS_V_ALS_max*PYR0/V_ALS_Km_PYR*(1 - ACLAC0/(PYR0*V_ALS_Keq))*(PYR0/V_ALS_Km_PYR + ACLAC0/V_ALS_Km_ACLAC)^(V_ALS_N - 1)/(1 + (PYR0/V_ALS_Km_PYR + ACLAC0/V_ALS_Km_ACLAC)^V_ALS_N);
  V_ALDC_temp := V_ALDC_V_ALDC_max*ACLAC0/V_ALDC_Km_ACLAC/(1 + ACLAC0/V_ALDC_Km_ACLAC + ACET0/V_ALDC_Km_ACET);
  V_ACETEFF_temp := V_ACETEFF_V_ACETEFF_max*ACET0/V_ACETEFF_Km_ACET/(1 + ACET0/V_ACETEFF_Km_ACET);
  V_ACETDH_temp := V_ACETDH_V_ACETDH_max/(V_ACETDH_Km_ACET*V_ACETDH_Km_NADH)*(ACET0*NADH0 - BUT0*NAD0/V_ACETDH_Keq)/((1 + ACET0/V_ACETDH_Km_ACET + BUT0/V_ACETDH_Km_BUT)*(1 + NADH0/V_ACETDH_Km_NADH + NAD0/V_ACETDH_Km_NAD));
  V_ATPase_temp := V_ATPase_V_ATPase_max*(ATP0/ADP0)^V_ATPase_N/(V_ATPase_Km_ATP^V_ATPase_N + (ATP0/ADP0)^V_ATPase_N);
  V_NOX_temp := V_NOX_V_NOX_max*NADH0*O0/(V_NOX_Km_NADH*V_NOX_Km_O)/((1 + NADH0/V_NOX_Km_NADH + NAD0/V_NOX_Km_NAD)*(1 + O0/V_NOX_Km_O));

  // Rate rules:
  PYR0' = V_GLYC0 - (V_LDH0 + V_PDH0 + V_ALS0);
  ACP0' = V_PTA0 - V_ACK0;
  ACAL0' = V_ACALDH0 - V_ADH0;
  ACLAC0' = 0.5*V_ALS0 - (V_ALDC0 + V_NEALC0);
  ACET0' = V_ALDC0 + V_NEALC0 - (V_ACETDH0 + V_ACETEFF0);
  ATP0' = V_GLYC0 + V_ACK0 - V_ATPase0;
  NADH0' = V_GLYC0 + V_PDH0 - (V_LDH0 + V_ACALDH0 + V_ADH0 + V_ACETDH0 + V_NOX0);
  ACCOA0' = V_PDH0 - (V_ACALDH0 + V_PTA0);
end
