// SBML level 2 version 4

model holmes_2006____main()
  // Originally created by libAntimony v1.4 (using libSBML 4.1.0-b2)

  // Compartments:
  compartment default_compartment = 1;

  // Parameters:
  contraction_a = 37.24;
  contraction_b = 0.325;
  contraction_Po = 144.9;
  contraction_alpha = 1449.027;
  contraction_L_se_o = 0.3;
  contraction_L_ce = 0.7;
  time_ = ;

  // Assignment rules:
  contraction_L := ;
  contraction_v := -contraction_b*(contraction_Po - contraction_P)/(contraction_P + contraction_a);
  contraction_L_se := contraction_L - contraction_L_ce;
  contraction_P := contraction_alpha*(contraction_L_se - contraction_L_se_o);

  // Rate rules:
  contraction_L_ce' = contraction_v;
end
