// SBML level 2 version 4

model hunter_mcculloch_terkeurs_1998_version02____main()
  // Originally created by libAntimony v1.3 (using libSBML 4.1.0-b2)

  // Compartments:
  compartment default_compartment = 1;

  // Parameters:
  Ca_i = 10;
  calcium_transient_Ca_max = 1;
  calcium_transient_tau_Ca = 0.06;
  calcium_transient_Ca_o = 0.01;
  Ca_b = ;
  lambda_ = 2.6;
  TnC_Ca_binding_kinetics_Ca_b_max = 2.26;
  TnC_Ca_binding_kinetics_rho_0 = 100;
  TnC_Ca_binding_kinetics_rho_1 = 163;
  thin_filament_kinetics_z = ;
  thin_filament_kinetics_C_50 = 1;
  thin_filament_kinetics_pC_50_ref = 6.2;
  thin_filament_kinetics_n_ref = 6.9;
  thin_filament_kinetics_alpha_0 = 2;
  thin_filament_kinetics_T_ref = 100;
  thin_filament_kinetics_beta_0 = 1.45;
  thin_filament_kinetics_beta_1 = 1.95;
  thin_filament_kinetics_beta_2 = 0.31;
  crossbridge_kinetics_a = 0.5;
  crossbridge_kinetics_A1 = 50;
  crossbridge_kinetics_A2 = 175;
  crossbridge_kinetics_A3 = 175;
  crossbridge_kinetics_alpha_1 = 33;
  crossbridge_kinetics_alpha_2 = 2850;
  crossbridge_kinetics_alpha_3 = 2850;
  time_ = ;
  crossbridge_kinetics_Q = ;
  crossbridge_kinetics_tau = ;

  // Assignment rules:
  To := thin_filament_kinetics_T_ref*(1 + thin_filament_kinetics_beta_0*(lambda_ - 1))*thin_filament_kinetics_z;
  T := To*((1 + crossbridge_kinetics_a*crossbridge_kinetics_Q)/(1 - crossbridge_kinetics_Q));
  thin_filament_kinetics_pC_50 := thin_filament_kinetics_pC_50_ref*(1 + thin_filament_kinetics_beta_2*(lambda_ - 1));
  thin_filament_kinetics_n := thin_filament_kinetics_n_ref*(1 + thin_filament_kinetics_beta_1*(lambda_ - 1));
  crossbridge_kinetics_dlambda_dt := crossbridge_kinetics_alpha_1/crossbridge_kinetics_A1*((T/To - 1)/(T/To + crossbridge_kinetics_a));

  // Rate rules:
  Ca_i' = calcium_transient_Ca_o + (calcium_transient_Ca_max - calcium_transient_Ca_o)*(time_/calcium_transient_tau_Ca)*exp((1 - time_)/calcium_transient_tau_Ca);
  Ca_b' = TnC_Ca_binding_kinetics_rho_0*Ca_i*(TnC_Ca_binding_kinetics_Ca_b_max - Ca_b) - TnC_Ca_binding_kinetics_rho_1*Ca_b*(1 - T/(lambda_*To));
  thin_filament_kinetics_z' = thin_filament_kinetics_alpha_0*((Ca_b/thin_filament_kinetics_C_50)^thin_filament_kinetics_n*(1 - thin_filament_kinetics_z) - thin_filament_kinetics_z);
end
