// SBML level 2 version 4

model iancu_jones_harvey_2007____main()
  // Originally created by libAntimony v1.3 (using libSBML 4.1.0-b2)

  // Compartments:
  compartment default_compartment = 1;

  // Parameters:
  K_H = 0.035;
  K_L = 0.386;
  K_C = 8.809;
  K_H0 = 0.16;
  K_L0 = 11;
  K_C0 = 30;
  k_PDE2 = 20;
  Km_PDE2 = 50;
  k_PDE3 = 1.25;
  Km_PDE3 = 0.08;
  k_PDE4 = 2.5;
  Km_PDE4 = 2.2;
  k_act1 = 5;
  k_act2 = 0.1;
  k_hydr = 0.8;
  k_reas = 1210;
  k_act10 = 2.5;
  k_act20 = 0.05;
  k_hydr0 = 0.8;
  k_reas0 = 1210;
  caveolar_beta_1_adrenergic_receptor_module_R_Total = 0.633;
  caveolar_muscarinic_receptor_module_R_Total = 0.633;
  Gs_alpha_GTP = 0.041983438;
  Gs_beta_gamma = 0.042634499;
  Gs_alpha_GDP = 0.000651061;
  Gs_Total = 10;
  Gi_alpha_GTP = 0.012644961;
  Gi_beta_gamma0 = 0.013274751;
  Gi_alpha_GDP = 0.00062979;
  Gi_Total = 20;
  extracaveolar_beta_1_adrenergic_receptor_module_R_Total = 0.633;
  extracaveolar_muscarinic_receptor_module_R_Total = 0.633;
  Gs_alpha_GTP0 = 0.083866891;
  Gs_beta_gamma0 = 0.084522918;
  Gs_alpha_GDP0 = 0.000656025;
  Gs_Total0 = 10;
  Gi_alpha_GTP0 = 0.001018705;
  Gi_beta_gamma = 0.001475253;
  Gi_alpha_GDP0 = 0.000456548;
  Gi_Total0 = 1;
  AC56_module_AC_56 = 3.379;
  AC56_module_AF56 = 500;
  AC56_module_MW_AC56 = 130;
  AC56_module_ATP = 5000;
  AC56_module_Km_ATP = 315;
  AC47_ecav_module_AC_47_ecav = 0.2;
  AC47_ecav_module_AF47 = 130;
  AC47_ecav_module_MW_AC47 = 130;
  AC47_ecav_module_ATP = 5000;
  AC47_ecav_module_Km_ATP = 315;
  AC47_cyt_module_k_AC47_cyt = 0.00108;
  AC47_cyt_module_AC_47_cyt = 0.136;
  AC47_cyt_module_AF47 = 130;
  AC47_cyt_module_ATP = 5000;
  AC47_cyt_module_Km_ATP = 315;
  cAMP_cav = 0.11750433;
  caveolar_PDE_module_PDE2 = 4.5;
  caveolar_PDE_module_PDE3 = 5.6;
  caveolar_PDE_module_PDE4 = 2;
  cAMP_ecav = 1.092201;
  extracaveolar_PDE_module_PDE2 = 0.02;
  extracaveolar_PDE_module_PDE4 = 0.16;
  cAMP_cyt = 0.992583576;
  bulk_cytoplasmic_PDE_module_PDE2 = 0.005;
  bulk_cytoplasmic_PDE_module_PDE3 = 0.0075;
  bulk_cytoplasmic_PDE_module_PDE4 = 0.005;
  cAMP_flux_module_V_cell = 3.8e-11;
  cAMP_flux_module_J_cav_ecav = 7.5e-15;
  cAMP_flux_module_J_cav_cyt = 7.5e-14;
  cAMP_flux_module_J_ecav_cyt = 1.5e-17;
  time_ = ;
  caveolar_beta_1_adrenergic_receptor_module_LR = ;
  LRG = ;
  RG = ;
  caveolar_muscarinic_receptor_module_LR = ;
  LRG0 = ;
  RG0 = ;
  extracaveolar_beta_1_adrenergic_receptor_module_LR = ;
  LRG1 = ;
  RG1 = ;
  extracaveolar_muscarinic_receptor_module_LR = ;
  LRG2 = ;
  RG2 = ;

  // Assignment rules:
  L_iso := ;
  L_ach := ;
  caveolar_beta_1_adrenergic_receptor_module_R := caveolar_beta_1_adrenergic_receptor_module_R_Total - caveolar_beta_1_adrenergic_receptor_module_LR - LRG - RG;
  Gs_alpha_beta_gamma := Gs_Total - Gs_alpha_GTP - Gs_alpha_GDP;
  caveolar_muscarinic_receptor_module_R := caveolar_muscarinic_receptor_module_R_Total - caveolar_muscarinic_receptor_module_LR - LRG0 - RG0;
  Gi_alpha_beta_gamma := Gi_Total - Gi_alpha_GTP - Gi_alpha_GDP;
  extracaveolar_beta_1_adrenergic_receptor_module_R := extracaveolar_beta_1_adrenergic_receptor_module_R_Total - extracaveolar_beta_1_adrenergic_receptor_module_LR - LRG1 - RG1;
  Gs_alpha_beta_gamma0 := Gs_Total0 - Gs_alpha_GTP0 - Gs_alpha_GDP0;
  extracaveolar_muscarinic_receptor_module_R := extracaveolar_muscarinic_receptor_module_R_Total - extracaveolar_muscarinic_receptor_module_LR - LRG2 - RG2;
  Gi_alpha_beta_gamma0 := Gi_Total0 - Gi_alpha_GTP0 - Gi_alpha_GDP0;
  dcAMP_AC_56_dt := AC56_module_k_AC56*AC56_module_AC_56*AC56_module_AF56*AC56_module_ATP/(AC56_module_Km_ATP + AC56_module_ATP);
  AC56_module_k_AC56 := (0.7 + 3.8234*(Gs_alpha_GTP/1)^0.9787/(0.1986 + (Gs_alpha_GTP/1)^0.9787))*(1 + 1/1.4432*(-1.0061)*(Gi_alpha_GTP/1)^0.8356/(0.1918 + (Gi_alpha_GTP/1)^0.8356))*AC56_module_MW_AC56/60*0.001;
  dcAMP_AC_47_ecav_dt := AC47_ecav_module_k_AC47_ecav*AC47_ecav_module_AC_47_ecav*AC47_ecav_module_AF47*AC47_ecav_module_ATP/(AC47_ecav_module_Km_ATP + AC47_ecav_module_ATP);
  AC47_ecav_module_k_AC47_ecav := (0.063 + 2.01*(Gs_alpha_GTP0*1000)^1.0043/(31.544 + (Gs_alpha_GTP0*1000)^1.0043))*(1 + 1/3.01*49.1*(Gi_beta_gamma*1000)^0.8921/(25.44 + (Gi_beta_gamma*1000)^0.8921))*AC47_ecav_module_MW_AC47/60*0.001;
  dcAMP_AC_47_cyt_dt := AC47_cyt_module_k_AC47_cyt*AC47_cyt_module_AC_47_cyt*AC47_cyt_module_AF47*AC47_cyt_module_ATP/(AC47_cyt_module_Km_ATP + AC47_cyt_module_ATP);
  dcAMP_cav_PDE2_dt := k_PDE2*caveolar_PDE_module_PDE2*cAMP_cav/(Km_PDE2 + cAMP_cav);
  dcAMP_cav_PDE3_dt := k_PDE3*caveolar_PDE_module_PDE3*cAMP_cav/(Km_PDE3 + cAMP_cav);
  dcAMP_cav_PDE4_dt := k_PDE4*caveolar_PDE_module_PDE4*cAMP_cav/(Km_PDE4 + cAMP_cav);
  dcAMP_ecav_PDE2_dt := k_PDE2*extracaveolar_PDE_module_PDE2*cAMP_ecav/(Km_PDE2 + cAMP_ecav);
  dcAMP_ecav_PDE4_dt := k_PDE4*extracaveolar_PDE_module_PDE4*cAMP_ecav/(Km_PDE4 + cAMP_ecav);
  dcAMP_cyt_PDE2_dt := k_PDE2*bulk_cytoplasmic_PDE_module_PDE2*cAMP_cyt/(Km_PDE2 + cAMP_cyt);
  dcAMP_cyt_PDE3_dt := k_PDE3*bulk_cytoplasmic_PDE_module_PDE3*cAMP_cyt/(Km_PDE3 + cAMP_cyt);
  dcAMP_cyt_PDE4_dt := k_PDE4*bulk_cytoplasmic_PDE_module_PDE4*cAMP_cyt/(Km_PDE4 + cAMP_cyt);
  cAMP_flux_module_V_cav := 0.01*cAMP_flux_module_V_cell;
  cAMP_flux_module_V_ecav := 0.02*cAMP_flux_module_V_cell;
  cAMP_flux_module_V_cyt := 0.5*cAMP_flux_module_V_cell;

  // Rate rules:
  Gs_alpha_GTP' = RG*k_act2 + LRG*k_act1 - Gs_alpha_GTP*k_hydr;
  Gs_beta_gamma' = RG*k_act2 + LRG*k_act1 - Gs_alpha_GDP*Gs_beta_gamma*k_reas;
  Gs_alpha_GDP' = Gs_alpha_GTP*k_hydr - Gs_alpha_GDP*Gs_beta_gamma*k_reas;
  Gi_alpha_GTP' = RG0*k_act20 + LRG0*k_act10 - Gi_alpha_GTP*k_hydr0;
  Gi_beta_gamma0' = RG0*k_act20 + LRG0*k_act10 - Gi_alpha_GDP*Gi_beta_gamma0*k_reas0;
  Gi_alpha_GDP' = Gi_alpha_GTP*k_hydr0 - Gi_alpha_GDP*Gi_beta_gamma0*k_reas0;
  Gs_alpha_GTP0' = RG1*k_act2 + LRG1*k_act1 - Gs_alpha_GTP0*k_hydr;
  Gs_beta_gamma0' = RG1*k_act2 + LRG1*k_act1 - Gs_alpha_GDP0*Gs_beta_gamma0*k_reas;
  Gs_alpha_GDP0' = Gs_alpha_GTP0*k_hydr - Gs_alpha_GDP0*Gs_beta_gamma0*k_reas;
  Gi_alpha_GTP0' = RG2*k_act20 + LRG2*k_act10 - Gi_alpha_GTP0*k_hydr0;
  Gi_beta_gamma' = RG2*k_act20 + LRG2*k_act10 - Gi_alpha_GDP0*Gi_beta_gamma*k_reas0;
  Gi_alpha_GDP0' = Gi_alpha_GTP0*k_hydr0 - Gi_alpha_GDP0*Gi_beta_gamma*k_reas0;
  cAMP_cav' = dcAMP_AC_56_dt - (dcAMP_cav_PDE2_dt + dcAMP_cav_PDE3_dt + dcAMP_cav_PDE4_dt) - cAMP_flux_module_J_cav_ecav*(cAMP_cav - cAMP_ecav)/cAMP_flux_module_V_cav - cAMP_flux_module_J_cav_cyt*(cAMP_cav - cAMP_cyt)/cAMP_flux_module_V_cav;
  cAMP_ecav' = dcAMP_AC_47_ecav_dt - (dcAMP_ecav_PDE2_dt + dcAMP_ecav_PDE4_dt) + cAMP_flux_module_J_cav_ecav*(cAMP_cav - cAMP_ecav)/cAMP_flux_module_V_ecav - cAMP_flux_module_J_ecav_cyt*(cAMP_ecav - cAMP_cyt)/cAMP_flux_module_V_ecav;
  cAMP_cyt' = dcAMP_AC_47_cyt_dt - (dcAMP_cyt_PDE2_dt + dcAMP_cyt_PDE3_dt + dcAMP_cyt_PDE4_dt) + cAMP_flux_module_J_cav_cyt*(cAMP_cav - cAMP_cyt)/cAMP_flux_module_V_cyt + cAMP_flux_module_J_ecav_cyt*(cAMP_ecav - cAMP_cyt)/cAMP_flux_module_V_cyt;
end
