// SBML level 2 version 4

model iber_maini_2002_version01____main()
  // Originally created by libAntimony v1.4 (using libSBML 4.1.0-b2)

  // Compartments:
  compartment default_compartment = 1;

  // Parameters:
  Ag = 2500;
  K_AgAb = ;
  C1 = ;
  C2 = ;
  k_on = 5e-13;
  antigens_k = 0;
  antigens_u = 1e-4;
  C = ;
  Cs = ;
  Ab = ;
  antibodies_beta = 1e8;
  AFC = ;
  selection_probability_of_centrocytes_h = 0.07;
  selection_probability_of_centrocytes_f = 0.35;
  m = 0.72;
  B = ;
  B1 = ;
  B2 = ;
  Cs1 = ;
  Cs2 = ;
  memory_cells_M = ;
  memory_cells_M1 = ;
  memory_cells_M2 = ;
  time_ = ;
  n = ;
  Ag_min = ;
  centrocytes_M21 = ;
  centrocytes_M22 = ;

  // Assignment rules:
  rho := 24/6.5*ln(2);
  d := 12*ln(2);
  pr := 0.6 + 0.2*(Ag^n/(Ag^n + Ag_min^n));
  pr1 := 0.95;
  pr2 := 0.7*recycling_probability_eta;
  recycling_probability_eta := ;
  theta := 0.3*(Ag/(C1 + C2))*(Ag/(Ag + K_AgAb));
  s := selection_probability_of_centrocytes_sc - (selection_probability_of_centrocytes_h + selection_probability_of_centrocytes_f*(Ag_min^n/(Ag_min^n + Ag^n)));
  s1 := 0.01 + 0.09*selection_probability_of_centrocytes_zeta;
  s2 := 0.1 + 0.85*selection_probability_of_centrocytes_zeta;
  selection_probability_of_centrocytes_sc := delta_c/(d*(2*pr*m - 1) + delta_c);
  selection_probability_of_centrocytes_zeta := Ag/(C1 + C2);
  delta_c := 1.5*ln(2);
  centrocytes_mu := d*s + delta_c*(1 - s);
  centrocytes_mu1 := d*s1 + delta_c*(1 - s1);
  centrocytes_mu2 := d*s2 + delta_c*(1 - s2);
  centrocytes_M11 := 1 - centrocytes_M21;
  centrocytes_M12 := 1 - centrocytes_M22;

  // Rate rules:
  Ag' = -(antigens_u*antigens_k*C + antigens_u*Cs*(1 - antigens_k))*Ag - k_on*Ag*Ab;
  K_AgAb' = k_on*Ag*Ab;
  C1' = 2*rho*m*(centrocytes_M11 + B1)*(centrocytes_M12 + B2) - centrocytes_mu1*C1;
  C2' = 2*rho*m*(centrocytes_M21 + B1)*(centrocytes_M22 + B2) - centrocytes_mu2*C2;
  C' = 2*rho*m*B - centrocytes_mu*C;
  Cs' = d*s*C - rho*Cs;
  Ab' = antibodies_beta*AFC - k_on*Ag*Ab;
  AFC' = theta*rho*(1 - pr)*Cs;
  B' = rho*B;
  B1' = pr1*rho*Cs1 - rho*B1;
  B2' = pr2*rho*Cs2 - rho*B2;
  Cs1' = d*s1*C1 - rho*Cs1;
  Cs2' = d*s2*C2 - rho*Cs2;
  memory_cells_M' = (1 - theta)*rho*(1 - pr)*Cs;
  memory_cells_M1' = (1 - pr1)*Cs1;
  memory_cells_M2' = (1 - pr2)*Cs2;
end
