// SBML level 2 version 4

model irvine_model_1999____main()
  // Originally created by libAntimony v1.3 (using libSBML 4.1.0-b2)

  // Compartments:
  compartment default_compartment = 1;

  // Parameters:
  V = -0.12;
  sodium_current_E_Na = 0.044675;
  sodium_current_g_Na = 0.0131;
  Markov_model_O1 = 0;
  Markov_model_O2 = 0;
  Markov_model_C0 = 1;
  Markov_model_C1 = 0;
  Markov_model_C2 = 0;
  Markov_model_C3 = 0;
  Markov_model_C4 = 0;
  Markov_model_C0I = 0;
  Markov_model_C1I = 0;
  Markov_model_C2I = 0;
  Markov_model_C3I = 0;
  Markov_model_C4I = 0;
  Markov_model_I = 0;
  Markov_model_a = 2.5218;
  rate_constants_R = 8.314472;
  rate_constants_T = 286;
  rate_constants_F = 96500;
  rate_constants_k = 1.3806504e-23;
  rate_constants_h = 6.62607095e-31;
  rate_constants_z_alpha = 0;
  rate_constants_z_beta = -0.9701;
  rate_constants_z_gamma = 1.5703;
  rate_constants_z_delta = -1.3266;
  rate_constants_z_on = 0.6625;
  rate_constants_z_of = 0;
  rate_constants_z_gamma_gamma = 0;
  rate_constants_z_delta_delta = -3.5596;
  rate_constants_z_epsilon = 0;
  rate_constants_z_omega = 0;
  rate_constants_z_eta = 1.5717;
  rate_constants_z_v = -1.3281;
  rate_constants_z_cn = 0;
  rate_constants_z_cf = 0;
  rate_constants_delta_H_alpha = 116900;
  rate_constants_delta_H_beta = 263870;
  rate_constants_delta_H_cf = 57533;
  rate_constants_delta_H_cn = 293270;
  rate_constants_delta_H_of = 79035;
  rate_constants_delta_H_on = 62385;
  rate_constants_delta_H_eta = 150333;
  rate_constants_delta_H_gamma = 200240;
  rate_constants_delta_H_delta = 127970;
  rate_constants_delta_H_epsilon = 79183;
  rate_constants_delta_H_omega = 123020;
  rate_constants_delta_H_v = 121900;
  rate_constants_delta_H_gamma_gamma = -99967;
  rate_constants_delta_H_delta_delta = 62555;
  rate_constants_delta_S_alpha = 224.114;
  rate_constants_delta_S_beta = 708.146;
  rate_constants_delta_S_cf = 0.00711;
  rate_constants_delta_S_cn = 786.217;
  rate_constants_delta_S_of = 1.51;
  rate_constants_delta_S_on = 39.295;
  rate_constants_delta_S_eta = 338.915;
  rate_constants_delta_S_gamma = 529.952;
  rate_constants_delta_S_delta = 229.205;
  rate_constants_delta_S_epsilon = 70.078;
  rate_constants_delta_S_omega = 225.175;
  rate_constants_delta_S_v = 193.265;
  rate_constants_delta_S_gamma_gamma = -578.317;
  rate_constants_delta_S_delta_delta = -130.639;
  time_ = ;

  // Assignment rules:
  i_Na := sodium_current_g_Na*P_open*(V - sodium_current_E_Na);
  P_open := Markov_model_O1 + Markov_model_O2;
  alpha := rate_constants_k*rate_constants_T/rate_constants_h*exp(-rate_constants_delta_H_alpha/(rate_constants_R*rate_constants_T) + rate_constants_delta_S_alpha/rate_constants_R + rate_constants_z_alpha*rate_constants_F*V/(rate_constants_R*rate_constants_T));
  beta := rate_constants_k*rate_constants_T/rate_constants_h*exp(-rate_constants_delta_H_beta/(rate_constants_R*rate_constants_T) + rate_constants_delta_S_beta/rate_constants_R + rate_constants_z_beta*rate_constants_F*V/(rate_constants_R*rate_constants_T));
  cf := rate_constants_k*rate_constants_T/rate_constants_h*exp(-rate_constants_delta_H_cf/(rate_constants_R*rate_constants_T) + rate_constants_delta_S_cf/rate_constants_R + rate_constants_z_cf*rate_constants_F*V/(rate_constants_R*rate_constants_T));
  cn_ := rate_constants_k*rate_constants_T/rate_constants_h*exp(-rate_constants_delta_H_cn/(rate_constants_R*rate_constants_T) + rate_constants_delta_S_cn/rate_constants_R + rate_constants_z_cn*rate_constants_F*V/(rate_constants_R*rate_constants_T));
  of := rate_constants_k*rate_constants_T/rate_constants_h*exp(-rate_constants_delta_H_of/(rate_constants_R*rate_constants_T) + rate_constants_delta_S_of/rate_constants_R + rate_constants_z_of*rate_constants_F*V/(rate_constants_R*rate_constants_T));
  on := rate_constants_k*rate_constants_T/rate_constants_h*exp(-rate_constants_delta_H_on/(rate_constants_R*rate_constants_T) + rate_constants_delta_S_on/rate_constants_R + rate_constants_z_on*rate_constants_F*V/(rate_constants_R*rate_constants_T));
  eta := rate_constants_k*rate_constants_T/rate_constants_h*exp(-rate_constants_delta_H_eta/(rate_constants_R*rate_constants_T) + rate_constants_delta_S_eta/rate_constants_R + rate_constants_z_eta*rate_constants_F*V/(rate_constants_R*rate_constants_T));
  gamma := rate_constants_k*rate_constants_T/rate_constants_h*exp(-rate_constants_delta_H_gamma/(rate_constants_R*rate_constants_T) + rate_constants_delta_S_gamma/rate_constants_R + rate_constants_z_gamma*rate_constants_F*V/(rate_constants_R*rate_constants_T));
  delta := rate_constants_k*rate_constants_T/rate_constants_h*exp(-rate_constants_delta_H_delta/(rate_constants_R*rate_constants_T) + rate_constants_delta_S_delta/rate_constants_R + rate_constants_z_delta*rate_constants_F*V/(rate_constants_R*rate_constants_T));
  epsilon := rate_constants_k*rate_constants_T/rate_constants_h*exp(-rate_constants_delta_H_epsilon/(rate_constants_R*rate_constants_T) + rate_constants_delta_S_epsilon/rate_constants_R + rate_constants_z_epsilon*rate_constants_F*V/(rate_constants_R*rate_constants_T));
  omega := rate_constants_k*rate_constants_T/rate_constants_h*exp(-rate_constants_delta_H_omega/(rate_constants_R*rate_constants_T) + rate_constants_delta_S_omega/rate_constants_R + rate_constants_z_omega*rate_constants_F*V/(rate_constants_R*rate_constants_T));
  v := rate_constants_k*rate_constants_T/rate_constants_h*exp(-rate_constants_delta_H_v/(rate_constants_R*rate_constants_T) + rate_constants_delta_S_v/rate_constants_R + rate_constants_z_v*rate_constants_F*V/(rate_constants_R*rate_constants_T));
  gamma_gamma := rate_constants_k*rate_constants_T/rate_constants_h*exp(-rate_constants_delta_H_gamma_gamma/(rate_constants_R*rate_constants_T) + rate_constants_delta_S_gamma_gamma/rate_constants_R + rate_constants_z_gamma_gamma*rate_constants_F*V/(rate_constants_R*rate_constants_T));
  delta_delta := rate_constants_k*rate_constants_T/rate_constants_h*exp(-rate_constants_delta_H_delta_delta/(rate_constants_R*rate_constants_T) + rate_constants_delta_S_delta_delta/rate_constants_R + rate_constants_z_delta_delta*rate_constants_F*V/(rate_constants_R*rate_constants_T));

  // Rate rules:
  Markov_model_O1' = gamma*Markov_model_C4 + omega*Markov_model_O2 + of*Markov_model_I - (delta + epsilon + on)*Markov_model_O1;
  Markov_model_O2' = epsilon*Markov_model_O1 + eta*Markov_model_C4 - (v + omega)*Markov_model_O2;
  Markov_model_C0' = beta*Markov_model_C1 + cf*Markov_model_C0I - (cn_ + 4*alpha)*Markov_model_C0;
  Markov_model_C1' = 2*beta*Markov_model_C2 + 4*alpha*Markov_model_C0 + cf/Markov_model_a*Markov_model_C1I - (beta + 3*alpha + cn_*Markov_model_a)*Markov_model_C1;
  Markov_model_C2' = 3*beta*Markov_model_C3 + 3*alpha*Markov_model_C1 + cf/Markov_model_a^2*Markov_model_C2I - (2*beta + 2*alpha + cn_*Markov_model_a^2)*Markov_model_C2;
  Markov_model_C3' = 4*beta*Markov_model_C4 + 2*alpha*Markov_model_C2 + cf/Markov_model_a^3*Markov_model_C3I - (3*beta + alpha + cn_*Markov_model_a^3)*Markov_model_C3;
  Markov_model_C4' = delta*Markov_model_O1 + v*Markov_model_O2 + alpha*Markov_model_C3 + cf/Markov_model_a^4*Markov_model_C4I - (4*beta + gamma + eta + cn_*Markov_model_a^4)*Markov_model_C4;
  Markov_model_C0I' = beta/Markov_model_a*Markov_model_C1I + cn_*Markov_model_C0 - (cf + 4*alpha*Markov_model_a)*Markov_model_C0I;
  Markov_model_C1I' = 2*beta/Markov_model_a*Markov_model_C2I + 4*alpha*Markov_model_a*Markov_model_C0I + cn_*Markov_model_a*Markov_model_C1 - (beta/Markov_model_a + 3*alpha*Markov_model_a + cf/Markov_model_a)*Markov_model_C1I;
  Markov_model_C2I' = 3*beta/Markov_model_a*Markov_model_C3I + 3*alpha*Markov_model_a*Markov_model_C1I + cn_*Markov_model_a^2*Markov_model_C2 - (2*beta/Markov_model_a + 2*alpha*Markov_model_a + cf/Markov_model_a^2)*Markov_model_C2I;
  Markov_model_C3I' = 4*beta/Markov_model_a*Markov_model_C4I + 2*alpha*Markov_model_a*Markov_model_C2I + cn_*Markov_model_a^3*Markov_model_C3 - (3*beta/Markov_model_a + alpha*Markov_model_a + cf/Markov_model_a^3)*Markov_model_C3I;
  Markov_model_C4I' = delta_delta*Markov_model_I + alpha*Markov_model_a*Markov_model_C3I + cn_*Markov_model_a^4*Markov_model_C4 - (4*beta/Markov_model_a + gamma_gamma + cf/Markov_model_a^4)*Markov_model_C4I;
  Markov_model_I' = gamma_gamma*Markov_model_C4I + on*Markov_model_O1 - (delta_delta + of)*Markov_model_I;
end
