// SBML level 2 version 4

model IyerHajjarArmoundas2007____main()
  // Originally created by libAntimony v1.4 (using libSBML 4.1.0-b2)

  // Compartments:
  compartment default_compartment = 1;

  // Parameters:
  iso = 0;
  CSQN2 = 0;
  RyR2 = 0;
  Faraday = 96.5;
  COMPUTE_CONCENTRATION_AND_VOLTAGE_DERIVATIVES_Temp = 310;
  Rgas = 8.315;
  COMPUTE_CONCENTRATION_AND_VOLTAGE_DERIVATIVES_Acap = 0.0001534;
  COMPUTE_CONCENTRATION_AND_VOLTAGE_DERIVATIVES_Vmyo = 2.584e-5;
  COMPUTE_CONCENTRATION_AND_VOLTAGE_DERIVATIVES_VJSR = 1.6e-7;
  COMPUTE_CONCENTRATION_AND_VOLTAGE_DERIVATIVES_VNSR = 2.1e-6;
  COMPUTE_CONCENTRATION_AND_VOLTAGE_DERIVATIVES_VSS = 1.2e-9;
  Nai = 9.855733;
  Ki = 125.4271;
  Cai = 0.0003639687;
  CaSS = 0.0005066043;
  CaJSR = 0.421937;
  CaNSR = 0.4235516;
  V = -86.72615;
  Ko = 4;
  Nao = 138;
  Cao = 2;
  I_stimulus_stim_period = 500;
  I_stimulus_stim_duration = 3;
  I_stimulus_stim_amplitude = -15;
  I_stimulus_stim_offset = 100;
  COMPUTE_INTRACELLULAR_CALCIUM_FLUXES_Kfb = 0.000168;
  COMPUTE_INTRACELLULAR_CALCIUM_FLUXES_Nfb = 1.2;
  COMPUTE_INTRACELLULAR_CALCIUM_FLUXES_Krb = 3.29;
  COMPUTE_INTRACELLULAR_CALCIUM_FLUXES_Nrb = 1;
  COMPUTE_INTRACELLULAR_CALCIUM_FLUXES_KSR = 1.2;
  COMPUTE_INTRACELLULAR_CALCIUM_FLUXES_vmaxf = 7.48e-5;
  COMPUTE_INTRACELLULAR_CALCIUM_FLUXES_vmaxr = 0.000318;
  COMPUTE_INTRACELLULAR_CALCIUM_FLUXES_v1 = 1.8;
  O1_RyR = 0.001136847;
  O2_RyR = 3.113508e-7;
  COMPUTE_INTRACELLULAR_CALCIUM_FLUXES_tautr = 0.5747;
  COMPUTE_INTRACELLULAR_CALCIUM_FLUXES_tauxfer = 26.7;
  COMPUTE_Jtrpn_and_BUFFER_SCALE_FACTORS_LTRPNtot = 0.07;
  COMPUTE_Jtrpn_and_BUFFER_SCALE_FACTORS_HTRPNtot = 0.14;
  COMPUTE_Jtrpn_and_BUFFER_SCALE_FACTORS_khtrpn_plus = 20;
  COMPUTE_Jtrpn_and_BUFFER_SCALE_FACTORS_khtrpn_minus = 6.6e-5;
  COMPUTE_Jtrpn_and_BUFFER_SCALE_FACTORS_kltrpn_plus = 40;
  COMPUTE_Jtrpn_and_BUFFER_SCALE_FACTORS_kltrpn_minus = 0.04;
  COMPUTE_Jtrpn_and_BUFFER_SCALE_FACTORS_CMDNtot = 0.05;
  COMPUTE_Jtrpn_and_BUFFER_SCALE_FACTORS_EGTAtot = 0;
  COMPUTE_Jtrpn_and_BUFFER_SCALE_FACTORS_KmCMDN = 0.00238;
  COMPUTE_Jtrpn_and_BUFFER_SCALE_FACTORS_KmCSQN = 0.8;
  COMPUTE_Jtrpn_and_BUFFER_SCALE_FACTORS_KmEGTA = 0.00015;
  LTRPNCa = 0.280466;
  HTRPNCa = 0.9934776;
  COMPUTE_DERIVATIVES_OF_RyR_RECEPTOR_STATES_kaplus = 0.01215;
  COMPUTE_DERIVATIVES_OF_RyR_RECEPTOR_STATES_kaminus = 0.576;
  COMPUTE_DERIVATIVES_OF_RyR_RECEPTOR_STATES_kbplus = 0.00405;
  COMPUTE_DERIVATIVES_OF_RyR_RECEPTOR_STATES_kbminus = 1.93;
  COMPUTE_DERIVATIVES_OF_RyR_RECEPTOR_STATES_kcplus = 0.1;
  COMPUTE_DERIVATIVES_OF_RyR_RECEPTOR_STATES_kcminus = 0.0008;
  COMPUTE_DERIVATIVES_OF_RyR_RECEPTOR_STATES_ncoop = 4;
  COMPUTE_DERIVATIVES_OF_RyR_RECEPTOR_STATES_mcoop = 3;
  COMPUTE_DERIVATIVES_OF_RyR_RECEPTOR_STATES_kryr = 1;
  COMPUTE_DERIVATIVES_OF_RyR_RECEPTOR_STATES_HmaxC1O1 = 0.5;
  COMPUTE_DERIVATIVES_OF_RyR_RECEPTOR_STATES_HmaxC2O1 = 0.5;
  COMPUTE_DERIVATIVES_OF_RyR_RECEPTOR_STATES_Hmin = 5;
  COMPUTE_DERIVATIVES_OF_RyR_RECEPTOR_STATES_H50C1O1 = 1;
  COMPUTE_DERIVATIVES_OF_RyR_RECEPTOR_STATES_H50O1C2 = 1;
  COMPUTE_DERIVATIVES_OF_RyR_RECEPTOR_STATES_HN = 2.5;
  C1_RyR = 0.1320709;
  C2_RyR = 0.866792;
  COMPUTE_DERIVATIVES_OF_LTYPE_CHANNEL_STATES_fL = 0.3;
  COMPUTE_DERIVATIVES_OF_LTYPE_CHANNEL_STATES_gL = 4;
  COMPUTE_DERIVATIVES_OF_LTYPE_CHANNEL_STATES_bL = 2;
  COMPUTE_DERIVATIVES_OF_LTYPE_CHANNEL_STATES_aL = 2;
  COMPUTE_DERIVATIVES_OF_LTYPE_CHANNEL_STATES_C0 = 0.4656792;
  COMPUTE_DERIVATIVES_OF_LTYPE_CHANNEL_STATES_C1 = 0.008344577;
  COMPUTE_DERIVATIVES_OF_LTYPE_CHANNEL_STATES_C2 = 5.607362e-5;
  COMPUTE_DERIVATIVES_OF_LTYPE_CHANNEL_STATES_C3 = 1.674709e-7;
  COMPUTE_DERIVATIVES_OF_LTYPE_CHANNEL_STATES_C4 = 1.875717e-10;
  COMPUTE_DERIVATIVES_OF_LTYPE_CHANNEL_STATES_CCa0 = 0.4898468;
  COMPUTE_DERIVATIVES_OF_LTYPE_CHANNEL_STATES_CCa1 = 0.03511101;
  COMPUTE_DERIVATIVES_OF_LTYPE_CHANNEL_STATES_CCa2 = 0.0009437459;
  COMPUTE_DERIVATIVES_OF_LTYPE_CHANNEL_STATES_CCa3 = 1.127412e-5;
  COMPUTE_DERIVATIVES_OF_LTYPE_CHANNEL_STATES_CCa4 = 5.050569e-8;
  Open = 1.40806e-11;
  yCa = 0.9954344;
  C0Kv43 = 0.9081891;
  C1Kv43 = 0.03433857;
  C2Kv43 = 0.0004876542;
  C3Kv43 = 3.115507e-6;
  OKv43 = 7.42912e-9;
  CI0Kv43 = 0.0349937;
  CI1Kv43 = 0.01711633;
  CI2Kv43 = 0.004284717;
  CI3Kv43 = 0.0005647242;
  OIKv43 = 2.196034e-5;
  COMPUTE_DERIVATIVES_OF_Kv4_3_CHANNEL_STATES_alphaa0Kv43 = 0.543708;
  COMPUTE_DERIVATIVES_OF_Kv4_3_CHANNEL_STATES_aaKv43 = 0.028983;
  COMPUTE_DERIVATIVES_OF_Kv4_3_CHANNEL_STATES_betaa0Kv43 = 0.080185;
  COMPUTE_DERIVATIVES_OF_Kv4_3_CHANNEL_STATES_baKv43 = 0.0468437;
  COMPUTE_DERIVATIVES_OF_Kv4_3_CHANNEL_STATES_alphai0Kv43 = 0.0498424;
  COMPUTE_DERIVATIVES_OF_Kv4_3_CHANNEL_STATES_aiKv43 = 0.000373016;
  COMPUTE_DERIVATIVES_OF_Kv4_3_CHANNEL_STATES_betai0Kv43 = 0.000819482;
  COMPUTE_DERIVATIVES_OF_Kv4_3_CHANNEL_STATES_biKv43 = 5.374e-8;
  COMPUTE_DERIVATIVES_OF_Kv4_3_CHANNEL_STATES_f1Kv43 = 1.8936;
  COMPUTE_DERIVATIVES_OF_Kv4_3_CHANNEL_STATES_f2Kv43 = 14.22465;
  COMPUTE_DERIVATIVES_OF_Kv4_3_CHANNEL_STATES_f3Kv43 = 158.5744;
  COMPUTE_DERIVATIVES_OF_Kv4_3_CHANNEL_STATES_f4Kv43 = 142.9366;
  COMPUTE_DERIVATIVES_OF_Kv4_3_CHANNEL_STATES_b1Kv43 = 6.77348;
  COMPUTE_DERIVATIVES_OF_Kv4_3_CHANNEL_STATES_b2Kv43 = 15.62127;
  COMPUTE_DERIVATIVES_OF_Kv4_3_CHANNEL_STATES_b3Kv43 = 28.75326;
  COMPUTE_DERIVATIVES_OF_Kv4_3_CHANNEL_STATES_b4Kv43 = 524.5762;
  COMPUTE_DERIVATIVES_OF_Kv1_4_CHANNEL_STATES_f1Kv14 = 0.5246507;
  COMPUTE_DERIVATIVES_OF_Kv1_4_CHANNEL_STATES_f2Kv14 = 17.51885;
  COMPUTE_DERIVATIVES_OF_Kv1_4_CHANNEL_STATES_f3Kv14 = 938.5876;
  COMPUTE_DERIVATIVES_OF_Kv1_4_CHANNEL_STATES_f4Kv14 = 54749.19;
  COMPUTE_DERIVATIVES_OF_Kv1_4_CHANNEL_STATES_b1Kv14 = 1.009478;
  COMPUTE_DERIVATIVES_OF_Kv1_4_CHANNEL_STATES_b2Kv14 = 1.171005;
  COMPUTE_DERIVATIVES_OF_Kv1_4_CHANNEL_STATES_b3Kv14 = 0.6390277;
  COMPUTE_DERIVATIVES_OF_Kv1_4_CHANNEL_STATES_b4Kv14 = 2.120354;
  COMPUTE_DERIVATIVES_OF_Kv1_4_CHANNEL_STATES_alphaa0Kv14 = 1.840024;
  COMPUTE_DERIVATIVES_OF_Kv1_4_CHANNEL_STATES_aaKv14 = 0.00768548031;
  COMPUTE_DERIVATIVES_OF_Kv1_4_CHANNEL_STATES_betaa0Kv14 = 0.0108174834;
  COMPUTE_DERIVATIVES_OF_Kv1_4_CHANNEL_STATES_baKv14 = 0.07793378;
  COMPUTE_DERIVATIVES_OF_Kv1_4_CHANNEL_STATES_alphai0Kv14 = 0.00305767916;
  COMPUTE_DERIVATIVES_OF_Kv1_4_CHANNEL_STATES_betai0Kv14 = 2.44936e-6;
  C0Kv14 = 0.1493744;
  C1Kv14 = 0.06067949;
  C2Kv14 = 0.009303142;
  C3Kv14 = 0.000676404;
  OKv14 = 3.851872e-5;
  CI0Kv14 = 0.04427226;
  CI1Kv14 = 0.009524327;
  CI2Kv14 = 0.05673967;
  CI3Kv14 = 0.1131228;
  OIKv14 = 0.556269;
  COMPUTE_INa_IKr_IKs_Ito1_IK1_INab_IKp_GKr = 0.0186;
  COMPUTE_INa_IKr_IKs_Ito1_IK1_INab_IKp_GKs = 0.0035;
  COMPUTE_INa_IKr_IKs_Ito1_IK1_INab_IKp_GK1 = 0.1253051;
  COMPUTE_INa_IKr_IKs_Ito1_IK1_INab_IKp_GNa = 56.32;
  COMPUTE_INa_IKr_IKs_Ito1_IK1_INab_IKp_GNab = 0.001;
  COMPUTE_INa_IKr_IKs_Ito1_IK1_INab_IKp_KvScale = 0.872;
  COMPUTE_INa_IKr_IKs_Ito1_IK1_INab_IKp_Kv43Frac = 0.889;
  na6 = 1.021187e-7;
  na7 = 1.934992e-8;
  OHerg = 0.001202847;
  O1ks = 5.654602e-7;
  O2ks = 0.02588188;
  COMPUTE_INaK_INaCa_ICab_IpCa_kNaCa = 0.44;
  COMPUTE_INaK_INaCa_ICab_IpCa_KmNa = 87.5;
  COMPUTE_INaK_INaCa_ICab_IpCa_KmCa = 1.38;
  COMPUTE_INaK_INaCa_ICab_IpCa_ksat = 0.2;
  COMPUTE_INaK_INaCa_ICab_IpCa_eta = 0.35;
  COMPUTE_INaK_INaCa_ICab_IpCa_INaKmax = 2.387;
  COMPUTE_INaK_INaCa_ICab_IpCa_KmNai = 20;
  COMPUTE_INaK_INaCa_ICab_IpCa_KmKo = 1.5;
  COMPUTE_INaK_INaCa_ICab_IpCa_IpCamax = 0.05;
  COMPUTE_INaK_INaCa_ICab_IpCa_KmpCa = 0.0005;
  COMPUTE_INaK_INaCa_ICab_IpCa_GCab = 7.684e-5;
  COMPUTE_ICa_ICaK_ICahalf = -0.265;
  COMPUTE_ICa_ICaK_Pscale = 7;
  na1 = 0.1112845;
  na2 = 0.04810198;
  na3 = 0.007796927;
  na4 = 0.0005616996;
  na5 = 1.517464e-5;
  na8 = 0.3685827;
  na9 = 0.3124632;
  na10 = 0.09933988;
  na11 = 0.01404317;
  na12 = 0.0007500738;
  na13 = 0.0370605;
  INa_TNa = 294.16;
  IKr_T_Const_HERG = 5.32;
  IKr_A0_HERG = 0.01714764;
  IKr_B0_HERG = 0.03304608;
  IKr_A1_HERG = 0.03969328;
  IKr_B1_HERG = -0.04306054;
  IKr_A2_HERG = 0.02057449;
  IKr_B2_HERG = 0.02617413;
  IKr_A3_HERG = 0.001343666;
  IKr_B3_HERG = -0.02691385;
  IKr_A4_HERG = 0.1066632;
  IKr_B4_HERG = 0.005689089;
  IKr_A5_HERG = 0.006463939;
  IKr_B5_HERG = -0.04536643;
  IKr_A6_HERG = 8.039374e-5;
  IKr_B6_HERG = 6.9808924e-7;
  C1Herg = 0.9949483;
  C2Herg = 0.0005956537;
  C3Herg = 0.0002281832;
  IHerg = 0.0002437897;
  C0ks = 0.938065;
  C1ks = 0.03605257;
  time_ = ;

  // Assignment rules:
  COMPUTE_CONCENTRATION_AND_VOLTAGE_DERIVATIVES_a1 := COMPUTE_CONCENTRATION_AND_VOLTAGE_DERIVATIVES_C/(COMPUTE_CONCENTRATION_AND_VOLTAGE_DERIVATIVES_Vmyo*Faraday);
  COMPUTE_CONCENTRATION_AND_VOLTAGE_DERIVATIVES_a2 := COMPUTE_CONCENTRATION_AND_VOLTAGE_DERIVATIVES_C/(2*COMPUTE_CONCENTRATION_AND_VOLTAGE_DERIVATIVES_VSS*Faraday);
  RToverF := Rgas*COMPUTE_CONCENTRATION_AND_VOLTAGE_DERIVATIVES_Temp/Faraday;
  COMPUTE_CONCENTRATION_AND_VOLTAGE_DERIVATIVES_C := COMPUTE_CONCENTRATION_AND_VOLTAGE_DERIVATIVES_Acap*1e-3;
  INa0 := COMPUTE_INa_IKr_IKs_Ito1_IK1_INab_IKp_GNa*(na6 + na7)*(V - ENa);
  INab := COMPUTE_INa_IKr_IKs_Ito1_IK1_INab_IKp_GNab*(V - ENa);
  INaCa := COMPUTE_INaK_INaCa_ICab_IpCa_kNaCa*(COMPUTE_INaK_INaCa_ICab_IpCa_a1_ncx - COMPUTE_INaK_INaCa_ICab_IpCa_a2_ncx)/(COMPUTE_INaK_INaCa_ICab_IpCa_a4_ncx*COMPUTE_INaK_INaCa_ICab_IpCa_a3_ncx*COMPUTE_INaK_INaCa_ICab_IpCa_a5_ncx);
  INaK := COMPUTE_INaK_INaCa_ICab_IpCa_INaKmax*COMPUTE_INaK_INaCa_ICab_IpCa_fNaK*COMPUTE_INaK_INaCa_ICab_IpCa_a1_K/COMPUTE_INaK_INaCa_ICab_IpCa_a2_K;
  IKv14_Na := 0.02*COMPUTE_INa_IKr_IKs_Ito1_IK1_INab_IKp_PKv14*OKv14*COMPUTE_INa_IKr_IKs_Ito1_IK1_INab_IKp_VFsq_over_RT*COMPUTE_INa_IKr_IKs_Ito1_IK1_INab_IKp_a1_Na/COMPUTE_INa_IKr_IKs_Ito1_IK1_INab_IKp_a2;
  IKr0 := COMPUTE_INa_IKr_IKs_Ito1_IK1_INab_IKp_GKr*COMPUTE_INa_IKr_IKs_Ito1_IK1_INab_IKp_fKo*OHerg*(V - EK);
  IKs0 := COMPUTE_INa_IKr_IKs_Ito1_IK1_INab_IKp_GKs*(O1ks + O2ks)*(V - EK);
  IK1 := COMPUTE_INa_IKr_IKs_Ito1_IK1_INab_IKp_GK1*sqrt(Ko/1)*COMPUTE_INa_IKr_IKs_Ito1_IK1_INab_IKp_K1_inf*(V - EK);
  ICaK := COMPUTE_ICa_ICaK_PKprime*Open*yCa*COMPUTE_ICa_ICaK_VFsq_over_RT*COMPUTE_ICa_ICaK_a1_K/COMPUTE_ICa_ICaK_a2_K;
  ICa := COMPUTE_ICa_ICaK_ICamax*yCa*Open;
  Ito1 := IKv43 + IKv14;
  i_Stim := ;
  IKv43 := COMPUTE_INa_IKr_IKs_Ito1_IK1_INab_IKp_GKv43*OKv43*(V - EK);
  IKv14_K := COMPUTE_INa_IKr_IKs_Ito1_IK1_INab_IKp_PKv14*OKv14*COMPUTE_INa_IKr_IKs_Ito1_IK1_INab_IKp_VFsq_over_RT*COMPUTE_INa_IKr_IKs_Ito1_IK1_INab_IKp_a1_K/COMPUTE_INa_IKr_IKs_Ito1_IK1_INab_IKp_a2;
  ICab := COMPUTE_INaK_INaCa_ICab_IpCa_GCab*(V - ECa);
  IpCa := COMPUTE_INaK_INaCa_ICab_IpCa_IpCamax*Cai/(COMPUTE_INaK_INaCa_ICab_IpCa_KmpCa + Cai);
  Jxfer := (CaSS - Cai)/COMPUTE_INTRACELLULAR_CALCIUM_FLUXES_tauxfer;
  Jup := ;
  Jtrpn := COMPUTE_Jtrpn_and_BUFFER_SCALE_FACTORS_LTRPNtot*COMPUTE_Jtrpn_and_BUFFER_SCALE_FACTORS_dLTRPNCa + COMPUTE_Jtrpn_and_BUFFER_SCALE_FACTORS_HTRPNtot*COMPUTE_Jtrpn_and_BUFFER_SCALE_FACTORS_dHTRPNCa;
  Jrel := COMPUTE_INTRACELLULAR_CALCIUM_FLUXES_v1*(O1_RyR + O2_RyR)*(CaJSR - CaSS);
  Jtr := (CaNSR - CaJSR)/COMPUTE_INTRACELLULAR_CALCIUM_FLUXES_tautr;
  beta_SS := 1/(1 + COMPUTE_Jtrpn_and_BUFFER_SCALE_FACTORS_CMDNtot*COMPUTE_Jtrpn_and_BUFFER_SCALE_FACTORS_KmCMDN/(CaSS + COMPUTE_Jtrpn_and_BUFFER_SCALE_FACTORS_KmCMDN)^2 + COMPUTE_Jtrpn_and_BUFFER_SCALE_FACTORS_EGTAtot*COMPUTE_Jtrpn_and_BUFFER_SCALE_FACTORS_KmEGTA/(CaSS + COMPUTE_Jtrpn_and_BUFFER_SCALE_FACTORS_KmEGTA)^2);
  beta_JSR := 1/(1 + COMPUTE_Jtrpn_and_BUFFER_SCALE_FACTORS_CSQNtot*COMPUTE_Jtrpn_and_BUFFER_SCALE_FACTORS_KmCSQN/(CaJSR + COMPUTE_Jtrpn_and_BUFFER_SCALE_FACTORS_KmCSQN)^2);
  beta_i := 1/(1 + COMPUTE_Jtrpn_and_BUFFER_SCALE_FACTORS_CMDNtot*COMPUTE_Jtrpn_and_BUFFER_SCALE_FACTORS_KmCMDN/(Cai + COMPUTE_Jtrpn_and_BUFFER_SCALE_FACTORS_KmCMDN)^2 + COMPUTE_Jtrpn_and_BUFFER_SCALE_FACTORS_EGTAtot*COMPUTE_Jtrpn_and_BUFFER_SCALE_FACTORS_KmEGTA/(Cai + COMPUTE_Jtrpn_and_BUFFER_SCALE_FACTORS_KmEGTA)^2);
  COMPUTE_CONCENTRATION_AND_VOLTAGE_DERIVATIVES_i_tot := INa0 + ICa + ICaK + IKr0 + IKs0 + IK1 + INaCa + INaK + Ito1 + IpCa + ICab + INab + i_Stim;
  I_stimulus_past := floor(time_/I_stimulus_stim_period)*I_stimulus_stim_period;
  COMPUTE_INTRACELLULAR_CALCIUM_FLUXES_fb := (Cai/COMPUTE_INTRACELLULAR_CALCIUM_FLUXES_Kfb)^COMPUTE_INTRACELLULAR_CALCIUM_FLUXES_Nfb;
  COMPUTE_INTRACELLULAR_CALCIUM_FLUXES_rb := (CaNSR/COMPUTE_INTRACELLULAR_CALCIUM_FLUXES_Krb)^COMPUTE_INTRACELLULAR_CALCIUM_FLUXES_Nrb;
  COMPUTE_Jtrpn_and_BUFFER_SCALE_FACTORS_CSQNtot := ;
  COMPUTE_Jtrpn_and_BUFFER_SCALE_FACTORS_dLTRPNCa := COMPUTE_Jtrpn_and_BUFFER_SCALE_FACTORS_kltrpn_plus*Cai*(1 - LTRPNCa) - COMPUTE_Jtrpn_and_BUFFER_SCALE_FACTORS_kltrpn_minus*LTRPNCa;
  COMPUTE_Jtrpn_and_BUFFER_SCALE_FACTORS_dHTRPNCa := COMPUTE_Jtrpn_and_BUFFER_SCALE_FACTORS_khtrpn_plus*Cai*(1 - HTRPNCa) - COMPUTE_Jtrpn_and_BUFFER_SCALE_FACTORS_khtrpn_minus*HTRPNCa;
  COMPUTE_DERIVATIVES_OF_RyR_RECEPTOR_STATES_klumenC1O1 := COMPUTE_DERIVATIVES_OF_RyR_RECEPTOR_STATES_HmaxC1O1 - (COMPUTE_DERIVATIVES_OF_RyR_RECEPTOR_STATES_HmaxC1O1 - COMPUTE_DERIVATIVES_OF_RyR_RECEPTOR_STATES_Hmin)/(1 + (COMPUTE_DERIVATIVES_OF_RyR_RECEPTOR_STATES_H50C1O1/CaJSR)^COMPUTE_DERIVATIVES_OF_RyR_RECEPTOR_STATES_HN);
  COMPUTE_DERIVATIVES_OF_RyR_RECEPTOR_STATES_klumenO1C2 := COMPUTE_DERIVATIVES_OF_RyR_RECEPTOR_STATES_HmaxO1C2 - (COMPUTE_DERIVATIVES_OF_RyR_RECEPTOR_STATES_HmaxO1C2 - COMPUTE_DERIVATIVES_OF_RyR_RECEPTOR_STATES_Hmin)/(1 + (COMPUTE_DERIVATIVES_OF_RyR_RECEPTOR_STATES_H50O1C2/CaJSR)^COMPUTE_DERIVATIVES_OF_RyR_RECEPTOR_STATES_HN);
  COMPUTE_DERIVATIVES_OF_RyR_RECEPTOR_STATES_klumenC2O1 := COMPUTE_DERIVATIVES_OF_RyR_RECEPTOR_STATES_HmaxC2O1 - (COMPUTE_DERIVATIVES_OF_RyR_RECEPTOR_STATES_HmaxC2O1 - COMPUTE_DERIVATIVES_OF_RyR_RECEPTOR_STATES_Hmin)/(1 + (COMPUTE_DERIVATIVES_OF_RyR_RECEPTOR_STATES_H50C2O1/CaJSR)^COMPUTE_DERIVATIVES_OF_RyR_RECEPTOR_STATES_HN);
  COMPUTE_DERIVATIVES_OF_RyR_RECEPTOR_STATES_HmaxO1C2 := ;
  COMPUTE_DERIVATIVES_OF_RyR_RECEPTOR_STATES_H50C2O1 := ;
  COMPUTE_DERIVATIVES_OF_RyR_RECEPTOR_STATES_dC1_RyR := -COMPUTE_DERIVATIVES_OF_RyR_RECEPTOR_STATES_kaplus*COMPUTE_DERIVATIVES_OF_RyR_RECEPTOR_STATES_klumenC1O1*(CaSS*1000)^(COMPUTE_DERIVATIVES_OF_RyR_RECEPTOR_STATES_ncoop*COMPUTE_DERIVATIVES_OF_RyR_RECEPTOR_STATES_kryr)*C1_RyR + COMPUTE_DERIVATIVES_OF_RyR_RECEPTOR_STATES_kaminus*O1_RyR;
  COMPUTE_DERIVATIVES_OF_RyR_RECEPTOR_STATES_dO2_RyR := COMPUTE_DERIVATIVES_OF_RyR_RECEPTOR_STATES_kbplus*(CaSS*1000)^(COMPUTE_DERIVATIVES_OF_RyR_RECEPTOR_STATES_mcoop*COMPUTE_DERIVATIVES_OF_RyR_RECEPTOR_STATES_kryr)*O1_RyR - COMPUTE_DERIVATIVES_OF_RyR_RECEPTOR_STATES_kbminus*O2_RyR;
  COMPUTE_DERIVATIVES_OF_RyR_RECEPTOR_STATES_dC2_RyR := COMPUTE_DERIVATIVES_OF_RyR_RECEPTOR_STATES_kcplus/COMPUTE_DERIVATIVES_OF_RyR_RECEPTOR_STATES_klumenO1C2*O1_RyR - COMPUTE_DERIVATIVES_OF_RyR_RECEPTOR_STATES_kcminus*COMPUTE_DERIVATIVES_OF_RyR_RECEPTOR_STATES_klumenC2O1*C2_RyR;
  COMPUTE_DERIVATIVES_OF_RyR_RECEPTOR_STATES_dO1_RyR := -(COMPUTE_DERIVATIVES_OF_RyR_RECEPTOR_STATES_dC1_RyR + COMPUTE_DERIVATIVES_OF_RyR_RECEPTOR_STATES_dO2_RyR + COMPUTE_DERIVATIVES_OF_RyR_RECEPTOR_STATES_dC2_RyR);
  COMPUTE_DERIVATIVES_OF_LTYPE_CHANNEL_STATES_C0_to_C1 := 4*COMPUTE_DERIVATIVES_OF_LTYPE_CHANNEL_STATES_alpha;
  COMPUTE_DERIVATIVES_OF_LTYPE_CHANNEL_STATES_C1_to_C2 := 3*COMPUTE_DERIVATIVES_OF_LTYPE_CHANNEL_STATES_alpha;
  COMPUTE_DERIVATIVES_OF_LTYPE_CHANNEL_STATES_C2_to_C3 := 2*COMPUTE_DERIVATIVES_OF_LTYPE_CHANNEL_STATES_alpha;
  COMPUTE_DERIVATIVES_OF_LTYPE_CHANNEL_STATES_C3_to_C4 := COMPUTE_DERIVATIVES_OF_LTYPE_CHANNEL_STATES_alpha;
  COMPUTE_DERIVATIVES_OF_LTYPE_CHANNEL_STATES_C1_to_C0 := COMPUTE_DERIVATIVES_OF_LTYPE_CHANNEL_STATES_beta;
  COMPUTE_DERIVATIVES_OF_LTYPE_CHANNEL_STATES_C2_to_C1 := 2*COMPUTE_DERIVATIVES_OF_LTYPE_CHANNEL_STATES_beta;
  COMPUTE_DERIVATIVES_OF_LTYPE_CHANNEL_STATES_C3_to_C2 := 3*COMPUTE_DERIVATIVES_OF_LTYPE_CHANNEL_STATES_beta;
  COMPUTE_DERIVATIVES_OF_LTYPE_CHANNEL_STATES_C4_to_C3 := 4*COMPUTE_DERIVATIVES_OF_LTYPE_CHANNEL_STATES_beta;
  COMPUTE_DERIVATIVES_OF_LTYPE_CHANNEL_STATES_CCa0_to_CCa1 := 4*COMPUTE_DERIVATIVES_OF_LTYPE_CHANNEL_STATES_alpha_prime;
  COMPUTE_DERIVATIVES_OF_LTYPE_CHANNEL_STATES_CCa1_to_CCa2 := 3*COMPUTE_DERIVATIVES_OF_LTYPE_CHANNEL_STATES_alpha_prime;
  COMPUTE_DERIVATIVES_OF_LTYPE_CHANNEL_STATES_CCa2_to_CCa3 := 2*COMPUTE_DERIVATIVES_OF_LTYPE_CHANNEL_STATES_alpha_prime;
  COMPUTE_DERIVATIVES_OF_LTYPE_CHANNEL_STATES_CCa3_to_CCa4 := COMPUTE_DERIVATIVES_OF_LTYPE_CHANNEL_STATES_alpha_prime;
  COMPUTE_DERIVATIVES_OF_LTYPE_CHANNEL_STATES_CCa1_to_CCa0 := COMPUTE_DERIVATIVES_OF_LTYPE_CHANNEL_STATES_beta_prime;
  COMPUTE_DERIVATIVES_OF_LTYPE_CHANNEL_STATES_CCa2_to_CCa1 := 2*COMPUTE_DERIVATIVES_OF_LTYPE_CHANNEL_STATES_beta_prime;
  COMPUTE_DERIVATIVES_OF_LTYPE_CHANNEL_STATES_CCa3_to_CCa2 := 3*COMPUTE_DERIVATIVES_OF_LTYPE_CHANNEL_STATES_beta_prime;
  COMPUTE_DERIVATIVES_OF_LTYPE_CHANNEL_STATES_CCa4_to_CCa3 := 4*COMPUTE_DERIVATIVES_OF_LTYPE_CHANNEL_STATES_beta_prime;
  COMPUTE_DERIVATIVES_OF_LTYPE_CHANNEL_STATES_C0_to_CCa0 := COMPUTE_DERIVATIVES_OF_LTYPE_CHANNEL_STATES_gamma;
  COMPUTE_DERIVATIVES_OF_LTYPE_CHANNEL_STATES_C1_to_CCa1 := COMPUTE_DERIVATIVES_OF_LTYPE_CHANNEL_STATES_aL*COMPUTE_DERIVATIVES_OF_LTYPE_CHANNEL_STATES_C0_to_CCa0;
  COMPUTE_DERIVATIVES_OF_LTYPE_CHANNEL_STATES_C2_to_CCa2 := COMPUTE_DERIVATIVES_OF_LTYPE_CHANNEL_STATES_aL*COMPUTE_DERIVATIVES_OF_LTYPE_CHANNEL_STATES_C1_to_CCa1;
  COMPUTE_DERIVATIVES_OF_LTYPE_CHANNEL_STATES_C3_to_CCa3 := COMPUTE_DERIVATIVES_OF_LTYPE_CHANNEL_STATES_aL*COMPUTE_DERIVATIVES_OF_LTYPE_CHANNEL_STATES_C2_to_CCa2;
  COMPUTE_DERIVATIVES_OF_LTYPE_CHANNEL_STATES_C4_to_CCa4 := COMPUTE_DERIVATIVES_OF_LTYPE_CHANNEL_STATES_aL*COMPUTE_DERIVATIVES_OF_LTYPE_CHANNEL_STATES_C3_to_CCa3;
  COMPUTE_DERIVATIVES_OF_LTYPE_CHANNEL_STATES_CCa0_to_C0 := COMPUTE_DERIVATIVES_OF_LTYPE_CHANNEL_STATES_omega;
  COMPUTE_DERIVATIVES_OF_LTYPE_CHANNEL_STATES_CCa1_to_C1 := COMPUTE_DERIVATIVES_OF_LTYPE_CHANNEL_STATES_CCa0_to_C0/COMPUTE_DERIVATIVES_OF_LTYPE_CHANNEL_STATES_bL;
  COMPUTE_DERIVATIVES_OF_LTYPE_CHANNEL_STATES_CCa2_to_C2 := COMPUTE_DERIVATIVES_OF_LTYPE_CHANNEL_STATES_CCa1_to_C1/COMPUTE_DERIVATIVES_OF_LTYPE_CHANNEL_STATES_bL;
  COMPUTE_DERIVATIVES_OF_LTYPE_CHANNEL_STATES_CCa3_to_C3 := COMPUTE_DERIVATIVES_OF_LTYPE_CHANNEL_STATES_CCa2_to_C2/COMPUTE_DERIVATIVES_OF_LTYPE_CHANNEL_STATES_bL;
  COMPUTE_DERIVATIVES_OF_LTYPE_CHANNEL_STATES_CCa4_to_C4 := COMPUTE_DERIVATIVES_OF_LTYPE_CHANNEL_STATES_CCa3_to_C3/COMPUTE_DERIVATIVES_OF_LTYPE_CHANNEL_STATES_bL;
  COMPUTE_DERIVATIVES_OF_LTYPE_CHANNEL_STATES_alpha := 4*1.2*0.416*exp(0.012*(V - 35));
  COMPUTE_DERIVATIVES_OF_LTYPE_CHANNEL_STATES_beta := 4*0.45*0.049*exp(-0.065*(V - 22));
  COMPUTE_DERIVATIVES_OF_LTYPE_CHANNEL_STATES_alpha_prime := COMPUTE_DERIVATIVES_OF_LTYPE_CHANNEL_STATES_aL*COMPUTE_DERIVATIVES_OF_LTYPE_CHANNEL_STATES_alpha;
  COMPUTE_DERIVATIVES_OF_LTYPE_CHANNEL_STATES_beta_prime := COMPUTE_DERIVATIVES_OF_LTYPE_CHANNEL_STATES_beta/COMPUTE_DERIVATIVES_OF_LTYPE_CHANNEL_STATES_bL;
  COMPUTE_DERIVATIVES_OF_LTYPE_CHANNEL_STATES_gamma := 0.6*0.09233*CaSS;
  COMPUTE_DERIVATIVES_OF_LTYPE_CHANNEL_STATES_omega := 0.25*0.01;
  COMPUTE_DERIVATIVES_OF_LTYPE_CHANNEL_STATES_a1_Ca0 := (COMPUTE_DERIVATIVES_OF_LTYPE_CHANNEL_STATES_CCa0_to_CCa1 + COMPUTE_DERIVATIVES_OF_LTYPE_CHANNEL_STATES_CCa0_to_C0)*COMPUTE_DERIVATIVES_OF_LTYPE_CHANNEL_STATES_CCa0;
  COMPUTE_DERIVATIVES_OF_LTYPE_CHANNEL_STATES_a2_Ca0 := COMPUTE_DERIVATIVES_OF_LTYPE_CHANNEL_STATES_CCa1_to_CCa0*COMPUTE_DERIVATIVES_OF_LTYPE_CHANNEL_STATES_CCa1 + COMPUTE_DERIVATIVES_OF_LTYPE_CHANNEL_STATES_C0_to_CCa0*COMPUTE_DERIVATIVES_OF_LTYPE_CHANNEL_STATES_C0;
  COMPUTE_DERIVATIVES_OF_LTYPE_CHANNEL_STATES_a1_Ca1 := (COMPUTE_DERIVATIVES_OF_LTYPE_CHANNEL_STATES_CCa1_to_CCa0 + COMPUTE_DERIVATIVES_OF_LTYPE_CHANNEL_STATES_CCa1_to_CCa2 + COMPUTE_DERIVATIVES_OF_LTYPE_CHANNEL_STATES_CCa1_to_C1)*COMPUTE_DERIVATIVES_OF_LTYPE_CHANNEL_STATES_CCa1;
  COMPUTE_DERIVATIVES_OF_LTYPE_CHANNEL_STATES_a2_Ca1 := COMPUTE_DERIVATIVES_OF_LTYPE_CHANNEL_STATES_CCa0_to_CCa1*COMPUTE_DERIVATIVES_OF_LTYPE_CHANNEL_STATES_CCa0 + COMPUTE_DERIVATIVES_OF_LTYPE_CHANNEL_STATES_CCa2_to_CCa1*COMPUTE_DERIVATIVES_OF_LTYPE_CHANNEL_STATES_CCa2 + COMPUTE_DERIVATIVES_OF_LTYPE_CHANNEL_STATES_C1_to_CCa1*COMPUTE_DERIVATIVES_OF_LTYPE_CHANNEL_STATES_C1;
  COMPUTE_DERIVATIVES_OF_LTYPE_CHANNEL_STATES_a1_Ca2 := (COMPUTE_DERIVATIVES_OF_LTYPE_CHANNEL_STATES_CCa2_to_CCa1 + COMPUTE_DERIVATIVES_OF_LTYPE_CHANNEL_STATES_CCa2_to_CCa3 + COMPUTE_DERIVATIVES_OF_LTYPE_CHANNEL_STATES_CCa2_to_C2)*COMPUTE_DERIVATIVES_OF_LTYPE_CHANNEL_STATES_CCa2;
  COMPUTE_DERIVATIVES_OF_LTYPE_CHANNEL_STATES_a2_Ca2 := COMPUTE_DERIVATIVES_OF_LTYPE_CHANNEL_STATES_CCa1_to_CCa2*COMPUTE_DERIVATIVES_OF_LTYPE_CHANNEL_STATES_CCa1 + COMPUTE_DERIVATIVES_OF_LTYPE_CHANNEL_STATES_CCa3_to_CCa2*COMPUTE_DERIVATIVES_OF_LTYPE_CHANNEL_STATES_CCa3 + COMPUTE_DERIVATIVES_OF_LTYPE_CHANNEL_STATES_C2_to_CCa2*COMPUTE_DERIVATIVES_OF_LTYPE_CHANNEL_STATES_C2;
  COMPUTE_DERIVATIVES_OF_LTYPE_CHANNEL_STATES_a1_Ca3 := (COMPUTE_DERIVATIVES_OF_LTYPE_CHANNEL_STATES_CCa3_to_CCa2 + COMPUTE_DERIVATIVES_OF_LTYPE_CHANNEL_STATES_CCa3_to_CCa4 + COMPUTE_DERIVATIVES_OF_LTYPE_CHANNEL_STATES_CCa3_to_C3)*COMPUTE_DERIVATIVES_OF_LTYPE_CHANNEL_STATES_CCa3;
  COMPUTE_DERIVATIVES_OF_LTYPE_CHANNEL_STATES_a2_Ca3 := COMPUTE_DERIVATIVES_OF_LTYPE_CHANNEL_STATES_CCa2_to_CCa3*COMPUTE_DERIVATIVES_OF_LTYPE_CHANNEL_STATES_CCa2 + COMPUTE_DERIVATIVES_OF_LTYPE_CHANNEL_STATES_CCa4_to_CCa3*COMPUTE_DERIVATIVES_OF_LTYPE_CHANNEL_STATES_CCa4 + COMPUTE_DERIVATIVES_OF_LTYPE_CHANNEL_STATES_C3_to_CCa3*COMPUTE_DERIVATIVES_OF_LTYPE_CHANNEL_STATES_C3;
  COMPUTE_DERIVATIVES_OF_LTYPE_CHANNEL_STATES_a1_Ca4 := (COMPUTE_DERIVATIVES_OF_LTYPE_CHANNEL_STATES_CCa4_to_CCa3 + COMPUTE_DERIVATIVES_OF_LTYPE_CHANNEL_STATES_CCa4_to_C4)*COMPUTE_DERIVATIVES_OF_LTYPE_CHANNEL_STATES_CCa4;
  COMPUTE_DERIVATIVES_OF_LTYPE_CHANNEL_STATES_a2_Ca4 := COMPUTE_DERIVATIVES_OF_LTYPE_CHANNEL_STATES_CCa3_to_CCa4*COMPUTE_DERIVATIVES_OF_LTYPE_CHANNEL_STATES_CCa3 + COMPUTE_DERIVATIVES_OF_LTYPE_CHANNEL_STATES_C4_to_CCa4*COMPUTE_DERIVATIVES_OF_LTYPE_CHANNEL_STATES_C4;
  COMPUTE_DERIVATIVES_OF_LTYPE_CHANNEL_STATES_a1_C0 := (COMPUTE_DERIVATIVES_OF_LTYPE_CHANNEL_STATES_C0_to_C1 + COMPUTE_DERIVATIVES_OF_LTYPE_CHANNEL_STATES_C0_to_CCa0)*COMPUTE_DERIVATIVES_OF_LTYPE_CHANNEL_STATES_C0;
  COMPUTE_DERIVATIVES_OF_LTYPE_CHANNEL_STATES_a2_C0 := COMPUTE_DERIVATIVES_OF_LTYPE_CHANNEL_STATES_C1_to_C0*COMPUTE_DERIVATIVES_OF_LTYPE_CHANNEL_STATES_C1 + COMPUTE_DERIVATIVES_OF_LTYPE_CHANNEL_STATES_CCa0_to_C0*COMPUTE_DERIVATIVES_OF_LTYPE_CHANNEL_STATES_CCa0;
  COMPUTE_DERIVATIVES_OF_LTYPE_CHANNEL_STATES_a1_C1 := (COMPUTE_DERIVATIVES_OF_LTYPE_CHANNEL_STATES_C1_to_C0 + COMPUTE_DERIVATIVES_OF_LTYPE_CHANNEL_STATES_C1_to_C2 + COMPUTE_DERIVATIVES_OF_LTYPE_CHANNEL_STATES_C1_to_CCa1)*COMPUTE_DERIVATIVES_OF_LTYPE_CHANNEL_STATES_C1;
  COMPUTE_DERIVATIVES_OF_LTYPE_CHANNEL_STATES_a2_C1 := COMPUTE_DERIVATIVES_OF_LTYPE_CHANNEL_STATES_C0_to_C1*COMPUTE_DERIVATIVES_OF_LTYPE_CHANNEL_STATES_C0 + COMPUTE_DERIVATIVES_OF_LTYPE_CHANNEL_STATES_C2_to_C1*COMPUTE_DERIVATIVES_OF_LTYPE_CHANNEL_STATES_C2 + COMPUTE_DERIVATIVES_OF_LTYPE_CHANNEL_STATES_CCa1_to_C1*COMPUTE_DERIVATIVES_OF_LTYPE_CHANNEL_STATES_CCa1;
  COMPUTE_DERIVATIVES_OF_LTYPE_CHANNEL_STATES_a1_C2 := (COMPUTE_DERIVATIVES_OF_LTYPE_CHANNEL_STATES_C2_to_C1 + COMPUTE_DERIVATIVES_OF_LTYPE_CHANNEL_STATES_C2_to_C3 + COMPUTE_DERIVATIVES_OF_LTYPE_CHANNEL_STATES_C2_to_CCa2)*COMPUTE_DERIVATIVES_OF_LTYPE_CHANNEL_STATES_C2;
  COMPUTE_DERIVATIVES_OF_LTYPE_CHANNEL_STATES_a2_C2 := COMPUTE_DERIVATIVES_OF_LTYPE_CHANNEL_STATES_C1_to_C2*COMPUTE_DERIVATIVES_OF_LTYPE_CHANNEL_STATES_C1 + COMPUTE_DERIVATIVES_OF_LTYPE_CHANNEL_STATES_C3_to_C2*COMPUTE_DERIVATIVES_OF_LTYPE_CHANNEL_STATES_C3 + COMPUTE_DERIVATIVES_OF_LTYPE_CHANNEL_STATES_CCa2_to_C2*COMPUTE_DERIVATIVES_OF_LTYPE_CHANNEL_STATES_CCa2;
  COMPUTE_DERIVATIVES_OF_LTYPE_CHANNEL_STATES_a1_C3 := (COMPUTE_DERIVATIVES_OF_LTYPE_CHANNEL_STATES_C3_to_C2 + COMPUTE_DERIVATIVES_OF_LTYPE_CHANNEL_STATES_C3_to_C4 + COMPUTE_DERIVATIVES_OF_LTYPE_CHANNEL_STATES_C3_to_CCa3)*COMPUTE_DERIVATIVES_OF_LTYPE_CHANNEL_STATES_C3;
  COMPUTE_DERIVATIVES_OF_LTYPE_CHANNEL_STATES_a2_C3 := COMPUTE_DERIVATIVES_OF_LTYPE_CHANNEL_STATES_C2_to_C3*COMPUTE_DERIVATIVES_OF_LTYPE_CHANNEL_STATES_C2 + COMPUTE_DERIVATIVES_OF_LTYPE_CHANNEL_STATES_C4_to_C3*COMPUTE_DERIVATIVES_OF_LTYPE_CHANNEL_STATES_C4 + COMPUTE_DERIVATIVES_OF_LTYPE_CHANNEL_STATES_CCa3_to_C3*COMPUTE_DERIVATIVES_OF_LTYPE_CHANNEL_STATES_CCa3;
  COMPUTE_DERIVATIVES_OF_LTYPE_CHANNEL_STATES_a1_C4 := (COMPUTE_DERIVATIVES_OF_LTYPE_CHANNEL_STATES_C4_to_C3 + COMPUTE_DERIVATIVES_OF_LTYPE_CHANNEL_STATES_fL + COMPUTE_DERIVATIVES_OF_LTYPE_CHANNEL_STATES_C4_to_CCa4)*COMPUTE_DERIVATIVES_OF_LTYPE_CHANNEL_STATES_C4;
  COMPUTE_DERIVATIVES_OF_LTYPE_CHANNEL_STATES_a2_C4 := COMPUTE_DERIVATIVES_OF_LTYPE_CHANNEL_STATES_C3_to_C4*COMPUTE_DERIVATIVES_OF_LTYPE_CHANNEL_STATES_C3 + COMPUTE_DERIVATIVES_OF_LTYPE_CHANNEL_STATES_gL*Open + COMPUTE_DERIVATIVES_OF_LTYPE_CHANNEL_STATES_CCa4_to_C4*COMPUTE_DERIVATIVES_OF_LTYPE_CHANNEL_STATES_CCa4;
  COMPUTE_DERIVATIVES_OF_LTYPE_CHANNEL_STATES_a1_Cainf := 0.82;
  COMPUTE_DERIVATIVES_OF_LTYPE_CHANNEL_STATES_yCa_inf := COMPUTE_DERIVATIVES_OF_LTYPE_CHANNEL_STATES_a1_Cainf/(1 + exp((V + 28.5)/7.8)) + 1 - COMPUTE_DERIVATIVES_OF_LTYPE_CHANNEL_STATES_a1_Cainf;
  COMPUTE_DERIVATIVES_OF_LTYPE_CHANNEL_STATES_tau_yCa := 1/(0.003363362/(0.5 + exp(V/(-5.538999))) + 0.007790466*exp(V/(-49.5104)));
  COMPUTE_DERIVATIVES_OF_Kv4_3_CHANNEL_STATES_alpha_act43 := COMPUTE_DERIVATIVES_OF_Kv4_3_CHANNEL_STATES_alphaa0Kv43*exp(COMPUTE_DERIVATIVES_OF_Kv4_3_CHANNEL_STATES_aaKv43*V);
  COMPUTE_DERIVATIVES_OF_Kv4_3_CHANNEL_STATES_beta_act43 := COMPUTE_DERIVATIVES_OF_Kv4_3_CHANNEL_STATES_betaa0Kv43*exp(-COMPUTE_DERIVATIVES_OF_Kv4_3_CHANNEL_STATES_baKv43*V);
  COMPUTE_DERIVATIVES_OF_Kv4_3_CHANNEL_STATES_alpha_inact43 := COMPUTE_DERIVATIVES_OF_Kv4_3_CHANNEL_STATES_alphai0Kv43*exp(-COMPUTE_DERIVATIVES_OF_Kv4_3_CHANNEL_STATES_aiKv43*V);
  COMPUTE_DERIVATIVES_OF_Kv4_3_CHANNEL_STATES_beta_inact43 := COMPUTE_DERIVATIVES_OF_Kv4_3_CHANNEL_STATES_betai0Kv43*exp(COMPUTE_DERIVATIVES_OF_Kv4_3_CHANNEL_STATES_biKv43*V);
  COMPUTE_DERIVATIVES_OF_Kv4_3_CHANNEL_STATES_C0Kv43_to_C1Kv43 := 4*COMPUTE_DERIVATIVES_OF_Kv4_3_CHANNEL_STATES_alpha_act43;
  COMPUTE_DERIVATIVES_OF_Kv4_3_CHANNEL_STATES_C1Kv43_to_C2Kv43 := 3*COMPUTE_DERIVATIVES_OF_Kv4_3_CHANNEL_STATES_alpha_act43;
  COMPUTE_DERIVATIVES_OF_Kv4_3_CHANNEL_STATES_C2Kv43_to_C3Kv43 := 2*COMPUTE_DERIVATIVES_OF_Kv4_3_CHANNEL_STATES_alpha_act43;
  COMPUTE_DERIVATIVES_OF_Kv4_3_CHANNEL_STATES_C3Kv43_to_OKv43 := COMPUTE_DERIVATIVES_OF_Kv4_3_CHANNEL_STATES_alpha_act43;
  COMPUTE_DERIVATIVES_OF_Kv4_3_CHANNEL_STATES_CI0Kv43_to_CI1Kv43 := 4*COMPUTE_DERIVATIVES_OF_Kv4_3_CHANNEL_STATES_b1Kv43*COMPUTE_DERIVATIVES_OF_Kv4_3_CHANNEL_STATES_alpha_act43;
  COMPUTE_DERIVATIVES_OF_Kv4_3_CHANNEL_STATES_CI1Kv43_to_CI2Kv43 := 3*COMPUTE_DERIVATIVES_OF_Kv4_3_CHANNEL_STATES_b2Kv43*COMPUTE_DERIVATIVES_OF_Kv4_3_CHANNEL_STATES_alpha_act43/COMPUTE_DERIVATIVES_OF_Kv4_3_CHANNEL_STATES_b1Kv43;
  COMPUTE_DERIVATIVES_OF_Kv4_3_CHANNEL_STATES_CI2Kv43_to_CI3Kv43 := 2*COMPUTE_DERIVATIVES_OF_Kv4_3_CHANNEL_STATES_b3Kv43*COMPUTE_DERIVATIVES_OF_Kv4_3_CHANNEL_STATES_alpha_act43/COMPUTE_DERIVATIVES_OF_Kv4_3_CHANNEL_STATES_b2Kv43;
  COMPUTE_DERIVATIVES_OF_Kv4_3_CHANNEL_STATES_CI3Kv43_to_OIKv43 := COMPUTE_DERIVATIVES_OF_Kv4_3_CHANNEL_STATES_b4Kv43*COMPUTE_DERIVATIVES_OF_Kv4_3_CHANNEL_STATES_alpha_act43/COMPUTE_DERIVATIVES_OF_Kv4_3_CHANNEL_STATES_b3Kv43;
  COMPUTE_DERIVATIVES_OF_Kv4_3_CHANNEL_STATES_C1Kv43_to_C0Kv43 := COMPUTE_DERIVATIVES_OF_Kv4_3_CHANNEL_STATES_beta_act43;
  COMPUTE_DERIVATIVES_OF_Kv4_3_CHANNEL_STATES_C2Kv43_to_C1Kv43 := 2*COMPUTE_DERIVATIVES_OF_Kv4_3_CHANNEL_STATES_beta_act43;
  COMPUTE_DERIVATIVES_OF_Kv4_3_CHANNEL_STATES_C3Kv43_to_C2Kv43 := 3*COMPUTE_DERIVATIVES_OF_Kv4_3_CHANNEL_STATES_beta_act43;
  COMPUTE_DERIVATIVES_OF_Kv4_3_CHANNEL_STATES_OKv43_to_C3Kv43 := 4*COMPUTE_DERIVATIVES_OF_Kv4_3_CHANNEL_STATES_beta_act43;
  COMPUTE_DERIVATIVES_OF_Kv4_3_CHANNEL_STATES_CI1Kv43_to_CI0Kv43 := COMPUTE_DERIVATIVES_OF_Kv4_3_CHANNEL_STATES_beta_act43/COMPUTE_DERIVATIVES_OF_Kv4_3_CHANNEL_STATES_f1Kv43;
  COMPUTE_DERIVATIVES_OF_Kv4_3_CHANNEL_STATES_CI2Kv43_to_CI1Kv43 := 2*COMPUTE_DERIVATIVES_OF_Kv4_3_CHANNEL_STATES_f1Kv43*COMPUTE_DERIVATIVES_OF_Kv4_3_CHANNEL_STATES_beta_act43/COMPUTE_DERIVATIVES_OF_Kv4_3_CHANNEL_STATES_f2Kv43;
  COMPUTE_DERIVATIVES_OF_Kv4_3_CHANNEL_STATES_CI3Kv43_to_CI2Kv43 := 3*COMPUTE_DERIVATIVES_OF_Kv4_3_CHANNEL_STATES_f2Kv43*COMPUTE_DERIVATIVES_OF_Kv4_3_CHANNEL_STATES_beta_act43/COMPUTE_DERIVATIVES_OF_Kv4_3_CHANNEL_STATES_f3Kv43;
  COMPUTE_DERIVATIVES_OF_Kv4_3_CHANNEL_STATES_OIKv43_to_CI3Kv43 := 4*COMPUTE_DERIVATIVES_OF_Kv4_3_CHANNEL_STATES_f3Kv43*COMPUTE_DERIVATIVES_OF_Kv4_3_CHANNEL_STATES_beta_act43/COMPUTE_DERIVATIVES_OF_Kv4_3_CHANNEL_STATES_f4Kv43;
  COMPUTE_DERIVATIVES_OF_Kv4_3_CHANNEL_STATES_C0Kv43_to_CI0Kv43 := COMPUTE_DERIVATIVES_OF_Kv4_3_CHANNEL_STATES_beta_inact43;
  COMPUTE_DERIVATIVES_OF_Kv4_3_CHANNEL_STATES_C1Kv43_to_CI1Kv43 := COMPUTE_DERIVATIVES_OF_Kv4_3_CHANNEL_STATES_f1Kv43*COMPUTE_DERIVATIVES_OF_Kv4_3_CHANNEL_STATES_beta_inact43;
  COMPUTE_DERIVATIVES_OF_Kv4_3_CHANNEL_STATES_C2Kv43_to_CI2Kv43 := COMPUTE_DERIVATIVES_OF_Kv4_3_CHANNEL_STATES_f2Kv43*COMPUTE_DERIVATIVES_OF_Kv4_3_CHANNEL_STATES_beta_inact43;
  COMPUTE_DERIVATIVES_OF_Kv4_3_CHANNEL_STATES_C3Kv43_to_CI3Kv43 := COMPUTE_DERIVATIVES_OF_Kv4_3_CHANNEL_STATES_f3Kv43*COMPUTE_DERIVATIVES_OF_Kv4_3_CHANNEL_STATES_beta_inact43;
  COMPUTE_DERIVATIVES_OF_Kv4_3_CHANNEL_STATES_OKv43_to_OIKv43 := COMPUTE_DERIVATIVES_OF_Kv4_3_CHANNEL_STATES_f4Kv43*COMPUTE_DERIVATIVES_OF_Kv4_3_CHANNEL_STATES_beta_inact43;
  COMPUTE_DERIVATIVES_OF_Kv4_3_CHANNEL_STATES_CI0Kv43_to_C0Kv43 := COMPUTE_DERIVATIVES_OF_Kv4_3_CHANNEL_STATES_alpha_inact43;
  COMPUTE_DERIVATIVES_OF_Kv4_3_CHANNEL_STATES_CI1Kv43_to_C1Kv43 := COMPUTE_DERIVATIVES_OF_Kv4_3_CHANNEL_STATES_alpha_inact43/COMPUTE_DERIVATIVES_OF_Kv4_3_CHANNEL_STATES_b1Kv43;
  COMPUTE_DERIVATIVES_OF_Kv4_3_CHANNEL_STATES_CI2Kv43_to_C2Kv43 := COMPUTE_DERIVATIVES_OF_Kv4_3_CHANNEL_STATES_alpha_inact43/COMPUTE_DERIVATIVES_OF_Kv4_3_CHANNEL_STATES_b2Kv43;
  COMPUTE_DERIVATIVES_OF_Kv4_3_CHANNEL_STATES_CI3Kv43_to_C3Kv43 := COMPUTE_DERIVATIVES_OF_Kv4_3_CHANNEL_STATES_alpha_inact43/COMPUTE_DERIVATIVES_OF_Kv4_3_CHANNEL_STATES_b3Kv43;
  COMPUTE_DERIVATIVES_OF_Kv4_3_CHANNEL_STATES_OIKv43_to_OKv43 := COMPUTE_DERIVATIVES_OF_Kv4_3_CHANNEL_STATES_alpha_inact43/COMPUTE_DERIVATIVES_OF_Kv4_3_CHANNEL_STATES_b4Kv43;
  COMPUTE_DERIVATIVES_OF_Kv4_3_CHANNEL_STATES_a1_C043 := (COMPUTE_DERIVATIVES_OF_Kv4_3_CHANNEL_STATES_C0Kv43_to_C1Kv43 + COMPUTE_DERIVATIVES_OF_Kv4_3_CHANNEL_STATES_C0Kv43_to_CI0Kv43)*C0Kv43;
  COMPUTE_DERIVATIVES_OF_Kv4_3_CHANNEL_STATES_a2_C043 := COMPUTE_DERIVATIVES_OF_Kv4_3_CHANNEL_STATES_C1Kv43_to_C0Kv43*C1Kv43 + COMPUTE_DERIVATIVES_OF_Kv4_3_CHANNEL_STATES_CI0Kv43_to_C0Kv43*CI0Kv43;
  COMPUTE_DERIVATIVES_OF_Kv4_3_CHANNEL_STATES_a1_C143 := (COMPUTE_DERIVATIVES_OF_Kv4_3_CHANNEL_STATES_C1Kv43_to_C2Kv43 + COMPUTE_DERIVATIVES_OF_Kv4_3_CHANNEL_STATES_C1Kv43_to_C0Kv43 + COMPUTE_DERIVATIVES_OF_Kv4_3_CHANNEL_STATES_C1Kv43_to_CI1Kv43)*C1Kv43;
  COMPUTE_DERIVATIVES_OF_Kv4_3_CHANNEL_STATES_a2_C143 := COMPUTE_DERIVATIVES_OF_Kv4_3_CHANNEL_STATES_C2Kv43_to_C1Kv43*C2Kv43 + COMPUTE_DERIVATIVES_OF_Kv4_3_CHANNEL_STATES_CI1Kv43_to_C1Kv43*CI1Kv43 + COMPUTE_DERIVATIVES_OF_Kv4_3_CHANNEL_STATES_C0Kv43_to_C1Kv43*C0Kv43;
  COMPUTE_DERIVATIVES_OF_Kv4_3_CHANNEL_STATES_a1_C243 := (COMPUTE_DERIVATIVES_OF_Kv4_3_CHANNEL_STATES_C2Kv43_to_C3Kv43 + COMPUTE_DERIVATIVES_OF_Kv4_3_CHANNEL_STATES_C2Kv43_to_C1Kv43 + COMPUTE_DERIVATIVES_OF_Kv4_3_CHANNEL_STATES_C2Kv43_to_CI2Kv43)*C2Kv43;
  COMPUTE_DERIVATIVES_OF_Kv4_3_CHANNEL_STATES_a2_C243 := COMPUTE_DERIVATIVES_OF_Kv4_3_CHANNEL_STATES_C3Kv43_to_C2Kv43*C3Kv43 + COMPUTE_DERIVATIVES_OF_Kv4_3_CHANNEL_STATES_CI2Kv43_to_C2Kv43*CI2Kv43 + COMPUTE_DERIVATIVES_OF_Kv4_3_CHANNEL_STATES_C1Kv43_to_C2Kv43*C1Kv43;
  COMPUTE_DERIVATIVES_OF_Kv4_3_CHANNEL_STATES_a1_C343 := (COMPUTE_DERIVATIVES_OF_Kv4_3_CHANNEL_STATES_C3Kv43_to_OKv43 + COMPUTE_DERIVATIVES_OF_Kv4_3_CHANNEL_STATES_C3Kv43_to_C2Kv43 + COMPUTE_DERIVATIVES_OF_Kv4_3_CHANNEL_STATES_C3Kv43_to_CI3Kv43)*C3Kv43;
  COMPUTE_DERIVATIVES_OF_Kv4_3_CHANNEL_STATES_a2_C343 := COMPUTE_DERIVATIVES_OF_Kv4_3_CHANNEL_STATES_OKv43_to_C3Kv43*OKv43 + COMPUTE_DERIVATIVES_OF_Kv4_3_CHANNEL_STATES_CI3Kv43_to_C3Kv43*CI3Kv43 + COMPUTE_DERIVATIVES_OF_Kv4_3_CHANNEL_STATES_C2Kv43_to_C3Kv43*C2Kv43;
  COMPUTE_DERIVATIVES_OF_Kv4_3_CHANNEL_STATES_a1_O43 := (COMPUTE_DERIVATIVES_OF_Kv4_3_CHANNEL_STATES_OKv43_to_C3Kv43 + COMPUTE_DERIVATIVES_OF_Kv4_3_CHANNEL_STATES_OKv43_to_OIKv43)*OKv43;
  COMPUTE_DERIVATIVES_OF_Kv4_3_CHANNEL_STATES_a2_O43 := COMPUTE_DERIVATIVES_OF_Kv4_3_CHANNEL_STATES_C3Kv43_to_OKv43*C3Kv43 + COMPUTE_DERIVATIVES_OF_Kv4_3_CHANNEL_STATES_OIKv43_to_OKv43*OIKv43;
  COMPUTE_DERIVATIVES_OF_Kv4_3_CHANNEL_STATES_a1_I043 := (COMPUTE_DERIVATIVES_OF_Kv4_3_CHANNEL_STATES_CI0Kv43_to_C0Kv43 + COMPUTE_DERIVATIVES_OF_Kv4_3_CHANNEL_STATES_CI0Kv43_to_CI1Kv43)*CI0Kv43;
  COMPUTE_DERIVATIVES_OF_Kv4_3_CHANNEL_STATES_a2_I043 := COMPUTE_DERIVATIVES_OF_Kv4_3_CHANNEL_STATES_C0Kv43_to_CI0Kv43*C0Kv43 + COMPUTE_DERIVATIVES_OF_Kv4_3_CHANNEL_STATES_CI1Kv43_to_CI0Kv43*CI1Kv43;
  COMPUTE_DERIVATIVES_OF_Kv4_3_CHANNEL_STATES_a1_I143 := (COMPUTE_DERIVATIVES_OF_Kv4_3_CHANNEL_STATES_CI1Kv43_to_CI2Kv43 + COMPUTE_DERIVATIVES_OF_Kv4_3_CHANNEL_STATES_CI1Kv43_to_C1Kv43 + COMPUTE_DERIVATIVES_OF_Kv4_3_CHANNEL_STATES_CI1Kv43_to_CI0Kv43)*CI1Kv43;
  COMPUTE_DERIVATIVES_OF_Kv4_3_CHANNEL_STATES_a2_I143 := COMPUTE_DERIVATIVES_OF_Kv4_3_CHANNEL_STATES_CI2Kv43_to_CI1Kv43*CI2Kv43 + COMPUTE_DERIVATIVES_OF_Kv4_3_CHANNEL_STATES_C1Kv43_to_CI1Kv43*C1Kv43 + COMPUTE_DERIVATIVES_OF_Kv4_3_CHANNEL_STATES_CI0Kv43_to_CI1Kv43*CI0Kv43;
  COMPUTE_DERIVATIVES_OF_Kv4_3_CHANNEL_STATES_a1_I243 := (COMPUTE_DERIVATIVES_OF_Kv4_3_CHANNEL_STATES_CI2Kv43_to_CI3Kv43 + COMPUTE_DERIVATIVES_OF_Kv4_3_CHANNEL_STATES_CI2Kv43_to_C2Kv43 + COMPUTE_DERIVATIVES_OF_Kv4_3_CHANNEL_STATES_CI2Kv43_to_CI1Kv43)*CI2Kv43;
  COMPUTE_DERIVATIVES_OF_Kv4_3_CHANNEL_STATES_a2_I243 := COMPUTE_DERIVATIVES_OF_Kv4_3_CHANNEL_STATES_CI3Kv43_to_CI2Kv43*CI3Kv43 + COMPUTE_DERIVATIVES_OF_Kv4_3_CHANNEL_STATES_C2Kv43_to_CI2Kv43*C2Kv43 + COMPUTE_DERIVATIVES_OF_Kv4_3_CHANNEL_STATES_CI1Kv43_to_CI2Kv43*CI1Kv43;
  COMPUTE_DERIVATIVES_OF_Kv4_3_CHANNEL_STATES_a1_I343 := (COMPUTE_DERIVATIVES_OF_Kv4_3_CHANNEL_STATES_CI3Kv43_to_OIKv43 + COMPUTE_DERIVATIVES_OF_Kv4_3_CHANNEL_STATES_CI3Kv43_to_C3Kv43 + COMPUTE_DERIVATIVES_OF_Kv4_3_CHANNEL_STATES_CI3Kv43_to_CI2Kv43)*CI3Kv43;
  COMPUTE_DERIVATIVES_OF_Kv4_3_CHANNEL_STATES_a2_I343 := COMPUTE_DERIVATIVES_OF_Kv4_3_CHANNEL_STATES_OIKv43_to_CI3Kv43*OIKv43 + COMPUTE_DERIVATIVES_OF_Kv4_3_CHANNEL_STATES_C3Kv43_to_CI3Kv43*C3Kv43 + COMPUTE_DERIVATIVES_OF_Kv4_3_CHANNEL_STATES_CI2Kv43_to_CI3Kv43*CI2Kv43;
  COMPUTE_DERIVATIVES_OF_Kv4_3_CHANNEL_STATES_a1_OI43 := (COMPUTE_DERIVATIVES_OF_Kv4_3_CHANNEL_STATES_OIKv43_to_OKv43 + COMPUTE_DERIVATIVES_OF_Kv4_3_CHANNEL_STATES_OIKv43_to_CI3Kv43)*OIKv43;
  COMPUTE_DERIVATIVES_OF_Kv4_3_CHANNEL_STATES_a2_OI43 := COMPUTE_DERIVATIVES_OF_Kv4_3_CHANNEL_STATES_OKv43_to_OIKv43*OKv43 + COMPUTE_DERIVATIVES_OF_Kv4_3_CHANNEL_STATES_CI3Kv43_to_OIKv43*CI3Kv43;
  COMPUTE_DERIVATIVES_OF_Kv1_4_CHANNEL_STATES_alpha_act14 := COMPUTE_DERIVATIVES_OF_Kv1_4_CHANNEL_STATES_alphaa0Kv14*exp(COMPUTE_DERIVATIVES_OF_Kv1_4_CHANNEL_STATES_aaKv14*V);
  COMPUTE_DERIVATIVES_OF_Kv1_4_CHANNEL_STATES_beta_act14 := COMPUTE_DERIVATIVES_OF_Kv1_4_CHANNEL_STATES_betaa0Kv14*exp(-COMPUTE_DERIVATIVES_OF_Kv1_4_CHANNEL_STATES_baKv14*V);
  COMPUTE_DERIVATIVES_OF_Kv1_4_CHANNEL_STATES_alpha_inact14 := COMPUTE_DERIVATIVES_OF_Kv1_4_CHANNEL_STATES_alphai0Kv14;
  COMPUTE_DERIVATIVES_OF_Kv1_4_CHANNEL_STATES_beta_inact14 := COMPUTE_DERIVATIVES_OF_Kv1_4_CHANNEL_STATES_betai0Kv14;
  COMPUTE_DERIVATIVES_OF_Kv1_4_CHANNEL_STATES_C0Kv14_to_C1Kv14 := 4*COMPUTE_DERIVATIVES_OF_Kv1_4_CHANNEL_STATES_alpha_act14;
  COMPUTE_DERIVATIVES_OF_Kv1_4_CHANNEL_STATES_C1Kv14_to_C2Kv14 := 3*COMPUTE_DERIVATIVES_OF_Kv1_4_CHANNEL_STATES_alpha_act14;
  COMPUTE_DERIVATIVES_OF_Kv1_4_CHANNEL_STATES_C2Kv14_to_C3Kv14 := 2*COMPUTE_DERIVATIVES_OF_Kv1_4_CHANNEL_STATES_alpha_act14;
  COMPUTE_DERIVATIVES_OF_Kv1_4_CHANNEL_STATES_C3Kv14_to_OKv14 := COMPUTE_DERIVATIVES_OF_Kv1_4_CHANNEL_STATES_alpha_act14;
  COMPUTE_DERIVATIVES_OF_Kv1_4_CHANNEL_STATES_CI0Kv14_to_CI1Kv14 := 4*COMPUTE_DERIVATIVES_OF_Kv1_4_CHANNEL_STATES_b1Kv14*COMPUTE_DERIVATIVES_OF_Kv1_4_CHANNEL_STATES_alpha_act14;
  COMPUTE_DERIVATIVES_OF_Kv1_4_CHANNEL_STATES_CI1Kv14_to_CI2Kv14 := 3*COMPUTE_DERIVATIVES_OF_Kv1_4_CHANNEL_STATES_b2Kv14*COMPUTE_DERIVATIVES_OF_Kv1_4_CHANNEL_STATES_alpha_act14/COMPUTE_DERIVATIVES_OF_Kv1_4_CHANNEL_STATES_b1Kv14;
  COMPUTE_DERIVATIVES_OF_Kv1_4_CHANNEL_STATES_CI2Kv14_to_CI3Kv14 := 2*COMPUTE_DERIVATIVES_OF_Kv1_4_CHANNEL_STATES_b3Kv14*COMPUTE_DERIVATIVES_OF_Kv1_4_CHANNEL_STATES_alpha_act14/COMPUTE_DERIVATIVES_OF_Kv1_4_CHANNEL_STATES_b2Kv14;
  COMPUTE_DERIVATIVES_OF_Kv1_4_CHANNEL_STATES_CI3Kv14_to_OIKv14 := COMPUTE_DERIVATIVES_OF_Kv1_4_CHANNEL_STATES_b4Kv14*COMPUTE_DERIVATIVES_OF_Kv1_4_CHANNEL_STATES_alpha_act14/COMPUTE_DERIVATIVES_OF_Kv1_4_CHANNEL_STATES_b3Kv14;
  COMPUTE_DERIVATIVES_OF_Kv1_4_CHANNEL_STATES_C1Kv14_to_C0Kv14 := COMPUTE_DERIVATIVES_OF_Kv1_4_CHANNEL_STATES_beta_act14;
  COMPUTE_DERIVATIVES_OF_Kv1_4_CHANNEL_STATES_C2Kv14_to_C1Kv14 := 2*COMPUTE_DERIVATIVES_OF_Kv1_4_CHANNEL_STATES_beta_act14;
  COMPUTE_DERIVATIVES_OF_Kv1_4_CHANNEL_STATES_C3Kv14_to_C2Kv14 := 3*COMPUTE_DERIVATIVES_OF_Kv1_4_CHANNEL_STATES_beta_act14;
  COMPUTE_DERIVATIVES_OF_Kv1_4_CHANNEL_STATES_OKv14_to_C3Kv14 := 4*COMPUTE_DERIVATIVES_OF_Kv1_4_CHANNEL_STATES_beta_act14;
  COMPUTE_DERIVATIVES_OF_Kv1_4_CHANNEL_STATES_CI1Kv14_to_CI0Kv14 := COMPUTE_DERIVATIVES_OF_Kv1_4_CHANNEL_STATES_beta_act14/COMPUTE_DERIVATIVES_OF_Kv1_4_CHANNEL_STATES_f1Kv14;
  COMPUTE_DERIVATIVES_OF_Kv1_4_CHANNEL_STATES_CI2Kv14_to_CI1Kv14 := 2*COMPUTE_DERIVATIVES_OF_Kv1_4_CHANNEL_STATES_f1Kv14*COMPUTE_DERIVATIVES_OF_Kv1_4_CHANNEL_STATES_beta_act14/COMPUTE_DERIVATIVES_OF_Kv1_4_CHANNEL_STATES_f2Kv14;
  COMPUTE_DERIVATIVES_OF_Kv1_4_CHANNEL_STATES_CI3Kv14_to_CI2Kv14 := 3*COMPUTE_DERIVATIVES_OF_Kv1_4_CHANNEL_STATES_f2Kv14*COMPUTE_DERIVATIVES_OF_Kv1_4_CHANNEL_STATES_beta_act14/COMPUTE_DERIVATIVES_OF_Kv1_4_CHANNEL_STATES_f3Kv14;
  COMPUTE_DERIVATIVES_OF_Kv1_4_CHANNEL_STATES_OIKv14_to_CI3Kv14 := 4*COMPUTE_DERIVATIVES_OF_Kv1_4_CHANNEL_STATES_f3Kv14*COMPUTE_DERIVATIVES_OF_Kv1_4_CHANNEL_STATES_beta_act14/COMPUTE_DERIVATIVES_OF_Kv1_4_CHANNEL_STATES_f4Kv14;
  COMPUTE_DERIVATIVES_OF_Kv1_4_CHANNEL_STATES_C0Kv14_to_CI0Kv14 := COMPUTE_DERIVATIVES_OF_Kv1_4_CHANNEL_STATES_beta_inact14;
  COMPUTE_DERIVATIVES_OF_Kv1_4_CHANNEL_STATES_C1Kv14_to_CI1Kv14 := COMPUTE_DERIVATIVES_OF_Kv1_4_CHANNEL_STATES_f1Kv14*COMPUTE_DERIVATIVES_OF_Kv1_4_CHANNEL_STATES_beta_inact14;
  COMPUTE_DERIVATIVES_OF_Kv1_4_CHANNEL_STATES_C2Kv14_to_CI2Kv14 := COMPUTE_DERIVATIVES_OF_Kv1_4_CHANNEL_STATES_f2Kv14*COMPUTE_DERIVATIVES_OF_Kv1_4_CHANNEL_STATES_beta_inact14;
  COMPUTE_DERIVATIVES_OF_Kv1_4_CHANNEL_STATES_C3Kv14_to_CI3Kv14 := COMPUTE_DERIVATIVES_OF_Kv1_4_CHANNEL_STATES_f3Kv14*COMPUTE_DERIVATIVES_OF_Kv1_4_CHANNEL_STATES_beta_inact14;
  COMPUTE_DERIVATIVES_OF_Kv1_4_CHANNEL_STATES_OKv14_to_OIKv14 := COMPUTE_DERIVATIVES_OF_Kv1_4_CHANNEL_STATES_f4Kv14*COMPUTE_DERIVATIVES_OF_Kv1_4_CHANNEL_STATES_beta_inact14;
  COMPUTE_DERIVATIVES_OF_Kv1_4_CHANNEL_STATES_CI0Kv14_to_C0Kv14 := COMPUTE_DERIVATIVES_OF_Kv1_4_CHANNEL_STATES_alpha_inact14;
  COMPUTE_DERIVATIVES_OF_Kv1_4_CHANNEL_STATES_CI1Kv14_to_C1Kv14 := COMPUTE_DERIVATIVES_OF_Kv1_4_CHANNEL_STATES_alpha_inact14/COMPUTE_DERIVATIVES_OF_Kv1_4_CHANNEL_STATES_b1Kv14;
  COMPUTE_DERIVATIVES_OF_Kv1_4_CHANNEL_STATES_CI2Kv14_to_C2Kv14 := COMPUTE_DERIVATIVES_OF_Kv1_4_CHANNEL_STATES_alpha_inact14/COMPUTE_DERIVATIVES_OF_Kv1_4_CHANNEL_STATES_b2Kv14;
  COMPUTE_DERIVATIVES_OF_Kv1_4_CHANNEL_STATES_CI3Kv14_to_C3Kv14 := COMPUTE_DERIVATIVES_OF_Kv1_4_CHANNEL_STATES_alpha_inact14/COMPUTE_DERIVATIVES_OF_Kv1_4_CHANNEL_STATES_b3Kv14;
  COMPUTE_DERIVATIVES_OF_Kv1_4_CHANNEL_STATES_OIKv14_to_OKv14 := COMPUTE_DERIVATIVES_OF_Kv1_4_CHANNEL_STATES_alpha_inact14/COMPUTE_DERIVATIVES_OF_Kv1_4_CHANNEL_STATES_b4Kv14;
  COMPUTE_DERIVATIVES_OF_Kv1_4_CHANNEL_STATES_a1_C0 := (COMPUTE_DERIVATIVES_OF_Kv1_4_CHANNEL_STATES_C0Kv14_to_C1Kv14 + COMPUTE_DERIVATIVES_OF_Kv1_4_CHANNEL_STATES_C0Kv14_to_CI0Kv14)*C0Kv14;
  COMPUTE_DERIVATIVES_OF_Kv1_4_CHANNEL_STATES_a2_C0 := COMPUTE_DERIVATIVES_OF_Kv1_4_CHANNEL_STATES_C1Kv14_to_C0Kv14*C1Kv14 + COMPUTE_DERIVATIVES_OF_Kv1_4_CHANNEL_STATES_CI0Kv14_to_C0Kv14*CI0Kv14;
  COMPUTE_DERIVATIVES_OF_Kv1_4_CHANNEL_STATES_a1_C1 := (COMPUTE_DERIVATIVES_OF_Kv1_4_CHANNEL_STATES_C1Kv14_to_C2Kv14 + COMPUTE_DERIVATIVES_OF_Kv1_4_CHANNEL_STATES_C1Kv14_to_C0Kv14 + COMPUTE_DERIVATIVES_OF_Kv1_4_CHANNEL_STATES_C1Kv14_to_CI1Kv14)*C1Kv14;
  COMPUTE_DERIVATIVES_OF_Kv1_4_CHANNEL_STATES_a2_C1 := COMPUTE_DERIVATIVES_OF_Kv1_4_CHANNEL_STATES_C2Kv14_to_C1Kv14*C2Kv14 + COMPUTE_DERIVATIVES_OF_Kv1_4_CHANNEL_STATES_CI1Kv14_to_C1Kv14*CI1Kv14 + COMPUTE_DERIVATIVES_OF_Kv1_4_CHANNEL_STATES_C0Kv14_to_C1Kv14*C0Kv14;
  COMPUTE_DERIVATIVES_OF_Kv1_4_CHANNEL_STATES_a1_C2 := (COMPUTE_DERIVATIVES_OF_Kv1_4_CHANNEL_STATES_C2Kv14_to_C3Kv14 + COMPUTE_DERIVATIVES_OF_Kv1_4_CHANNEL_STATES_C2Kv14_to_C1Kv14 + COMPUTE_DERIVATIVES_OF_Kv1_4_CHANNEL_STATES_C2Kv14_to_CI2Kv14)*C2Kv14;
  COMPUTE_DERIVATIVES_OF_Kv1_4_CHANNEL_STATES_a2_C2 := COMPUTE_DERIVATIVES_OF_Kv1_4_CHANNEL_STATES_C3Kv14_to_C2Kv14*C3Kv14 + COMPUTE_DERIVATIVES_OF_Kv1_4_CHANNEL_STATES_CI2Kv14_to_C2Kv14*CI2Kv14 + COMPUTE_DERIVATIVES_OF_Kv1_4_CHANNEL_STATES_C1Kv14_to_C2Kv14*C1Kv14;
  COMPUTE_DERIVATIVES_OF_Kv1_4_CHANNEL_STATES_a1_C3 := (COMPUTE_DERIVATIVES_OF_Kv1_4_CHANNEL_STATES_C3Kv14_to_OKv14 + COMPUTE_DERIVATIVES_OF_Kv1_4_CHANNEL_STATES_C3Kv14_to_C2Kv14 + COMPUTE_DERIVATIVES_OF_Kv1_4_CHANNEL_STATES_C3Kv14_to_CI3Kv14)*C3Kv14;
  COMPUTE_DERIVATIVES_OF_Kv1_4_CHANNEL_STATES_a2_C3 := COMPUTE_DERIVATIVES_OF_Kv1_4_CHANNEL_STATES_OKv14_to_C3Kv14*OKv14 + COMPUTE_DERIVATIVES_OF_Kv1_4_CHANNEL_STATES_CI3Kv14_to_C3Kv14*CI3Kv14 + COMPUTE_DERIVATIVES_OF_Kv1_4_CHANNEL_STATES_C2Kv14_to_C3Kv14*C2Kv14;
  COMPUTE_DERIVATIVES_OF_Kv1_4_CHANNEL_STATES_a1_O := (COMPUTE_DERIVATIVES_OF_Kv1_4_CHANNEL_STATES_OKv14_to_C3Kv14 + COMPUTE_DERIVATIVES_OF_Kv1_4_CHANNEL_STATES_OKv14_to_OIKv14)*OKv14;
  COMPUTE_DERIVATIVES_OF_Kv1_4_CHANNEL_STATES_a2_O := COMPUTE_DERIVATIVES_OF_Kv1_4_CHANNEL_STATES_C3Kv14_to_OKv14*C3Kv14 + COMPUTE_DERIVATIVES_OF_Kv1_4_CHANNEL_STATES_OIKv14_to_OKv14*OIKv14;
  COMPUTE_DERIVATIVES_OF_Kv1_4_CHANNEL_STATES_a1_CI0 := (COMPUTE_DERIVATIVES_OF_Kv1_4_CHANNEL_STATES_CI0Kv14_to_C0Kv14 + COMPUTE_DERIVATIVES_OF_Kv1_4_CHANNEL_STATES_CI0Kv14_to_CI1Kv14)*CI0Kv14;
  COMPUTE_DERIVATIVES_OF_Kv1_4_CHANNEL_STATES_a2_CI0 := COMPUTE_DERIVATIVES_OF_Kv1_4_CHANNEL_STATES_C0Kv14_to_CI0Kv14*C0Kv14 + COMPUTE_DERIVATIVES_OF_Kv1_4_CHANNEL_STATES_CI1Kv14_to_CI0Kv14*CI1Kv14;
  COMPUTE_DERIVATIVES_OF_Kv1_4_CHANNEL_STATES_a1_CI1 := (COMPUTE_DERIVATIVES_OF_Kv1_4_CHANNEL_STATES_CI1Kv14_to_CI2Kv14 + COMPUTE_DERIVATIVES_OF_Kv1_4_CHANNEL_STATES_CI1Kv14_to_C1Kv14 + COMPUTE_DERIVATIVES_OF_Kv1_4_CHANNEL_STATES_CI1Kv14_to_CI0Kv14)*CI1Kv14;
  COMPUTE_DERIVATIVES_OF_Kv1_4_CHANNEL_STATES_a2_CI1 := COMPUTE_DERIVATIVES_OF_Kv1_4_CHANNEL_STATES_CI2Kv14_to_CI1Kv14*CI2Kv14 + COMPUTE_DERIVATIVES_OF_Kv1_4_CHANNEL_STATES_C1Kv14_to_CI1Kv14*C1Kv14 + COMPUTE_DERIVATIVES_OF_Kv1_4_CHANNEL_STATES_CI0Kv14_to_CI1Kv14*CI0Kv14;
  COMPUTE_DERIVATIVES_OF_Kv1_4_CHANNEL_STATES_a1_CI2 := (COMPUTE_DERIVATIVES_OF_Kv1_4_CHANNEL_STATES_CI2Kv14_to_CI3Kv14 + COMPUTE_DERIVATIVES_OF_Kv1_4_CHANNEL_STATES_CI2Kv14_to_C2Kv14 + COMPUTE_DERIVATIVES_OF_Kv1_4_CHANNEL_STATES_CI2Kv14_to_CI1Kv14)*CI2Kv14;
  COMPUTE_DERIVATIVES_OF_Kv1_4_CHANNEL_STATES_a2_CI2 := COMPUTE_DERIVATIVES_OF_Kv1_4_CHANNEL_STATES_CI3Kv14_to_CI2Kv14*CI3Kv14 + COMPUTE_DERIVATIVES_OF_Kv1_4_CHANNEL_STATES_C2Kv14_to_CI2Kv14*C2Kv14 + COMPUTE_DERIVATIVES_OF_Kv1_4_CHANNEL_STATES_CI1Kv14_to_CI2Kv14*CI1Kv14;
  COMPUTE_DERIVATIVES_OF_Kv1_4_CHANNEL_STATES_a1_CI3 := (COMPUTE_DERIVATIVES_OF_Kv1_4_CHANNEL_STATES_CI3Kv14_to_OIKv14 + COMPUTE_DERIVATIVES_OF_Kv1_4_CHANNEL_STATES_CI3Kv14_to_C3Kv14 + COMPUTE_DERIVATIVES_OF_Kv1_4_CHANNEL_STATES_CI3Kv14_to_CI2Kv14)*CI3Kv14;
  COMPUTE_DERIVATIVES_OF_Kv1_4_CHANNEL_STATES_a2_CI3 := COMPUTE_DERIVATIVES_OF_Kv1_4_CHANNEL_STATES_OIKv14_to_CI3Kv14*OIKv14 + COMPUTE_DERIVATIVES_OF_Kv1_4_CHANNEL_STATES_C3Kv14_to_CI3Kv14*C3Kv14 + COMPUTE_DERIVATIVES_OF_Kv1_4_CHANNEL_STATES_CI2Kv14_to_CI3Kv14*CI2Kv14;
  COMPUTE_DERIVATIVES_OF_Kv1_4_CHANNEL_STATES_a1_OI := (COMPUTE_DERIVATIVES_OF_Kv1_4_CHANNEL_STATES_OIKv14_to_OKv14 + COMPUTE_DERIVATIVES_OF_Kv1_4_CHANNEL_STATES_OIKv14_to_CI3Kv14)*OIKv14;
  COMPUTE_DERIVATIVES_OF_Kv1_4_CHANNEL_STATES_a2_OI := COMPUTE_DERIVATIVES_OF_Kv1_4_CHANNEL_STATES_OKv14_to_OIKv14*OKv14 + COMPUTE_DERIVATIVES_OF_Kv1_4_CHANNEL_STATES_CI3Kv14_to_OIKv14*CI3Kv14;
  ENa := RToverF*ln(Nao/Nai);
  EK := RToverF*ln(Ko/Ki);
  EKs := RToverF*ln(COMPUTE_REVERSAL_POTENTIALS_a1/COMPUTE_REVERSAL_POTENTIALS_a2);
  ECa := 0.5*RToverF*ln(Cao/Cai);
  COMPUTE_REVERSAL_POTENTIALS_a1 := Ko + 0.01833*Nao;
  COMPUTE_REVERSAL_POTENTIALS_a2 := Ki + 0.01833*Nai;
  COMPUTE_INa_IKr_IKs_Ito1_IK1_INab_IKp_GKv43 := COMPUTE_INa_IKr_IKs_Ito1_IK1_INab_IKp_Kv43Frac*COMPUTE_INa_IKr_IKs_Ito1_IK1_INab_IKp_KvScale*0.1;
  COMPUTE_INa_IKr_IKs_Ito1_IK1_INab_IKp_PKv14 := (1 - COMPUTE_INa_IKr_IKs_Ito1_IK1_INab_IKp_Kv43Frac)*COMPUTE_INa_IKr_IKs_Ito1_IK1_INab_IKp_KvScale*4.2986e-7;
  COMPUTE_INa_IKr_IKs_Ito1_IK1_INab_IKp_fKo := sqrt(Ko/4);
  COMPUTE_INa_IKr_IKs_Ito1_IK1_INab_IKp_VF_over_RT := V/RToverF;
  COMPUTE_INa_IKr_IKs_Ito1_IK1_INab_IKp_VFsq_over_RT := 1000*Faraday*COMPUTE_INa_IKr_IKs_Ito1_IK1_INab_IKp_VF_over_RT;
  COMPUTE_INa_IKr_IKs_Ito1_IK1_INab_IKp_a1_K := Ki*exp(COMPUTE_INa_IKr_IKs_Ito1_IK1_INab_IKp_VF_over_RT) - Ko;
  COMPUTE_INa_IKr_IKs_Ito1_IK1_INab_IKp_a2 := exp(COMPUTE_INa_IKr_IKs_Ito1_IK1_INab_IKp_VF_over_RT) - 1;
  COMPUTE_INa_IKr_IKs_Ito1_IK1_INab_IKp_a1_Na := Nai*exp(COMPUTE_INa_IKr_IKs_Ito1_IK1_INab_IKp_VF_over_RT) - Nao;
  COMPUTE_INa_IKr_IKs_Ito1_IK1_INab_IKp_K1_inf := 1/(0.94 + exp(1.26/RToverF*(V - EK)));
  IKv14 := IKv14_K + IKv14_Na;
  COMPUTE_INaK_INaCa_ICab_IpCa_VF_over_RT := V/RToverF;
  COMPUTE_INaK_INaCa_ICab_IpCa_sigma := (exp(Nao/67.3) - 1)/7;
  COMPUTE_INaK_INaCa_ICab_IpCa_a1_Na := 1 + 0.1245*exp(-0.1*COMPUTE_INaK_INaCa_ICab_IpCa_VF_over_RT);
  COMPUTE_INaK_INaCa_ICab_IpCa_a2_Na := 0.0365*COMPUTE_INaK_INaCa_ICab_IpCa_sigma*exp(-1.33*COMPUTE_INaK_INaCa_ICab_IpCa_VF_over_RT);
  COMPUTE_INaK_INaCa_ICab_IpCa_fNaK := 1/(COMPUTE_INaK_INaCa_ICab_IpCa_a1_Na + COMPUTE_INaK_INaCa_ICab_IpCa_a2_Na);
  COMPUTE_INaK_INaCa_ICab_IpCa_a1_K := Ko/(Ko + COMPUTE_INaK_INaCa_ICab_IpCa_KmKo);
  COMPUTE_INaK_INaCa_ICab_IpCa_a2_K := 1 + (COMPUTE_INaK_INaCa_ICab_IpCa_KmNai/Nai)^1.5;
  COMPUTE_INaK_INaCa_ICab_IpCa_a1_ncx := exp(COMPUTE_INaK_INaCa_ICab_IpCa_eta*COMPUTE_INaK_INaCa_ICab_IpCa_VF_over_RT)*Nai^3*Cao;
  COMPUTE_INaK_INaCa_ICab_IpCa_a2_ncx := exp((COMPUTE_INaK_INaCa_ICab_IpCa_eta - 1)*COMPUTE_INaK_INaCa_ICab_IpCa_VF_over_RT)*Nao^3*Cai;
  COMPUTE_INaK_INaCa_ICab_IpCa_a3_ncx := 1 + COMPUTE_INaK_INaCa_ICab_IpCa_ksat*exp((COMPUTE_INaK_INaCa_ICab_IpCa_eta - 1)*COMPUTE_INaK_INaCa_ICab_IpCa_VF_over_RT);
  COMPUTE_INaK_INaCa_ICab_IpCa_a4_ncx := COMPUTE_INaK_INaCa_ICab_IpCa_KmCa + Cao;
  COMPUTE_INaK_INaCa_ICab_IpCa_a5_ncx := (COMPUTE_INaK_INaCa_ICab_IpCa_KmNa^3 + Nao^3)/5000;
  COMPUTE_ICa_ICaK_PKprime := COMPUTE_ICa_ICaK_PK/(1 + COMPUTE_ICa_ICaK_Icabar/COMPUTE_ICa_ICaK_ICahalf);
  COMPUTE_ICa_ICaK_VF_over_RT := V/RToverF;
  COMPUTE_ICa_ICaK_VFsq_over_RT := 1000*Faraday*COMPUTE_ICa_ICaK_VF_over_RT;
  COMPUTE_ICa_ICaK_a1_Ca := 1e-3*exp(2*COMPUTE_ICa_ICaK_VF_over_RT) - Cao*0.341;
  COMPUTE_ICa_ICaK_a2_Ca := exp(2*COMPUTE_ICa_ICaK_VF_over_RT) - 1;
  COMPUTE_ICa_ICaK_a1_K := Ki*exp(COMPUTE_ICa_ICaK_VF_over_RT) - Ko;
  COMPUTE_ICa_ICaK_a2_K := exp(COMPUTE_ICa_ICaK_VF_over_RT) - 1;
  COMPUTE_ICa_ICaK_ICamax := COMPUTE_ICa_ICaK_PCa*4*COMPUTE_ICa_ICaK_VFsq_over_RT*COMPUTE_ICa_ICaK_a1_Ca/COMPUTE_ICa_ICaK_a2_Ca;
  COMPUTE_ICa_ICaK_Icabar := ;
  COMPUTE_ICa_ICaK_PCa := ;
  COMPUTE_ICa_ICaK_PK := COMPUTE_ICa_ICaK_Pscale*4.574e-7;
  INa_Temp_Scale := 1.388623;
  INa_alpha1 := INa_Temp_Scale*INa_KToverH*exp(-114007.5/INa_RTNa + 224.114/Rgas + 0.2863743*V/INa_RTNaF);
  INa_beta1 := INa_Temp_Scale*INa_KToverH*exp(-272470.3/INa_RTNa + 708.146/Rgas + (-2.285284*V/INa_RTNaF));
  INa_gamma1 := INa_Temp_Scale*INa_KToverH*exp(-196336.6/INa_RTNa + 529.952/Rgas + 2.780849*V/INa_RTNaF);
  INa_Delta1 := INa_Temp_Scale*INa_KToverH*exp(-133689.9/INa_RTNa + 229.205/Rgas + (-1.558042*V/INa_RTNaF));
  INa_On := INa_Temp_Scale*INa_KToverH*exp(-62123.08/INa_RTNa + 39.295/Rgas + 0.288816*V/INa_RTNaF);
  INa_Of := INa_Temp_Scale*INa_KToverH*exp(-97657.85/INa_RTNa + 1.51/Rgas + 0.0684862*V/INa_RTNaF);
  INa_GammaGamma := INa_Temp_Scale*INa_KToverH*exp(116431.1/INa_RTNa + (-578.317/Rgas) + 0.764126*V/INa_RTNaF);
  INa_DeltaDelta := INa_Temp_Scale*INa_KToverH*exp(-55700.66/INa_RTNa + (-130.639/Rgas) + (-3.649817*V/INa_RTNaF));
  INa_epsilon := INa_Temp_Scale*INa_KToverH*exp(-85800.37/INa_RTNa + 70.078/Rgas);
  INa_omega_na := INa_Temp_Scale*INa_KToverH*exp(-121955.2/INa_RTNa + 225.175/Rgas);
  INa_rho := INa_Temp_Scale*INa_KToverH*exp(-147814/INa_RTNa + 338.915/Rgas + 2.136004*V/INa_RTNaF);
  INa_mu := INa_Temp_Scale*INa_KToverH*exp(-121322.1/INa_RTNa + 193.265/Rgas + (-1.742903*V/INa_RTNaF));
  INa_Cn_ := INa_Temp_Scale*INa_KToverH*exp(-287913.4/INa_RTNa + 786.217/Rgas);
  INa_Cf := INa_Temp_Scale*INa_KToverH*exp(-59565.22/INa_RTNa + 0.00711/Rgas);
  INa_parameter_a := 1.400426;
  INa_k12 := 4*INa_alpha1;
  INa_k23 := 3*INa_alpha1;
  INa_k34 := 2*INa_alpha1;
  INa_k45 := INa_alpha1;
  INa_k56 := INa_gamma1;
  INa_k67 := INa_epsilon;
  INa_k89 := INa_k12*INa_parameter_a;
  INa_k910 := INa_k23*INa_parameter_a;
  INa_k1011 := INa_k34*INa_parameter_a;
  INa_k1112 := INa_k45*INa_parameter_a;
  INa_k1213 := INa_GammaGamma;
  INa_k57 := INa_rho;
  INa_k21 := INa_beta1;
  INa_k32 := 2*INa_beta1;
  INa_k43 := 3*INa_beta1;
  INa_k54 := 4*INa_beta1;
  INa_k65 := INa_Delta1;
  INa_k76 := INa_omega_na;
  INa_k98 := INa_k21/INa_parameter_a;
  INa_k109 := INa_k32/INa_parameter_a;
  INa_k1110 := INa_k43/INa_parameter_a;
  INa_k1211 := INa_k54/INa_parameter_a;
  INa_k1312 := INa_DeltaDelta;
  INa_k75 := INa_mu;
  INa_k81 := INa_Cf;
  INa_k92 := INa_k81/INa_parameter_a;
  INa_k103 := INa_k92/INa_parameter_a;
  INa_k114 := INa_k103/INa_parameter_a;
  INa_k125 := INa_k114/INa_parameter_a;
  INa_k136 := INa_Of;
  INa_k18 := INa_Cn_;
  INa_k29 := INa_k18*INa_parameter_a;
  INa_k310 := INa_k29*INa_parameter_a;
  INa_k411 := INa_k310*INa_parameter_a;
  INa_k512 := INa_k411*INa_parameter_a;
  INa_k613 := INa_On;
  INa_KToverH := 1.381e-23*INa_TNa/6.626e-31;
  INa_FoverRT := 1/RToverF;
  INa_RTNa := Rgas*INa_TNa;
  INa_RTNaF := Rgas*INa_TNa/Faraday;
  IKr_C2H_to_C3H := IKr_T_Const_HERG*0.02608362;
  IKr_C3H_to_C2H := IKr_T_Const_HERG*0.1483298;
  IKr_C1H_to_C2H := IKr_T_Const_HERG*IKr_A0_HERG*exp(IKr_B0_HERG*V);
  IKr_C2H_to_C1H := IKr_T_Const_HERG*IKr_A1_HERG*exp(IKr_B1_HERG*V);
  IKr_C3H_to_OH := IKr_T_Const_HERG*IKr_A2_HERG*exp(IKr_B2_HERG*V);
  IKr_OH_to_C3H := IKr_T_Const_HERG*IKr_A3_HERG*exp(IKr_B3_HERG*V);
  IKr_OH_to_IH := IKr_T_Const_HERG*IKr_A4_HERG*exp(IKr_B4_HERG*V);
  IKr_IH_to_OH := IKr_T_Const_HERG*IKr_A5_HERG*exp(IKr_B5_HERG*V);
  IKr_C3H_to_IH := IKr_T_Const_HERG*IKr_A6_HERG*exp(IKr_B6_HERG*V);
  IKr_IH_to_C3H := IKr_OH_to_C3H*IKr_IH_to_OH*IKr_C3H_to_IH/(IKr_C3H_to_OH*IKr_OH_to_IH);
  IKr_a1_C2 := IKr_C1H_to_C2H*C1Herg + IKr_C3H_to_C2H*C3Herg;
  IKr_a2_C2 := (IKr_C2H_to_C1H + IKr_C2H_to_C3H)*C2Herg;
  IKr_a1_C3 := IKr_C2H_to_C3H*C2Herg + IKr_OH_to_C3H*OHerg + IKr_IH_to_C3H*IHerg;
  IKr_a2_C3 := (IKr_C3H_to_IH + IKr_C3H_to_OH + IKr_C3H_to_C2H)*C3Herg;
  IKr_a1_O := IKr_C3H_to_OH*C3Herg + IKr_IH_to_OH*IHerg;
  IKr_a2_O := (IKr_OH_to_C3H + IKr_OH_to_IH)*OHerg;
  IKr_a1_I := IKr_C3H_to_IH*C3Herg + IKr_OH_to_IH*OHerg;
  IKr_a2_I := (IKr_IH_to_C3H + IKr_IH_to_OH)*IHerg;
  IKs_C0ks_C1ks := 0.007956008;
  IKs_C1ks_O1ks := 0.03966721;
  IKs_O1ks_O2ks := 0.007672544*exp(0.08662946*V);
  IKs_O1ks_C1ks := 0.007008066*exp(-0.1499975*V);
  IKs_O2ks_O1ks := 0.00379738*exp(-0.01425668*V);
  IKs_C1ks_C0ks := 0.2162558*exp(-1.889123e-5*V);

  // Rate rules:
  Nai' = -(INa0 + INab + 3*(INaCa + INaK) + IKv14_Na)*COMPUTE_CONCENTRATION_AND_VOLTAGE_DERIVATIVES_a1;
  Ki' = -(IKr0 + IKs0 + IK1 + ICaK + i_Stim - 2*INaK + IKv43 + IKv14_K)*COMPUTE_CONCENTRATION_AND_VOLTAGE_DERIVATIVES_a1;
  Cai' = beta_i*(Jxfer - Jup - Jtrpn - (ICab - 2*INaCa + IpCa)*0.5*COMPUTE_CONCENTRATION_AND_VOLTAGE_DERIVATIVES_a1);
  CaSS' = beta_SS*(Jrel*COMPUTE_CONCENTRATION_AND_VOLTAGE_DERIVATIVES_VJSR/COMPUTE_CONCENTRATION_AND_VOLTAGE_DERIVATIVES_VSS - Jxfer*COMPUTE_CONCENTRATION_AND_VOLTAGE_DERIVATIVES_Vmyo/COMPUTE_CONCENTRATION_AND_VOLTAGE_DERIVATIVES_VSS - ICa*COMPUTE_CONCENTRATION_AND_VOLTAGE_DERIVATIVES_a2);
  CaJSR' = beta_JSR*(Jtr - Jrel);
  CaNSR' = Jup*COMPUTE_CONCENTRATION_AND_VOLTAGE_DERIVATIVES_Vmyo/COMPUTE_CONCENTRATION_AND_VOLTAGE_DERIVATIVES_VNSR - Jtr*COMPUTE_CONCENTRATION_AND_VOLTAGE_DERIVATIVES_VJSR/COMPUTE_CONCENTRATION_AND_VOLTAGE_DERIVATIVES_VNSR;
  V' = -COMPUTE_CONCENTRATION_AND_VOLTAGE_DERIVATIVES_i_tot;
  O1_RyR' = COMPUTE_DERIVATIVES_OF_RyR_RECEPTOR_STATES_dO1_RyR;
  O2_RyR' = COMPUTE_DERIVATIVES_OF_RyR_RECEPTOR_STATES_dO2_RyR;
  LTRPNCa' = COMPUTE_Jtrpn_and_BUFFER_SCALE_FACTORS_dLTRPNCa;
  HTRPNCa' = COMPUTE_Jtrpn_and_BUFFER_SCALE_FACTORS_dHTRPNCa;
  C1_RyR' = COMPUTE_DERIVATIVES_OF_RyR_RECEPTOR_STATES_dC1_RyR;
  C2_RyR' = COMPUTE_DERIVATIVES_OF_RyR_RECEPTOR_STATES_dC2_RyR;
  COMPUTE_DERIVATIVES_OF_LTYPE_CHANNEL_STATES_C0' = COMPUTE_DERIVATIVES_OF_LTYPE_CHANNEL_STATES_a2_C0 - COMPUTE_DERIVATIVES_OF_LTYPE_CHANNEL_STATES_a1_C0;
  COMPUTE_DERIVATIVES_OF_LTYPE_CHANNEL_STATES_C1' = COMPUTE_DERIVATIVES_OF_LTYPE_CHANNEL_STATES_a2_C1 - COMPUTE_DERIVATIVES_OF_LTYPE_CHANNEL_STATES_a1_C1;
  COMPUTE_DERIVATIVES_OF_LTYPE_CHANNEL_STATES_C2' = COMPUTE_DERIVATIVES_OF_LTYPE_CHANNEL_STATES_a2_C2 - COMPUTE_DERIVATIVES_OF_LTYPE_CHANNEL_STATES_a1_C2;
  COMPUTE_DERIVATIVES_OF_LTYPE_CHANNEL_STATES_C3' = COMPUTE_DERIVATIVES_OF_LTYPE_CHANNEL_STATES_a2_C3 - COMPUTE_DERIVATIVES_OF_LTYPE_CHANNEL_STATES_a1_C3;
  COMPUTE_DERIVATIVES_OF_LTYPE_CHANNEL_STATES_C4' = COMPUTE_DERIVATIVES_OF_LTYPE_CHANNEL_STATES_a2_C4 - COMPUTE_DERIVATIVES_OF_LTYPE_CHANNEL_STATES_a1_C4;
  COMPUTE_DERIVATIVES_OF_LTYPE_CHANNEL_STATES_CCa0' = COMPUTE_DERIVATIVES_OF_LTYPE_CHANNEL_STATES_a2_Ca0 - COMPUTE_DERIVATIVES_OF_LTYPE_CHANNEL_STATES_a1_Ca0;
  COMPUTE_DERIVATIVES_OF_LTYPE_CHANNEL_STATES_CCa1' = COMPUTE_DERIVATIVES_OF_LTYPE_CHANNEL_STATES_a2_Ca1 - COMPUTE_DERIVATIVES_OF_LTYPE_CHANNEL_STATES_a1_Ca1;
  COMPUTE_DERIVATIVES_OF_LTYPE_CHANNEL_STATES_CCa2' = COMPUTE_DERIVATIVES_OF_LTYPE_CHANNEL_STATES_a2_Ca2 - COMPUTE_DERIVATIVES_OF_LTYPE_CHANNEL_STATES_a1_Ca2;
  COMPUTE_DERIVATIVES_OF_LTYPE_CHANNEL_STATES_CCa3' = COMPUTE_DERIVATIVES_OF_LTYPE_CHANNEL_STATES_a2_Ca3 - COMPUTE_DERIVATIVES_OF_LTYPE_CHANNEL_STATES_a1_Ca3;
  COMPUTE_DERIVATIVES_OF_LTYPE_CHANNEL_STATES_CCa4' = COMPUTE_DERIVATIVES_OF_LTYPE_CHANNEL_STATES_a2_Ca4 - COMPUTE_DERIVATIVES_OF_LTYPE_CHANNEL_STATES_a1_Ca4;
  Open' = COMPUTE_DERIVATIVES_OF_LTYPE_CHANNEL_STATES_fL*COMPUTE_DERIVATIVES_OF_LTYPE_CHANNEL_STATES_C4 - COMPUTE_DERIVATIVES_OF_LTYPE_CHANNEL_STATES_gL*Open;
  yCa' = (COMPUTE_DERIVATIVES_OF_LTYPE_CHANNEL_STATES_yCa_inf - yCa)/COMPUTE_DERIVATIVES_OF_LTYPE_CHANNEL_STATES_tau_yCa;
  C0Kv43' = COMPUTE_DERIVATIVES_OF_Kv4_3_CHANNEL_STATES_a2_C043 - COMPUTE_DERIVATIVES_OF_Kv4_3_CHANNEL_STATES_a1_C043;
  C1Kv43' = COMPUTE_DERIVATIVES_OF_Kv4_3_CHANNEL_STATES_a2_C143 - COMPUTE_DERIVATIVES_OF_Kv4_3_CHANNEL_STATES_a1_C143;
  C2Kv43' = COMPUTE_DERIVATIVES_OF_Kv4_3_CHANNEL_STATES_a2_C243 - COMPUTE_DERIVATIVES_OF_Kv4_3_CHANNEL_STATES_a1_C243;
  C3Kv43' = COMPUTE_DERIVATIVES_OF_Kv4_3_CHANNEL_STATES_a2_C343 - COMPUTE_DERIVATIVES_OF_Kv4_3_CHANNEL_STATES_a1_C343;
  OKv43' = COMPUTE_DERIVATIVES_OF_Kv4_3_CHANNEL_STATES_a2_O43 - COMPUTE_DERIVATIVES_OF_Kv4_3_CHANNEL_STATES_a1_O43;
  CI0Kv43' = COMPUTE_DERIVATIVES_OF_Kv4_3_CHANNEL_STATES_a2_I043 - COMPUTE_DERIVATIVES_OF_Kv4_3_CHANNEL_STATES_a1_I043;
  CI1Kv43' = COMPUTE_DERIVATIVES_OF_Kv4_3_CHANNEL_STATES_a2_I143 - COMPUTE_DERIVATIVES_OF_Kv4_3_CHANNEL_STATES_a1_I143;
  CI2Kv43' = COMPUTE_DERIVATIVES_OF_Kv4_3_CHANNEL_STATES_a2_I243 - COMPUTE_DERIVATIVES_OF_Kv4_3_CHANNEL_STATES_a1_I243;
  CI3Kv43' = COMPUTE_DERIVATIVES_OF_Kv4_3_CHANNEL_STATES_a2_I343 - COMPUTE_DERIVATIVES_OF_Kv4_3_CHANNEL_STATES_a1_I343;
  OIKv43' = COMPUTE_DERIVATIVES_OF_Kv4_3_CHANNEL_STATES_a2_OI43 - COMPUTE_DERIVATIVES_OF_Kv4_3_CHANNEL_STATES_a1_OI43;
  C0Kv14' = COMPUTE_DERIVATIVES_OF_Kv1_4_CHANNEL_STATES_a2_C0 - COMPUTE_DERIVATIVES_OF_Kv1_4_CHANNEL_STATES_a1_C0;
  C1Kv14' = COMPUTE_DERIVATIVES_OF_Kv1_4_CHANNEL_STATES_a2_C1 - COMPUTE_DERIVATIVES_OF_Kv1_4_CHANNEL_STATES_a1_C1;
  C2Kv14' = COMPUTE_DERIVATIVES_OF_Kv1_4_CHANNEL_STATES_a2_C2 - COMPUTE_DERIVATIVES_OF_Kv1_4_CHANNEL_STATES_a1_C2;
  C3Kv14' = COMPUTE_DERIVATIVES_OF_Kv1_4_CHANNEL_STATES_a2_C3 - COMPUTE_DERIVATIVES_OF_Kv1_4_CHANNEL_STATES_a1_C3;
  OKv14' = COMPUTE_DERIVATIVES_OF_Kv1_4_CHANNEL_STATES_a2_O - COMPUTE_DERIVATIVES_OF_Kv1_4_CHANNEL_STATES_a1_O;
  CI0Kv14' = COMPUTE_DERIVATIVES_OF_Kv1_4_CHANNEL_STATES_a2_CI0 - COMPUTE_DERIVATIVES_OF_Kv1_4_CHANNEL_STATES_a1_CI0;
  CI1Kv14' = COMPUTE_DERIVATIVES_OF_Kv1_4_CHANNEL_STATES_a2_CI1 - COMPUTE_DERIVATIVES_OF_Kv1_4_CHANNEL_STATES_a1_CI1;
  CI2Kv14' = COMPUTE_DERIVATIVES_OF_Kv1_4_CHANNEL_STATES_a2_CI2 - COMPUTE_DERIVATIVES_OF_Kv1_4_CHANNEL_STATES_a1_CI2;
  CI3Kv14' = COMPUTE_DERIVATIVES_OF_Kv1_4_CHANNEL_STATES_a2_CI3 - COMPUTE_DERIVATIVES_OF_Kv1_4_CHANNEL_STATES_a1_CI3;
  OIKv14' = COMPUTE_DERIVATIVES_OF_Kv1_4_CHANNEL_STATES_a2_OI - COMPUTE_DERIVATIVES_OF_Kv1_4_CHANNEL_STATES_a1_OI;
  na6' = INa_k56*na5 - (INa_k65 + INa_k67 + INa_k613)*na6 + INa_k76*na7 + INa_k136*na13;
  na7' = INa_k57*na5 + INa_k67*na6 - (INa_k75 + INa_k76)*na7;
  OHerg' = IKr_a1_O - IKr_a2_O;
  O1ks' = IKs_C1ks_O1ks*C1ks - (IKs_O1ks_C1ks + IKs_O1ks_O2ks)*O1ks + IKs_O2ks_O1ks*O2ks;
  O2ks' = IKs_O1ks_O2ks*O1ks - IKs_O2ks_O1ks*O2ks;
  na1' = -(INa_k18 + INa_k12)*na1 + INa_k21*na2 + INa_k81*na8;
  na2' = INa_k12*na1 - (INa_k21 + INa_k23 + INa_k29)*na2 + INa_k32*na3 + INa_k92*na9;
  na3' = INa_k23*na2 - (INa_k32 + INa_k34 + INa_k310)*na3 + INa_k43*na4 + INa_k103*na10;
  na4' = INa_k34*na3 - (INa_k43 + INa_k45 + INa_k411)*na4 + INa_k54*na5 + INa_k114*na11;
  na5' = INa_k45*na4 - (INa_k54 + INa_k56 + INa_k57 + INa_k512)*na5 + INa_k65*na6 + INa_k75*na7 + INa_k125*na12;
  na8' = INa_k18*na1 - (INa_k81 + INa_k89)*na8 + INa_k98*na9;
  na9' = INa_k29*na2 + INa_k89*na8 - (INa_k98 + INa_k92 + INa_k910)*na9 + INa_k109*na10;
  na10' = INa_k310*na3 + INa_k910*na9 - (INa_k1011 + INa_k103 + INa_k109)*na10 + INa_k1110*na11;
  na11' = INa_k411*na4 + INa_k1011*na10 - (INa_k1110 + INa_k114 + INa_k1112)*na11 + INa_k1211*na12;
  na12' = INa_k512*na5 + INa_k1112*na11 - (INa_k1211 + INa_k125 + INa_k1213)*na12 + INa_k1312*na13;
  na13' = INa_k613*na6 + INa_k1213*na12 - (INa_k1312 + INa_k136)*na13;
  C1Herg' = IKr_C2H_to_C1H*C2Herg - IKr_C1H_to_C2H*C1Herg;
  C2Herg' = IKr_a1_C2 - IKr_a2_C2;
  C3Herg' = IKr_a1_C3 - IKr_a2_C3;
  IHerg' = IKr_a1_I - IKr_a2_I;
  C0ks' = -IKs_C0ks_C1ks*C0ks + IKs_C1ks_C0ks*C1ks;
  C1ks' = IKs_C0ks_C1ks*C0ks - (IKs_C1ks_C0ks + IKs_C1ks_O1ks)*C1ks + IKs_O1ks_C1ks*O1ks;
end
