// SBML level 2 version 4

model izakov_katsnelson_blyakhman_markhasin_shkylar_1991____main()
  // Originally created by libAntimony v1.4 (using libSBML 4.1.0-b2)

  // Compartments:
  compartment default_compartment = 1;

  // Parameters:
  equations_A_1 = 0;
  equations_n_2 = 0;
  equations_alpha_1 = 14.6;
  equations_alpha_2 = 14.6;
  equations_beta_1 = 1;
  equations_beta_2 = 0.0012;
  equations_lambda_ = 30;
  equations_V_max = 0.0043;
  equations_Ca_m = 0.045;
  equations_t_d = 170;
  equations_a_c = 0.00024;
  equations_b_c = 0.0005;
  equations_C_1 = 0.029;
  equations_C_20 = 0.2;
  equations_q_k = 4;
  equations_a = 0.25;
  equations_m_0 = 0.87;
  equations_g_1 = 0.4;
  equations_g_2 = 0.6;
  equations_pi_min = 0.05;
  equations_S_0 = 0.77;
  equations_q_1 = 0.017;
  equations_q_2 = 0.26;
  equations_q_3 = 0.03;
  equations_TnC = 1;
  time_ = ;

  // Assignment rules:
  equations_P_CE := equations_lambda_*equations_S*equations_A_1*equations_n*equations_p_V;
  equations_P_PE := equations_beta_2*(exp(equations_alpha_2*l_2) - 1);
  equations_P_SE := equations_beta_1*(exp(equations_alpha_1*(l_2 - l_1)) - 1);
  equations_Ca := ;
  equations_C_2 := equations_C_20*equations_pi_n*equations_phi_A_1;
  equations_phi_A_1 := exp(-equations_q_k*equations_A_1);
  equations_pi_n := ;
  equations_A := equations_A_1*equations_S/1;
  equations_S := 0.5*l_1 + equations_S_0;
  equations_n := equations_n_1*equations_n_2;
  equations_n_1 := ;
  equations_G_V := 1 + 0.6*equations_V/equations_V_max;
  equations_q_V := ;
  equations_V := -dl_1_dt;
  equations_F_V := equations_a*(1 + equations_V/equations_V_max)/(equations_a - equations_V/equations_V_max);
  equations_p_V := equations_F_V/equations_G_V;
  equations_V_1 := 0.1*equations_V_max;
  l_1 := ;
  l_2 := l_1 + 1.87;
  dl_1_dt := 0;

  // Rate rules:
  equations_A_1' = equations_C_1*equations_Ca*(equations_TnC - equations_A_1) - equations_C_20*equations_pi_n*equations_phi_A_1*equations_A_1;
  equations_n_2' = equations_q_V*(equations_m_0*equations_G_V - equations_n_2);
end
