// SBML level 2 version 4

model katsnelson_et_al_2004____main()
  // Originally created by libAntimony v1.3 (using libSBML 4.1.0-b2)

  // Compartments:
  compartment default_compartment = 1;

  // Parameters:
  isotonic0 = 0;
  alpha_1 = 19;
  beta_1 = 0.29;
  alpha_2 = 14.6;
  beta_2 = 0.000924;
  alpha_3 = 48;
  beta_3 = 0.01;
  lambda_ = 96;
  A_half = 42;
  mu = 3;
  chi = 0.705;
  chi_0 = 3;
  m_0 = 0.9;
  v_max = 5.6;
  a = 0.25;
  d_h = 0.5;
  alpha_P = 4;
  isotonic_F_afterload = 2;
  isotonic_l_0 = 0.527;
  S_0 = 1.14;
  parameters_izakov_et_al_1991_q_1 = 17.3;
  parameters_izakov_et_al_1991_q_2 = 259;
  parameters_izakov_et_al_1991_q_3 = 17.3;
  q_4 = 15;
  v_star = 5.3035675;
  alpha_G = 1;
  a_on = 32.85;
  a_off = 290;
  k_A = 0.04;
  v = 0;
  parameters_izakov_et_al_1991_alpha_Q = 10;
  parameters_izakov_et_al_1991_beta_Q = 5000;
  N = 0.0001;
  w = 0;
  l_1 = 0.437;
  l_2 = 0.439;
  l_3 = 0.089;
  A = 0.7;
  crossbridge_kinetics_v_0 = 560;
  crossbridge_kinetics_q_star = 1000;
  CE_velocity_alpha_P_lengthening = 16;
  CE_velocity_beta_P_lengthening = 0.0015;
  CE_velocity_alpha_P_shortening = 16;
  CE_velocity_beta_P_shortening = 0.0015;
  PE_velocity_alpha_S_lengthening = 39;
  PE_velocity_beta_S_lengthening = 0.008;
  PE_velocity_alpha_S_shortening = 46;
  PE_velocity_beta_S_shortening = 0.006;
  B = 0;
  Ca_C = 0;
  calcium_handling_A_tot = 70;
  calcium_handling_B_tot = 28;
  calcium_handling_b_on = 37.143;
  calcium_handling_b_off = 182;
  calcium_handling_a_c = 5200;
  calcium_handling_r_Ca = 650;
  calcium_handling_q_Ca = 0.714;
  calcium_handling_t_d = 0.033;
  calcium_handling_Ca_m = 2.1;
  time_ = ;

  // Assignment rules:
  l := l_2 + l_3;
  F_muscle := force_F_XSE;
  isotonic_flag := ;
  isotonic_mode := ;
  q_v := ;
  v_1 := v_max/10;
  force_F_CE := lambda_*p_v*N;
  force_F_XSE := beta_3*(exp(alpha_3*l_3) - 1);
  force_F_SE := beta_1*(exp(alpha_1*(l_2 - l_1)) - 1);
  force_F_PE := beta_2*(exp(alpha_2*l_2) - 1);
  k_P_vis := ;
  k_S_vis := ;
  p_v := P_star/G_star;
  K_chi := crossbridge_kinetics_k_p_v*crossbridge_kinetics_M_A*crossbridge_kinetics_n_1*L_oz*(1 - N) - crossbridge_kinetics_k_m_v*N;
  crossbridge_kinetics_M_A := A^mu/(A^mu + A_half^mu);
  crossbridge_kinetics_n_1 := 0.6*l_1 + 0.5;
  L_oz := (l_1 + S_0)/(0.46 + S_0);
  crossbridge_kinetics_k_p_v := chi*chi_0*q_v*m_0*G_star;
  crossbridge_kinetics_k_m_v := ;
  G_star := ;
  P_star := ;
  dl_1_dt := v;
  dl_2_dt := ;
  dl_3_dt := ;
  phi_chi_2 := ;
  phi_chi := ;
  p_prime_v := ;
  CE_velocity_alp_p := ;
  PE_velocity_alp_s := ;
  average_crossbridge_force_gamma := a*d_h*(v_1/v_max)^2/(3*a*d_h - (a + 1)*v_1/v_max);
  average_crossbridge_force_case_1 := a*(0.4 + 0.4*a)/(v_max*((a + 1)*0.4)^2);
  average_crossbridge_force_case_2 := a*1*(1 + 0.4*a + 1.2*v/v_max + 0.6*(v/v_max)^2)/(v_max*((a - v/v_max)*(1 + 0.6*v/v_max))^2);
  average_crossbridge_force_case_3 := (0.4*a + 1)/(a*v_max);
  average_crossbridge_force_case_4 := 1/v_max*exp(-alpha_G*(v/v_max - v_1/v_max)^alpha_P)*((0.4*a + 1)/a + alpha_G*alpha_P*(1 + (0.4*a + 1)*v/(a*v_max))*(v/v_max - v_1/v_max)^(alpha_P - 1));
  calcium_handling_dA_dt := a_on*(calcium_handling_A_tot - A)*Ca_C - a_off*exp(-k_A*A)*calcium_handling_pi_N_A*A;
  calcium_handling_N_A := calcium_handling_A_tot*N/(L_oz*A);
  calcium_handling_pi_N_A := ;
  calcium_handling_dB_dt := calcium_handling_b_on*(calcium_handling_B_tot - B)*Ca_C - calcium_handling_b_off*B;

  // Rate rules:
  v' = ;
  N' = K_chi;
  w' = ;
  l_1' = dl_1_dt;
  l_2' = dl_2_dt;
  l_3' = dl_3_dt;
  A' = calcium_handling_dA_dt;
  B' = calcium_handling_dB_dt;
  Ca_C' = ;
end
