// SBML level 2 version 4

model keener_2001_version01____main()
  // Originally created by libAntimony v1.4 (using libSBML 4.1.0-b2)

  // Compartments:
  compartment default_compartment = 1;

  // Parameters:
  G_i = 0;
  G = 5;
  x = 0.1;
  V = 3.8;
  extracellular_glucose_D_G = 6.6e-6;
  I = 0;
  insulin_D_I = 2.1e-6;
  J = ;
  insulin_inhibition_J_tau = 20;
  insulin_inhibition_K_inh = 1e-6;
  glucose_metabolism_Vm = 0.24;
  glucose_metabolism_Km = 9.8;
  GLUT_1_transporter_V1 = 120;
  GLUT_1_transporter_K1 = 1.4;
  GLUT_1_transporter_Ki = 4e-5;
  GLUT_2_transporter_V2 = 32;
  GLUT_2_transporter_K2 = 17;
  insulin_secretion_Vs = 0.034;
  insulin_secretion_Ks = 0.13;
  insulin_secretion_L = 0.01;
  time_ = ;
  rho = ;
  extracellular_glucose_A = ;
  extracellular_glucose_B = ;
  insulin_C = ;
  insulin_D = ;
  GLUT_2_transporter_Jm = ;

  // Assignment rules:
  Rm := rho*(glucose_metabolism_Vm*G_i/(glucose_metabolism_Km + G_i));
  R1 := rho*(GLUT_1_transporter_V1*(G - G_i)/((GLUT_1_transporter_K1 + G_i)*(1 + G/GLUT_1_transporter_K1)))*(I/(GLUT_1_transporter_Ki + I));
  R2 := rho*(GLUT_2_transporter_V2*(G*GLUT_2_transporter_Jm - G_i)/((GLUT_2_transporter_K2 + G_i)*(1 + G/GLUT_2_transporter_K2)));
  Rs := insulin_secretion_Vs*(Rm^4 + rho^4*insulin_secretion_L^4)/(Rm^4 + rho^4*insulin_secretion_Ks^4 + rho^4*insulin_secretion_L^4);
  insulin_inhibition_J_infinity := insulin_inhibition_K_inh/(insulin_inhibition_K_inh + I);

  // Rate rules:
  G_i' = (R1 + R2 - Rm)/rho;
  J' = insulin_inhibition_J_tau*(insulin_inhibition_J_infinity - J);
end
