// SBML level 2 version 4

model kesmir_1999____main()
  // Originally created by libAntimony v1.4 (using libSBML 4.1.0-b2)

  // Compartments:
  compartment default_compartment = 1;

  // Parameters:
  B00 = 3;
  pr = 0.15;
  mu = 3;
  rho = 4;
  delta_B = 0.8;
  B11 = 0;
  B20 = 0;
  B30 = 0;
  B40 = 0;
  B50 = 0;
  B60 = 0;
  B70 = 0;
  B80 = 0;
  B90 = 0;
  B100 = 0;
  C0 = 0;
  C_d = 2;
  C_star0 = 0;
  M0 = 0;
  A0 = 500;
  A_z = 0.02;
  A_u = 0.15;
  T0 = 0;
  T_p = 2;
  T_sigma = 5;
  T_delta_T = 0.8;
  CA_SA = 500;
  CT_star_ST = 50;
  alpha_B_KB = 10000;
  alpha_T_KT = 100;
  time_ = ;

  // Assignment rules:
  CT_star0 := C_star0*T0/(CT_star_ST*1 + C_star0);
  alpha_B0 := alpha_B_KB/(alpha_B_KB + B_sum/1);
  B_sum := B11 + B11 + B30 + B40 + B50 + B60 + B60 + B70 + B80 + B90 + B100;
  CA0 := C0*A0/(CA_SA*1 + A0);
  C_starsum := C0 + C_star0;
  A_log_A := ln(A0/1);
  alpha_T0 := alpha_T_KT/(alpha_T_KT + T0/1);
  total_total := B_sum + C_starsum;
  total_log_total := ln(total_total/1 + 1e-12);

  // Rate rules:
  B00' = pr*mu*CT_star0 - (rho*B00 + delta_B*B00);
  B11' = rho*(1 + alpha_B0)*B00 - (rho*B11 + delta_B*B11);
  B20' = rho*(1 + alpha_B0)*B11 - (rho*B20 + delta_B*B20);
  B30' = rho*(1 + alpha_B0)*B20 - (rho*B30 + delta_B*B30);
  B40' = rho*(1 + alpha_B0)*B30 - (rho*B40 + delta_B*B40);
  B50' = rho*(1 + alpha_B0)*B40 - (rho*B50 + delta_B*B50);
  B60' = rho*(1 + alpha_B0)*B50 - (rho*B60 + delta_B*B60);
  B70' = rho*(1 + alpha_B0)*B60 - (rho*B70 + delta_B*B70);
  B80' = rho*(1 + alpha_B0)*B70 - (rho*B80 + delta_B*B80);
  B90' = rho*(1 + alpha_B0)*B80 - (rho*B90 + delta_B*B90);
  B100' = rho*(1 + alpha_B0)*B90 - (rho*B100 + delta_B*B100);
  C0' = C_d*rho*B100*1 - mu*C0;
  C_star0' = mu*CA0 - mu*C_star0;
  M0' = (1 - pr)*mu*CT_star0;
  A0' = -A_z*A0 - A_u*CA0*1;
  T0' = T_sigma*1 + T_p*alpha_T0*CT_star0 - T_delta_T*T0;
end
