// SBML level 2 version 4

model kholodenko_demin_moehren_hoek_1999_version03____main()
  // Originally created by libAntimony v1.4 (using libSBML 4.1.0-b2)

  // Compartments:
  compartment default_compartment = 1;

  // Parameters:
  EGF0 = 680;
  R0 = 100;
  Ra0 = 0;
  R20 = 0;
  RP0 = 0;
  R_PL0 = 0;
  R_PLP0 = 0;
  R_G0 = 0;
  R_G_S0 = 0;
  R_Sh0 = 0;
  R_ShP0 = 0;
  R_Sh_G0 = 0;
  R_Sh_G_S0 = 0;
  G_S0 = 0;
  ShP0 = 0;
  Sh_G0 = 0;
  Sh_G_S0 = 0;
  PLC_gamma0 = 105;
  PLC_gamma_P0 = 0;
  PLC_gamma_P_I0 = 0;
  Grb0 = 85;
  Shc0 = 150;
  SOS0 = 34;
  v1_k1 = 0.003;
  v1_k1_ = 0.06;
  v2_k2 = 0.01;
  v2_k2_ = 0.1;
  v3_k3 = 1;
  v3_k3_ = 0.01;
  v4_K4 = 50;
  v4_V4 = 450;
  v5_k5 = 0.06;
  v5_k5_ = 0.2;
  v6_k6 = 1;
  v6_k6_ = 0.05;
  v7_k7 = 0.3;
  v7_k7_ = 0.006;
  v8_K8 = 100;
  v8_V8 = 1;
  v9_k9 = 0.003;
  v9_k9_ = 0.05;
  v10_k10 = 0.01;
  v10_k10_ = 0.06;
  v11_k11 = 0.03;
  v11_k11_ = 0.0045;
  v12_k12 = 0.0015;
  v12_k12_ = 0.0001;
  v13_k13 = 0.09;
  v13_k13_ = 0.6;
  v14_k14 = 6;
  v14_k14_ = 0.06;
  v15_k15 = 0.3;
  v15_k15_ = 0.0009;
  v16_K16 = 340;
  v16_V16 = 1.7;
  v17_k17 = 0.003;
  v17_k17_ = 0.1;
  v18_k18 = 0.3;
  v18_k18_ = 0.0009;
  v19_k19 = 0.01;
  v19_k19_ = 0.0214;
  v20_k20 = 0.12;
  v20_k20_ = 0.00024;
  v21_k21 = 0.003;
  v21_k21_ = 0.1;
  v22_k22 = 0.03;
  v22_k22_ = 0.064;
  v23_k23 = 0.1;
  v23_k23_ = 0.021;
  v24_k24 = 0.009;
  v24_k24_ = 0.0429;
  v25_k25 = 1;
  v25_k25_ = 0.03;
  time_ = ;

  // Assignment rules:
  v110 := v1_k1*R0*EGF0 - v1_k1_*Ra0;
  v26 := v2_k2*Ra0*Ra0 - v2_k2_*R20;
  v30 := v3_k3*R20 - v3_k3_*RP0;
  v40 := v4_V4*RP0/(v4_K4 + RP0);
  v70 := v7_k7*R_PLP0 - v7_k7_*RP0*PLC_gamma_P0;
  v111 := v11_k11*R_G_S0 - v11_k11_*RP0*G_S0;
  v150 := v15_k15*R_ShP0 - v15_k15_*ShP0*RP0;
  v180 := v18_k18*R_Sh_G0 - v18_k18_*RP0*Sh_G0;
  v200 := v20_k20*R_Sh_G_S0 - v20_k20_*Sh_G_S0*RP0;
  v50 := v5_k5*RP0*PLC_gamma0 - v5_k5_*R_PL0;
  v90 := v9_k9*RP0*Grb0 - v9_k9_*R_G0;
  v130 := v13_k13*RP0*Shc0 - v13_k13_*R_Sh0;
  v60 := v6_k6*R_PL0 - v6_k6_*R_PLP0;
  v100 := v10_k10*R_G0*SOS0 - v10_k10_*R_G_S0;
  v140 := v14_k14*R_Sh0 - v14_k14_*R_ShP0;
  v240 := v24_k24*R_ShP0*G_S0 - v24_k24_*R_Sh_G_S0;
  v170 := v17_k17*R_ShP0*Grb0 - v17_k17_*R_Sh_G0;
  v190 := v19_k19*R_Sh_G0*SOS0 - v19_k19_*R_Sh_G_S0;
  v230 := v23_k23*Sh_G_S0 - v23_k23_*ShP0*G_S0;
  v120 := v12_k12*G_S0 - v12_k12_*Grb0*SOS0;
  v210 := v21_k21*ShP0*Grb0 - v21_k21_*Sh_G0;
  v160 := v16_V16*ShP0/(v16_K16 + ShP0);
  v220 := v22_k22*Sh_G0*SOS0 - v22_k22_*Sh_G_S0;
  v80 := v8_V8*PLC_gamma_P0/(v8_K8 + PLC_gamma_P0);
  v250 := v25_k25*PLC_gamma_P0 - v25_k25_*PLC_gamma_P_I0;
  combined_concs_totEGFRphos := 2*(RP0 + R_PL0 + R_PLP0 + R_G0 + R_G_S0 + R_Sh0 + R_ShP0 + R_Sh_G0 + R_Sh_G_S0);
  combined_concs_totPLCgammaphos := R_PLP0 + PLC_gamma_P0;
  combined_concs_totGrb_EGFR := R_G0 + R_G_S0 + R_Sh_G0 + R_Sh_G_S0;
  combined_concs_totGrb_Shc := R_Sh_G0 + Sh_G0 + R_Sh_G_S0 + Sh_G_S0;
  combined_concs_totShcphos := R_ShP0 + R_Sh_G0 + R_Sh_G_S0 + ShP0 + Sh_G0 + Sh_G_S0;
  combined_concs_totShc_EGFR := R_ShP0 + R_Sh_G0 + R_Sh_G_S0;
  combined_concs_totSOS_EGFR := R_G_S0 + R_Sh_G_S0;

  // Rate rules:
  EGF0' = -v110;
  R0' = -v110;
  Ra0' = v110 - 2*v26;
  R20' = v26 + v40 - v30;
  RP0' = v30 + v70 + v111 + v150 + v180 + v200 - (v40 + v50 + v90 + v130);
  R_PL0' = v50 - v60;
  R_PLP0' = v60 - v70;
  R_G0' = v90 - v100;
  R_G_S0' = v100 - v111;
  R_Sh0' = v130 - v140;
  R_ShP0' = v140 - (v240 + v150 + v170);
  R_Sh_G0' = v170 - (v180 + v190);
  R_Sh_G_S0' = v190 + v240 - v200;
  G_S0' = v111 + v230 - (v120 + v240);
  ShP0' = v150 + v230 - (v210 + v160);
  Sh_G0' = v180 + v210 - v220;
  Sh_G_S0' = v200 + v220 - v230;
  PLC_gamma0' = v80 - v50;
  PLC_gamma_P0' = v70 - (v80 + v250);
  PLC_gamma_P_I0' = v250;
  Grb0' = v120 - (v90 + v170 + v210);
  Shc0' = v160 - v130;
  SOS0' = v120 - (v100 + v190 + v220);
end
