// SBML level 2 version 4

model kneller_ramirez_chartier_courtemanche_nattel_2002_version01____main()
  // Originally created by libAntimony v1.3 (using libSBML 4.1.0-b2)

  // Compartments:
  compartment default_compartment = 1;

  // Parameters:
  V = -82.72;
  R = 8.3143;
  T = 310;
  F = 96.4867;
  membrane_Cm = 100;
  membrane_i_stim = -2900;
  fast_sodium_current_g_Na = 7.8;
  Na_i = 13.86;
  Na_o = 140;
  m = 0.002256;
  h = 0.975;
  j = 0.9843;
  time_independent_potassium_current_g_K1 = 0.15;
  K_o = 5.4;
  K_i = 136.9;
  transient_outward_K_current_g_to = 0.19824;
  oa = 0.07351;
  oi = 0.9978;
  ua = 0.06039;
  ui = 0.9987;
  rapid_delayed_rectifier_K_current_g_Kr = 0.06984;
  xr = 8.647e-7;
  slow_delayed_rectifier_K_current_g_Ks = 0.0561;
  xs = 0.01853;
  sarcolemmal_Ca_current_g_Ca = 0.24;
  Ca_i = 1.31e-4;
  d = 5.448e-6;
  f = 0.9999;
  f_Ca = 0.6535;
  sarcolemmal_Ca_current_sarcolemmal_Ca_current_f_Ca_gate_tau_f_Ca = 2;
  Ca_activated_Cl_current_g_Cl_Ca = 0.3;
  Cl_i = 29.95;
  Cl_o = 132;
  q_Ca = 0;
  Ca_activated_Cl_current_Ca_activated_Cl_current_q_Ca_gate_tau_q_Ca = 2;
  Na_Cl_cotransporter_n = 4;
  Na_Cl_cotransporter_delta_CT_n = 87.8251;
  Na_Cl_cotransporter_g_CT = 0.115;
  sodium_potassium_pump_Km_Na_i = 10;
  sodium_potassium_pump_Km_K_o = 1.5;
  sodium_potassium_pump_i_NaK_max = 0.6;
  Na_Ca_exchanger_current_I_NaCa_max = 1600;
  Na_Ca_exchanger_current_K_mNa = 87.5;
  Na_Ca_exchanger_current_K_mCa = 1.38;
  Na_Ca_exchanger_current_K_sat = 0.1;
  Ca_o = 1.8;
  background_currents_g_B_Na = 0.000674;
  background_currents_g_B_Ca = 0.00113;
  background_currents_g_B_K = 0;
  background_currents_g_B_Cl = 0.0018;
  Ca_pump_current_i_p_Ca_max = 0.275;
  Ca_release_current_from_JSR_K_rel = 30;
  Ca_release_current_from_JSR_V_rel = 96.48;
  Ca_rel = 1.869;
  u = 0;
  v = 1;
  w = 0.9993;
  transfer_current_from_NSR_to_JSR_tau_tr = 180;
  Ca_up = 1.869;
  I_up_max = 0.005;
  Ca_uptake_current_by_the_NSR_K_up = 0.00092;
  Ca_leak_current_by_the_NSR_Ca_up_max = 15;
  CMDN_max = 0.045;
  TRPN_max = 0.35;
  CSQN_max = 10;
  Ca_buffers_Ca_CMDN = 2.347e-3;
  Ca_buffers_Ca_TRPN = 8.933e-3;
  Ca_buffers_Ca_CSQN = 6.916;
  intracellular_ion_concentrations_V_i = 13668;
  intracellular_ion_concentrations_V_rel = 96.48;
  intracellular_ion_concentrations_V_up = 1109.52;
  time_ = ;
  Ca_buffers_d = ;

  // Assignment rules:
  i_Na := fast_sodium_current_g_Na*m^3*h*j*(V - E_Na);
  i_K1 := time_independent_potassium_current_g_K1*(V - E_K)/(1 + exp(0.07*(V + 80)));
  i_to := transient_outward_K_current_g_to*oa^3*oi*(V - E_K);
  i_Kur_d := ultrarapid_delayed_rectifier_K_current_g_Kur_d*ua^3*ui*(V - E_K);
  i_Kr := rapid_delayed_rectifier_K_current_g_Kr*xr*(0.07 + 0.58/(1 + exp((V + 15)/22.4)))*(V - E_K);
  i_Ks := slow_delayed_rectifier_K_current_g_Ks*xs^2*(V - E_K);
  i_Ca := sarcolemmal_Ca_current_g_Ca*d*f*f_Ca*(V - 65);
  i_Cl_Ca := Ca_activated_Cl_current_g_Cl_Ca*q_Ca*(V - E_Cl);
  i_p_Ca := Ca_pump_current_i_p_Ca_max*(Ca_i/(0.0005 + Ca_i));
  i_NaK := sodium_potassium_pump_i_NaK_max*sodium_potassium_pump_f_NaK*(1/(1 + (sodium_potassium_pump_Km_Na_i/Na_i)^1.5))*(K_o/(K_o + sodium_potassium_pump_Km_K_o));
  i_NaCa := Na_Ca_exchanger_current_I_NaCa_max*(exp(0.35*F*V/(R*T))*Na_i^3*Ca_o - exp(-0.65*F*V/(R*T))*Na_o^3*Ca_i)/((Na_Ca_exchanger_current_K_mNa^3 + Na_o^3)*(Na_Ca_exchanger_current_K_mCa + Ca_o)*(1 + Na_Ca_exchanger_current_K_sat*exp(-0.65*V*F/(R*T))));
  i_B_Na := background_currents_g_B_Na*(V - E_Na);
  i_B_Ca := background_currents_g_B_Ca*(V - background_currents_E_Ca);
  i_B_Cl := background_currents_g_B_Cl*(V - E_Cl);
  E_Na := R*T/F*ln(Na_o/Na_i);
  fast_sodium_current_fast_sodium_current_m_gate_alpha_m := 0.32*((V + 47.13)/(1 - exp(-0.1*(V + 47.13))));
  fast_sodium_current_fast_sodium_current_m_gate_beta_m := 0.08*exp(V/(-11));
  fast_sodium_current_fast_sodium_current_h_gate_alpha_h := ;
  fast_sodium_current_fast_sodium_current_h_gate_beta_h := ;
  fast_sodium_current_fast_sodium_current_j_gate_alpha_j := ;
  fast_sodium_current_fast_sodium_current_j_gate_beta_j := ;
  E_K := R*T/F*ln(K_o/K_i);
  transient_outward_K_current_transient_outward_K_current_oa_gate_alpha_oa := 0.65*(exp((V + 18)/(-8.5)) + exp((V - 16)/(-59)))^(-1);
  transient_outward_K_current_transient_outward_K_current_oa_gate_beta_oa := 1.2*(2.2 + exp((V + 75)/18))^(-1);
  transient_outward_K_current_transient_outward_K_current_oa_gate_tau_oa := (transient_outward_K_current_transient_outward_K_current_oa_gate_alpha_oa + transient_outward_K_current_transient_outward_K_current_oa_gate_beta_oa)^(-1);
  transient_outward_K_current_transient_outward_K_current_oa_gate_oa_infinity := (1 + exp((V + 0.5)/(-10.5)))^(-(1/3));
  transient_outward_K_current_transient_outward_K_current_oi_gate_alpha_oi := (6.2 + exp((V + 105.2)/9.85))^(-1);
  transient_outward_K_current_transient_outward_K_current_oi_gate_beta_oi := (7.54 + exp((V - 8.89)/(-12.87)))^(-1);
  transient_outward_K_current_transient_outward_K_current_oi_gate_tau_oi := (transient_outward_K_current_transient_outward_K_current_oi_gate_alpha_oi + transient_outward_K_current_transient_outward_K_current_oi_gate_beta_oi)^(-1);
  transient_outward_K_current_transient_outward_K_current_oi_gate_oi_infinity := (1 + exp((V + 43.377)/6.45))^(-1);
  ultrarapid_delayed_rectifier_K_current_g_Kur_d := 0.00855 + 0.0779/(1 + exp((V + 11)/(-16)));
  ultrarapid_delayed_rectifier_K_current_ultrarapid_delayed_rectifier_K_current_ua_gate_alpha_ua := 1.47*(exp((V + 33.2)/(-30.63)) + exp((V - 27.6)/(-30.65)))^(-1);
  ultrarapid_delayed_rectifier_K_current_ultrarapid_delayed_rectifier_K_current_ua_gate_beta_ua := 0.42*(exp((V + 26.64)/2.49) + exp((V + 44.41)/20.36))^(-1);
  ultrarapid_delayed_rectifier_K_current_ultrarapid_delayed_rectifier_K_current_ua_gate_tau_ua := (ultrarapid_delayed_rectifier_K_current_ultrarapid_delayed_rectifier_K_current_ua_gate_alpha_ua + ultrarapid_delayed_rectifier_K_current_ultrarapid_delayed_rectifier_K_current_ua_gate_beta_ua)^(-1);
  ultrarapid_delayed_rectifier_K_current_ultrarapid_delayed_rectifier_K_current_ua_gate_ua_infinity := (1 + exp((V + 2.81)/(-9.49)))^(-(1/3));
  ultrarapid_delayed_rectifier_K_current_ultrarapid_delayed_rectifier_K_current_ui_gate_alpha_ui := (21 + exp((V - 185)/(-28)))^(-1);
  ultrarapid_delayed_rectifier_K_current_ultrarapid_delayed_rectifier_K_current_ui_gate_beta_ui := exp((V - 158)/16);
  ultrarapid_delayed_rectifier_K_current_ultrarapid_delayed_rectifier_K_current_ui_gate_tau_ui := (ultrarapid_delayed_rectifier_K_current_ultrarapid_delayed_rectifier_K_current_ui_gate_alpha_ui + ultrarapid_delayed_rectifier_K_current_ultrarapid_delayed_rectifier_K_current_ui_gate_beta_ui)^(-1);
  ultrarapid_delayed_rectifier_K_current_ultrarapid_delayed_rectifier_K_current_ui_gate_ui_infinity := (1 + exp((V - 99.45)/27.48))^(-1);
  rapid_delayed_rectifier_K_current_rapid_delayed_rectifier_K_current_xr_gate_alpha_xr := 0.04*((V - 248)/(1 - exp((V - 248)/(-28))));
  rapid_delayed_rectifier_K_current_rapid_delayed_rectifier_K_current_xr_gate_beta_xr := 0.028*((V + 163)/(exp((V + 163)/21) - 1));
  rapid_delayed_rectifier_K_current_rapid_delayed_rectifier_K_current_xr_gate_tau_xr := (rapid_delayed_rectifier_K_current_rapid_delayed_rectifier_K_current_xr_gate_alpha_xr + rapid_delayed_rectifier_K_current_rapid_delayed_rectifier_K_current_xr_gate_beta_xr)^(-1);
  rapid_delayed_rectifier_K_current_rapid_delayed_rectifier_K_current_xr_gate_xr_infinity := (1 + exp((V + 7.654)/(-5.377)))^(-1);
  slow_delayed_rectifier_K_current_slow_delayed_rectifier_K_current_xs_gate_alpha_xs := 1e-5*((V + 28.5)/(1 - exp((V + 28.5)/(-115))));
  slow_delayed_rectifier_K_current_slow_delayed_rectifier_K_current_xs_gate_beta_xs := 0.00023*((V + 28.5)/(exp((V + 28.5)/3.3) - 1));
  slow_delayed_rectifier_K_current_slow_delayed_rectifier_K_current_xs_gate_tau_xs := (slow_delayed_rectifier_K_current_slow_delayed_rectifier_K_current_xs_gate_alpha_xs + slow_delayed_rectifier_K_current_slow_delayed_rectifier_K_current_xs_gate_beta_xs)^(-1);
  slow_delayed_rectifier_K_current_slow_delayed_rectifier_K_current_xs_gate_xs_infinity := (1 + exp((V - 13)/(-12)))^(-0.5);
  sarcolemmal_Ca_current_sarcolemmal_Ca_current_d_gate_d_infinity := (1 + exp((V + 10)/(-6)))^(-1);
  sarcolemmal_Ca_current_sarcolemmal_Ca_current_d_gate_tau_d := (1 - exp((V + 10)/(-6.24)))/(0.035*(V + 10)*(1 + exp((V + 10)/6.24)));
  sarcolemmal_Ca_current_sarcolemmal_Ca_current_f_gate_f_infinity := (1 + exp((V + 24.6)/6.2))^(-1);
  sarcolemmal_Ca_current_sarcolemmal_Ca_current_f_gate_tau_f := 400*(1 + 4.5*exp(-0.0007*(V - 9)^2))^(-1);
  sarcolemmal_Ca_current_sarcolemmal_Ca_current_f_Ca_gate_f_Ca_infinity := 0.29 + 0.8*(1 + exp((Ca_i - 0.00012)/6e-5))^(-1);
  E_Cl := R*T/F*ln(Cl_o/Cl_i);
  Fn := 1e-12*Ca_release_current_from_JSR_V_rel*i_rel - 5e-13*(1/(2*F)*i_Ca - 1/(5*F)*i_NaCa);
  Ca_activated_Cl_current_Ca_activated_Cl_current_q_Ca_gate_q_Ca_infinity := 1 - (1 + (Fn/1.1e-10)^3)^(-1);
  CT_NaCl := Na_Cl_cotransporter_g_CT*(Na_Cl_cotransporter_delta_CT_n/(E_Na - E_Cl + Na_Cl_cotransporter_delta_CT_n));
  sodium_potassium_pump_f_NaK := (1 + 0.1245*exp(-0.1*(F*V/(R*T))) + 0.0365*sodium_potassium_pump_sigma*exp(-(F*V/(R*T))))^(-1);
  sodium_potassium_pump_sigma := 1/7*(exp(Na_o/67.3) - 1);
  i_B_K := background_currents_g_B_K*(V - E_K);
  background_currents_E_Ca := R*T/(2*F)*ln(Ca_o/Ca_i);
  i_rel := Ca_release_current_from_JSR_K_rel*u^2*v*w*(Ca_rel - Ca_i);
  Ca_release_current_from_JSR_Ca_release_current_from_JSR_u_gate_tau_u := 8;
  Ca_release_current_from_JSR_Ca_release_current_from_JSR_u_gate_u_infinity := (1 + exp((Fn - 3.4175e-13)/(-13.67e-16)))^(-1);
  Ca_release_current_from_JSR_Ca_release_current_from_JSR_v_gate_tau_v := 1.91 + 2.09*(1 + exp((Fn - 3.4175e-13)/(-13.67e-16)))^(-1);
  Ca_release_current_from_JSR_Ca_release_current_from_JSR_v_gate_v_infinity := 1 - (1 + exp((Fn - 6.835e-14)/(-13.67e-16)))^(-1);
  Ca_release_current_from_JSR_Ca_release_current_from_JSR_w_gate_tau_w := (6 - 6*exp((V - 7.9)/(-5)))/((1 + 0.3*exp((V - 7.9)/(-5)))*(V - 7.9));
  Ca_release_current_from_JSR_Ca_release_current_from_JSR_w_gate_w_infinity := 1 - (1 + exp((V - 40)/(-17)))^(-1);
  i_tr := (Ca_up - Ca_rel)/transfer_current_from_NSR_to_JSR_tau_tr;
  i_up := I_up_max/(1 + Ca_uptake_current_by_the_NSR_K_up/Ca_i);
  i_up_leak := I_up_max*(Ca_up/Ca_leak_current_by_the_NSR_Ca_up_max);
  J_Ca_CMDN := Ca_buffers_d(Ca_buffers_Ca_CMDN)/Ca_buffers_d(time_);
  J_Ca_TRPN := Ca_buffers_d(Ca_buffers_Ca_TRPN)/Ca_buffers_d(time_);
  J_Ca_CSQN := Ca_buffers_d(Ca_buffers_Ca_CSQN)/Ca_buffers_d(time_);

  // Rate rules:
  V' = -(i_Na + i_K1 + i_to + i_Kur_d + i_Kr + i_Ks + i_Ca + i_Cl_Ca + i_p_Ca + i_NaCa + i_NaK + i_B_Na + i_B_Ca + i_B_Cl + membrane_i_stim)/membrane_Cm;
  Na_i' = (-3*i_NaK - (3*i_NaCa + i_B_Na + i_Na))/(intracellular_ion_concentrations_V_i*F);
  m' = fast_sodium_current_fast_sodium_current_m_gate_alpha_m*(1 - m) - fast_sodium_current_fast_sodium_current_m_gate_beta_m*m;
  h' = fast_sodium_current_fast_sodium_current_h_gate_alpha_h*(1 - h) - fast_sodium_current_fast_sodium_current_h_gate_beta_h*h;
  j' = fast_sodium_current_fast_sodium_current_j_gate_alpha_j*(1 - j) - fast_sodium_current_fast_sodium_current_j_gate_beta_j*j;
  K_i' = (2*i_NaK - (i_K1 + i_to + i_Kur_d + i_Kr + i_Ks + i_B_K))/(intracellular_ion_concentrations_V_i*F);
  oa' = (transient_outward_K_current_transient_outward_K_current_oa_gate_oa_infinity - oa)/transient_outward_K_current_transient_outward_K_current_oa_gate_tau_oa;
  oi' = (transient_outward_K_current_transient_outward_K_current_oi_gate_oi_infinity - oi)/transient_outward_K_current_transient_outward_K_current_oi_gate_tau_oi;
  ua' = (ultrarapid_delayed_rectifier_K_current_ultrarapid_delayed_rectifier_K_current_ua_gate_ua_infinity - ua)/ultrarapid_delayed_rectifier_K_current_ultrarapid_delayed_rectifier_K_current_ua_gate_tau_ua;
  ui' = (ultrarapid_delayed_rectifier_K_current_ultrarapid_delayed_rectifier_K_current_ui_gate_ui_infinity - ui)/ultrarapid_delayed_rectifier_K_current_ultrarapid_delayed_rectifier_K_current_ui_gate_tau_ui;
  xr' = (rapid_delayed_rectifier_K_current_rapid_delayed_rectifier_K_current_xr_gate_xr_infinity - xr)/rapid_delayed_rectifier_K_current_rapid_delayed_rectifier_K_current_xr_gate_tau_xr;
  xs' = (slow_delayed_rectifier_K_current_slow_delayed_rectifier_K_current_xs_gate_xs_infinity - xs)/slow_delayed_rectifier_K_current_slow_delayed_rectifier_K_current_xs_gate_tau_xs;
  Ca_i' = (2*i_NaCa - (i_p_Ca + i_Ca + i_B_Ca))/(2*intracellular_ion_concentrations_V_i*F) + (intracellular_ion_concentrations_V_up*(i_up_leak - i_up) + i_rel*intracellular_ion_concentrations_V_rel)/intracellular_ion_concentrations_V_i - (TRPN_max*J_Ca_TRPN + CMDN_max*J_Ca_CMDN);
  d' = (sarcolemmal_Ca_current_sarcolemmal_Ca_current_d_gate_d_infinity - d)/sarcolemmal_Ca_current_sarcolemmal_Ca_current_d_gate_tau_d;
  f' = (sarcolemmal_Ca_current_sarcolemmal_Ca_current_f_gate_f_infinity - f)/sarcolemmal_Ca_current_sarcolemmal_Ca_current_f_gate_tau_f;
  f_Ca' = (sarcolemmal_Ca_current_sarcolemmal_Ca_current_f_Ca_gate_f_Ca_infinity - f_Ca)/sarcolemmal_Ca_current_sarcolemmal_Ca_current_f_Ca_gate_tau_f_Ca;
  Cl_i' = i_Cl_Ca/(intracellular_ion_concentrations_V_i*F);
  Ca_rel' = i_tr - (i_rel + 31*J_Ca_CSQN);
  u' = (Ca_release_current_from_JSR_Ca_release_current_from_JSR_u_gate_u_infinity - u)/Ca_release_current_from_JSR_Ca_release_current_from_JSR_u_gate_tau_u;
  v' = (Ca_release_current_from_JSR_Ca_release_current_from_JSR_v_gate_v_infinity - v)/Ca_release_current_from_JSR_Ca_release_current_from_JSR_v_gate_tau_v;
  w' = (Ca_release_current_from_JSR_Ca_release_current_from_JSR_w_gate_w_infinity - w)/Ca_release_current_from_JSR_Ca_release_current_from_JSR_w_gate_tau_w;
  Ca_up' = i_up - (i_up_leak + i_tr*(intracellular_ion_concentrations_V_rel/intracellular_ion_concentrations_V_up));
end
