// SBML level 2 version 4

model koivumaki_takalo_korhonen_tavi_weckstrom_2009____main()
  // Originally created by libAntimony v1.4 (using libSBML 4.1.0-b2)

  // Compartments:
  compartment default_compartment = 1;

  // Parameters:
  Ca_cyt = 0.25;
  Ca_NSR = 760;
  CaMKII_reg = 0;
  SERCA_TOT = 47;
  serca_parameters_PSR = 1;
  serca_parameters_Kmf_PLBKO = 0.15;
  serca_parameters_Kmf_PLB = 0.15;
  serca_parameters_Kmr_PLBKO = 2500;
  serca_parameters_Kmr_PLB = 1110;
  transition_parameters_br_serca_sr = 0.00625;
  Ca_serca = 12;
  time_ = ;

  // Assignment rules:
  EC_50_fwd := (serca_parameters_Kmf_PLBKO + serca_parameters_Kmf_PLB*serca_parameters_PSR)*(1 + 0.27*CaMKII_reg);
  EC_50_rev := serca_parameters_Kmr_PLBKO - serca_parameters_Kmr_PLB*serca_parameters_PSR;
  k_cyt_serca := transition_parameters_br_cyt_serca*(1 + 0.7*CaMKII_reg);
  k_serca_cyt := EC_50_fwd^2*transition_parameters_br_cyt_serca;
  k_serca_sr := transition_parameters_br_serca_sr*(1 + 0.7*CaMKII_reg);
  k_sr_serca := transition_parameters_br_serca_sr/EC_50_rev^2;
  transition_parameters_br_cyt_serca := 1000*transition_parameters_br_serca_sr;
  J_cyt_serca := k_cyt_serca*Ca_cyt^2*(SERCA_TOT - Ca_serca) - k_serca_cyt*Ca_serca;
  J_serca_sr := k_serca_sr*Ca_serca - k_sr_serca*Ca_NSR^2*(SERCA_TOT - Ca_serca);

  // Rate rules:
  Ca_serca' = J_cyt_serca - J_serca_sr;
end
