// SBML level 2 version 4

model komarova_2003____main()
  // Originally created by libAntimony v1.3 (using libSBML 4.1.0-b2)

  // Compartments:
  compartment default_compartment = 1;

  // Parameters:
  S0 = 0.5;
  rs = 1;
  epsilon_s = 0.99;
  alpha = 0.1;
  u = 0.07;
  beta = 0.2;
  M0 = 0.5;
  rm = 1.3;
  epsilon_m = 0.1;
  a = 0.5;
  time_ = ;

  // Assignment rules:
  phi0 := S0*rs/1*(1 - u/1*(1 - beta*epsilon_s/1 - alpha/1*(1 - epsilon_s/1))) + M0*rm/1*(1 - u/1*(1 - beta*epsilon_m/1 - alpha/1*(1 - epsilon_m/1)));
  phi_growth_rate := (rs + rm)*(1 - a/1);

  // Rate rules:
  S0' = rs*S0*(1 - u*1 + beta*epsilon_s*u/1) + alpha*u*rs*S0/1*(1 - epsilon_s) - phi0*S0*1;
  M0' = rm*M0*(1 - u/1 + beta*epsilon_m*u/1) + alpha*u*rm*M0/1*(1 - epsilon_m) - phi0*M0*1;
end
