// SBML level 2 version 4

model kongas_model_2001____main()
  // Originally created by libAntimony v1.4 (using libSBML 4.1.0-b2)

  // Compartments:
  compartment default_compartment = 1;

  // Parameters:
  ATP0 = 9644.425;
  V_hyd0 = 4.6e3;
  V_cyt = 0.75;
  ADP0 = 60;
  PCr0 = 12500;
  Cr0 = 13500;
  Pi_0 = 8000;
  ATP_i0 = 9644.425;
  V_ims = 0.0625;
  ADP_i0 = 2.5;
  PCr_i0 = 12500;
  Cr_i0 = 13500;
  Pi_i0 = 8000;
  V_MMCK_Kia = 9e2;
  V_MMCK_Kb = 1.55e4;
  V_MMCK_Kib = 3.49e4;
  V_MMCK_Kic = 2.224e2;
  V_MMCK_Kd = 1.67e3;
  V_MMCK_Kid = 4.73e3;
  V_MMCK_Vf = 6.966e3;
  V_MMCK_Vb = 2.925e4;
  V_MiCK_Kia = 7.5e2;
  V_MiCK_Kb = 5.2e3;
  V_MiCK_Kib = 2.88e4;
  V_MiCK_Kic = 2.048e2;
  V_MiCK_Kd = 5e2;
  V_MiCK_Kid = 1.6e3;
  V_MiCK_Vf = 2.658e3;
  V_MiCK_Vb = 1.116e4;
  V_syn_KPi = 20;
  V_syn_KADP = 8e2;
  V_syn_V_syn_max = 4.6e3;
  J_ATP_R_ATP = 8.16;
  J_ADP_R_ADP = 8.16;
  J_PCr_R_PCr = 14.6;
  J_Cr_R_Cr = 14.6;
  J_Pi_R_Pi = 18.4;
  time_ = ;

  // Assignment rules:
  V_MMCK0 := (V_MMCK_Vf*(ATP0*Cr0/(V_MMCK_Kia*V_MMCK_Kb)) - V_MMCK_Vb*(ADP0*PCr0/(V_MMCK_Kic*V_MMCK_Kd)))/V_MMCK_Den_MMCK;
  J_ATP0 := J_ATP_R_ATP*(ATP_i0 - ATP0);
  J_ADP0 := J_ADP_R_ADP*(ADP_i0 - ADP0);
  J_PCr0 := J_PCr_R_PCr*(PCr_i0 - PCr0);
  J_Cr0 := J_Cr_R_Cr*(Cr_i0 - Cr0);
  J_Pi0 := J_Pi_R_Pi*(Pi_i0 - Pi_0);
  V_MiCK0 := (V_MiCK_Vf*(ATP_i0*Cr_i0/(V_MiCK_Kia*V_MiCK_Kb)) - V_MiCK_Vb*(ADP_i0*PCr_i0/(V_MiCK_Kic*V_MiCK_Kd)))/V_MiCK_Den_MiCK;
  V_syn0 := V_syn_V_syn_max*(ADP_i0*Pi_i0/(V_syn_KPi*V_syn_KADP*V_syn_Den_syn));
  V_MMCK_Den_MMCK := 1 + Cr0/V_MMCK_Kib + PCr0/V_MMCK_Kid + ATP0*(1/V_MMCK_Kia + Cr0/(V_MMCK_Kia*V_MMCK_Kb)) + ADP0*(1/V_MMCK_Kic + PCr0/(V_MMCK_Kid*V_MMCK_Kc) + Cr0/(V_MMCK_Kic*V_MMCK_KIb));
  V_MMCK_KIb := V_MMCK_Kib;
  V_MMCK_Kc := V_MMCK_Kic*V_MMCK_Kd/V_MMCK_Kid;
  V_MiCK_Den_MiCK := 1 + Cr_i0/V_MiCK_Kib + PCr_i0/V_MiCK_Kid + ATP_i0*(1/V_MiCK_Kia + Cr_i0/(V_MiCK_Kia*V_MiCK_Kb)) + ADP_i0*(1/V_MiCK_Kic + PCr_i0/(V_MiCK_Kid*V_MiCK_Kc) + Cr_i0/(V_MiCK_Kic*V_MiCK_KIb));
  V_MiCK_KIb := V_MiCK_Kib;
  V_MiCK_Kc := V_MiCK_Kic*V_MiCK_Kd/V_MiCK_Kid;
  V_syn_Den_syn := 1 + ADP_i0/V_syn_KADP + Pi_i0/V_syn_KPi + ADP_i0*Pi_i0/(V_syn_KADP*V_syn_KPi);

  // Rate rules:
  ATP0' = (J_ATP0 - (V_hyd0 + V_MMCK0))/V_cyt;
  ADP0' = (J_ADP0 + V_hyd0 + V_MMCK0)/V_cyt;
  PCr0' = (J_PCr0 + V_MMCK0)/V_cyt;
  Cr0' = (J_Cr0 - V_MMCK0)/V_cyt;
  Pi_0' = (J_Pi0 + V_hyd0)/V_cyt;
  ATP_i0' = -(J_ATP0 + V_syn0 + V_MiCK0)/V_ims;
  ADP_i0' = (V_syn0 + V_MiCK0 - J_ADP0)/V_ims;
  PCr_i0' = (V_MiCK0 - J_PCr0)/V_ims;
  Cr_i0' = -(V_MiCK0 + J_Cr0)/V_ims;
  Pi_i0' = (V_syn0 - J_Pi0)/V_ims;
end
