// SBML level 2 version 4

model korzeniewski_zoladz_2001____main()
  // Originally created by libAntimony v1.3 (using libSBML 4.1.0-b2)

  // Compartments:
  compartment default_compartment = 1;

  // Parameters:
  R_cm = 15;
  R = 0.0083;
  T = 289;
  F = 0.0965;
  cell_c_buffi = 0.022;
  cell_c_buffe = 0.025;
  pKa = 6.8;
  He0 = ;
  Hi0 = ;
  cell_dpH = 0.001;
  BN = 5;
  redox_potentials_EmN0 = -320;
  redox_potentials_EmU0 = 85;
  redox_potentials_Emc0 = 250;
  NADH0 = ;
  UQH20 = ;
  c_20 = ;
  NAD_Nt = 2970;
  O20 = ;
  nA = 2.5;
  ADP_fi_kDDi = 282;
  Mg_fi0 = 380;
  ADP_ti_Ai_SUM = 16260;
  ATP_ti0 = ;
  ATP_fi_kDTi = 17;
  ADP_te0 = ;
  ADP_fe_kDDe = 347;
  Mg_fe0 = 4000;
  ATP_te0 = ;
  ATP_fe_kDTe = 24;
  AMP_e_Ae_SUM = 1600.2;
  Cr_C_SUM = 35000;
  PCr0 = ;
  Pi_ti0 = ;
  Pi_te0 = ;
  c_3_ct = 270;
  UQ_Ut = 1350;
  a_20 = ;
  a_2_Ema0 = 540;
  at_ = 135;
  vDH_kDH = 28074;
  vDH_KmN = 100;
  vDH_pD = 0.8;
  vC1_kC1 = 238.95;
  vC3_kC3 = 136.41;
  vC4_kC4 = 136.41;
  vC4_KmO = 120;
  vSN_kSN = 34316;
  vSN_delta_Gp0 = 31.9;
  vEX_kEX = 54572;
  vEX_km_ADP = 3.5;
  vUT_km_A = 150;
  vUT_kUT = 686.5;
  vAK_kf_AK = 862.1;
  vAK_kb_AK = 22.747;
  vLK_kL1 = 2.5;
  vLK_kL2 = 0.038;
  vPI_kPI = 69.421;
  vCK_kf_CK = 1.9258;
  vCK_kb_CK = 0.00087538;
  vEFF_pH_o = 7;
  vEFF_k_EFF = 1.9258;
  time_ = ;
  u = ;

  // Assignment rules:
  S := 2.303*R*T;
  Z := 2.303*R*(T/F);
  electric_potential := -(protonmotive_force - cell_delta_pH);
  protonmotive_force := 1/((1 - u)*cell_delta_pH);
  ex_membrane_potential := -0.35*electric_potential;
  in_membrane_potential := 0.65*electric_potential;
  pH_e := -ln(He0/1000000);
  pH_i := -ln(Hi0/1000000);
  cell_delta_pH := Z*(pH_i - pH_e);
  cell_C0_i := (10^(-pH_i) - 10^(-pH_i - cell_dpH))/cell_dpH;
  cell_C0_e := (10^(-pH_e) - 10^(-pH_e - cell_dpH))/cell_dpH;
  r_buffi := cell_c_buffi/cell_C0_i;
  r_buffe := cell_c_buffe/cell_C0_e;
  EmN := redox_potentials_EmN0 + Z/2*ln(NAD0/NADH0);
  EmU := redox_potentials_EmU0 + Z/2*ln(UQ0/UQH20);
  Emc := redox_potentials_Emc0 + Z*ln(c_30/c_20);
  Ema := Emc + protonmotive_force*((2 + 2*u)/2);
  NAD0 := NAD_Nt - NADH0;
  UQ0 := UQ_Ut - UQH20;
  c_30 := c_3_ct - c_20;
  vDH0 := vDH_kDH*(1/(1 + vDH_KmN/(NAD0/NADH0))^vDH_pD);
  vC10 := vC1_kC1*vC1_delta_GC1;
  vC40 := vC4_kC4*a_20*c_20*(1/(1 + vC4_KmO/O20));
  vC30 := vC3_kC3*vC3_delta_GC3;
  vSN0 := vSN_kSN*((vSN_gamma - 1)/(vSN_gamma + 1));
  vEX0 := vEX_kEX*(ADP_fe0/(ADP_fe0 + ATP_fe0*10^(-in_membrane_potential/Z)) - ADP_fi0/(ADP_fi0 + ATP_fi0*10^(-in_membrane_potential/Z)))*(1/(1 + vEX_km_ADP/ADP_fe0));
  vPI0 := vPI_kPI*(He0*Pi_je0 - Hi0*Pi_ji0);
  vLK0 := vLK_kL1*(exp(vLK_kL2*protonmotive_force) - 1);
  vCK0 := vCK_kf_CK*ADP_te0*PCr0*He0 - vCK_kb_CK*ATP_te0*Cr0;
  vEFF0 := vEFF_k_EFF*(vEFF_pH_o - pH_e);
  ADP_mi0 := ADP_ti0 - ADP_fi0;
  ADP_ti0 := ADP_ti_Ai_SUM - ATP_ti0;
  ADP_fi0 := ADP_ti0/(1 + Mg_fi0/ADP_fi_kDDi);
  ATP_mi0 := ATP_ti0 - ATP_fi0;
  ATP_fi0 := ATP_ti0/(1 + Mg_fi0/ATP_fi_kDTi);
  ADP_me0 := ADP_te0 - ADP_fe0;
  ADP_fe0 := ADP_te0/(1 + Mg_fe0/ADP_fe_kDDe);
  vUT0 := vUT_kUT*(1/(1 + vUT_km_A/ATP_te0));
  vAK0 := vAK_kf_AK*ADP_me0*ADP_fe0 - vAK_kb_AK*ATP_me0*AMP_e0;
  ATP_me0 := ATP_te0 - ATP_fe0;
  ATP_fe0 := ATP_te0/(1 + Mg_fe0/ATP_fe_kDTe);
  AMP_e0 := AMP_e_Ae_SUM - (ATP_te0 + ADP_te0);
  Cr0 := Cr_C_SUM - PCr0;
  Pi_ji0 := Pi_ti0/(1 + 10^(pH_i - pKa));
  Pi_je0 := Pi_te0/(1 + 10^(pH_e - pKa));
  P_SUM0 := PCr0 + ATP_te0*3 + ADP_te0*2 + AMP_e0 + Pi_te0 + (ATP_ti0*3 + ADP_ti0*2 + Pi_ti0)/R_cm;
  a_2_A3_2 := 10^((Ema - a_2_Ema0)/Z);
  a_30 := at_ - a_20;
  vC1_delta_GC1 := EmU - (EmN + protonmotive_force*(4/2));
  vC3_delta_GC3 := Emc - (EmU + protonmotive_force*((4 - 2*u)/2));
  vSN_delta_GSN := nA*protonmotive_force - vSN_delta_Gp;
  vSN_delta_Gp := vSN_delta_Gp0/(F + Z*ln(1000000*(ATP_ti0/(ADP_ti0*Pi_ti0))));
  vSN_gamma := 10^(vSN_delta_GSN/Z);

  // Rate rules:
  He0' = (2*(2 + 2*u)*vC40 + (4 - 2*u)*vC30 + 4*vC10 - (nA*vSN0 + u*vEX0 + (1 - u)*vPI0 + vLK0 + vCK0 + vEFF0))/r_buffe;
  Hi0' = ((4 - 2*u)*vC30 + 4*vC10 - (2*(2 + 2*u)*vC40 + nA*vSN0 + u*vEX0 + (1 - u)*vPI0 + vLK0))*R_cm/r_buffi;
  NADH0' = (vDH0 - vC10)*(R_cm/BN);
  UQH20' = R_cm*(vC10 - vC30);
  c_20' = (vC30 + vC40*2)*R_cm*2;
  O20' = -vC40;
  ATP_ti0' = (vSN0 - vEX0)*R_cm;
  ADP_te0' = vUT0 - (vEX0 + 2*vAK0 + vCK0);
  ATP_te0' = vEX0 + vAK0 + vCK0 - vUT0;
  PCr0' = -vCK0;
  Pi_ti0' = (vPI0 - vSN0)*R_cm;
  Pi_te0' = vUT0 - vPI0;
  a_20' = at_/(1 + a_2_A3_2);
end
