// SBML level 2 version 4

model kurata_hisatome_imanishi_shibamoto_2002_version02____main()
  // Originally created by libAntimony v1.3 (using libSBML 4.1.0-b2)

  // Compartments:
  compartment default_compartment = 1;

  // Parameters:
  V = -58.60029;
  R = 8.3144e15;
  T = 310.15;
  F = 9.6485e16;
  Cm = 32;
  Nai = 9.438646;
  Nao = 140;
  Ki = 139.9841;
  Ko = 5.4;
  L_type_calcium_channel_current_g_CaL = 0.58;
  L_type_calcium_channel_current_E_CaL = 45;
  Ca_sub = 0.00019074741;
  d = 0.000602055134;
  f = 0.6269998;
  fCa = 0.5895804;
  L_type_calcium_channel_current_L_type_calcium_channel_current_fCa_gate_beta_fCa = 60;
  L_type_calcium_channel_current_L_type_calcium_channel_current_fCa_gate_Km_fCa = 0.00035;
  T_type_calcium_channel_current_g_CaT = 0.458;
  T_type_calcium_channel_current_E_CaT = 45;
  d0 = 0.004571885;
  f0 = 0.2496376;
  paS = 0.6293231;
  paF = 0.3493634;
  piy = 0.8523966;
  slowly_activating_delayed_rectifier_potassium_current_g_Ks = 0.0259;
  n = 0.05440972;
  AP_sensitive_currents_g_to = 0.18;
  AP_sensitive_currents_g_sus = 0.02;
  q = 0.531447;
  r = 0.005550489;
  hyperpolarisation_activated_current_g_h_Na = 0.1437375;
  hyperpolarisation_activated_current_g_h_K = 0.2312625;
  y = 0.06715669;
  sustained_inward_current_g_st = 0.015;
  sustained_inward_current_E_st = 37.4;
  qa = 0.4260181;
  qi = 0.3333304;
  sodium_dependent_background_current_g_b_Na = 0.0054;
  sodium_potassium_pump_current_Km_Kp = 1.4;
  sodium_potassium_pump_current_Km_Nap = 14;
  sodium_potassium_pump_current_i_NaK_max = 3.6;
  sodium_calcium_exchange_current_kNaCa = 125;
  sodium_calcium_exchange_current_Qci = 0.1369;
  sodium_calcium_exchange_current_Qn = 0.4315;
  sodium_calcium_exchange_current_Qco = 0;
  sodium_calcium_exchange_current_K3ni = 26.44;
  sodium_calcium_exchange_current_Kci = 0.0207;
  sodium_calcium_exchange_current_K1ni = 395.3;
  sodium_calcium_exchange_current_K2ni = 2.289;
  sodium_calcium_exchange_current_Kcni = 26.44;
  sodium_calcium_exchange_current_K3no = 4.663;
  sodium_calcium_exchange_current_K1no = 1628;
  sodium_calcium_exchange_current_K2no = 561.4;
  sodium_calcium_exchange_current_Kco = 3.663;
  Cao = 2;
  intracellular_calcium_dynamics_tau_dif_Ca = 0.04;
  intracellular_calcium_dynamics_tau_tr = 60;
  intracellular_calcium_dynamics_K_rel = 0.0012;
  intracellular_calcium_dynamics_P_up = 0.005;
  intracellular_calcium_dynamics_P_rel = 0.5;
  intracellular_calcium_dynamics_K_up = 0.0006;
  Ca_up = 1.462338;
  Cai = 0.000312494921;
  Ca_rel = 0.296742;
  Mgi = 2.5;
  intracellular_ion_concentrations_V_i = 1.5835e-12;
  intracellular_ion_concentrations_V_rel = 4.2223e-15;
  intracellular_ion_concentrations_V_up = 4.0816e-14;
  intracellular_ion_concentrations_V_sub = 3.5098e-14;
  TMC_tot = 0.062;
  CM_tot = 0.045;
  TC_tot = 0.031;
  CQ_tot = 10;
  calcium_buffering_fTMM = 0.3506009;
  calcium_buffering_fCMi = 0.1169472;
  calcium_buffering_fCMs = 0.07463197;
  calcium_buffering_fTC = 0.05920629;
  calcium_buffering_fTMC = 0.6029551;
  calcium_buffering_fCQ = 0.2603173;
  calcium_buffering_kf_TC = 88.8;
  calcium_buffering_kf_TMM = 2.277;
  calcium_buffering_kf_TMC = 227.7;
  calcium_buffering_kf_CM = 227.7;
  calcium_buffering_kf_CQ = 0.534;
  calcium_buffering_kb_TC = 0.446;
  calcium_buffering_kb_TMC = 0.00751;
  calcium_buffering_kb_TMM = 0.751;
  calcium_buffering_kb_CM = 0.542;
  calcium_buffering_kb_CQ = 0.445;
  time_ = ;

  // Assignment rules:
  i_CaT := T_type_calcium_channel_current_g_CaT*(V - T_type_calcium_channel_current_E_CaT)*d0*f0;
  i_CaL := L_type_calcium_channel_current_g_CaL*(V - L_type_calcium_channel_current_E_CaL)*d*f*fCa;
  i_Kr := rapidly_activating_delayed_rectifier_potassium_current_g_Kr*(V - E_K)*(0.6*paF + 0.4*paS)*piy;
  i_Ks := slowly_activating_delayed_rectifier_potassium_current_g_Ks*(V - slowly_activating_delayed_rectifier_potassium_current_E_Ks)*n^2;
  i_to := AP_sensitive_currents_g_to*(V - E_K)*q*r;
  i_sus := AP_sensitive_currents_g_sus*(V - E_K)*r;
  i_h := i_h_Na + i_h_K;
  i_st := sustained_inward_current_g_st*(V - sustained_inward_current_E_st)*qa*qi;
  i_b_Na := sodium_dependent_background_current_g_b_Na*(V - E_Na);
  i_NaCa := sodium_calcium_exchange_current_kNaCa*(sodium_calcium_exchange_current_x2*sodium_calcium_exchange_current_k21 - sodium_calcium_exchange_current_x1*sodium_calcium_exchange_current_k12)/(sodium_calcium_exchange_current_x1 + sodium_calcium_exchange_current_x2 + sodium_calcium_exchange_current_x3 + sodium_calcium_exchange_current_x4);
  i_NaK := sodium_potassium_pump_current_i_NaK_max*(1 + (sodium_potassium_pump_current_Km_Kp/Ko)^1.2)^(-1)*(1 + (sodium_potassium_pump_current_Km_Nap/Nai)^1.3)^(-1)*(1 + exp(-(V - E_Na + 120)/30))^(-1);
  i_K_ACh := background_muscarinic_potassium_channel_current_g_K_ACh*(Ki - Ko*exp(-V*F/(R*T)))/1;
  E_Na := R*T/F*ln(Nao/Nai);
  E_K := R*T/F*ln(Ko/Ki);
  L_type_calcium_channel_current_L_type_calcium_channel_current_d_gate_d_infinity := 1/(1 + exp(-(V + 14.1)/6));
  L_type_calcium_channel_current_L_type_calcium_channel_current_d_gate_tau_d := 1/(L_type_calcium_channel_current_L_type_calcium_channel_current_d_gate_alpha_d + L_type_calcium_channel_current_L_type_calcium_channel_current_d_gate_beta_d);
  L_type_calcium_channel_current_L_type_calcium_channel_current_d_gate_alpha_d := -0.02839*(V + 35)/(exp(-(V + 35)/2.5) - 1) - 0.0849*V/(exp(-V/4.808) - 1);
  L_type_calcium_channel_current_L_type_calcium_channel_current_d_gate_beta_d := 0.01143*(V - 5)/(exp((V - 5)/2.5) - 1);
  L_type_calcium_channel_current_L_type_calcium_channel_current_f_gate_f_infinity := 1/(1 + exp((V + 30)/5));
  L_type_calcium_channel_current_L_type_calcium_channel_current_f_gate_tau_f := 44.3 + 257.1*exp(-((V + 32.5)/13.9)^2);
  L_type_calcium_channel_current_L_type_calcium_channel_current_fCa_gate_alpha_fCa := L_type_calcium_channel_current_L_type_calcium_channel_current_fCa_gate_Km_fCa*L_type_calcium_channel_current_L_type_calcium_channel_current_fCa_gate_beta_fCa;
  L_type_calcium_channel_current_L_type_calcium_channel_current_fCa_gate_fCa_infinity := L_type_calcium_channel_current_L_type_calcium_channel_current_fCa_gate_Km_fCa/(L_type_calcium_channel_current_L_type_calcium_channel_current_fCa_gate_Km_fCa + Ca_sub);
  L_type_calcium_channel_current_L_type_calcium_channel_current_fCa_gate_tau_fCa := L_type_calcium_channel_current_L_type_calcium_channel_current_fCa_gate_fCa_infinity/L_type_calcium_channel_current_L_type_calcium_channel_current_fCa_gate_alpha_fCa;
  T_type_calcium_channel_current_T_type_calcium_channel_current_d_gate_d_infinity := 1/(1 + exp(-(V + 26.3)/6));
  T_type_calcium_channel_current_T_type_calcium_channel_current_d_gate_tau_d := 1/(1.068*exp((V + 26.3)/30) + 1.068*exp(-(V + 26.3)/30));
  T_type_calcium_channel_current_T_type_calcium_channel_current_f_gate_f_infinity := 1/(1 + exp((V + 61.7)/5.6));
  T_type_calcium_channel_current_T_type_calcium_channel_current_f_gate_tau_f := 1/(0.0153*exp(-(V + 61.7)/83.3) + 0.015*exp((V + 61.7)/15.38));
  rapidly_activating_delayed_rectifier_potassium_current_g_Kr := 0.025*(Ko/1)^0.59;
  rapidly_activating_delayed_rectifier_potassium_current_rapidly_activating_delayed_rectifier_potassium_current_pa_gate_pa_infinity := 1/(1 + exp(-(V + 23.2)/10.6));
  rapidly_activating_delayed_rectifier_potassium_current_rapidly_activating_delayed_rectifier_potassium_current_pa_gate_tau_paS := 0.84655354/(0.0042*exp(V/17) + 0.00015*exp(-V/21.6));
  rapidly_activating_delayed_rectifier_potassium_current_rapidly_activating_delayed_rectifier_potassium_current_pa_gate_tau_paF := 0.84655354/(0.0372*exp(V/15.9) + 0.00096*exp(-V/22.5));
  rapidly_activating_delayed_rectifier_potassium_current_rapidly_activating_delayed_rectifier_potassium_current_pi_gate_pi_infinity := 1/(1 + exp((V + 28.6)/17.1));
  rapidly_activating_delayed_rectifier_potassium_current_rapidly_activating_delayed_rectifier_potassium_current_pi_gate_tau_pi := 1/(0.1*exp(-V/54.645) + 0.656*exp(V/106.157));
  slowly_activating_delayed_rectifier_potassium_current_E_Ks := R*T/F*ln((Ko + 0.12*Nao)/(Ki + 0.12*Nai));
  slowly_activating_delayed_rectifier_potassium_current_slowly_activating_delayed_rectifier_potassium_current_n_gate_n_infinity := slowly_activating_delayed_rectifier_potassium_current_slowly_activating_delayed_rectifier_potassium_current_n_gate_alpha_n/(slowly_activating_delayed_rectifier_potassium_current_slowly_activating_delayed_rectifier_potassium_current_n_gate_alpha_n + slowly_activating_delayed_rectifier_potassium_current_slowly_activating_delayed_rectifier_potassium_current_n_gate_beta_n);
  slowly_activating_delayed_rectifier_potassium_current_slowly_activating_delayed_rectifier_potassium_current_n_gate_tau_n := 1/(slowly_activating_delayed_rectifier_potassium_current_slowly_activating_delayed_rectifier_potassium_current_n_gate_alpha_n + slowly_activating_delayed_rectifier_potassium_current_slowly_activating_delayed_rectifier_potassium_current_n_gate_beta_n);
  slowly_activating_delayed_rectifier_potassium_current_slowly_activating_delayed_rectifier_potassium_current_n_gate_alpha_n := 0.014/(1 + exp(-(V - 40)/9));
  slowly_activating_delayed_rectifier_potassium_current_slowly_activating_delayed_rectifier_potassium_current_n_gate_beta_n := 0.001*exp(-V/45);
  AP_sensitive_currents_AP_sensitive_currents_q_gate_q_infinity := 1/(1 + exp((V + 49)/13));
  AP_sensitive_currents_AP_sensitive_currents_q_gate_tau_q := 0.6*(65.17/(0.57*exp(-0.08*(V + 44)) + 0.065*exp(0.1*(V + 45.93))) + 10.1);
  AP_sensitive_currents_AP_sensitive_currents_r_gate_r_infinity := 1/(1 + exp(-(V - 19.3)/15));
  AP_sensitive_currents_AP_sensitive_currents_r_gate_tau_r := 0.66*1.4*(15.59/(1.037*exp(0.09*(V + 30.61)) + 0.369*exp(-0.12*(V + 23.84))) + 2.98);
  i_h_Na := hyperpolarisation_activated_current_g_h_Na*(V - E_Na)*y^2;
  i_h_K := hyperpolarisation_activated_current_g_h_K*(V - E_K)*y^2;
  hyperpolarisation_activated_current_hyperpolarisation_activated_current_y_gate_y_infinity := 1/(1 + exp((V + 64)/13.5));
  hyperpolarisation_activated_current_hyperpolarisation_activated_current_y_gate_tau_y := 0.7166529/(exp(-(V + 386.9)/45.302) + exp((V - 73.08)/19.231));
  sustained_inward_current_sustained_inward_current_qa_gate_qa_infinity := 1/(1 + exp(-(V + 57)/5));
  sustained_inward_current_sustained_inward_current_qa_gate_tau_qa := 1/(sustained_inward_current_sustained_inward_current_qa_gate_alpha_qa + sustained_inward_current_sustained_inward_current_qa_gate_beta_qa);
  sustained_inward_current_sustained_inward_current_qa_gate_alpha_qa := 1/(0.15*exp(-V/11) + 0.2*exp(-V/700));
  sustained_inward_current_sustained_inward_current_qa_gate_beta_qa := 1/(16*exp(V/8) + 15*exp(V/50));
  sustained_inward_current_sustained_inward_current_qi_gate_qi_infinity := sustained_inward_current_sustained_inward_current_qi_gate_alpha_qi/(sustained_inward_current_sustained_inward_current_qi_gate_alpha_qi + sustained_inward_current_sustained_inward_current_qi_gate_beta_qi);
  sustained_inward_current_sustained_inward_current_qi_gate_tau_qi := 6.65/(sustained_inward_current_sustained_inward_current_qi_gate_alpha_qi + sustained_inward_current_sustained_inward_current_qi_gate_beta_qi);
  sustained_inward_current_sustained_inward_current_qi_gate_alpha_qi := 1/(3100*exp(V/13) + 700*exp(V/70));
  sustained_inward_current_sustained_inward_current_qi_gate_beta_qi := 1/(95*exp(-V/10) + 50*exp(-V/700)) + 0.000229/(1 + exp(-V/5));
  background_muscarinic_potassium_channel_current_g_K_ACh := 0.0011*(Ko/1)^0.41;
  sodium_calcium_exchange_current_x1 := sodium_calcium_exchange_current_k41*sodium_calcium_exchange_current_k34*(sodium_calcium_exchange_current_k23 + sodium_calcium_exchange_current_k21) + sodium_calcium_exchange_current_k21*sodium_calcium_exchange_current_k32*(sodium_calcium_exchange_current_k43 + sodium_calcium_exchange_current_k41);
  sodium_calcium_exchange_current_x2 := sodium_calcium_exchange_current_k32*sodium_calcium_exchange_current_k43*(sodium_calcium_exchange_current_k14 + sodium_calcium_exchange_current_k12) + sodium_calcium_exchange_current_k41*sodium_calcium_exchange_current_k12*(sodium_calcium_exchange_current_k34 + sodium_calcium_exchange_current_k32);
  sodium_calcium_exchange_current_x3 := sodium_calcium_exchange_current_k14*sodium_calcium_exchange_current_k43*(sodium_calcium_exchange_current_k23 + sodium_calcium_exchange_current_k21) + sodium_calcium_exchange_current_k12*sodium_calcium_exchange_current_k23*(sodium_calcium_exchange_current_k43 + sodium_calcium_exchange_current_k41);
  sodium_calcium_exchange_current_x4 := sodium_calcium_exchange_current_k23*sodium_calcium_exchange_current_k34*(sodium_calcium_exchange_current_k14 + sodium_calcium_exchange_current_k12) + sodium_calcium_exchange_current_k14*sodium_calcium_exchange_current_k21*(sodium_calcium_exchange_current_k34 + sodium_calcium_exchange_current_k32);
  sodium_calcium_exchange_current_k41 := exp(-sodium_calcium_exchange_current_Qn*V*F/(2*R*T));
  sodium_calcium_exchange_current_k34 := Nao/(sodium_calcium_exchange_current_K3no + Nao);
  sodium_calcium_exchange_current_k23 := Nao/sodium_calcium_exchange_current_K1no*Nao/sodium_calcium_exchange_current_K2no*(1 + Nao/sodium_calcium_exchange_current_K3no)*exp(-sodium_calcium_exchange_current_Qn*V*F/(2*R*T))/sodium_calcium_exchange_current_do;
  sodium_calcium_exchange_current_k21 := Cao/sodium_calcium_exchange_current_Kco*exp(sodium_calcium_exchange_current_Qco*V*F/(R*T))/sodium_calcium_exchange_current_do;
  sodium_calcium_exchange_current_k32 := exp(sodium_calcium_exchange_current_Qn*V*F/(2*R*T));
  sodium_calcium_exchange_current_k43 := Nai/(sodium_calcium_exchange_current_K3ni + Nai);
  sodium_calcium_exchange_current_k12 := Ca_sub/sodium_calcium_exchange_current_Kci*exp(-sodium_calcium_exchange_current_Qci*V*F/(R*T))/sodium_calcium_exchange_current_di;
  sodium_calcium_exchange_current_k14 := Nai/sodium_calcium_exchange_current_K1ni*Nai/sodium_calcium_exchange_current_K2ni*(1 + Nai/sodium_calcium_exchange_current_K3ni)*exp(sodium_calcium_exchange_current_Qn*V*F/(2*R*T))/sodium_calcium_exchange_current_di;
  sodium_calcium_exchange_current_do := 1 + Cao/sodium_calcium_exchange_current_Kco*(1 + exp(sodium_calcium_exchange_current_Qco*V*F/(R*T))) + Nao/sodium_calcium_exchange_current_K1no*(1 + Nao/sodium_calcium_exchange_current_K2no)*(1 + Nao/sodium_calcium_exchange_current_K3no);
  sodium_calcium_exchange_current_di := 1 + Ca_sub/sodium_calcium_exchange_current_Kci*(1 + exp(-sodium_calcium_exchange_current_Qci*V*F/(R*T)) + Nai/sodium_calcium_exchange_current_Kcni) + Nai/sodium_calcium_exchange_current_K1ni*(1 + Nai/sodium_calcium_exchange_current_K2ni*(1 + Nai/sodium_calcium_exchange_current_K3ni));
  j_Ca_dif := (Ca_sub - Cai)/intracellular_calcium_dynamics_tau_dif_Ca;
  j_rel := intracellular_calcium_dynamics_P_rel*(Ca_rel - Ca_sub)/(1 + (intracellular_calcium_dynamics_K_rel/Ca_sub)^2);
  j_up := intracellular_calcium_dynamics_P_up/(1 + intracellular_calcium_dynamics_K_up/Cai);
  j_tr := (Ca_up - Ca_rel)/intracellular_calcium_dynamics_tau_tr;
  delta_fTMC := calcium_buffering_kf_TMC*Cai*(1 - (calcium_buffering_fTMC + calcium_buffering_fTMM)) - calcium_buffering_kb_TMC*calcium_buffering_fTMC;
  delta_fCMi := calcium_buffering_kf_CM*Cai*(1 - calcium_buffering_fCMi) - calcium_buffering_kb_CM*calcium_buffering_fCMi;
  delta_fCMs := calcium_buffering_kf_CM*Ca_sub*(1 - calcium_buffering_fCMs) - calcium_buffering_kb_CM*calcium_buffering_fCMs;
  delta_fTC := calcium_buffering_kf_TC*Cai*(1 - calcium_buffering_fTC) - calcium_buffering_kb_TC*calcium_buffering_fTC;
  delta_fCQ := calcium_buffering_kf_CQ*Ca_rel*(1 - calcium_buffering_fCQ) - calcium_buffering_kb_CQ*calcium_buffering_fCQ;
  calcium_buffering_delta_fTMM := calcium_buffering_kf_TMM*Mgi*(1 - (calcium_buffering_fTMC + calcium_buffering_fTMM)) - calcium_buffering_kb_TMM*calcium_buffering_fTMM;

  // Rate rules:
  V' = -(i_CaL + i_CaT + i_Kr + i_Ks + i_to + i_sus + i_h + i_st + i_b_Na + i_K_ACh + i_NaK + i_NaCa)/1;
  Nai' = -(i_h_Na + i_st + i_b_Na + 3*i_NaK + 3*i_NaCa)*Cm/(1*F*(intracellular_ion_concentrations_V_i + intracellular_ion_concentrations_V_sub));
  Ki' = -(i_Kr + i_Ks + i_to + i_sus + i_h_K + i_K_ACh + (-2*i_NaK))*Cm/(1*F*(intracellular_ion_concentrations_V_i + intracellular_ion_concentrations_V_sub));
  Ca_sub' = (-(i_CaL + i_CaT - 2*i_NaCa)*Cm/(1*2*F) + j_rel*intracellular_ion_concentrations_V_rel)/intracellular_ion_concentrations_V_sub - (j_Ca_dif + CM_tot*delta_fCMs);
  d' = (L_type_calcium_channel_current_L_type_calcium_channel_current_d_gate_d_infinity - d)/L_type_calcium_channel_current_L_type_calcium_channel_current_d_gate_tau_d;
  f' = (L_type_calcium_channel_current_L_type_calcium_channel_current_f_gate_f_infinity - f)/L_type_calcium_channel_current_L_type_calcium_channel_current_f_gate_tau_f;
  fCa' = (L_type_calcium_channel_current_L_type_calcium_channel_current_fCa_gate_fCa_infinity - fCa)/L_type_calcium_channel_current_L_type_calcium_channel_current_fCa_gate_tau_fCa;
  d0' = (T_type_calcium_channel_current_T_type_calcium_channel_current_d_gate_d_infinity - d0)/T_type_calcium_channel_current_T_type_calcium_channel_current_d_gate_tau_d;
  f0' = (T_type_calcium_channel_current_T_type_calcium_channel_current_f_gate_f_infinity - f0)/T_type_calcium_channel_current_T_type_calcium_channel_current_f_gate_tau_f;
  paS' = (rapidly_activating_delayed_rectifier_potassium_current_rapidly_activating_delayed_rectifier_potassium_current_pa_gate_pa_infinity - paS)/rapidly_activating_delayed_rectifier_potassium_current_rapidly_activating_delayed_rectifier_potassium_current_pa_gate_tau_paS;
  paF' = (rapidly_activating_delayed_rectifier_potassium_current_rapidly_activating_delayed_rectifier_potassium_current_pa_gate_pa_infinity - paF)/rapidly_activating_delayed_rectifier_potassium_current_rapidly_activating_delayed_rectifier_potassium_current_pa_gate_tau_paF;
  piy' = (rapidly_activating_delayed_rectifier_potassium_current_rapidly_activating_delayed_rectifier_potassium_current_pi_gate_pi_infinity - piy)/rapidly_activating_delayed_rectifier_potassium_current_rapidly_activating_delayed_rectifier_potassium_current_pi_gate_tau_pi;
  n' = (slowly_activating_delayed_rectifier_potassium_current_slowly_activating_delayed_rectifier_potassium_current_n_gate_n_infinity - n)/slowly_activating_delayed_rectifier_potassium_current_slowly_activating_delayed_rectifier_potassium_current_n_gate_tau_n;
  q' = (AP_sensitive_currents_AP_sensitive_currents_q_gate_q_infinity - q)/AP_sensitive_currents_AP_sensitive_currents_q_gate_tau_q;
  r' = (AP_sensitive_currents_AP_sensitive_currents_r_gate_r_infinity - r)/AP_sensitive_currents_AP_sensitive_currents_r_gate_tau_r;
  y' = (hyperpolarisation_activated_current_hyperpolarisation_activated_current_y_gate_y_infinity - y)/hyperpolarisation_activated_current_hyperpolarisation_activated_current_y_gate_tau_y;
  qa' = (sustained_inward_current_sustained_inward_current_qa_gate_qa_infinity - qa)/sustained_inward_current_sustained_inward_current_qa_gate_tau_qa;
  qi' = (sustained_inward_current_sustained_inward_current_qi_gate_qi_infinity - qi)/sustained_inward_current_sustained_inward_current_qi_gate_tau_qi;
  Ca_up' = j_up - j_tr*intracellular_ion_concentrations_V_rel/intracellular_ion_concentrations_V_up;
  Cai' = (j_Ca_dif*intracellular_ion_concentrations_V_sub - j_up*intracellular_ion_concentrations_V_up)/intracellular_ion_concentrations_V_i - (CM_tot*delta_fCMi + TC_tot*delta_fTC + TMC_tot*delta_fTMC);
  Ca_rel' = j_tr - (j_rel + CQ_tot*delta_fCQ);
  calcium_buffering_fTMM' = calcium_buffering_delta_fTMM;
  calcium_buffering_fCMi' = delta_fCMi;
  calcium_buffering_fCMs' = delta_fCMs;
  calcium_buffering_fTC' = delta_fTC;
  calcium_buffering_fTMC' = delta_fTMC;
  calcium_buffering_fCQ' = delta_fCQ;
end
