// SBML level 2 version 4

model lebeau_yule_groblewski_sneyd_1999_version01____main()
  // Originally created by libAntimony v1.3 (using libSBML 4.1.0-b2)

  // Compartments:
  compartment default_compartment = 1;

  // Parameters:
  O0 = ;
  I10 = ;
  I20 = ;
  p = 3;
  k1_ = 0.88;
  k2 = 0.5;
  k3 = 0.5;
  k5 = 0.02;
  c0 = ;
  c_J_influx = 0.4;
  c_V_p = 2.6;
  c_K_p = 0.54;
  c_k_flux = 28;
  constants_alpha_1 = 40;
  constants_beta_1 = 0.8;
  constants_alpha_4 = 0.06;
  constants_beta_4 = 0.01;
  time_ = ;

  // Assignment rules:
  O_S := 4 - (O0 + I10 + I20);
  k1 := constants_alpha_1*c0^3/(constants_beta_1^3 + c0^3);
  k4 := constants_alpha_4*p/(constants_beta_4 + p);
  c_J_rel := c_k_flux*O0^4;
  c_J_pump := c_V_p*c0^2/(c_K_p^2 + c0^2);

  // Rate rules:
  O0' = k1*p*O_S - (k1_*O0 + k2*O0);
  I10' = k2*O0 - (k3 + k4)*I10;
  I20' = k4*I10 - k5*I20;
  c0' = c_J_rel - c_J_pump + c_J_influx;
end
