// SBML level 2 version 4

model leloup_model_2004____main()
  // Originally created by libAntimony v1.4 (using libSBML 4.1.0-b2)

  // Compartments:
  compartment default_compartment = 1;

  // Parameters:
  MP0 = ;
  MP_vsP = 2.4;
  MP_vmP = 2.2;
  MP_kdmp = 0.02;
  MP_KAP = 0.6;
  MP_KmP = 0.3;
  n = 2;
  BN0 = ;
  MC0 = ;
  MC_vsC = 2.2;
  MC_vmC = 2;
  MC_kdmc = 0.02;
  MC_KAC = 0.6;
  MC_KmC = 0.4;
  MB0 = ;
  MB_vsB = 1.8;
  MB_vmB = 1.3;
  MB_kdmb = 0.02;
  MB_KIB = 2.2;
  MB_KmB = 0.4;
  m = 2;
  RN0 = ;
  MR0 = ;
  MR_vsR = 1.6;
  MR_vmR = 1.6;
  MR_kdmr = 0.02;
  MR_KAR = 0.6;
  MR_KmR = 0.4;
  h = 2;
  PC0 = ;
  ksP = 1.2;
  Kp = 1.006;
  Kdp = 0.1;
  k3 = 0.8;
  k4 = 0.4;
  kdn = 0.02;
  V1P = 9.6;
  V2P = 0.6;
  PCP0 = ;
  PCC0 = ;
  CC0 = ;
  ksC = 3.2;
  kdnc = 0.02;
  V1C = 1.2;
  V2C = 0.2;
  CCP0 = ;
  RC0 = ;
  ksR = 1.7;
  Kd = 0.3;
  k9 = 0.8;
  k10 = 0.4;
  vdRC = 4.4;
  vdPC = 3.4;
  vdCC = 1.4;
  k1 = 0.8;
  k2 = 0.4;
  V1PC = 2.4;
  V2PC = 0.2;
  PCCP0 = ;
  PCN0 = ;
  k7 = 1;
  k8 = 0.2;
  V3PC = 2.4;
  V4PC = 0.2;
  PCNP0 = ;
  IN_0 = ;
  vdRN = 0.8;
  vdPCC = 1.4;
  vdPCN = 1.4;
  BC0 = ;
  ksB = 0.32;
  k5 = 0.8;
  k6 = 0.4;
  V1B = 1.4;
  V2B = 0.2;
  BCP0 = ;
  vdBC = 3;
  V3B = 1.4;
  V4B = 0.4;
  BNP0 = ;
  vdBN = 3;
  vdIN = 1.6;
  time_ = ;

  // Rate rules:
  MP0' = MP_vsP*(BN0^n/(MP_KAP^n + BN0^n)) - (MP_vmP*(MP0/(MP_KmP + MP0)) + MP_kdmp*MP0);
  BN0' = V4B*(BNP0/(Kdp + BNP0)) + k5*BC0 + k8*IN_0 - (V3B*(BN0/(Kp + BN0)) + k6*BN0 + k7*BN0*PCN0 + kdn*BN0);
  MC0' = MC_vsC*(BN0^n/(MC_KAC^n + BN0^n)) - (MC_vmC*(MC0/(MC_KmC + MC0)) + MC_kdmc*MC0);
  MB0' = MB_vsB*(MB_KIB^m/(MB_KIB^m + RN0^m)) - (MB_vmB*(MB0/(MB_KmB + MB0)) + MB_kdmb*MB0);
  RN0' = k9*RC0 - (k10*RN0 + vdRN*(RN0/(Kd + RN0)) + kdn*RN0);
  MR0' = MR_vsR*(BN0^h/(MR_KAR^h + BN0^h)) - (MR_vmR*(MR0/(MR_KmR + MR0)) + MR_kdmr*MR0);
  PC0' = ksP*MP0 + V2P*(PCP0/(Kdp + PCP0)) + k4*PCC0 - (V1P*(PC0/(Kp + PC0)) + k3*PC0*CC0 + kdn*PC0);
  PCP0' = V1P*(PC0/(Kp + PC0)) - (V2P*(PCP0/(Kdp + PCP0)) + vdPC*(PCP0/(Kd + PCP0)) + kdn*PCP0);
  PCC0' = V2PC*(PCCP0/(Kdp + PCCP0)) + k3*PC0*CC0 + k2*PCN0 - (V1PC*(PCC0/(Kp + PCC0)) + k4*PCC0 + k1*PCC0 + kdn*PCC0);
  CC0' = ksC*MC0 + V2C*(CCP0/(Kdp + CCP0)) + k4*PCC0 - (V1C*(CC0/(Kp + CC0)) + k3*PC0*CC0 + kdnc*CC0);
  CCP0' = V1C*(CC0/(Kp + CC0)) - (V2C*(CCP0/(Kdp + CCP0)) + vdCC*(CCP0/(Kd + CCP0)) + kdn*CCP0);
  RC0' = ksR*MR0 + k10*RN0 - (k9*RC0 + vdRC*(RC0/(Kd + RC0)) + kdn*RC0);
  PCCP0' = V1PC*(PCC0/(Kp + PCC0)) - (V2PC*(PCCP0/(Kdp + PCCP0)) + vdPCC*(PCCP0/(Kd + PCCP0)) + kdn*PCCP0);
  PCN0' = V4PC*(PCNP0/(Kdp + PCNP0)) + k1*PCC0 + k8*IN_0 - (V3PC*(PCN0/(Kp + PCN0)) + k2*PCN0 + k7*BN0*PCN0 + kdn*PCN0);
  PCNP0' = V3PC*(PCN0/(Kp + PCN0)) - (V4PC*(PCNP0/(Kdp + PCNP0)) + vdPCN*(PCNP0/(Kd + PCNP0)) + kdn*PCNP0);
  IN_0' = k7*BN0*PCN0 - (k8*IN_0 + vdIN*(IN_0/(Kd + IN_0)) + kdn*IN_0);
  BC0' = V2B*(BCP0/(Kdp + BCP0)) + k6*BN0 + ksB*MB0 - (V1B*(BC0/(Kp + BC0)) + k5*BC0 + kdn*BC0);
  BCP0' = V1B*(BC0/(Kp + BC0)) - (V2B*(BCP0/(Kdp + BCP0)) + vdBC*(BCP0/(Kd + BCP0)) + kdn*BCP0);
  BNP0' = V3B*(BN0/(Kp + BN0)) - (V4B*(BNP0/(Kdp + BNP0)) + vdBN*(BNP0/(Kd + BNP0)) + kdn*BNP0);
end
