// SBML level 2 version 4

model leloup_gonze_goldbeter_1999_version02____main()
  // Originally created by libAntimony v1.3 (using libSBML 4.1.0-b2)

  // Compartments:
  compartment default_compartment = 1;

  // Parameters:
  M0 = ;
  M_vs = 1.6;
  M_vm = 0.505;
  M_Km = 0.5;
  M_KI = 1;
  M_n = 4;
  FN0 = ;
  FC0 = ;
  FC_ks = 0.5;
  FC_vd = 1.4;
  FC_Kd = 0.13;
  k1 = 0.5;
  k2 = 0.6;
  time_ = ;

  // Assignment rules:
  FC_Ft := FC0 + FN0;

  // Rate rules:
  M0' = M_vs*(M_KI^M_n/(M_KI^M_n + FN0^M_n)) - M_vm*(M0/(M_Km + M0));
  FN0' = k1*FC0 - k2*FN0;
  FC0' = FC_ks*M0 + k2*FN0 - (FC_vd*(FC0/(FC_Kd + FC0)) + k1*FC0);
end
