// SBML level 2 version 4

model lemaire_tobin_greller_cho_suva_model_2004_version01____main()
  // Originally created by libAntimony v1.3 (using libSBML 4.1.0-b2)

  // Compartments:
  compartment default_compartment = 1;

  // Parameters:
  R0 = 0.00077;
  DR = 0.0007;
  B0 = 0.00073;
  kB = 0.189;
  C0 = 0.00091;
  DC = 0.0021;
  DA = 0.7;
  pi_L_k1 = 0.01;
  pi_L_k2 = 10;
  pi_L_k3 = 0.00058;
  pi_L_k4 = 0.017;
  pi_L_K = 10;
  pi_L_ko = 0.35;
  pi_L_Io = 0;
  pi_L_IL = 0;
  pi_L_rL = 1000;
  pi_L_KOP = 200000;
  pi_L_KLP = 3000000;
  model_parameters_f0 = 0.05;
  model_parameters_dB = 0.7;
  model_parameters_IP = 0;
  model_parameters_kP = 86;
  model_parameters_C_s = 0.005;
  model_parameters_SP = 250;
  model_parameters_k5 = 0.02;
  model_parameters_k6 = 3;
  time_ = ;

  // Assignment rules:
  R_f := ;
  pi_C := (C0 + model_parameters_f0*model_parameters_C_s)/(C0 + model_parameters_C_s);
  DB := model_parameters_f0*model_parameters_dB;
  pi_L0 := pi_L_k3/pi_L_k4*(pi_L_KLP/1)*pi_P*B0/(1 + pi_L_k3*pi_L_K/pi_L_k4 + pi_L_k1/(pi_L_k2*pi_L_ko)*(pi_L_KOP/(1*pi_P)*R0 + pi_L_Io))*(1 + pi_L_IL/pi_L_rL);
  pi_P := (model_parameters_P + model_parameters_P_0)/(model_parameters_P + model_parameters_P_s);
  model_parameters_P := model_parameters_IP/model_parameters_kP;
  model_parameters_P_0 := model_parameters_SP/model_parameters_kP;
  model_parameters_P_s := model_parameters_k6/model_parameters_k5;

  // Rate rules:
  R0' = DR*pi_C - DB/pi_C*R0 + R_f;
  B0' = DB/pi_C*R0 - kB*B0;
  C0' = DC*pi_L0 - DA*pi_C*C0;
end
