// SBML level 2 version 4

model lenbury_2001____main()
  // Originally created by libAntimony v1.4 (using libSBML 4.1.0-b2)

  // Compartments:
  compartment default_compartment = 1;

  // Parameters:
  x0 = 4;
  x_r_1 = 0.2;
  x_r_2 = 0.1;
  x_c_1 = 0.1;
  z0 = 1;
  y0 = 0;
  y_r_3 = 0.1;
  y_r_4 = 0.1;
  y_c_2 = 0.1;
  epsilon = 0.1;
  z_r_5 = 0.1;
  z_r_6 = 0.1;
  z_r_7 = 0.05;
  z_z_hat = 2;
  z_y_hat = 1.24;
  time_ = ;

  // Rate rules:
  x0' = z0*(x_r_1*y0 + (-x_r_2*x0) + x_c_1);
  z0' = z_r_5*(y0 - z_y_hat)*(z_z_hat - z0) + z_r_6*z0*(z_z_hat - z0) - z_r_7*z0;
  y0' = epsilon*(y_r_3/z0 - y_r_4*x0 + y_c_2);
end
