// SBML level 2 version 4

model li_1996____main()
  // Originally created by libAntimony v1.4 (using libSBML 4.1.0-b2)

  // Compartments:
  compartment default_compartment = 1;

  // Parameters:
  V_s = -64;
  V_Na = 55;
  soma_compartment_g_Na_s = 3.2;
  soma_compartment_g_K_DR_s = 3.2;
  soma_compartment_g_Ca_T = 1.5;
  soma_compartment_g_K_Ca = 1.2;
  soma_compartment_g_A = 2;
  soma_compartment_g_h = 0.1;
  soma_compartment_Ca = 0;
  soma_compartment_k_Ca = 1;
  soma_compartment_K_Ca = 0.4;
  soma_compartment_V_h = -30;
  soma_compartment_beta = 0.104;
  soma_compartment_I_APP = -6.7;
  V_Ca = 120;
  V_K = -85;
  n = 0.002;
  h = 1;
  g_c = 0.1;
  p = 0.5;
  V_D = -77;
  C_m = 1;
  m_T = 0.1;
  h_T = 0.1;
  a = 0.1;
  b = 0.1;
  m_h = 0.1;
  dendritic_compartment_Na = 5.09;
  dendritic_compartment_K_p = 15;
  dendritic_compartment_R_pump = 18;
  dendritic_compartment_Na_eq = 8;
  dendritic_compartment_alpha = 0.173;
  dendritic_compartment_g_NMDA = 25;
  dendritic_compartment_g_Na_NMDA = 5;
  dendritic_compartment_g_L = 0.18;
  dendritic_compartment_Mg_o = 1.4;
  dendritic_compartment_K_Mg = 10;
  dendritic_compartment_q = 12.5;
  dendritic_compartment_V_NMDA = 0;
  dendritic_compartment_V_L = -50;
  dendritic_compartment_g_Ca_L = 0.19;
  dendritic_compartment_g_K_DR_D = 0.14;
  m_L = 0.1;
  time_ = ;

  // Assignment rules:
  soma_compartment_I_Na_s := soma_compartment_g_Na_s*h*(V_s - V_Na)*m_infinity^3;
  soma_compartment_I_K_DR_s := soma_compartment_g_K_DR_s*(V_s - V_K)*n^2;
  soma_compartment_I_Ca_T := soma_compartment_g_Ca_T*h_T*(V_s - V_Ca)*m_T^2;
  soma_compartment_I_K_Ca := soma_compartment_g_K_Ca*soma_compartment_Ca^4/(soma_compartment_Ca^4 + soma_compartment_K_Ca^4)*(V_s - V_K);
  soma_compartment_I_A := soma_compartment_g_A*b*(V_s - V_K)*a^4;
  soma_compartment_I_h := soma_compartment_g_h*m_h*(V_s - soma_compartment_V_h);
  m_infinity := 1/(1 + exp(-(V_s + 35)/6.2));
  dendritic_compartment_I_L := dendritic_compartment_g_L*(V_D - dendritic_compartment_V_L);
  dendritic_compartment_I_pump := dendritic_compartment_R_pump*(dendritic_compartment_phi_Na - dendritic_compartment_phi_Na_eq);
  dendritic_compartment_phi_Na := dendritic_compartment_Na^3/(dendritic_compartment_Na^3 + dendritic_compartment_K_p^3);
  dendritic_compartment_phi_Na_eq := dendritic_compartment_Na_eq^3/(dendritic_compartment_Na_eq^3 + dendritic_compartment_K_p^3);
  dendritic_compartment_I_NMDA := dendritic_compartment_g_NMDA/(1 + dendritic_compartment_Mg_o/dendritic_compartment_K_Mg*exp(-V_D/dendritic_compartment_q))*(V_D - dendritic_compartment_V_NMDA);
  dendritic_compartment_I_Na_NMDA := dendritic_compartment_g_Na_NMDA/(1 + dendritic_compartment_Mg_o/dendritic_compartment_K_Mg*exp(-V_D/dendritic_compartment_q))*(V_D - V_Na);
  dendritic_compartment_I_D := dendritic_compartment_I_NMDA + dendritic_compartment_I_pump + dendritic_compartment_I_L;
  dendritic_compartment_I_Ca_L := dendritic_compartment_g_Ca_L*(V_D - V_Ca)*m_L^2;
  dendritic_compartment_I_K_DR_D := dendritic_compartment_g_K_DR_D*(V_D - V_K)*n^2;
  m_T_infinity := 1/(1 + exp(-(V_s + 55)/7));
  h_T_infinity := 1/(1 + exp((V_s + 81)/11));
  a_infinity := 1/(1 + exp(-(V_s + 60)/10));
  b_infinity := 1/(1 + exp((V_s + 70)/5.7));
  m_h_infinity := 1/(1 + exp((V_s + 80)/8));
  gating_variables_m_L_infinity := 1/(1 + exp(-(V_D + 20)/5.3));
  gating_variables_n_infinity := 1/(1 + exp(-(V_s + 31)/5.3));
  gating_variables_h_infinity := 1/(1 + exp((V_s + 30)/8.3));
  gating_variables_tau_h := 0.4*(1 + 2/(1 + exp((V_s + 25)/5)));
  gating_variables_tau_n := 0.8*(1 + 2/(1 + exp((V_s + 25)/10)))/(1 + exp(-(V_s + 70)/10));
  gating_variables_tau_m_T := 1;
  gating_variables_tau_h_T := 10;
  gating_variables_tau_m_L := 0.4/(5*exp(-(V_D + 11)/8.3) + (-(V_D + 11)/8.3/(exp(-(V_D + 11)/8.3) - 1)));
  gating_variables_tau_a := 0.5;
  gating_variables_tau_b := 10;
  gating_variables_tau_m_h := 190;

  // Rate rules:
  V_s' = (soma_compartment_I_APP - soma_compartment_I_Na_s - soma_compartment_I_Ca_T - soma_compartment_I_K_DR_s - soma_compartment_I_K_Ca - soma_compartment_I_A - soma_compartment_I_h - g_c/p*(V_s - V_D))/C_m;
  soma_compartment_Ca' = -(soma_compartment_beta*soma_compartment_I_Ca_T + soma_compartment_k_Ca*soma_compartment_Ca);
  n' = (gating_variables_n_infinity - n)/gating_variables_tau_n;
  h' = (gating_variables_h_infinity - h)/gating_variables_tau_h;
  V_D' = (-dendritic_compartment_I_Ca_L - dendritic_compartment_I_K_DR_D - dendritic_compartment_I_NMDA - dendritic_compartment_I_pump - dendritic_compartment_I_L - g_c/(1 - p)*(V_s - V_D))/C_m;
  m_T' = (m_T_infinity - m_T)/gating_variables_tau_m_T;
  h_T' = (h_T_infinity - h_T)/gating_variables_tau_h_T;
  a' = (a_infinity - a)/gating_variables_tau_a;
  b' = (b_infinity - b)/gating_variables_tau_b;
  m_h' = (m_h_infinity - m_h)/gating_variables_tau_m_h;
  dendritic_compartment_Na' = dendritic_compartment_alpha*(-dendritic_compartment_I_Na_NMDA - dendritic_compartment_I_pump*3);
  m_L' = (gating_variables_m_L_infinity - m_L)/gating_variables_tau_m_L;
end
