// SBML level 2 version 4

model lindblad_murphey_clark_giles_1996____main()
  // Originally created by libAntimony v1.3 (using libSBML 4.1.0-b2)

  // Compartments:
  compartment default_compartment = 1;

  // Parameters:
  V = -69.83663;
  R = 8314.472;
  T = 308;
  F = 96485.3415;
  membrane_Cm = 5e-5;
  membrane_stim_start = 0.1;
  membrane_stim_end = 100000;
  membrane_stim_period = 1;
  membrane_stim_duration = 0.0008;
  membrane_stim_amplitude = -2;
  sodium_current_P_Na = 1.4e-6;
  Na_c = 140;
  Na_i = 8.4;
  m = 0.01309;
  h1 = 0.706;
  h2 = 0.61493;
  L_type_Ca_channel_g_Ca_L = 0.004;
  L_type_Ca_channel_E_Ca_app = 60;
  d_L = 3e-5;
  f_L = 0.99981;
  T_type_Ca_channel_g_Ca_T = 0.006;
  T_type_Ca_channel_E_Ca_T = 38;
  d_T = 0.00046;
  f_T = 0.30752;
  Ca_independent_transient_outward_K_current_g_to = 0.050002;
  K_c = 5;
  K_i = 100;
  r = 6e-5;
  s1 = 0.5753;
  s2 = 0.39871;
  s3 = 0.57363;
  delayed_rectifier_K_current_g_Ks = 0.0025;
  delayed_rectifier_K_current_g_Kr = 0.0035;
  z = 0.02032;
  p_a = 0.00016;
  p_i = 0.76898;
  inward_rectifier_g_K1 = 0.005088;
  inward_rectifier_KmK1 = 0.59;
  inward_rectifier_steepK1 = 1.393;
  inward_rectifier_shiftK1 = -3.6;
  background_currents_g_B_Na = 6.4e-5;
  background_currents_g_B_Ca = 3.1e-5;
  background_currents_g_B_Cl = 0.00012;
  Ca_c = 2.5;
  Ca_i = 7.305e-5;
  Cl_c = 132;
  Cl_i = 30;
  sodium_potassium_pump_k_NaK_K = 1;
  sodium_potassium_pump_k_NaK_Na = 11;
  sodium_potassium_pump_i_NaK_max = 0.06441;
  sarcolemmal_calcium_pump_current_i_CaP_max = 0.009509;
  sarcolemmal_calcium_pump_current_k_CaP = 0.0002;
  Na_Ca_ion_exchanger_current_k_NaCa = 2e-5;
  Na_Ca_ion_exchanger_current_d_NaCa = 0.0003;
  Na_Ca_ion_exchanger_current_gamma = 0.45;
  Vol_i = 1.26e-5;
  intracellular_ion_concentrations_Vol_Ca = 5.884e-6;
  intracellular_Ca_buffering_O_C = 0.02981;
  intracellular_Ca_buffering_O_TC = 0.01442;
  intracellular_Ca_buffering_O_TMgC = 0.23532;
  O_TMgMg = 0.67476;
  intracellular_Ca_buffering_Mg_i = 2.5;
  Ca_handling_by_the_SR_I_up_max = 2.8;
  Ca_handling_by_the_SR_k_cyca = 0.0003;
  Ca_handling_by_the_SR_k_srca = 0.5;
  Ca_handling_by_the_SR_k_xcs = 0.4;
  Ca_handling_by_the_SR_alpha_rel = 200;
  Ca_handling_by_the_SR_Ca_rel = 0.59984;
  Ca_handling_by_the_SR_Ca_up = 0.64913;
  Ca_handling_by_the_SR_Vol_up = 3.969e-7;
  Ca_handling_by_the_SR_Vol_rel = 4.41e-8;
  Ca_handling_by_the_SR_O_Calse = 0.41837;
  Ca_handling_by_the_SR_F1 = 0.21603;
  Ca_handling_by_the_SR_F2 = 0.00205;
  Ca_handling_by_the_SR_F3 = 0.68492;
  Ca_handling_by_the_SR_tau_tr = 0.01;
  Ca_handling_by_the_SR_k_rel = 0.0003;
  Ca_handling_by_the_SR_k_F3 = 0.815;
  time_ = ;
  Ca_handling_by_the_SR_d = ;

  // Assignment rules:
  i_Na := sodium_current_P_Na*m^3*(0.635*h1 + 0.365*h2)*Na_c*V*F^2/(R*T)*(exp((V - E_Na)*F/(R*T)) - 1)/(exp(V*F/(R*T)) - 1);
  i_Ca_L := L_type_Ca_channel_g_Ca_L*d_L*f_L*L_type_Ca_channel_d_prime*(V - L_type_Ca_channel_E_Ca_app);
  i_Ca_T := T_type_Ca_channel_g_Ca_T*d_T*f_T*(V - T_type_Ca_channel_E_Ca_T);
  i_to := Ca_independent_transient_outward_K_current_g_to*r*(0.59*s1^3 + 0.41*s2^3)*(0.6*s3^6 + 0.4)*(V - E_K);
  i_K1 := inward_rectifier_g_K1*(V - E_K)*(K_c/(K_c + inward_rectifier_KmK1))^3*1/(1 + exp(inward_rectifier_steepK1*F*(V - E_K - inward_rectifier_shiftK1)/(R*T)));
  i_Kr := delayed_rectifier_K_current_g_Kr*p_a*p_i*(V - E_K);
  i_Ks := delayed_rectifier_K_current_g_Ks*z*(V - E_K);
  i_B_Na := background_currents_g_B_Na*(V - E_Na);
  i_B_Ca := background_currents_g_B_Ca*(V - background_currents_E_Ca);
  i_B_Cl := background_currents_g_B_Cl*(V - background_currents_E_B_Cl)*(1 + exp((V - (background_currents_E_Cl + 36.95))/74.514));
  i_p := sodium_potassium_pump_i_NaK_max*K_c/(K_c + sodium_potassium_pump_k_NaK_K)*Na_i^1.5/(Na_i^1.5 + sodium_potassium_pump_k_NaK_Na^1.5)*1.6/(1.5 + exp((V + 60)/(-40)));
  i_CaP := sarcolemmal_calcium_pump_current_i_CaP_max*Ca_i/(Ca_i + sarcolemmal_calcium_pump_current_k_CaP);
  i_NaCa := Na_Ca_ion_exchanger_current_k_NaCa*(Na_i^3*Ca_c*exp(Na_Ca_ion_exchanger_current_gamma*F*V/(R*T)) - Na_c^3*Ca_i*exp((Na_Ca_ion_exchanger_current_gamma - 1)*V*F/(R*T)))/(1 + Na_Ca_ion_exchanger_current_d_NaCa*(Na_c^3*Ca_i + Na_i^3*Ca_c)*(1 + Ca_i/0.0069));
  membrane_i_Stim := ;
  E_Na := R*T/F*ln(Na_c/Na_i);
  sodium_current_sodium_current_m_gate_E0_m := V + 44.4;
  sodium_current_sodium_current_m_gate_alpha_m := -460*sodium_current_sodium_current_m_gate_E0_m/(exp(sodium_current_sodium_current_m_gate_E0_m/(-12.673)) - 1);
  sodium_current_sodium_current_m_gate_beta_m := 18400*exp(sodium_current_sodium_current_m_gate_E0_m/(-12.673));
  sodium_current_sodium_current_h1_gate_alpha_h := 44.9*exp((V + 66.9)/(-5.57));
  sodium_current_sodium_current_h1_gate_beta_h := 1491/(1 + 323.3*exp((V + 94.6)/(-12.9)));
  sodium_current_h_infinity := sodium_current_sodium_current_h1_gate_alpha_h/(sodium_current_sodium_current_h1_gate_alpha_h + sodium_current_sodium_current_h1_gate_beta_h);
  sodium_current_sodium_current_h1_gate_tau_h1 := 0.03/(1 + exp((V + 40)/6)) + 3.5e-4;
  sodium_current_sodium_current_h2_gate_tau_h2 := 0.12/(1 + exp((V + 60)/2)) + 0.00295;
  L_type_Ca_channel_d_prime := 1/(1 + exp((V - 33)/(-12)));
  L_type_Ca_channel_L_type_Ca_channel_d_L_gate_E0_alpha_d_L := V + 35;
  L_type_Ca_channel_L_type_Ca_channel_d_L_gate_E0_beta_d_L := V - 5;
  L_type_Ca_channel_L_type_Ca_channel_d_L_gate_alpha_d_L := -16.72*L_type_Ca_channel_L_type_Ca_channel_d_L_gate_E0_alpha_d_L/(exp(L_type_Ca_channel_L_type_Ca_channel_d_L_gate_E0_alpha_d_L/(-2.5)) - 1) + (-50*V/(exp(V/(-4.808)) - 1));
  L_type_Ca_channel_L_type_Ca_channel_d_L_gate_beta_d_L := 4.48*L_type_Ca_channel_L_type_Ca_channel_d_L_gate_E0_beta_d_L/(exp(L_type_Ca_channel_L_type_Ca_channel_d_L_gate_E0_beta_d_L/2.5) - 1);
  L_type_Ca_channel_L_type_Ca_channel_d_L_gate_d_L_infinity := 1/(1 + exp((V + 0.95)/(-6.6)));
  L_type_Ca_channel_L_type_Ca_channel_d_L_gate_tau_d_L := 1/(L_type_Ca_channel_L_type_Ca_channel_d_L_gate_alpha_d_L + L_type_Ca_channel_L_type_Ca_channel_d_L_gate_beta_d_L);
  L_type_Ca_channel_L_type_Ca_channel_f_L_gate_E0_f_L := V + 28;
  L_type_Ca_channel_L_type_Ca_channel_f_L_gate_alpha_f_L := 8.49*L_type_Ca_channel_L_type_Ca_channel_f_L_gate_E0_f_L/(exp(L_type_Ca_channel_L_type_Ca_channel_f_L_gate_E0_f_L/4) - 1);
  L_type_Ca_channel_L_type_Ca_channel_f_L_gate_beta_f_L := 67.922/(1 + exp(L_type_Ca_channel_L_type_Ca_channel_f_L_gate_E0_f_L/(-4)));
  L_type_Ca_channel_f_L_infinity := L_type_Ca_channel_L_type_Ca_channel_f_L_gate_alpha_f_L/(L_type_Ca_channel_L_type_Ca_channel_f_L_gate_alpha_f_L + L_type_Ca_channel_L_type_Ca_channel_f_L_gate_beta_f_L);
  L_type_Ca_channel_L_type_Ca_channel_f_L_gate_x_f := (V + 37.427)/20.213;
  L_type_Ca_channel_L_type_Ca_channel_f_L_gate_tau_f_L := 0.211*exp(-L_type_Ca_channel_L_type_Ca_channel_f_L_gate_x_f*L_type_Ca_channel_L_type_Ca_channel_f_L_gate_x_f) + 0.015;
  T_type_Ca_channel_T_type_Ca_channel_d_T_gate_E0_d_T := V + 23;
  T_type_Ca_channel_T_type_Ca_channel_d_T_gate_alpha_d_T := 674.173*exp(T_type_Ca_channel_T_type_Ca_channel_d_T_gate_E0_d_T/30);
  T_type_Ca_channel_T_type_Ca_channel_d_T_gate_beta_d_T := 674.173*exp(T_type_Ca_channel_T_type_Ca_channel_d_T_gate_E0_d_T/(-30));
  T_type_Ca_channel_T_type_Ca_channel_d_T_gate_d_T_infinity := 1/(1 + exp(T_type_Ca_channel_T_type_Ca_channel_d_T_gate_E0_d_T/(-6.1)));
  T_type_Ca_channel_T_type_Ca_channel_d_T_gate_tau_d_T := 1/(T_type_Ca_channel_T_type_Ca_channel_d_T_gate_alpha_d_T + T_type_Ca_channel_T_type_Ca_channel_d_T_gate_beta_d_T);
  T_type_Ca_channel_T_type_Ca_channel_f_T_gate_E0_f_T := V + 75;
  T_type_Ca_channel_T_type_Ca_channel_f_T_gate_alpha_f_T := 9.637*exp(T_type_Ca_channel_T_type_Ca_channel_f_T_gate_E0_f_T/(-83.333));
  T_type_Ca_channel_T_type_Ca_channel_f_T_gate_beta_f_T := 9.637*exp(T_type_Ca_channel_T_type_Ca_channel_f_T_gate_E0_f_T/15.385);
  T_type_Ca_channel_f_T_infinity := T_type_Ca_channel_T_type_Ca_channel_f_T_gate_alpha_f_T/(T_type_Ca_channel_T_type_Ca_channel_f_T_gate_alpha_f_T + T_type_Ca_channel_T_type_Ca_channel_f_T_gate_beta_f_T);
  T_type_Ca_channel_T_type_Ca_channel_f_T_gate_tau_f_T := 1/(T_type_Ca_channel_T_type_Ca_channel_f_T_gate_alpha_f_T + T_type_Ca_channel_T_type_Ca_channel_f_T_gate_beta_f_T);
  E_K := R*T/F*ln(K_c/K_i);
  Ca_independent_transient_outward_K_current_Ca_independent_transient_outward_K_current_r_gate_alpha_r := 386.6*exp(V/12);
  Ca_independent_transient_outward_K_current_Ca_independent_transient_outward_K_current_r_gate_beta_r := 8.011*exp(V/(-7.2));
  Ca_independent_transient_outward_K_current_Ca_independent_transient_outward_K_current_r_gate_tau_r := 1/(Ca_independent_transient_outward_K_current_Ca_independent_transient_outward_K_current_r_gate_alpha_r + Ca_independent_transient_outward_K_current_Ca_independent_transient_outward_K_current_r_gate_beta_r) + 4e-4;
  Ca_independent_transient_outward_K_current_Ca_independent_transient_outward_K_current_r_gate_r_infinity := 1/(1 + exp((V + 15)/(-5.633)));
  Ca_independent_transient_outward_K_current_Ca_independent_transient_outward_K_current_s1_gate_tau_s1 := 0.5466/(1 + exp((V + 32.8)/0.1)) + 0.0204;
  Ca_independent_transient_outward_K_current_Ca_independent_transient_outward_K_current_s1_gate_s1_infinity := 1/(1 + exp((V + 28.29)/7.06));
  Ca_independent_transient_outward_K_current_Ca_independent_transient_outward_K_current_s2_gate_tau_s2 := 5.75/(1 + exp((V + 32.8)/0.1)) + 0.45/(1 + exp((V - 13.54)/(-13.97)));
  Ca_independent_transient_outward_K_current_Ca_independent_transient_outward_K_current_s2_gate_s2_infinity := 1/(1 + exp((V + 28.29)/7.06));
  Ca_independent_transient_outward_K_current_Ca_independent_transient_outward_K_current_s3_gate_tau_s3 := 7.5/(1 + exp((V + 23)/0.5)) + 0.5;
  Ca_independent_transient_outward_K_current_Ca_independent_transient_outward_K_current_s3_gate_s3_infinity := (1/(1 + exp((V + 50.67)/27.38)) + 0.666)/1.666;
  delayed_rectifier_K_current_delayed_rectifier_K_current_z_gate_alpha_z := 1.66*exp(V/69.452);
  delayed_rectifier_K_current_delayed_rectifier_K_current_z_gate_beta_z := 0.3*exp(V/(-21.826));
  delayed_rectifier_K_current_delayed_rectifier_K_current_z_gate_tau_z := 1/(delayed_rectifier_K_current_delayed_rectifier_K_current_z_gate_alpha_z + delayed_rectifier_K_current_delayed_rectifier_K_current_z_gate_beta_z) + 0.06;
  delayed_rectifier_K_current_delayed_rectifier_K_current_z_gate_z_infinity := 1/(1 + exp((V - 0.9)/(-13.8)));
  delayed_rectifier_K_current_delayed_rectifier_K_current_pa_gate_alpha_p_a := 9*exp(V/25.371);
  delayed_rectifier_K_current_delayed_rectifier_K_current_pa_gate_beta_p_a := 1.3*exp(V/(-13.026));
  delayed_rectifier_K_current_delayed_rectifier_K_current_pa_gate_tau_p_a := 1/(delayed_rectifier_K_current_delayed_rectifier_K_current_pa_gate_alpha_p_a + delayed_rectifier_K_current_delayed_rectifier_K_current_pa_gate_beta_p_a);
  delayed_rectifier_K_current_delayed_rectifier_K_current_pa_gate_p_a_infinity := 1/(1 + exp((V + 5.1)/(-7.4)));
  delayed_rectifier_K_current_delayed_rectifier_K_current_pi_gate_alpha_p_i := 100*exp(V/(-54.645));
  delayed_rectifier_K_current_delayed_rectifier_K_current_pi_gate_beta_p_i := 656*exp(V/106.157);
  delayed_rectifier_K_current_delayed_rectifier_K_current_pi_gate_tau_p_i := 1/(delayed_rectifier_K_current_delayed_rectifier_K_current_pi_gate_alpha_p_i + delayed_rectifier_K_current_delayed_rectifier_K_current_pi_gate_beta_p_i);
  delayed_rectifier_K_current_delayed_rectifier_K_current_pi_gate_p_i_infinity := 1/(1 + exp((V + 47.3921)/18.6603));
  background_currents_E_Ca := R*T/(2*F)*ln(Ca_c/Ca_i);
  background_currents_E_Cl := R*T/F*ln(Cl_i/Cl_c);
  background_currents_E_B_Cl := background_currents_E_Cl - 0.49*(background_currents_E_Cl + 30.59);
  i_up := Ca_handling_by_the_SR_I_up_max*(Ca_i/Ca_handling_by_the_SR_k_cyca - Ca_handling_by_the_SR_k_xcs^2*Ca_handling_by_the_SR_Ca_up/Ca_handling_by_the_SR_k_srca)/((Ca_i + Ca_handling_by_the_SR_k_cyca)/Ca_handling_by_the_SR_k_cyca + Ca_handling_by_the_SR_k_xcs*(Ca_handling_by_the_SR_Ca_up + Ca_handling_by_the_SR_k_srca)/Ca_handling_by_the_SR_k_srca);
  i_rel := Ca_handling_by_the_SR_alpha_rel*(Ca_handling_by_the_SR_F2/(Ca_handling_by_the_SR_F2 + 0.25))^2*(Ca_handling_by_the_SR_Ca_rel - Ca_i);
  dOCdt := 200000*Ca_i*(1 - intracellular_Ca_buffering_O_C) - 476*intracellular_Ca_buffering_O_C;
  dOTCdt := 78400*Ca_i*(1 - intracellular_Ca_buffering_O_TC) - 392*intracellular_Ca_buffering_O_TC;
  dOTMgCdt := 200000*Ca_i*(1 - intracellular_Ca_buffering_O_TMgC - O_TMgMg) - 6.6*intracellular_Ca_buffering_O_TMgC;
  Ca_handling_by_the_SR_i_tr := (Ca_handling_by_the_SR_Ca_up - Ca_handling_by_the_SR_Ca_rel)*2*F*Ca_handling_by_the_SR_Vol_rel/Ca_handling_by_the_SR_tau_tr;
  Ca_handling_by_the_SR_r_act := 203.8*exp(0.08*(V - 40)) + 203.8*(Ca_i/(Ca_i + Ca_handling_by_the_SR_k_rel))^4;
  Ca_handling_by_the_SR_r_inact := 33.96 + 339.6*(Ca_i/(Ca_i + Ca_handling_by_the_SR_k_rel))^4;

  // Rate rules:
  V' = -1/membrane_Cm*(i_Kr + i_Ks + i_Na + i_Ca_L + i_Ca_T + i_to + i_K1 + i_B_Na + i_B_Ca + i_B_Cl + i_p + i_CaP + i_NaCa + membrane_i_Stim);
  Na_i' = -(i_Na + i_B_Na + 3*i_p + 3*i_NaCa)/(Vol_i*F);
  m' = sodium_current_sodium_current_m_gate_alpha_m*(1 - m) - sodium_current_sodium_current_m_gate_beta_m*m;
  h1' = (sodium_current_h_infinity - h1)/sodium_current_sodium_current_h1_gate_tau_h1;
  h2' = (sodium_current_h_infinity - h2)/sodium_current_sodium_current_h2_gate_tau_h2;
  d_L' = (L_type_Ca_channel_L_type_Ca_channel_d_L_gate_d_L_infinity - d_L)/L_type_Ca_channel_L_type_Ca_channel_d_L_gate_tau_d_L;
  f_L' = (L_type_Ca_channel_f_L_infinity - f_L)/L_type_Ca_channel_L_type_Ca_channel_f_L_gate_tau_f_L;
  d_T' = (T_type_Ca_channel_T_type_Ca_channel_d_T_gate_d_T_infinity - d_T)/T_type_Ca_channel_T_type_Ca_channel_d_T_gate_tau_d_T;
  f_T' = (T_type_Ca_channel_f_T_infinity - f_T)/T_type_Ca_channel_T_type_Ca_channel_f_T_gate_tau_f_T;
  K_i' = -(i_to + i_K1 + i_Kr + i_Ks - 2*i_p)/(Vol_i*F);
  r' = (Ca_independent_transient_outward_K_current_Ca_independent_transient_outward_K_current_r_gate_r_infinity - r)/Ca_independent_transient_outward_K_current_Ca_independent_transient_outward_K_current_r_gate_tau_r;
  s1' = (Ca_independent_transient_outward_K_current_Ca_independent_transient_outward_K_current_s1_gate_s1_infinity - s1)/Ca_independent_transient_outward_K_current_Ca_independent_transient_outward_K_current_s1_gate_tau_s1;
  s2' = (Ca_independent_transient_outward_K_current_Ca_independent_transient_outward_K_current_s2_gate_s2_infinity - s2)/Ca_independent_transient_outward_K_current_Ca_independent_transient_outward_K_current_s2_gate_tau_s2;
  s3' = (Ca_independent_transient_outward_K_current_Ca_independent_transient_outward_K_current_s3_gate_s3_infinity - s3)/Ca_independent_transient_outward_K_current_Ca_independent_transient_outward_K_current_s3_gate_tau_s3;
  z' = (delayed_rectifier_K_current_delayed_rectifier_K_current_z_gate_z_infinity - z)/delayed_rectifier_K_current_delayed_rectifier_K_current_z_gate_tau_z;
  p_a' = (delayed_rectifier_K_current_delayed_rectifier_K_current_pa_gate_p_a_infinity - p_a)/delayed_rectifier_K_current_delayed_rectifier_K_current_pa_gate_tau_p_a;
  p_i' = (delayed_rectifier_K_current_delayed_rectifier_K_current_pi_gate_p_i_infinity - p_i)/delayed_rectifier_K_current_delayed_rectifier_K_current_pi_gate_tau_p_i;
  Ca_i' = -(i_Ca_L + i_Ca_T + i_B_Ca + i_CaP - 2*i_NaCa + i_up - i_rel)/(2*intracellular_ion_concentrations_Vol_Ca*F) - (0.08*dOTCdt + 0.16*dOTMgCdt + 0.045*dOCdt);
  intracellular_Ca_buffering_O_C' = dOCdt;
  intracellular_Ca_buffering_O_TC' = dOTCdt;
  intracellular_Ca_buffering_O_TMgC' = dOTMgCdt;
  O_TMgMg' = 2000*intracellular_Ca_buffering_Mg_i*(1 - intracellular_Ca_buffering_O_TMgC - O_TMgMg) - 666*O_TMgMg;
  Ca_handling_by_the_SR_Ca_rel' = (Ca_handling_by_the_SR_i_tr - i_rel)/(2*Ca_handling_by_the_SR_Vol_rel*F) - 31*Ca_handling_by_the_SR_d(Ca_handling_by_the_SR_O_Calse)/Ca_handling_by_the_SR_d(time_);
  Ca_handling_by_the_SR_Ca_up' = (i_up - Ca_handling_by_the_SR_i_tr)/(2*Ca_handling_by_the_SR_Vol_up*F);
  Ca_handling_by_the_SR_O_Calse' = 480*Ca_handling_by_the_SR_Ca_rel*(1 - Ca_handling_by_the_SR_O_Calse) - 400*Ca_handling_by_the_SR_O_Calse;
  Ca_handling_by_the_SR_F1' = Ca_handling_by_the_SR_k_F3*Ca_handling_by_the_SR_F3 - Ca_handling_by_the_SR_r_act*Ca_handling_by_the_SR_F1;
  Ca_handling_by_the_SR_F2' = Ca_handling_by_the_SR_r_act*Ca_handling_by_the_SR_F1 - Ca_handling_by_the_SR_r_inact*Ca_handling_by_the_SR_F2;
  Ca_handling_by_the_SR_F3' = Ca_handling_by_the_SR_F2*Ca_handling_by_the_SR_r_inact - Ca_handling_by_the_SR_k_F3*Ca_handling_by_the_SR_F3;
end
