// SBML level 2 version 4

model liu_model_1999____main()
  // Originally created by libAntimony v1.3 (using libSBML 4.1.0-b2)

  // Compartments:
  compartment default_compartment = 1;

  // Parameters:
  x10 = 0.01067;
  lambda_1 = 0.059;
  x30 = 6.51;
  a1 = 1.7e-5;
  a2 = 0.0023;
  a3 = 0.6;
  a4 = 45;
  a5 = 36;
  a6 = 216;
  a7 = 0.28;
  a8 = 0.36;
  x20 = 0.04665;
  lambda_2 = 0.028;
  a9 = 0.0003;
  a10 = 0.18;
  a11 = 150;
  a12 = 18;
  a13 = 460;
  a14 = 0.46;
  a15 = 0.1;
  x40 = 60.61;
  x50 = 12.61;
  a16 = 0.04;
  a17 = 150;
  a18 = 3800;
  a19 = 57;
  a20 = 2600;
  a21 = 200;
  a22 = 9400;
  a23 = 10;
  a24 = 320;
  a25 = 0.04;
  a26 = 0.00097;
  a27 = 0.57;
  a28 = 0.0017;
  model_parameters_lambda_3 = 0.0986;
  model_parameters_lambda_4 = 0.024;
  model_parameters_lambda_5 = 3e-5;
  time_ = ;

  // Assignment rules:
  lambda_3_ := model_parameters_lambda_3 + a27 + a28;
  lambda_4_ := model_parameters_lambda_4 + a25;
  lambda_5_ := model_parameters_lambda_5 + a26;

  // Rate rules:
  x10' = a1 + (a2 + a3*x10 + a4*x10^2)/(1 + a5*x10 + a6*x10^2 + a7*x30 + a8*x30^2) - lambda_1*x10;
  x30' = a16 + (a17*x10 + a18*x10^2 + a19*x20 + a20*x20^2)/(1 + a21*x10 + a22*x10^2 + a23*x20 + a24*x20^2) + a25*x40 + a26*x50 - lambda_3_*x30;
  x20' = (a9 + a10*x10 + a11*x10^2)/(1 + a12*x10 + a13*x10^2 + a14*x30 + a15*x30^2) - lambda_2*x20;
  x40' = a27*x30 - lambda_4_*x40;
  x50' = a28*x30 - lambda_5_*x50;
end
