// SBML level 2 version 4

model LivshitzRudy2007____main()
  // Originally created by libAntimony v1.3 (using libSBML 4.1.0-b2)

  // Compartments:
  compartment default_compartment = 1;

  // Parameters:
  F = 96485;
  Environment_R = 8314;
  Environment_Temp = 310;
  K_o = 4.5;
  Na_o = 140;
  Ca_o = 1.8;
  V = -89.4356;
  cell_l = 0.01;
  cell_ra = 0.0011;
  cell_stim_offset = 0;
  cell_stim_period = 400;
  cell_stim_duration = 3;
  cell_stim_amplitude = -15;
  INa_H = 0.9944014;
  INa_m = 0.0007347803;
  INa_J = 0.9961007;
  INa_GNa = 16;
  Na_i = 16.61274;
  K_i = 139.7309;
  ICaL_d = 3.251479e-27;
  ICaL_f = 0.9974049;
  ICaL_gacai = 1;
  ICaL_gacao = 0.341;
  ICaL_kmca = 0.0006;
  ICaL_pca = 0.00054;
  ICaL_pna = 6.75e-7;
  ICaL_ganai = 0.75;
  ICaL_ganao = 0.75;
  ICaL_pk = 1.93e-7;
  ICaL_gaki = 0.75;
  ICaL_gako = 0.75;
  IK1_GK1max = 0.75;
  IKr_gkrmax = 0.02614;
  IKr_xr = 0.0001621947;
  IKs_GKsmax = 0.433;
  IKs_xs1 = 0.02851473;
  IKs_xs2 = 0.0764114;
  INaK_kmnai = 10;
  INaK_kmko = 1.5;
  INaK_ibarnak = 2.25;
  INaCa_c1 = 0.00025;
  INaCa_c2 = 0.0001;
  INaCa_gammas = 0.15;
  IKp_GKpmax = 0.00552;
  IpCa_ibarpca = 1.15;
  IpCa_kmpca = 0.0005;
  ICab_gcab = 0.003016;
  INab_GNab = 0.004;
  ICaT_b = 0.0009274619;
  ICaT_g = 0.9528343;
  ICaT_gcat = 0.05;
  reversal_potentials_prnak = 0.01833;
  Ca_JSR_T = 7.873717;
  Rel = 1.068742e-23;
  Irel_K_Relss = 1;
  Irel_tau = 4.75;
  Irel_kappa = 0.125;
  Irel_qn = 9;
  Irel_kmcsqn = 0.8;
  Irel_csqnbar = 10;
  Ca_NSR = 2.715182;
  Iup_Ileak_kmup = 0.00092;
  Iup_Ileak_iupbar = 0.00875;
  Iup_Ileak_nsrbar = 15;
  Itr_tautr = 120;
  Ca_Ca_T = 0.02570598;
  Ca_Over = 1e-12;
  Ca_cmdnbar = 0.05;
  Ca_trpnbar = 0.07;
  Ca_kmcmdn = 0.00238;
  Ca_kmtrpn = 0.0005;
  time_ = ;

  // Assignment rules:
  FonRT := F/Environment_Temp/Environment_R;
  ilca := ICaL_d*ICaL_f*ICaL_fca*ICaL_ibarca;
  icab := ICab_gcab*(V - ln(Ca_o/Ca_i)/(2*FonRT));
  ipca := IpCa_ibarpca*Ca_i/(IpCa_kmpca + Ca_i);
  inaca := INaCa_c1*exp((INaCa_gammas - 1)*V*FonRT)*(exp(V*FonRT)*Na_i^3*Ca_o - Na_o^3*Ca_i)/(1 + INaCa_c2*exp((INaCa_gammas - 1)*V*FonRT)*(exp(V*FonRT)*Na_i^3*Ca_o + Na_o^3*Ca_i));
  icat := ICaT_gcat*ICaT_b*ICaT_b*ICaT_g*(V - ECa);
  ina := INa_GNa*INa_m*INa_m*INa_m*INa_H*INa_J*(V - ENa);
  inab := INab_GNab*(V - ENa);
  ilcana := ICaL_d*ICaL_f*ICaL_fca*ICaL_ibarna;
  inak := INaK_ibarnak*INaK_fnak/(1 + (INaK_kmnai/Na_i)^2)/(1 + INaK_kmko/K_o);
  ikr := IKr_gkrmax*sqrt(K_o/5.4)*IKr_xr*IKr_r*(V - EK);
  iks := IKs_gks*IKs_xs1*IKs_xs2*(V - EKs);
  IK10 := IK1_gK1*(V - EK);
  ikp := IKp_GKpmax*(V - EK)/(1 + exp((7.488 - V)/5.98));
  ilcak := ICaL_d*ICaL_f*ICaL_fca*ICaL_ibark;
  caiont := ilca + icab + ipca - 2*inaca + icat;
  naiont := ina + inab + 3*inaca + ilcana + 3*inak;
  kiont := ikr + iks + IK10 + ikp + ilcak - 2*inak + i_Stim;
  cell_vcell := 1000*pi*cell_ra*cell_ra*cell_l;
  cell_ageo := 2*pi*cell_ra*cell_ra + 2*pi*cell_ra*cell_l;
  cell_Acap := cell_ageo*2;
  AF := cell_Acap/F;
  vmyo := cell_vcell*0.68;
  cell_vmito := cell_vcell*0.24;
  cell_vsr := cell_vcell*0.06;
  vnsr := cell_vcell*0.0552;
  vjsr := cell_vcell*0.0048;
  cell_vss := cell_vcell*0.02;
  i_Stim := ;
  cell_past := floor(time_/cell_stim_period)*cell_stim_period;
  ENa := ln(Na_o/Na_i)/FonRT;
  INa_a := 1 - 1/(1 + exp(-(V + 40)/0.024));
  INa_aH := INa_a*0.135*exp((80 + V)/(-6.8));
  INa_bH := (1 - INa_a)/(0.13*(1 + exp((V + 10.66)/(-11.1)))) + INa_a*(3.56*exp(0.079*V) + 3.1*1e5*exp(0.35*V));
  INa_aj := INa_a*(-1.2714e5*exp(0.2444*V) - 3.474e-5*exp(-0.04391*V))*1*(V + 37.78)/(1 + exp(0.311*(V + 79.23)));
  INa_bj := (1 - INa_a)*0.3*exp(-2.535e-7*V)/(1 + exp(-0.1*(V + 32))) + INa_a*0.1212*exp(-0.01052*V)/(1 + exp(-0.1378*(V + 40.14)));
  INa_am := 0.32*1*(V + 47.13)/(1 - exp(-0.1*(V + 47.13)));
  INa_bm := 0.08*exp(-V/11);
  Ca_i := 2*sqrt(Ca_bmyo*Ca_bmyo - 3*Ca_cmyo)/3*cos(acos((9*Ca_bmyo*Ca_cmyo - 2*Ca_bmyo*Ca_bmyo*Ca_bmyo - 27*Ca_dmyo)/(2*(Ca_bmyo*Ca_bmyo - 3*Ca_cmyo)^1.5))/3) - Ca_bmyo/3;
  ICaL_dss0 := 1/(1 + exp(-(V + 10)/6.24));
  ICaL_taud := ICaL_dss0*1*(1 - exp(-(V + 10)/6.24))/(0.035*(V + 10));
  ICaL_dss1 := 1/(1 + exp(-(V + 60)/0.024));
  ICaL_dss := ICaL_dss0*ICaL_dss1;
  ICaL_fss := 1/(1 + exp((V + 32)/8)) + 0.6/(1 + exp((50 - V)/20));
  ICaL_tauf := 1/(0.0197*exp(-(0.0337*(V + 10))^2) + 0.02);
  ICaL_ibarca := ICaL_pca*4*V*F*FonRT*(ICaL_gacai*Ca_i*exp(2*V*FonRT) - ICaL_gacao*Ca_o)/(exp(2*V*FonRT) - 1);
  ICaL_ibarna := ICaL_pna*V*F*FonRT*(ICaL_ganai*Na_i*exp(V*FonRT) - ICaL_ganao*Na_o)/(exp(V*FonRT) - 1);
  ICaL_ibark := ICaL_pk*V*F*FonRT*(ICaL_gaki*K_i*exp(V*FonRT) - ICaL_gako*K_o)/(exp(V*FonRT) - 1);
  ICaL_fca := 1/(1 + Ca_i/ICaL_kmca);
  EK := ln(K_o/K_i)/FonRT;
  IK1_GK1_ := IK1_GK1max*sqrt(K_o/5.4);
  IK1_ak1 := 1.02/(1 + exp(0.2385*(V - EK - 59.215)));
  IK1_bk1 := (0.49124*exp(0.08032*(V - EK + 5.476)) + 1*exp(0.06175*(V - EK - 594.31)))/(1 + exp(-0.5143*(V - EK + 4.753)));
  IK1_gK1 := IK1_GK1_*IK1_ak1/(IK1_ak1 + IK1_bk1);
  IKr_r := 1/(1 + exp((V + 9)/22.4));
  IKr_xrss := 1/(1 + exp(-(V + 10.085)/4.25));
  IKr_tauxr := 1/(0.00138*(V + 14.2)/(1 - exp(-0.123*(V + 14.2))) + 0.00061*(V + 38.9)/(exp(0.145*(V + 38.9)) - 1));
  EKs := ln((K_o + reversal_potentials_prnak*Na_o)/(K_i + reversal_potentials_prnak*Na_i))/FonRT;
  IKs_gks := IKs_GKsmax*(1 + 0.6/(1 + (3.8e-5/Ca_i)^1.4));
  IKs_xss := 1/(1 + exp(-(V - 1.5)/16.7));
  IKs_tauxs := 1/(7.19e-5*(V + 30)/(1 - exp(-0.148*(V + 30))) + 0.000131*(V + 30)/(exp(0.0687*(V + 30)) - 1));
  INaK_fnak := 1/(1 + 0.1245*exp(-0.1*V*FonRT) + 0.0365*INaK_sigma*exp(-V*FonRT));
  INaK_sigma := (exp(Na_o/67.3) - 1)/7;
  ECa := ln(Ca_o/Ca_i)/2/FonRT;
  ICaT_bss := 1/(1 + exp(-(V + 14)/10.8));
  ICaT_taub := 3.7 + 6.1/(1 + exp((V + 25)/4.5));
  ICaT_gss := 1/(1 + exp((V + 60)/5.6));
  ICaT_aa := 1 - 1/(1 + exp(-V/0.0024));
  ICaT_taug := ICaT_aa*1*(-0.875*V + 12) + 12*(1 - ICaT_aa);
  Irel_Rel_ss := ilca*Irel_alpha_Rel/(1 + (Irel_K_Relss/Ca_JSR_free)^Irel_qn);
  Irel_tau_Rel := Irel_tau/(1 + 0.0123/Ca_JSR_free);
  Irel_alpha_Rel := Irel_tau*Irel_kappa;
  Ca_JSR_free := -Irel_bbb/2 + sqrt(Irel_bbb^2 + 4*Irel_c)/2;
  Irel_bbb := Irel_csqnbar + Irel_kmcsqn - Ca_JSR_T;
  Irel_c := Ca_JSR_T*Irel_kmcsqn;
  iup := Iup_Ileak_iupbar*Ca_i/(Ca_i + Iup_Ileak_kmup);
  ileak := Iup_Ileak_iupbar*Ca_NSR/Iup_Ileak_nsrbar;
  itr := (Ca_NSR - Ca_JSR_free)/Itr_tautr;
  Ca_bmyo := Ca_cmdnbar + Ca_trpnbar - Ca_Ca_T + Ca_kmtrpn + Ca_kmcmdn;
  Ca_cmyo := Ca_kmcmdn*Ca_kmtrpn - Ca_Ca_T*(Ca_kmtrpn + Ca_kmcmdn) + Ca_trpnbar*Ca_kmcmdn + Ca_cmdnbar*Ca_kmtrpn;
  Ca_dmyo := -Ca_kmtrpn*Ca_kmcmdn*Ca_Ca_T;

  // Rate rules:
  V' = -(naiont + kiont + caiont);
  INa_H' = INa_aH*(1 - INa_H) - INa_bH*INa_H;
  INa_m' = INa_am*(1 - INa_m) - INa_bm*INa_m;
  INa_J' = INa_aj*(1 - INa_J) - INa_bj*INa_J;
  Na_i' = -naiont*AF/vmyo;
  K_i' = -kiont*AF/vmyo;
  ICaL_d' = (ICaL_dss - ICaL_d)/ICaL_taud;
  ICaL_f' = (ICaL_fss - ICaL_f)/ICaL_tauf;
  IKr_xr' = (IKr_xrss - IKr_xr)/IKr_tauxr;
  IKs_xs1' = (IKs_xss - IKs_xs1)/IKs_tauxs;
  IKs_xs2' = (IKs_xss - IKs_xs2)/IKs_tauxs/4;
  ICaT_b' = (ICaT_bss - ICaT_b)/ICaT_taub;
  ICaT_g' = (ICaT_gss - ICaT_g)/ICaT_taug;
  Ca_JSR_T' = itr - Rel;
  Rel' = -(Irel_Rel_ss + Rel)/Irel_tau_Rel;
  Ca_NSR' = iup - itr*vjsr/vnsr - ileak;
  Ca_Ca_T' = -caiont*AF/(vmyo*2) + (ileak - iup)*vnsr/vmyo + Rel*vjsr/vmyo;
  Ca_Over' = 0;
end
