// SBML level 2 version 4

model lovell_cloherty_celler_dokos_2004_version01____main()
  // Originally created by libAntimony v1.4 (using libSBML 4.1.0-b2)

  // Compartments:
  compartment default_compartment = 1;

  // Parameters:
  Em = -6.395e1;
  membrane_Cm = 3.2e-2;
  R = 8.3144;
  T = 310.15;
  F = 96485;
  Nai = 8.004;
  Nao = 1.4e2;
  Cai = 1.275e-4;
  Cao = 2;
  Ki = 1.499e2;
  Ko = 5.389;
  Cli = 2.607e1;
  Clo = 1.4e2;
  L_type_calcium_current_g_CaL = 1.604e2;
  L_type_calcium_current_A_CaL = 4.564e-4;
  L_type_calcium_current_I1 = 9.601e-1;
  L_type_calcium_current_I2 = 5.261e-3;
  L_type_calcium_current_I3 = ;
  L_type_calcium_current_alpha3 = 1.395e5;
  L_type_calcium_current_alpha4 = 4.945;
  L_type_calcium_current_beta3 = 7.648;
  L_type_calcium_current_beta4 = 4.051e6;
  L_type_calcium_current_alpha1_0 = 1.115e2;
  L_type_calcium_current_alpha1_infinity = 2.451e3;
  L_type_calcium_current_alpha1_E50 = -3.116e1;
  L_type_calcium_current_alpha1_Eslope = 8.815;
  L_type_calcium_current_alpha2_0 = 9.622e1;
  L_type_calcium_current_alpha2_infinity = 1.409e1;
  L_type_calcium_current_alpha2_E50 = 3.116;
  L_type_calcium_current_alpha2_Eslope = 5.936;
  L_type_calcium_current_beta1_0 = 1.283e4;
  L_type_calcium_current_beta1_infinity = 4.701e3;
  L_type_calcium_current_beta1_E50 = -2.448e1;
  L_type_calcium_current_beta1_Eslope = 7.3;
  L_type_calcium_current_beta2_0 = 1.95e-1;
  L_type_calcium_current_beta2_infinity = 5.984e-2;
  L_type_calcium_current_beta2_E50 = 5.934;
  L_type_calcium_current_beta2_Eslope = 1.395e5;
  T_type_calcium_current_g_CaT = 6.816e2;
  T_type_calcium_current_A_CaT = 1.562e-5;
  T_type_calcium_current_I1 = 9.985e-1;
  T_type_calcium_current_I2 = ;
  T_type_calcium_current_alpha1_0 = 0;
  T_type_calcium_current_alpha1_infinity = 1.203e3;
  T_type_calcium_current_alpha1_E50 = -3.442e1;
  T_type_calcium_current_alpha1_Eslope = 6.143;
  T_type_calcium_current_alpha2_0 = 2.458e2;
  T_type_calcium_current_alpha2_infinity = 1.304e3;
  T_type_calcium_current_alpha2_E50 = -1.978e1;
  T_type_calcium_current_alpha2_Eslope = 1.26e1;
  T_type_calcium_current_alpha3_0 = 1.003e-1;
  T_type_calcium_current_alpha3_infinity = 1.157e-2;
  T_type_calcium_current_alpha3_E50 = 6.079;
  T_type_calcium_current_alpha3_Eslope = 4.938e-1;
  T_type_calcium_current_beta1_0 = 8.075e2;
  T_type_calcium_current_beta1_infinity = 9.663;
  T_type_calcium_current_beta1_E50 = -3.025e1;
  T_type_calcium_current_beta1_Eslope = 2.58e1;
  T_type_calcium_current_beta3_0 = 1.914;
  T_type_calcium_current_beta3_infinity = 4.49e2;
  T_type_calcium_current_beta3_E50 = -3.948e1;
  T_type_calcium_current_beta3_Eslope = 1.295e1;
  rapid_delayed_rectifying_potassium_current_g_Kr = 4.714;
  rapid_delayed_rectifying_potassium_current_PKNa_r = 3.042e-2;
  rapid_delayed_rectifying_potassium_current_A_Kr = 1.209e-1;
  rapid_delayed_rectifying_potassium_current_I1 = 1.991e-3;
  rapid_delayed_rectifying_potassium_current_I2 = 5.617e-2;
  rapid_delayed_rectifying_potassium_current_I3 = ;
  rapid_delayed_rectifying_potassium_current_alpha1_0 = 2.924e-1;
  rapid_delayed_rectifying_potassium_current_alpha1_infinity = 1.796;
  rapid_delayed_rectifying_potassium_current_alpha1_E50 = -2.821;
  rapid_delayed_rectifying_potassium_current_alpha1_Eslope = 1.591e1;
  rapid_delayed_rectifying_potassium_current_alpha2_0 = 8.011e-4;
  rapid_delayed_rectifying_potassium_current_alpha2_infinity = 2.815e1;
  rapid_delayed_rectifying_potassium_current_alpha2_E50 = 2.607e1;
  rapid_delayed_rectifying_potassium_current_alpha2_Eslope = 4.849;
  rapid_delayed_rectifying_potassium_current_alpha3_0 = 0;
  rapid_delayed_rectifying_potassium_current_alpha3_infinity = 1.382e1;
  rapid_delayed_rectifying_potassium_current_alpha3_E50 = -1.706;
  rapid_delayed_rectifying_potassium_current_alpha3_Eslope = 8.661;
  rapid_delayed_rectifying_potassium_current_alpha4_0 = 8.526e1;
  rapid_delayed_rectifying_potassium_current_alpha4_infinity = 5.84;
  rapid_delayed_rectifying_potassium_current_alpha4_E50 = 1.663e1;
  rapid_delayed_rectifying_potassium_current_alpha4_Eslope = 1.906e1;
  rapid_delayed_rectifying_potassium_current_beta1_0 = 1.161e-1;
  rapid_delayed_rectifying_potassium_current_beta1_infinity = 5.201e1;
  rapid_delayed_rectifying_potassium_current_beta1_E50 = -6.477;
  rapid_delayed_rectifying_potassium_current_beta1_Eslope = 1.149e1;
  rapid_delayed_rectifying_potassium_current_beta4_0 = 5.728;
  rapid_delayed_rectifying_potassium_current_beta4_infinity = 5.372e2;
  rapid_delayed_rectifying_potassium_current_beta4_E50 = 4.594e1;
  rapid_delayed_rectifying_potassium_current_beta4_Eslope = 4.646;
  slow_delayed_rectifying_potassium_current_g_Ks = 1.328e1;
  slow_delayed_rectifying_potassium_current_PKNa_s = 3.053e-2;
  slow_delayed_rectifying_potassium_current_A_Ks = 5.049e-3;
  slow_delayed_rectifying_potassium_current_I1 = 9.921e-1;
  slow_delayed_rectifying_potassium_current_I2 = ;
  slow_delayed_rectifying_potassium_current_alpha1_0 = 1.455;
  slow_delayed_rectifying_potassium_current_alpha1_infinity = 1.59e1;
  slow_delayed_rectifying_potassium_current_alpha1_E50 = 3.403e1;
  slow_delayed_rectifying_potassium_current_alpha1_Eslope = 9.464;
  slow_delayed_rectifying_potassium_current_alpha2_0 = 7.619e-1;
  slow_delayed_rectifying_potassium_current_alpha2_infinity = 7.207e-2;
  slow_delayed_rectifying_potassium_current_alpha2_E50 = 1.021e1;
  slow_delayed_rectifying_potassium_current_alpha2_Eslope = 2.584;
  slow_delayed_rectifying_potassium_current_alpha3_0 = 0;
  slow_delayed_rectifying_potassium_current_alpha3_infinity = 1.69e1;
  slow_delayed_rectifying_potassium_current_alpha3_E50 = 4.216e1;
  slow_delayed_rectifying_potassium_current_alpha3_Eslope = 8.481;
  slow_delayed_rectifying_potassium_current_beta1_0 = 3.628e-3;
  slow_delayed_rectifying_potassium_current_beta1_infinity = 4.191;
  slow_delayed_rectifying_potassium_current_beta1_E50 = 2.231e1;
  slow_delayed_rectifying_potassium_current_beta1_Eslope = 1.063e1;
  slow_delayed_rectifying_potassium_current_beta3_0 = 1.772;
  slow_delayed_rectifying_potassium_current_beta3_infinity = 4.141e-1;
  slow_delayed_rectifying_potassium_current_beta3_E50 = 9.822;
  slow_delayed_rectifying_potassium_current_beta3_Eslope = 1.28e1;
  g_Na = 2.889;
  TTX_sensitive_sodium_current_A_Na = 5.586e-4;
  TTX_sensitive_sodium_current_I1 = 3.75e-1;
  TTX_sensitive_sodium_current_I2 = 1.039e-1;
  TTX_sensitive_sodium_current_I3 = ;
  TTX_sensitive_sodium_current_alpha1_0 = 1.022e-31;
  TTX_sensitive_sodium_current_alpha1_infinity = 4.355e5;
  TTX_sensitive_sodium_current_alpha1_E50 = -3.808e1;
  TTX_sensitive_sodium_current_alpha1_Eslope = 4.402;
  TTX_sensitive_sodium_current_alpha2_0 = 2.95e1;
  TTX_sensitive_sodium_current_alpha2_infinity = 1.71e2;
  TTX_sensitive_sodium_current_alpha2_E50 = -1.841e1;
  TTX_sensitive_sodium_current_alpha2_Eslope = 1.661e1;
  TTX_sensitive_sodium_current_alpha3_0 = 0;
  TTX_sensitive_sodium_current_alpha3_infinity = 2.031;
  TTX_sensitive_sodium_current_alpha3_E50 = -3.004e1;
  TTX_sensitive_sodium_current_alpha3_Eslope = 1.275e-1;
  TTX_sensitive_sodium_current_alpha4_0 = 6e1;
  TTX_sensitive_sodium_current_alpha4_infinity = 0;
  TTX_sensitive_sodium_current_alpha4_E50 = -5.556e1;
  TTX_sensitive_sodium_current_alpha4_Eslope = 4.849;
  TTX_sensitive_sodium_current_beta1_0 = 1.133e6;
  TTX_sensitive_sodium_current_beta1_infinity = 4.104e5;
  TTX_sensitive_sodium_current_beta1_E50 = -2.239;
  TTX_sensitive_sodium_current_beta1_Eslope = 1.651;
  TTX_sensitive_sodium_current_beta4_0 = 1.831e-4;
  TTX_sensitive_sodium_current_beta4_infinity = 1.904e3;
  TTX_sensitive_sodium_current_beta4_E50 = 1.821e1;
  TTX_sensitive_sodium_current_beta4_Eslope = 1.466e1;
  sodium_calcium_exchange_current_kNaCa = 2.249e3;
  sodium_calcium_exchange_current_Qci = 1.421e-1;
  sodium_calcium_exchange_current_Qn = 2.65e-1;
  sodium_calcium_exchange_current_Qco = 0;
  sodium_calcium_exchange_current_K3ni = 2.49e1;
  sodium_calcium_exchange_current_Kci = 6.51e-3;
  sodium_calcium_exchange_current_K1ni = 3.938e2;
  sodium_calcium_exchange_current_K2ni = 2.286;
  sodium_calcium_exchange_current_Kcni = 2.568e1;
  sodium_calcium_exchange_current_K3no = 6.325;
  sodium_calcium_exchange_current_K1no = 2.2e3;
  sodium_calcium_exchange_current_K2no = 7.639e2;
  sodium_calcium_exchange_current_Kco = 3.299;
  hyperpolarisation_activated_current_P_f_K = 1.162;
  hyperpolarisation_activated_current_g_f_Na = 5.031e2;
  hyperpolarisation_activated_current_A_f = 3.716e-4;
  hyperpolarisation_activated_current_Km_f = 1.03e1;
  hyperpolarisation_activated_current_I1 = 9.972e-1;
  hyperpolarisation_activated_current_I2 = ;
  hyperpolarisation_activated_current_alpha1_0 = 1.244;
  hyperpolarisation_activated_current_alpha1_infinity = 2.157;
  hyperpolarisation_activated_current_alpha1_E50 = -4.973e1;
  hyperpolarisation_activated_current_alpha1_Eslope = 9.458;
  hyperpolarisation_activated_current_alpha2_0 = 0;
  hyperpolarisation_activated_current_alpha2_infinity = 6.951;
  hyperpolarisation_activated_current_alpha2_E50 = -6.658e1;
  hyperpolarisation_activated_current_alpha2_Eslope = 1.013e1;
  hyperpolarisation_activated_current_alpha3_0 = 5.826;
  hyperpolarisation_activated_current_alpha3_infinity = 0;
  hyperpolarisation_activated_current_alpha3_E50 = -1.235e2;
  hyperpolarisation_activated_current_alpha3_Eslope = 1.036e1;
  hyperpolarisation_activated_current_beta1_0 = 9.584e-3;
  hyperpolarisation_activated_current_beta1_infinity = 2.619e1;
  hyperpolarisation_activated_current_beta1_E50 = -2.529e1;
  hyperpolarisation_activated_current_beta1_Eslope = 6.206;
  hyperpolarisation_activated_current_beta3_0 = 0;
  hyperpolarisation_activated_current_beta3_infinity = 1.507e1;
  hyperpolarisation_activated_current_beta3_E50 = -7.443;
  hyperpolarisation_activated_current_beta3_Eslope = 1.323e1;
  sodium_potassium_pump_current_Km_K = 4e1;
  sodium_potassium_pump_current_Km_Na = 1;
  sodium_potassium_pump_current_Ip_max = 2.463e2;
  transient_outward_current_g_to = 2.818e-1;
  transient_outward_current_A_to = 1.22e-2;
  transient_outward_current_I1 = 6.31e-1;
  transient_outward_current_I2 = 2.697e-2;
  transient_outward_current_I3 = ;
  transient_outward_current_alpha1_0 = 3.723;
  transient_outward_current_alpha1_infinity = 3.244e2;
  transient_outward_current_alpha1_E50 = 2.695e1;
  transient_outward_current_alpha1_Eslope = 1.808e1;
  transient_outward_current_alpha2_0 = 3.713e2;
  transient_outward_current_alpha2_infinity = 1.288e2;
  transient_outward_current_alpha2_E50 = -9.952e1;
  transient_outward_current_alpha2_Eslope = 1.706e1;
  transient_outward_current_alpha3_0 = 4.309;
  transient_outward_current_alpha3_infinity = 3.371e1;
  transient_outward_current_alpha3_E50 = 1.886e1;
  transient_outward_current_alpha3_Eslope = 1.485e1;
  transient_outward_current_alpha4_0 = 1.167e2;
  transient_outward_current_alpha4_infinity = 1.997e2;
  transient_outward_current_alpha4_E50 = -8.894e1;
  transient_outward_current_alpha4_Eslope = 8.432e1;
  transient_outward_current_beta1_0 = 2.729e-2;
  transient_outward_current_beta1_infinity = 1.451e2;
  transient_outward_current_beta1_E50 = -1.075e1;
  transient_outward_current_beta1_Eslope = 5.012;
  transient_outward_current_beta4_0 = 2.805e-1;
  transient_outward_current_beta4_infinity = 7.776;
  transient_outward_current_beta4_E50 = -1.176e2;
  transient_outward_current_beta4_Eslope = 1.032e2;
  background_currents_g_bCl = 8.691e-2;
  calcium_dynamics_Iup_max = 2.12e1;
  calcium_dynamics_Km_Caup = 5e-4;
  calcium_dynamics_Km_Carel = 1e-3;
  calcium_dynamics_tau_rel = 5e-3;
  calcium_dynamics_tau_tr = 4e-1;
  Vrel = 1.5e-2;
  Carel = 2.448e-1;
  Caup = 1.035;
  ion_concentrations_tau_b = 1e-1;
  ion_concentrations_Cab = 2;
  ion_concentrations_Clb = 1.4e2;
  ion_concentrations_Kb = 5.4;
  ion_concentrations_Nab = 1.4e2;
  ion_concentrations_Vi = 2.5;
  ion_concentrations_Vup = 3.5e-2;
  ion_concentrations_Ve = 5e-1;
  time_ = ;
  hyperpolarisation_activated_current_g_f_K = ;
  background_currents_Kb_K = ;

  // Assignment rules:
  i_f := i_fNa + i_fK;
  i_Kr := i_Kr_Na + i_Kr_K;
  i_Ks := i_Ks_Na + i_Ks_K;
  i_bNa := g_Na*(Em - E_Na);
  i_Na := g_Na*TTX_sensitive_sodium_current_A_Na*(Em - E_Na);
  i_NaK := sodium_potassium_pump_current_Ip_max*(Nai/(Nai + sodium_potassium_pump_current_Km_Na))*(Ko/(Ko + sodium_potassium_pump_current_Km_K))*(1 - ((Em - 40)/211)^2);
  i_NaCa := sodium_calcium_exchange_current_kNaCa*((sodium_calcium_exchange_current_x2*sodium_calcium_exchange_current_k21 - sodium_calcium_exchange_current_x1*sodium_calcium_exchange_current_k12)/(sodium_calcium_exchange_current_x1 + sodium_calcium_exchange_current_x2 + sodium_calcium_exchange_current_x3 + sodium_calcium_exchange_current_x4));
  i_to := transient_outward_current_g_to*transient_outward_current_A_to*(Em - E_K);
  i_CaL := L_type_calcium_current_g_CaL*L_type_calcium_current_A_CaL*(Em - E_Ca_rev);
  i_CaT := T_type_calcium_current_g_CaT*T_type_calcium_current_A_CaT*(Em - E_Ca_rev);
  i_bK := background_currents_Kb_K*Ko^0.41*(Ki - Ko*exp(-(Em*F/(R*T))));
  i_bCl := background_currents_g_bCl*(Em - E_Cl);
  E_Na := R*T/F*ln(Nao/Nai);
  E_Cl := R*T/(-1*F)*ln(Clo/Cli);
  E_Ca_rev := R*T/(2*F)*ln(Cao/Cai);
  E_K := R*T/F*ln(Ko/Ki);
  L_type_calcium_current_alpha1 := L_type_calcium_current_alpha1_infinity + (L_type_calcium_current_alpha1_0 - L_type_calcium_current_alpha1_infinity)/(1 + exp((Em - L_type_calcium_current_alpha1_E50)/L_type_calcium_current_alpha1_Eslope));
  L_type_calcium_current_alpha2 := L_type_calcium_current_alpha2_infinity + (L_type_calcium_current_alpha2_0 - L_type_calcium_current_alpha2_infinity)/(1 + exp((Em - L_type_calcium_current_alpha2_E50)/L_type_calcium_current_alpha2_Eslope));
  L_type_calcium_current_beta1 := L_type_calcium_current_beta1_infinity + (L_type_calcium_current_beta1_0 - L_type_calcium_current_beta1_infinity)/(1 + exp((Em - L_type_calcium_current_beta1_E50)/L_type_calcium_current_beta1_Eslope));
  L_type_calcium_current_beta2 := L_type_calcium_current_beta2_infinity + (L_type_calcium_current_beta2_0 - L_type_calcium_current_beta2_infinity)/(1 + exp((Em - L_type_calcium_current_beta2_E50)/L_type_calcium_current_beta2_Eslope));
  T_type_calcium_current_alpha1 := T_type_calcium_current_alpha1_infinity + (T_type_calcium_current_alpha1_0 - T_type_calcium_current_alpha1_infinity)/(1 + exp((Em - T_type_calcium_current_alpha1_E50)/T_type_calcium_current_alpha1_Eslope));
  T_type_calcium_current_alpha2 := T_type_calcium_current_alpha2_infinity + (T_type_calcium_current_alpha2_0 - T_type_calcium_current_alpha2_infinity)/(1 + exp((Em - T_type_calcium_current_alpha2_E50)/T_type_calcium_current_alpha2_Eslope));
  T_type_calcium_current_alpha3 := T_type_calcium_current_alpha3_infinity + (T_type_calcium_current_alpha3_0 - T_type_calcium_current_alpha3_infinity)/(1 + exp((Em - T_type_calcium_current_alpha3_E50)/T_type_calcium_current_alpha3_Eslope));
  T_type_calcium_current_beta1 := T_type_calcium_current_beta1_infinity + (T_type_calcium_current_beta1_0 - T_type_calcium_current_beta1_infinity)/(1 + exp((Em - T_type_calcium_current_beta1_E50)/T_type_calcium_current_beta1_Eslope));
  T_type_calcium_current_beta3 := T_type_calcium_current_beta3_infinity + (T_type_calcium_current_beta3_0 - T_type_calcium_current_beta3_infinity)/(1 + exp((Em - T_type_calcium_current_beta3_E50)/T_type_calcium_current_beta3_Eslope));
  i_Kr_Na := rapid_delayed_rectifying_potassium_current_g_Kr*rapid_delayed_rectifying_potassium_current_A_Kr*rapid_delayed_rectifying_potassium_current_PKNa_r*(Em - E_Na);
  i_Kr_K := rapid_delayed_rectifying_potassium_current_g_Kr*rapid_delayed_rectifying_potassium_current_A_Kr*(Em - E_K);
  rapid_delayed_rectifying_potassium_current_alpha1 := rapid_delayed_rectifying_potassium_current_alpha1_infinity + (rapid_delayed_rectifying_potassium_current_alpha1_0 - rapid_delayed_rectifying_potassium_current_alpha1_infinity)/(1 + exp((Em - rapid_delayed_rectifying_potassium_current_alpha1_E50)/rapid_delayed_rectifying_potassium_current_alpha1_Eslope));
  rapid_delayed_rectifying_potassium_current_alpha2 := rapid_delayed_rectifying_potassium_current_alpha2_infinity + (rapid_delayed_rectifying_potassium_current_alpha2_0 - rapid_delayed_rectifying_potassium_current_alpha2_infinity)/(1 + exp((Em - rapid_delayed_rectifying_potassium_current_alpha2_E50)/rapid_delayed_rectifying_potassium_current_alpha2_Eslope));
  rapid_delayed_rectifying_potassium_current_alpha3 := rapid_delayed_rectifying_potassium_current_alpha3_infinity + (rapid_delayed_rectifying_potassium_current_alpha3_0 - rapid_delayed_rectifying_potassium_current_alpha3_infinity)/(1 + exp((Em - rapid_delayed_rectifying_potassium_current_alpha3_E50)/rapid_delayed_rectifying_potassium_current_alpha3_Eslope));
  rapid_delayed_rectifying_potassium_current_alpha4 := rapid_delayed_rectifying_potassium_current_alpha4_infinity + (rapid_delayed_rectifying_potassium_current_alpha4_0 - rapid_delayed_rectifying_potassium_current_alpha4_infinity)/(1 + exp((Em - rapid_delayed_rectifying_potassium_current_alpha4_E50)/rapid_delayed_rectifying_potassium_current_alpha4_Eslope));
  rapid_delayed_rectifying_potassium_current_beta1 := rapid_delayed_rectifying_potassium_current_beta1_infinity + (rapid_delayed_rectifying_potassium_current_beta1_0 - rapid_delayed_rectifying_potassium_current_beta1_infinity)/(1 + exp((Em - rapid_delayed_rectifying_potassium_current_beta1_E50)/rapid_delayed_rectifying_potassium_current_beta1_Eslope));
  rapid_delayed_rectifying_potassium_current_beta4 := rapid_delayed_rectifying_potassium_current_beta4_infinity + (rapid_delayed_rectifying_potassium_current_beta4_0 - rapid_delayed_rectifying_potassium_current_beta4_infinity)/(1 + exp((Em - rapid_delayed_rectifying_potassium_current_beta4_E50)/rapid_delayed_rectifying_potassium_current_beta4_Eslope));
  i_Ks_Na := slow_delayed_rectifying_potassium_current_g_Ks*slow_delayed_rectifying_potassium_current_A_Ks*slow_delayed_rectifying_potassium_current_PKNa_s*(Em - E_Na);
  i_Ks_K := slow_delayed_rectifying_potassium_current_g_Ks*slow_delayed_rectifying_potassium_current_A_Ks*(Em - E_K);
  slow_delayed_rectifying_potassium_current_alpha1 := slow_delayed_rectifying_potassium_current_alpha1_infinity + (slow_delayed_rectifying_potassium_current_alpha1_0 - slow_delayed_rectifying_potassium_current_alpha1_infinity)/(1 + exp((Em - slow_delayed_rectifying_potassium_current_alpha1_E50)/slow_delayed_rectifying_potassium_current_alpha1_Eslope));
  slow_delayed_rectifying_potassium_current_alpha2 := slow_delayed_rectifying_potassium_current_alpha2_infinity + (slow_delayed_rectifying_potassium_current_alpha2_0 - slow_delayed_rectifying_potassium_current_alpha2_infinity)/(1 + exp((Em - slow_delayed_rectifying_potassium_current_alpha2_E50)/slow_delayed_rectifying_potassium_current_alpha2_Eslope));
  slow_delayed_rectifying_potassium_current_alpha3 := slow_delayed_rectifying_potassium_current_alpha3_infinity + (slow_delayed_rectifying_potassium_current_alpha3_0 - slow_delayed_rectifying_potassium_current_alpha3_infinity)/(1 + exp((Em - slow_delayed_rectifying_potassium_current_alpha3_E50)/slow_delayed_rectifying_potassium_current_alpha3_Eslope));
  slow_delayed_rectifying_potassium_current_beta1 := slow_delayed_rectifying_potassium_current_beta1_infinity + (slow_delayed_rectifying_potassium_current_beta1_0 - slow_delayed_rectifying_potassium_current_beta1_infinity)/(1 + exp((Em - slow_delayed_rectifying_potassium_current_beta1_E50)/slow_delayed_rectifying_potassium_current_beta1_Eslope));
  slow_delayed_rectifying_potassium_current_beta3 := slow_delayed_rectifying_potassium_current_beta3_infinity + (slow_delayed_rectifying_potassium_current_beta3_0 - slow_delayed_rectifying_potassium_current_beta3_infinity)/(1 + exp((Em - slow_delayed_rectifying_potassium_current_beta3_E50)/slow_delayed_rectifying_potassium_current_beta3_Eslope));
  TTX_sensitive_sodium_current_alpha1 := TTX_sensitive_sodium_current_alpha1_infinity + (TTX_sensitive_sodium_current_alpha1_0 - TTX_sensitive_sodium_current_alpha1_infinity)/(1 + exp((Em - TTX_sensitive_sodium_current_alpha1_E50)/TTX_sensitive_sodium_current_alpha1_Eslope));
  TTX_sensitive_sodium_current_alpha2 := TTX_sensitive_sodium_current_alpha2_infinity + (TTX_sensitive_sodium_current_alpha2_0 - TTX_sensitive_sodium_current_alpha2_infinity)/(1 + exp((Em - TTX_sensitive_sodium_current_alpha2_E50)/TTX_sensitive_sodium_current_alpha2_Eslope));
  TTX_sensitive_sodium_current_alpha3 := TTX_sensitive_sodium_current_alpha3_infinity + (TTX_sensitive_sodium_current_alpha3_0 - TTX_sensitive_sodium_current_alpha3_infinity)/(1 + exp((Em - TTX_sensitive_sodium_current_alpha3_E50)/TTX_sensitive_sodium_current_alpha3_Eslope));
  TTX_sensitive_sodium_current_alpha4 := TTX_sensitive_sodium_current_alpha4_infinity + (TTX_sensitive_sodium_current_alpha4_0 - TTX_sensitive_sodium_current_alpha4_infinity)/(1 + exp((Em - TTX_sensitive_sodium_current_alpha4_E50)/TTX_sensitive_sodium_current_alpha4_Eslope));
  TTX_sensitive_sodium_current_beta1 := TTX_sensitive_sodium_current_beta1_infinity + (TTX_sensitive_sodium_current_beta1_0 - TTX_sensitive_sodium_current_beta1_infinity)/(1 + exp((Em - TTX_sensitive_sodium_current_beta1_E50)/TTX_sensitive_sodium_current_beta1_Eslope));
  TTX_sensitive_sodium_current_beta4 := TTX_sensitive_sodium_current_beta4_infinity + (TTX_sensitive_sodium_current_beta4_0 - TTX_sensitive_sodium_current_beta4_infinity)/(1 + exp((Em - TTX_sensitive_sodium_current_beta4_E50)/TTX_sensitive_sodium_current_beta4_Eslope));
  sodium_calcium_exchange_current_x1 := sodium_calcium_exchange_current_k41*sodium_calcium_exchange_current_k34*(sodium_calcium_exchange_current_k23 + sodium_calcium_exchange_current_k21) + sodium_calcium_exchange_current_k21*sodium_calcium_exchange_current_k32*(sodium_calcium_exchange_current_k43 + sodium_calcium_exchange_current_k41);
  sodium_calcium_exchange_current_x2 := sodium_calcium_exchange_current_k32*sodium_calcium_exchange_current_k43*(sodium_calcium_exchange_current_k14 + sodium_calcium_exchange_current_k12) + sodium_calcium_exchange_current_k41*sodium_calcium_exchange_current_k12*(sodium_calcium_exchange_current_k34 + sodium_calcium_exchange_current_k32);
  sodium_calcium_exchange_current_x3 := sodium_calcium_exchange_current_k14*sodium_calcium_exchange_current_k43*(sodium_calcium_exchange_current_k23 + sodium_calcium_exchange_current_k21) + sodium_calcium_exchange_current_k12*sodium_calcium_exchange_current_k23*(sodium_calcium_exchange_current_k43 + sodium_calcium_exchange_current_k41);
  sodium_calcium_exchange_current_x4 := sodium_calcium_exchange_current_k23*sodium_calcium_exchange_current_k34*(sodium_calcium_exchange_current_k14 + sodium_calcium_exchange_current_k12) + sodium_calcium_exchange_current_k14*sodium_calcium_exchange_current_k21*(sodium_calcium_exchange_current_k34 + sodium_calcium_exchange_current_k32);
  sodium_calcium_exchange_current_k41 := exp(-(Em*sodium_calcium_exchange_current_Qn*F/(2*R*T)));
  sodium_calcium_exchange_current_k34 := Nao/(sodium_calcium_exchange_current_K3no + Nao);
  sodium_calcium_exchange_current_k23 := Nao^2*(1 + Nao/sodium_calcium_exchange_current_K3no)*exp(-(sodium_calcium_exchange_current_Qn*Em*F/(2*R*T)))/(sodium_calcium_exchange_current_K1no*sodium_calcium_exchange_current_K2no*sodium_calcium_exchange_current_D2);
  sodium_calcium_exchange_current_k21 := Cao/sodium_calcium_exchange_current_Kco*exp(sodium_calcium_exchange_current_Qco*Em*F/(R*T))/sodium_calcium_exchange_current_D2;
  sodium_calcium_exchange_current_k32 := exp(sodium_calcium_exchange_current_Qn*Em*F/(2*R*T));
  sodium_calcium_exchange_current_k43 := Nai/(sodium_calcium_exchange_current_K3ni + Nai);
  sodium_calcium_exchange_current_k12 := Cai*exp(-(Em*sodium_calcium_exchange_current_Qci*F/(R*T)))/(sodium_calcium_exchange_current_Kci*sodium_calcium_exchange_current_D1);
  sodium_calcium_exchange_current_k14 := Nai^2*(1 + Nai/sodium_calcium_exchange_current_K3ni)*exp(sodium_calcium_exchange_current_Qn*Em*F/(2*R*T))/(sodium_calcium_exchange_current_K1ni*sodium_calcium_exchange_current_K2ni*sodium_calcium_exchange_current_D1);
  sodium_calcium_exchange_current_D1 := 1 + Cai/sodium_calcium_exchange_current_Kci*(1 + exp(-(Em*sodium_calcium_exchange_current_Qci*F/(R*T))))*(Cai*Nai/(sodium_calcium_exchange_current_Kci*sodium_calcium_exchange_current_Kcni)) + Nai/sodium_calcium_exchange_current_K1ni*(1 + Nai/sodium_calcium_exchange_current_K2ni*(1 + Nai/sodium_calcium_exchange_current_K3ni));
  sodium_calcium_exchange_current_D2 := 1 + Cao/sodium_calcium_exchange_current_Kco*(1 + exp(sodium_calcium_exchange_current_Qco*Em*F/(R*T))) + Nao/sodium_calcium_exchange_current_K1no*(1 + Nao/sodium_calcium_exchange_current_K2no)*(1 + Nao/sodium_calcium_exchange_current_K3no);
  i_fNa := hyperpolarisation_activated_current_A_f*(Ko^1.83/(Ko^1.83 + hyperpolarisation_activated_current_Km_f^1.83))*hyperpolarisation_activated_current_g_f_Na*(Em - E_Na);
  i_fK := hyperpolarisation_activated_current_A_f*(Ko^1.83/(Ko^1.83 + hyperpolarisation_activated_current_Km_f^1.83))*hyperpolarisation_activated_current_P_f_K*hyperpolarisation_activated_current_g_f_K*(Em - E_K);
  hyperpolarisation_activated_current_alpha1 := hyperpolarisation_activated_current_alpha1_infinity + (hyperpolarisation_activated_current_alpha1_0 - hyperpolarisation_activated_current_alpha1_infinity)/(1 + exp((Em - hyperpolarisation_activated_current_alpha1_E50)/hyperpolarisation_activated_current_alpha1_Eslope));
  hyperpolarisation_activated_current_alpha2 := hyperpolarisation_activated_current_alpha2_infinity + (hyperpolarisation_activated_current_alpha2_0 - hyperpolarisation_activated_current_alpha2_infinity)/(1 + exp((Em - hyperpolarisation_activated_current_alpha2_E50)/hyperpolarisation_activated_current_alpha2_Eslope));
  hyperpolarisation_activated_current_alpha3 := hyperpolarisation_activated_current_alpha3_infinity + (hyperpolarisation_activated_current_alpha3_0 - hyperpolarisation_activated_current_alpha3_infinity)/(1 + exp((Em - hyperpolarisation_activated_current_alpha3_E50)/hyperpolarisation_activated_current_alpha3_Eslope));
  hyperpolarisation_activated_current_beta1 := hyperpolarisation_activated_current_beta1_infinity + (hyperpolarisation_activated_current_beta1_0 - hyperpolarisation_activated_current_beta1_infinity)/(1 + exp((Em - hyperpolarisation_activated_current_beta1_E50)/hyperpolarisation_activated_current_beta1_Eslope));
  hyperpolarisation_activated_current_beta3 := hyperpolarisation_activated_current_beta3_infinity + (hyperpolarisation_activated_current_beta3_0 - hyperpolarisation_activated_current_beta3_infinity)/(1 + exp((Em - hyperpolarisation_activated_current_beta3_E50)/hyperpolarisation_activated_current_beta3_Eslope));
  transient_outward_current_alpha1 := transient_outward_current_alpha1_infinity + (transient_outward_current_alpha1_0 - transient_outward_current_alpha1_infinity)/(1 + exp((Em - transient_outward_current_alpha1_E50)/transient_outward_current_alpha1_Eslope));
  transient_outward_current_alpha2 := transient_outward_current_alpha2_infinity + (transient_outward_current_alpha2_0 - transient_outward_current_alpha2_infinity)/(1 + exp((Em - transient_outward_current_alpha2_E50)/transient_outward_current_alpha2_Eslope));
  transient_outward_current_alpha3 := transient_outward_current_alpha3_infinity + (transient_outward_current_alpha3_0 - transient_outward_current_alpha3_infinity)/(1 + exp((Em - transient_outward_current_alpha3_E50)/transient_outward_current_alpha3_Eslope));
  transient_outward_current_alpha4 := transient_outward_current_alpha4_infinity + (transient_outward_current_alpha4_0 - transient_outward_current_alpha4_infinity)/(1 + exp((Em - transient_outward_current_alpha4_E50)/transient_outward_current_alpha4_Eslope));
  transient_outward_current_beta1 := transient_outward_current_beta1_infinity + (transient_outward_current_beta1_0 - transient_outward_current_beta1_infinity)/(1 + exp((Em - transient_outward_current_beta1_E50)/transient_outward_current_beta1_Eslope));
  transient_outward_current_beta4 := transient_outward_current_beta4_infinity + (transient_outward_current_beta4_0 - transient_outward_current_beta4_infinity)/(1 + exp((Em - transient_outward_current_beta4_E50)/transient_outward_current_beta4_Eslope));
  i_Ca_up := calcium_dynamics_Iup_max*(1/(1 + (calcium_dynamics_Km_Caup/Cai)^2));
  i_Ca_rel := 2*F*Vrel/calcium_dynamics_tau_rel*Carel*(1/(1 + (calcium_dynamics_Km_Carel/Cai)^2));
  i_Ca_tr := 2*F*Vrel/calcium_dynamics_tau_tr*Caup;

  // Rate rules:
  Em' = -(i_f + i_Kr + i_Ks + i_bNa + i_Na + i_NaK + i_NaCa + i_to + i_CaL + i_CaT + i_bK + i_bCl)/membrane_Cm;
  Nai' = -((i_Kr_Na + i_Ks_Na + i_Na + 3*i_NaCa + i_bNa + i_fNa + 3*i_NaK)/(F*ion_concentrations_Vi));
  Nao' = (i_Kr_Na + i_Ks_Na + i_Na + 3*i_NaCa + i_bNa + i_fNa + 3*i_NaK)/(F*ion_concentrations_Ve) + (ion_concentrations_Nab - Nao)/ion_concentrations_tau_b;
  Cai' = -((i_CaL + i_CaT + i_Ca_up - (2*i_NaCa + i_Ca_rel))/(2*F*ion_concentrations_Vi));
  Cao' = (i_CaL + i_CaT - 2*i_NaCa)/(2*F*ion_concentrations_Ve) + (ion_concentrations_Cab - Cao)/ion_concentrations_tau_b;
  Ki' = -((i_Kr_K + i_Ks_K + i_bK + i_fK + i_to - 2*i_NaK)/(F*ion_concentrations_Vi));
  Ko' = (i_Kr_K + i_Ks_K + i_bK + i_fK + i_to - 2*i_NaK)/(F*ion_concentrations_Ve) + (ion_concentrations_Kb - Ko)/ion_concentrations_tau_b;
  Cli' = i_bCl/(F*ion_concentrations_Vi);
  Clo' = i_bCl/(F*ion_concentrations_Ve) + (ion_concentrations_Clb - Clo)/ion_concentrations_tau_b;
  L_type_calcium_current_A_CaL' = L_type_calcium_current_alpha1*L_type_calcium_current_I3 + L_type_calcium_current_beta1*L_type_calcium_current_I1 - (L_type_calcium_current_beta1 + L_type_calcium_current_alpha2)*L_type_calcium_current_A_CaL;
  L_type_calcium_current_I1' = L_type_calcium_current_alpha2*L_type_calcium_current_A_CaL + L_type_calcium_current_beta3*L_type_calcium_current_I2 - (L_type_calcium_current_beta2 + L_type_calcium_current_alpha3 + Cai^2)*L_type_calcium_current_I1;
  L_type_calcium_current_I2' = L_type_calcium_current_alpha3*Cai^2*L_type_calcium_current_I1 + L_type_calcium_current_beta4*Cai^2*L_type_calcium_current_I3 - (L_type_calcium_current_beta3 + L_type_calcium_current_alpha4)*L_type_calcium_current_I2;
  L_type_calcium_current_I3' = L_type_calcium_current_beta1*L_type_calcium_current_A_CaL + L_type_calcium_current_alpha4*L_type_calcium_current_I2 - (L_type_calcium_current_alpha1 + L_type_calcium_current_beta4*Cai^2)*L_type_calcium_current_I3;
  T_type_calcium_current_A_CaT' = T_type_calcium_current_alpha1*T_type_calcium_current_I2 - (T_type_calcium_current_beta1 + T_type_calcium_current_alpha2)*T_type_calcium_current_A_CaT;
  T_type_calcium_current_I1' = T_type_calcium_current_alpha2*T_type_calcium_current_A_CaT + T_type_calcium_current_beta3*T_type_calcium_current_I2 - T_type_calcium_current_alpha3*T_type_calcium_current_I1;
  T_type_calcium_current_I2' = T_type_calcium_current_alpha3*T_type_calcium_current_I1 + T_type_calcium_current_beta1*T_type_calcium_current_A_CaT - (T_type_calcium_current_beta3 + T_type_calcium_current_alpha1)*T_type_calcium_current_I2;
  rapid_delayed_rectifying_potassium_current_A_Kr' = rapid_delayed_rectifying_potassium_current_alpha1*rapid_delayed_rectifying_potassium_current_I3 - (rapid_delayed_rectifying_potassium_current_beta1 + rapid_delayed_rectifying_potassium_current_alpha2)*rapid_delayed_rectifying_potassium_current_A_Kr;
  rapid_delayed_rectifying_potassium_current_I1' = rapid_delayed_rectifying_potassium_current_alpha2*rapid_delayed_rectifying_potassium_current_A_Kr - rapid_delayed_rectifying_potassium_current_alpha3*rapid_delayed_rectifying_potassium_current_I1;
  rapid_delayed_rectifying_potassium_current_I2' = rapid_delayed_rectifying_potassium_current_alpha3*rapid_delayed_rectifying_potassium_current_I1 + rapid_delayed_rectifying_potassium_current_beta4*rapid_delayed_rectifying_potassium_current_I3 - rapid_delayed_rectifying_potassium_current_alpha4*rapid_delayed_rectifying_potassium_current_I2;
  rapid_delayed_rectifying_potassium_current_I3' = rapid_delayed_rectifying_potassium_current_beta1*rapid_delayed_rectifying_potassium_current_A_Kr + rapid_delayed_rectifying_potassium_current_alpha4*rapid_delayed_rectifying_potassium_current_I2 - (rapid_delayed_rectifying_potassium_current_alpha1 + rapid_delayed_rectifying_potassium_current_beta4)*rapid_delayed_rectifying_potassium_current_I3;
  slow_delayed_rectifying_potassium_current_A_Ks' = slow_delayed_rectifying_potassium_current_alpha1*slow_delayed_rectifying_potassium_current_I2 - (slow_delayed_rectifying_potassium_current_beta1 + slow_delayed_rectifying_potassium_current_alpha2)*slow_delayed_rectifying_potassium_current_A_Ks;
  slow_delayed_rectifying_potassium_current_I1' = slow_delayed_rectifying_potassium_current_alpha2*slow_delayed_rectifying_potassium_current_A_Ks + slow_delayed_rectifying_potassium_current_beta3*slow_delayed_rectifying_potassium_current_I2 - slow_delayed_rectifying_potassium_current_alpha3*slow_delayed_rectifying_potassium_current_I1;
  slow_delayed_rectifying_potassium_current_I2' = slow_delayed_rectifying_potassium_current_alpha3*slow_delayed_rectifying_potassium_current_I1 + slow_delayed_rectifying_potassium_current_beta1*slow_delayed_rectifying_potassium_current_A_Ks - (slow_delayed_rectifying_potassium_current_alpha1 + slow_delayed_rectifying_potassium_current_beta3)*slow_delayed_rectifying_potassium_current_I2;
  TTX_sensitive_sodium_current_A_Na' = TTX_sensitive_sodium_current_alpha1*TTX_sensitive_sodium_current_I3 - (TTX_sensitive_sodium_current_beta1 + TTX_sensitive_sodium_current_alpha2)*TTX_sensitive_sodium_current_A_Na;
  TTX_sensitive_sodium_current_I1' = TTX_sensitive_sodium_current_alpha2*TTX_sensitive_sodium_current_A_Na - TTX_sensitive_sodium_current_alpha3*TTX_sensitive_sodium_current_I1;
  TTX_sensitive_sodium_current_I2' = TTX_sensitive_sodium_current_alpha3*TTX_sensitive_sodium_current_I1 + TTX_sensitive_sodium_current_beta4*TTX_sensitive_sodium_current_I3 - TTX_sensitive_sodium_current_alpha4*TTX_sensitive_sodium_current_I2;
  TTX_sensitive_sodium_current_I3' = TTX_sensitive_sodium_current_beta1*TTX_sensitive_sodium_current_A_Na + TTX_sensitive_sodium_current_alpha4*TTX_sensitive_sodium_current_I2 - (TTX_sensitive_sodium_current_alpha1 + TTX_sensitive_sodium_current_beta4)*TTX_sensitive_sodium_current_I3;
  hyperpolarisation_activated_current_A_f' = hyperpolarisation_activated_current_alpha1*hyperpolarisation_activated_current_I2 - (hyperpolarisation_activated_current_beta1 + hyperpolarisation_activated_current_alpha2)*hyperpolarisation_activated_current_A_f;
  hyperpolarisation_activated_current_I1' = hyperpolarisation_activated_current_alpha2*hyperpolarisation_activated_current_A_f + hyperpolarisation_activated_current_beta3*hyperpolarisation_activated_current_I2 - hyperpolarisation_activated_current_alpha3*hyperpolarisation_activated_current_I1;
  hyperpolarisation_activated_current_I2' = hyperpolarisation_activated_current_alpha3*hyperpolarisation_activated_current_I1 + hyperpolarisation_activated_current_beta1*hyperpolarisation_activated_current_A_f - (hyperpolarisation_activated_current_beta3 + hyperpolarisation_activated_current_alpha1)*hyperpolarisation_activated_current_I2;
  transient_outward_current_A_to' = transient_outward_current_alpha1*transient_outward_current_I3 - (transient_outward_current_beta1 + transient_outward_current_alpha2)*transient_outward_current_A_to;
  transient_outward_current_I1' = transient_outward_current_alpha2*transient_outward_current_A_to - transient_outward_current_alpha3*transient_outward_current_I1;
  transient_outward_current_I2' = transient_outward_current_alpha3*transient_outward_current_I1 + transient_outward_current_beta4*transient_outward_current_I3 - transient_outward_current_alpha4*transient_outward_current_I2;
  transient_outward_current_I3' = transient_outward_current_beta1*transient_outward_current_A_to + transient_outward_current_alpha4*transient_outward_current_I2 - (transient_outward_current_alpha1 + transient_outward_current_beta4)*transient_outward_current_I3;
  Carel' = (i_Ca_tr - i_Ca_rel)/(2*F*Vrel);
  Caup' = (i_Ca_up - i_Ca_tr)/(2*F*ion_concentrations_Vup);
end
