// SBML level 2 version 4

model macgregor_leng_model_2005_version01____main()
  // Originally created by libAntimony v1.3 (using libSBML 4.1.0-b2)

  // Compartments:
  compartment default_compartment = 1;

  // Parameters:
  r0 = 0;
  r_k6 = 5;
  s0 = 0;
  k7 = 5;
  f0 = 0.3;
  f_k1 = 0.1;
  f_k2 = 0.002;
  f_k3 = 0.018;
  f_sb = 0.029;
  f_delta_b = 0.3;
  c = 0.01;
  h0 = 0;
  h_k4 = 9;
  h_k5 = 71;
  h_sr = -0.56;
  h_delta_r = 0.3;
  k8 = 0.07;
  j1 = 10;
  time_ = ;

  // Assignment rules:
  r_Ir := ;
  Is_ := ;
  f_phi_b_s := 1/(1 + exp(-(ln(1*s0) - f_sb)/f_delta_b));
  h_phi_r_s := 1/(1 + exp(-(ln(1*s0) - h_sr)/h_delta_r));

  // Rate rules:
  r0' = r_Ir - r_k6*r0;
  s0' = Is_ - k7*s0;
  f0' = -(f_k1*(r0 + c)*f0) + (f_k2 + f_k3*f_phi_b_s)*(1 - f0);
  h0' = j1*((h_k4 + h_k5*(1 - h_phi_r_s))*(r0 + c)*f0 - k8*h0);
end
