// SBML level 2 version 4

model macgregor_leng_model_2005_version01____main()
  // Originally created by libAntimony v1.3 (using libSBML 4.1.0-b2)

  // Compartments:
  compartment default_compartment = 1;

  // Parameters:
  r0 = 0;
  r_k6 = 5;
  r_n1 = 4;
  r_theta_1 = 1;
  r_n3 = 5;
  r_theta_3 = 30;
  s0 = 0;
  j1 = 10;
  s_Is2 = 50;
  k7 = 5;
  g0 = 2;
  se0 = 0;
  se_Ise = 10;
  f0 = 0.3;
  f_k1 = 0.1;
  f_k2 = 0.002;
  f_k3 = 0.018;
  f_sb = 0.029;
  f_delta_b = 0.3;
  c = 0.01;
  h0 = 0;
  h_k4 = 0.5;
  h_k5 = 71;
  h_sr = -0.56;
  h_delta_r = 0.2;
  k8 = 0.07;
  g_g1 = 1;
  g_gmax = 5;
  g_g2 = 0.008;
  g_n2 = 2;
  g_theta_2 = 30;
  hh0 = 0;
  hh_Ih = 50;
  model_parameters_delta = 60;
  model_parameters_delta1 = 15;
  time_ = ;

  // Assignment rules:
  r_ract := 1 - s0^r_n1/(s0^r_n1 + r_theta_1^r_n1);
  r_hr := 1 - h_delta1^r_n3/(h_delta1^r_n3 + (j1*r_theta_3)^r_n3);
  r_Ir := ;
  r_Ir2 := ;
  h_delta1 := (h0 + hh0)*model_parameters_delta1;
  Is_ := ;
  f_phi_b_s := 1/(1 + exp(-(ln(1*(s0 + se0)) - f_sb)/f_delta_b));
  h_phi_r_s := 1/(1 + exp(-(ln(1*(s0 + se0)) - h_sr)/h_delta_r));
  g_hact := h_delta^g_n2/(h_delta^g_n2 + (j1*g_theta_2)^g_n2);
  h_delta := (h0 + hh0)*model_parameters_delta;

  // Rate rules:
  r0' = r_ract*r_hr*r_Ir - r_k6*r0 + r_Ir2;
  s0' = Is_*g0 - k7*s0 + s_Is2;
  g0' = g_g1*g_hact*((g_gmax - g0)/g_gmax) - g_g2*Is_*g0;
  se0' = se_Ise - k7*se0;
  f0' = -(f_k1*(r0 + c)*f0) + (f_k2 + f_k3*f_phi_b_s)*(1 - f0);
  h0' = j1*((h_k4 + h_k5*(1 - h_phi_r_s))*(r0 + c)*f0 - k8*h0);
  hh0' = j1*(hh_Ih - k8*hh0);
end
