// SBML level 2 version 4

model magnus_keizer_1997_version01____main()
  // Originally created by libAntimony v1.3 (using libSBML 4.1.0-b2)

  // Compartments:
  compartment default_compartment = 1;

  // Parameters:
  V = ;
  V_B = 50;
  R = 8314;
  T = 310;
  F = 96845;
  g_H = 0.2;
  membrane_Cmito = 0.00145;
  proton_pump_K_res = 1.35e17;
  proton_pump_rho_res = 0.4;
  proton_pump_r1 = 2.077e-18;
  proton_pump_r2 = 1.728e-9;
  proton_pump_r3 = 1.059e-26;
  proton_pump_ra = 6.394e-10;
  proton_pump_rb = 1.762e-13;
  proton_pump_rc1 = 2.656e-19;
  proton_pump_rc2 = 8.632e-27;
  proton_pump_g = 0.85;
  F0_F1_ATPase_rho_F1 = 0.7;
  F0_F1_ATPase_K_F1 = 1710000;
  F0_F1_ATPase_Pi_m = 20;
  F0_F1_ATPase_p1 = 1.346e-8;
  F0_F1_ATPase_p2 = 7.739e-7;
  F0_F1_ATPase_p3 = 6.65e-15;
  F0_F1_ATPase_pa = 1.656e-5;
  F0_F1_ATPase_pb = 3.373e-7;
  F0_F1_ATPase_pc1 = 9.651e-14;
  F0_F1_ATPase_pc2 = 4.845e-19;
  ADP_m = ;
  ATP_ADP_exchange_Jmax_ant = 1000;
  ATP_ADP_exchange_f = 0.5;
  V_offset = 91;
  Ca_uniporter_Jmax_uni = 300;
  Ca_uniporter_K_trans = 19;
  Ca_uniporter_K_act = 0.38;
  Ca_uniporter_L = 110;
  Ca_uniporter_na = 2.8;
  Na_Ca_exchanger_Jmax_Na_Ca = 25;
  Na_Ca_exchanger_Ca_m = ;
  Na_Ca_exchanger_Na_i = 30;
  Na_Ca_exchanger_K_Na = 9.4;
  Na_Ca_exchanger_K_Ca = 0.003;
  Na_Ca_exchanger_b = 0;
  Na_Ca_exchanger_n = 2;
  Na_Ca_exchanger_fm = 0.0003;
  time_ = ;
  membrane_pH_i = ;
  membrane_pH_m = ;
  proton_pump_NAD_m = ;
  proton_pump_NADH_m = ;
  F0_F1_ATPase_ATP_m = ;
  ATP_ADP_exchange_ATP_i = ;
  ATP_ADP_exchange_ATP_m = ;
  ATP_ADP_exchange_ADP_i = ;
  Ca_uniporter_Ca_i = ;

  // Assignment rules:
  delta_pH := membrane_pH_i - membrane_pH_m;
  proton_motive_force := V - 2.303*R*T/F*delta_pH;
  JH_res := 360*proton_pump_rho_res*((proton_pump_ra*10^(6*delta_pH)*exp(F*proton_pump_A_res/(R*T)) + proton_pump_rb*10^(6*delta_pH) - (proton_pump_ra + proton_pump_rb)*exp(proton_pump_g*6*F*V/(R*T)))/((1 + proton_pump_r1*exp(F*proton_pump_A_res/(R*T)))*exp(6*F*V_B/(R*T)) + (proton_pump_r2 + proton_pump_r3*exp(F*proton_pump_A_res/(R*T)))*exp(proton_pump_g*6*F*V/(R*T))));
  JH_leak := g_H*proton_motive_force;
  JH_F1 := -180*F0_F1_ATPase_rho_F1*((F0_F1_ATPase_pa*10^(3*delta_pH)*exp(F*F0_F1_ATPase_A_F1/(R*T)) + F0_F1_ATPase_pb*10^(3*delta_pH) - (F0_F1_ATPase_pa + F0_F1_ATPase_pb)*exp(3*F*V/(R*T)))/((1 + F0_F1_ATPase_p1*exp(F*F0_F1_ATPase_A_F1/(R*T)))*exp(3*F*V_B/(R*T)) + (F0_F1_ATPase_p2 + F0_F1_ATPase_p3*exp(F*F0_F1_ATPase_A_F1/(R*T)))*exp(3*F*V/(R*T))));
  J_ant := ATP_ADP_exchange_Jmax_ant*((1 - ATP_ADP_exchange_ATP4_i*ATP_ADP_exchange_ADP3_m/(ATP_ADP_exchange_ADP3_i*ATP_ADP_exchange_ATP4_m)*exp(-F*V/(R*T)))/((1 + ATP_ADP_exchange_ATP4_i/ATP_ADP_exchange_ADP3_i*exp(-ATP_ADP_exchange_f*F*V/(R*T)))*(1 + ATP_ADP_exchange_ADP3_m/ATP_ADP_exchange_ATP4_m)));
  J_uni := Ca_uniporter_Jmax_uni*(Ca_uniporter_Ca_i/Ca_uniporter_K_trans*(1 + Ca_uniporter_Ca_i/Ca_uniporter_K_trans)^3/((1 + Ca_uniporter_Ca_i/Ca_uniporter_K_trans)^4 + Ca_uniporter_L/(1 + Ca_uniporter_Ca_i/Ca_uniporter_K_act)^Ca_uniporter_na))*(2*F*(V - V_offset)/(R*T)/(1 - exp(-2*F*(V - V_offset)/(R*T))));
  proton_pump_Jo := 30*proton_pump_rho_res*(((proton_pump_ra*10^(6*delta_pH) + proton_pump_rc1*exp(6*F*V_B/(R*T)))*exp(F*proton_pump_A_res/(R*T)) - proton_pump_ra*exp(proton_pump_g*6*F*V/(R*T)) + proton_pump_rc2*exp(F*proton_pump_A_res/(R*T))*exp(proton_pump_g*6*F*V/(R*T)))/((1 + proton_pump_r1*exp(F*proton_pump_A_res/(R*T)))*exp(6*F*V_B/(R*T)) + (proton_pump_r2 + proton_pump_r3*exp(F*proton_pump_A_res/(R*T)))*exp(proton_pump_g*6*F*V/(R*T))));
  proton_pump_A_res := R*T/F*ln(proton_pump_K_res*sqrt(proton_pump_NADH_m)/sqrt(proton_pump_NAD_m));
  proton_pump_total_NAD_m := proton_pump_NADH_m + proton_pump_NAD_m;
  Jp_F1 := -60*F0_F1_ATPase_rho_F1*(((F0_F1_ATPase_pa*10^(3*delta_pH) + F0_F1_ATPase_pc1*exp(3*F*V_B/(R*T)))*exp(F*F0_F1_ATPase_A_F1/(R*T)) - F0_F1_ATPase_pa*exp(3*F*V/(R*T)) + F0_F1_ATPase_pc2*exp(F*F0_F1_ATPase_A_F1/(R*T))*exp(3*F*V/(R*T)))/((1 + F0_F1_ATPase_p1*exp(F*F0_F1_ATPase_A_F1/(R*T)))*exp(3*F*V_B/(R*T)) + (F0_F1_ATPase_p2 + F0_F1_ATPase_p3*exp(F*F0_F1_ATPase_A_F1/(R*T)))*exp(3*F*V/(R*T))));
  F0_F1_ATPase_A_F1 := R*T/F*ln(F0_F1_ATPase_K_F1*F0_F1_ATPase_ATP_m/(F0_F1_ATPase_ADP_m_free*F0_F1_ATPase_Pi_m));
  F0_F1_ATPase_total_mitochondrial_adenosine_phosphate := F0_F1_ATPase_ATP_m + ADP_m;
  F0_F1_ATPase_ADP_m_free := 0.8*ADP_m;
  ATP_ADP_exchange_ATP4_i := 0.05*ATP_ADP_exchange_ATP_i;
  ATP_ADP_exchange_ATP4_m := 0.05*ATP_ADP_exchange_ATP_m;
  ATP_ADP_exchange_ADP3_i := 0.45*1*ATP_ADP_exchange_ADP_i;
  ATP_ADP_exchange_ADP3_m := 0.45*0.8*ADP_m;
  Na_Ca_exchanger_J_Na_Ca := Na_Ca_exchanger_Jmax_Na_Ca*(exp(Na_Ca_exchanger_b*F*(V - V_offset)/(R*T))/((1 + Na_Ca_exchanger_K_Na/Na_Ca_exchanger_Na_i)^Na_Ca_exchanger_n*(1 + Na_Ca_exchanger_K_Ca/Na_Ca_exchanger_Ca_m)));

  // Rate rules:
  V' = -1/membrane_Cmito*(JH_F1 + J_ant + JH_leak + J_uni*2 - JH_res);
  ADP_m' = J_ant - Jp_F1;
  Na_Ca_exchanger_Ca_m' = Na_Ca_exchanger_fm*(J_uni - Na_Ca_exchanger_J_Na_Ca);
end
