// SBML level 2 version 4

model magnus_keizer_1998_version01____main()
  // Originally created by libAntimony v1.3 (using libSBML 4.1.0-b2)

  // Compartments:
  compartment default_compartment = 1;

  // Parameters:
  V = ;
  R = 8314;
  T = 310;
  F = 96845;
  plasma_membrane_C = 6157;
  V_K = -75;
  delayed_rectifier_K_channel_current_g_K_dr = 5000;
  n = ;
  I = ;
  delayed_rectifier_K_channel_current_delayed_rectifier_K_channel_current_I_gate_tau_I = 2600;
  K_ATP_channel_current_g_K_ATP = 70000;
  K_ATP_channel_current_K_dd = 17;
  K_ATP_channel_current_K_td = 26;
  K_ATP_channel_current_K_tt = 1;
  ADP_i = ;
  g_Ca = 4116;
  k_minus_2 = 65;
  k_plus_3 = 0.02;
  k_minus_3 = 0.005;
  Ca_o = 2.5;
  fast_Ca_channel_current_tau_Ca_f = 1.3;
  C = ;
  B = ;
  J = ;
  slow_Ca_channel_current_slow_Ca_channel_current_J_gate_TJ = 50000;
  slow_Ca_channel_current_slow_Ca_channel_current_J_gate_Tmin = 1500;
  non_selective_cation_channel_current_K_NS = 0.5;
  non_selective_cation_channel_current_g_NS = 24;
  cytosolic_ADP_gamma1 = 1.53e-6;
  cytosolic_ADP_tau_hyd = 50;
  cytosolic_ADP_n_hyd = 2.7;
  cytosolic_ADP_k_hyd = 41;
  cytosolic_ADP_delta_J_hyd = ;
  cytosolic_ADP_delta_J_hyd_max = 30.1;
  cytosolic_ADP_K_glu = 8.7;
  Ca_i = ;
  cytosolic_Ca_gamma2 = 0.00153;
  cytosolic_Ca_alpha = 6.78e-6;
  cytosolic_Ca_k_Ca = 0.19;
  cytosolic_Ca_f_i = 0.01;
  delta_psi = 50;
  g_H = 0.2;
  mitochondrial_membrane_Cmito = 0.00145;
  proton_pump_K_res = 1.35e17;
  proton_pump_rho_res = 0.4;
  proton_pump_r1 = 2.077e-18;
  proton_pump_r2 = 1.728e-9;
  proton_pump_r3 = 1.059e-26;
  proton_pump_ra = 6.394e-10;
  proton_pump_rb = 1.762e-13;
  proton_pump_rc1 = 2.656e-19;
  proton_pump_rc2 = 8.632e-27;
  proton_pump_g = 0.85;
  NADH_m = ;
  F0_F1_ATPase_rho_F1 = 0.7;
  F0_F1_ATPase_K_F1 = 1710000;
  F0_F1_ATPase_Pi_m = 20;
  F0_F1_ATPase_p1 = 1.346e-8;
  F0_F1_ATPase_p2 = 7.739e-7;
  F0_F1_ATPase_p3 = 6.65e-15;
  F0_F1_ATPase_pa = 1.656e-5;
  F0_F1_ATPase_pb = 3.373e-7;
  F0_F1_ATPase_pc1 = 9.651e-14;
  F0_F1_ATPase_pc2 = 4.845e-19;
  ADP_m = ;
  mitochondrial_NADH_beta_max = 126;
  mitochondrial_NADH_beta1 = 1.66;
  mitochondrial_NADH_beta2 = 0.0249;
  mitochondrial_NADH_beta3 = 4;
  mitochondrial_NADH_beta4 = 2.83;
  mitochondrial_NADH_beta5 = 1.3;
  mitochondrial_NADH_beta6 = 2.66;
  mitochondrial_NADH_beta7 = 0.16;
  mitochondrial_NADH_u2 = 1.1;
  mitochondrial_NADH_u1 = 15;
  mitochondrial_NADH_J_red_basal = 20;
  mitochondrial_NADH_K_Ca2 = 0.05;
  Ca_m = ;
  ATP_ADP_exchange_Jmax_ANT = 1000;
  ATP_ADP_exchange_f = 0.5;
  delta_psi_offset = 91;
  Ca_uniporter_Jmax_uni = 400;
  Ca_uniporter_K_trans = 6;
  Ca_uniporter_K_act = 0.38;
  Ca_uniporter_L = 50;
  Ca_uniporter_na = 2.8;
  fm = 0.0003;
  NaCa_exchanger_Jmax_NaCa = 5.5;
  NaCa_exchanger_Na_i = 30;
  NaCa_exchanger_K_Na = 9.4;
  NaCa_exchanger_K_Ca = 0.003;
  NaCa_exchanger_b = 0.5;
  NaCa_exchanger_n = 3;
  time_ = ;
  k_plus_2 = ;
  glu = ;
  cytosolic_ADP_delta_J_gly_total = ;
  mitochondrial_membrane_pH_i = ;
  mitochondrial_membrane_pH_m = ;
  F0_F1_ATPase_ATP_m_free = ;
  ATP_ADP_exchange_ATP_m = ;
  mitochondrial_ADP_Jp_TCA = ;

  // Assignment rules:
  i_K_dr := delayed_rectifier_K_channel_current_g_K_dr*n*I*(V - V_K);
  i_K_ATP := K_ATP_channel_current_g_K_ATP*K_ATP_channel_current_O_K_ATP*(V - V_K);
  i_Ca_f := 0.27*g_Ca*O_f*(Ca_o*V/(1 - exp(2*F*V/(R*T))));
  i_Ca_s := 0.73*g_Ca*slow_Ca_channel_current_O_s*(Ca_o*V/(1 - exp(2*F*V/(R*T))));
  i_NS := non_selective_cation_channel_current_g_NS/(1 + non_selective_cation_channel_current_K_NS/ATP_i)*(Ca_o*V/(1 - exp(2*F*V/(R*T))));
  delayed_rectifier_K_channel_current_delayed_rectifier_K_channel_current_n_gate_n_infinity := 1/(1 + exp((-20 - V)/5.3));
  delayed_rectifier_K_channel_current_delayed_rectifier_K_channel_current_n_gate_tau_n := 50/(exp((V + 75)/65) + exp(-(V + 75)/20));
  delayed_rectifier_K_channel_current_delayed_rectifier_K_channel_current_I_gate_I_infinity := 1/(1 + exp((36 + V)/4.5));
  K_ATP_channel_current_O_K_ATP := (0.8*(1 + 2*K_ATP_channel_current_MgADP_i/K_ATP_channel_current_K_dd) + 0.89*(K_ATP_channel_current_MgADP_i/K_ATP_channel_current_K_dd)^2)/((1 + K_ATP_channel_current_MgADP_i/K_ATP_channel_current_K_dd)^2*(1 + ADP3_i/K_ATP_channel_current_K_td + ATP4_i/K_ATP_channel_current_K_tt));
  K_ATP_channel_current_MgADP_i := 0.55*0.3*ADP_i;
  ADP3_i := 0.45*0.3*ADP_i;
  ATP4_i := 0.05*ATP_i;
  O_f := 1 - (C + B);
  k_plus_1 := O_infinity/fast_Ca_channel_current_tau_Ca_f;
  k_minus_1 := (1 - O_infinity)/fast_Ca_channel_current_tau_Ca_f;
  Ca_d := -3.02/k_plus_2*(Ca_o*V/(1 - exp(2*F*V/(R*T))));
  O_infinity := 1/(1 + exp(-(15 + V)/6.2));
  slow_Ca_channel_current_O_s := J/(1 + exp(-(11 + V)/3.6));
  slow_Ca_channel_current_slow_Ca_channel_current_J_gate_J_infinity := 1/(1 + exp((V + 50)/6.3));
  slow_Ca_channel_current_slow_Ca_channel_current_J_gate_tau_J := slow_Ca_channel_current_slow_Ca_channel_current_J_gate_TJ/(exp((V + 50)/6.3) + exp(-(V + 50)/6.3)) + slow_Ca_channel_current_slow_Ca_channel_current_J_gate_Tmin;
  ATP_i := 2 - ADP_i;
  cytosolic_ADP_J_hyd := cytosolic_ADP_k_hyd*ATP_i + cytosolic_ADP_delta_J_hyd;
  cytosolic_ADP_delta_J_hyd_ss := cytosolic_ADP_delta_J_hyd_max/(1 + (cytosolic_ADP_K_glu/glu)^cytosolic_ADP_n_hyd);
  cytosolic_ADP_Jp_gly := 2*cytosolic_ADP_delta_J_gly_total;
  J_ANT := ATP_ADP_exchange_Jmax_ANT*((1 - ATP4_i*ATP_ADP_exchange_ADP3_m/(ADP3_i*ATP_ADP_exchange_ATP4_m)*exp(-F*V/(R*T)))/((1 + ATP4_i/ADP3_i*exp(-ATP_ADP_exchange_f*F*V/(R*T)))*(1 + ATP_ADP_exchange_ADP3_m/ATP_ADP_exchange_ATP4_m)));
  J_uni := Ca_uniporter_Jmax_uni*(Ca_i/Ca_uniporter_K_trans*(1 + Ca_i/Ca_uniporter_K_trans)^3/((1 + Ca_i/Ca_uniporter_K_trans)^4 - Ca_uniporter_L/(1 + Ca_i/Ca_uniporter_K_act)^Ca_uniporter_na))*(2*F*(V - delta_psi_offset)/(R*T)/(1 - exp(-2*F*(V - delta_psi_offset)/(R*T))));
  J_NaCa := NaCa_exchanger_Jmax_NaCa*(exp(NaCa_exchanger_b*F*(V - delta_psi_offset)/(R*T))/((1 + NaCa_exchanger_K_Na/NaCa_exchanger_Na_i)^NaCa_exchanger_n*(1 + NaCa_exchanger_K_Ca/Ca_m)));
  proton_motive_force := V - 2.303*R*T/F*delta_pH;
  delta_pH := mitochondrial_membrane_pH_i - mitochondrial_membrane_pH_m;
  JH_leak := g_H*proton_motive_force;
  JH_res := 360*proton_pump_rho_res*((proton_pump_ra*10^(6*delta_pH)*exp(F*proton_pump_A_res/(R*T)) + proton_pump_ra*10^(6*delta_pH) + (-((proton_pump_ra + proton_pump_rb)*exp(proton_pump_g*6*F*V/(R*T)))))/((1 + proton_pump_r1*exp(F*proton_pump_A_res/(R*T)))*exp(6*F*delta_psi/(R*T)) + (proton_pump_r2 + proton_pump_r3*exp(F*proton_pump_A_res/(R*T)))*exp(proton_pump_g*6*F*V/(R*T))));
  JH_F1 := -180*F0_F1_ATPase_rho_F1*((F0_F1_ATPase_pa*10^(3*delta_pH)*exp(F*F0_F1_ATPase_A_F1/(R*T)) + F0_F1_ATPase_pb*10^(3*delta_pH) + (-((F0_F1_ATPase_pa + F0_F1_ATPase_pb)*exp(3*F*V/(R*T)))))/((1 + F0_F1_ATPase_p1*exp(F*F0_F1_ATPase_A_F1/(R*T)))*exp(3*F*delta_psi/(R*T)) + (F0_F1_ATPase_p2 + F0_F1_ATPase_p3*exp(F*F0_F1_ATPase_A_F1/(R*T)))*exp(3*F*V/(R*T))));
  J_o := 30*proton_pump_rho_res*(((proton_pump_ra*10^(6*delta_pH) + proton_pump_rc1*exp(6*F*delta_psi/(R*T)))*exp(F*proton_pump_A_res/(R*T)) - proton_pump_ra*exp(proton_pump_g*6*F*V/(R*T)) + proton_pump_rc2*exp(F*proton_pump_A_res/(R*T))*exp(proton_pump_g*6*F*V/(R*T)))/((1 + proton_pump_r1*exp(F*proton_pump_A_res/(R*T)))*exp(6*F*delta_psi/(R*T)) + (proton_pump_r2 + proton_pump_r3*exp(F*proton_pump_A_res/(R*T)))*exp(proton_pump_g*6*F*V/(R*T))));
  proton_pump_A_res := R*T/F*ln(proton_pump_K_res*sqrt(NADH_m)/sqrt(NAD_m));
  NAD_m := 8 - NADH_m;
  Jp_F1 := -60*F0_F1_ATPase_rho_F1*(((F0_F1_ATPase_pa*10^(3*delta_pH) + F0_F1_ATPase_pc1*exp(3*F*delta_psi/(R*T)))*exp(F*F0_F1_ATPase_A_F1/(R*T)) - F0_F1_ATPase_pa*exp(3*F*V/(R*T)) + F0_F1_ATPase_pc2*exp(F*F0_F1_ATPase_A_F1/(R*T))*exp(3*F*V/(R*T)))/((1 + F0_F1_ATPase_p1*exp(F*F0_F1_ATPase_A_F1/(R*T)))*exp(3*F*delta_psi/(R*T)) + (F0_F1_ATPase_p2 + F0_F1_ATPase_p3*exp(F*F0_F1_ATPase_A_F1/(R*T)))*exp(3*F*V/(R*T))));
  F0_F1_ATPase_A_F1 := R*T/F*ln(F0_F1_ATPase_K_F1*ATP_m/(F0_F1_ATPase_ADP_m_free*F0_F1_ATPase_Pi_m));
  F0_F1_ATPase_ADP_m_free := 0.8*ADP_m;
  ATP_m := 12 - ADP_m;
  mitochondrial_NADH_J_red := mitochondrial_NADH_J_red_basal + mitochondrial_NADH_delta_J_red_I + 0.66*mitochondrial_NADH_delta_J_red_II;
  mitochondrial_NADH_delta_J_red_I := 4.52*mitochondrial_NADH_f_glu*mitochondrial_NADH_delta_J_gly_total;
  mitochondrial_NADH_delta_J_red_II := 2.84*mitochondrial_NADH_f_glu*mitochondrial_NADH_delta_J_gly_total;
  mitochondrial_NADH_delta_J_gly_total := mitochondrial_NADH_beta_max*mitochondrial_NADH_beta2*(1 + mitochondrial_NADH_beta1*glu)*glu*ATP_i/(1 + mitochondrial_NADH_beta3*ATP_i + (1 + mitochondrial_NADH_beta4*ATP_i)*mitochondrial_NADH_beta5*glu + (1 + mitochondrial_NADH_beta6*ATP_i)*mitochondrial_NADH_beta7*glu^2);
  mitochondrial_NADH_f_glu := mitochondrial_NADH_f_PDHa;
  mitochondrial_NADH_f_PDHa := 1/(1 + mitochondrial_NADH_u2*(1 + mitochondrial_NADH_u1*(1 + Ca_m/mitochondrial_NADH_K_Ca2)^(-2)));
  ATP_ADP_exchange_ATP4_m := 0.05*ATP_ADP_exchange_ATP_m;
  ATP_ADP_exchange_ADP3_m := 0.45*0.8*ADP_m;

  // Rate rules:
  V' = -(i_K_dr + i_K_ATP + i_Ca_f + i_Ca_s + i_NS)/plasma_membrane_C;
  n' = (delayed_rectifier_K_channel_current_delayed_rectifier_K_channel_current_n_gate_n_infinity - n)/delayed_rectifier_K_channel_current_delayed_rectifier_K_channel_current_n_gate_tau_n;
  I' = -((I - delayed_rectifier_K_channel_current_delayed_rectifier_K_channel_current_I_gate_I_infinity)/delayed_rectifier_K_channel_current_delayed_rectifier_K_channel_current_I_gate_tau_I);
  ADP_i' = cytosolic_ADP_gamma1*(cytosolic_ADP_J_hyd - (J_ANT + cytosolic_ADP_Jp_gly));
  C' = k_minus_1*(k_minus_2/(k_plus_2*Ca_d*V + k_minus_2))*O_f - k_plus_1*C;
  B' = k_plus_3*(k_plus_2*Ca_d*V/(k_plus_2*Ca_d*V + k_minus_2))*O_f - k_minus_3*B;
  J' = -((J - slow_Ca_channel_current_slow_Ca_channel_current_J_gate_J_infinity)/slow_Ca_channel_current_slow_Ca_channel_current_J_gate_tau_J);
  cytosolic_ADP_delta_J_hyd' = 1/cytosolic_ADP_tau_hyd*(cytosolic_ADP_delta_J_hyd_ss - cytosolic_ADP_delta_J_hyd);
  Ca_i' = cytosolic_Ca_f_i*(-cytosolic_Ca_alpha*(i_NS + i_Ca_f + i_Ca_s) - (cytosolic_Ca_gamma2*(J_uni - J_NaCa) + cytosolic_Ca_k_Ca*Ca_i));
  delta_psi' = -1/(60000*mitochondrial_membrane_Cmito)*(-JH_res + JH_F1 + J_ANT + JH_leak + J_uni*2 + J_NaCa);
  NADH_m' = 1/60000*(mitochondrial_NADH_J_red - J_o);
  ADP_m' = 1/60000*(J_ANT - (mitochondrial_ADP_Jp_TCA + Jp_F1));
  Ca_m' = fm/60000*(J_uni - J_NaCa);
end
