// SBML level 2 version 4

model mahajan_shiferaw_2008_version01____main()
  // Originally created by libAntimony v1.3 (using libSBML 4.1.0-b2)

  // Compartments:
  compartment default_compartment = 1;

  // Parameters:
  Environment_R = 8.314472;
  Environment_T = 308;
  F = 96.4853415;
  K_o = 5.4;
  Ca_o = 1.8;
  Na_o = 136;
  V = -87.16982;
  wca = 8;
  cell_stim_offset = 0;
  cell_stim_period = 400;
  cell_stim_duration = 3;
  cell_stim_amplitude = -15;
  INa_xm = 0.001075453;
  INa_xh = 0.9906913;
  INa_xj = 0.9938889;
  INa_gna = 12;
  Ca_dyad = 1.716573;
  ICaL_c1 = 1.8211252e-5;
  ICaL_c2 = 0.9793226;
  ICaL_xi1ca = 0.001208153;
  ICaL_xi1ba = 3.3616596e-5;
  ICaL_xi2ca = 0.004173008;
  ICaL_xi2ba = 0.01524259;
  ICaL_gca = 182;
  ICaL_pca = 0.00054;
  ICaL_vth = 0;
  ICaL_s6 = 8;
  ICaL_vx = -40;
  ICaL_sx = 3;
  ICaL_vy = -40;
  ICaL_sy = 4;
  ICaL_vyr = -40;
  ICaL_syr = 11.32;
  ICaL_cat = 3;
  ICaL_cpt = 6.09365;
  ICaL_k2 = 0.000103615;
  ICaL_k1t = 0.00413;
  ICaL_k2t = 0.00224;
  ICaL_r1 = 0.3;
  ICaL_r2 = 3;
  ICaL_s1t = 0.00195;
  ICaL_tca = 78.0329;
  ICaL_taupo = 1;
  ICaL_tau3 = 3;
  IK1_gkix = 0.3;
  IKr_xr = 0.007074239;
  IKr_gkr = 0.0125;
  Ca_i = 0.256752;
  IKs_gks = 0.1386;
  IKs_xs1 = 0.04826759;
  IKs_xs2 = 0.1054688;
  Ito_xtos = 0.00364776906;
  Ito_ytos = 0.1744036;
  Ito_xtof = 0.003643593;
  Ito_ytof = 0.9933313;
  Ito_gtos = 0.04;
  Ito_gtof = 0.11;
  Na_i = 11.44171;
  INaK_gNaK = 1.5;
  INaK_xkmko = 1.5;
  INaK_xkmnai = 12;
  Ca_submem = 0.2269411;
  INaCa_gNaCa = 0.84;
  INaCa_xkdna = 0.3;
  INaCa_xmcao = 1.3;
  INaCa_xmnao = 87.5;
  INaCa_xmnai = 12.3;
  INaCa_xmcai = 0.0036;
  Ca_NSR = 104.45;
  Irel_cstar = 90;
  Irel_Ca_JSR = 97.50546;
  Irel_gryr = 2.58079;
  Irel_gbarsr = 26841.8;
  Irel_gdyad = 9000;
  Irel_ax = 0.3576;
  Irel_ay = 0.05;
  Irel_av = 11.3;
  Irel_taua = 100;
  Irel_taur = 30;
  xir = 0.006679257;
  Ileak_Iup_Ixfer_cup = 0.5;
  Ileak_Iup_Ixfer_kj = 50;
  Ileak_Iup_Ixfer_vup = 0.4;
  Ileak_Iup_Ixfer_gleak = 2.069e-5;
  Ca_bcal = 24;
  Ca_xkcal = 7;
  Ca_srmax = 47;
  Ca_srkd = 0.6;
  Ca_bmem = 15;
  Ca_kmem = 0.3;
  Ca_bsar = 42;
  Ca_ksar = 13;
  Ca_xkon = 0.0327;
  Ca_xkoff = 0.0196;
  Ca_btrop = 70;
  Ca_tropi = 22.17169;
  Ca_trops = 19.8647;
  Ca_taud = 4;
  Ca_taups = 0.5;
  reversal_potentials_K_i = 140;
  reversal_potentials_prNaK = 0.01833;
  time_ = ;

  // Assignment rules:
  FonRT := F/(Environment_R*Environment_T);
  xik1 := IK1_gkix*sqrt(K_o/5.4)*IK1_xkin*(V - ek);
  xito := Ito_xitos + Ito_xitof;
  xiNaK := INaK_gNaK*INaK_fNaK*Na_i/(Na_i + INaK_xkmnai)*K_o/(K_o + INaK_xkmko);
  xiNaCa := wca*jNaCa;
  xica := 2*wca*jca;
  cell_Itotal := -(xina + xik1 + xikr + xiks + xito + xiNaCa + xica + xiNaK + i_Stim);
  xina := INa_gna*INa_xh*INa_xj*INa_xm*INa_xm*INa_xm*(V - ena);
  xikr := IKr_gkr*sqrt(K_o/5.4)*IKr_xr*IKr_rg*(V - ek);
  xiks := IKs_gks*IKs_gksx*IKs_xs1*IKs_xs2*(V - eks);
  i_Stim := ;
  cell_past := floor(time_/cell_stim_period)*cell_stim_period;
  ena := 1/FonRT*ln(Na_o/Na_i);
  INa_am := ;
  INa_bm := 0.08*exp(-V/11);
  INa_ah := ;
  INa_bh := ;
  INa_aj := ;
  INa_bj := ;
  csm := Ca_submem/1000;
  ICaL_za := V*2*FonRT;
  ICaL_poinf := 1/(1 + exp(-(V - ICaL_vth)/ICaL_s6));
  ICaL_fca := 1/(1 + (ICaL_cat/Ca_dyad)^3);
  ICaL_alpha := ICaL_poinf/ICaL_taupo;
  ICaL_beta := (1 - ICaL_poinf)/ICaL_taupo;
  ICaL_k1 := 0.024168*ICaL_fca;
  ICaL_k3 := (1 - ICaL_poi)/ICaL_tau3;
  ICaL_k3t := ICaL_k3;
  ICaL_k6 := ICaL_fca*ICaL_Ps/ICaL_tauca;
  ICaL_k5 := (1 - ICaL_Ps)/ICaL_tauca;
  ICaL_k6t := ICaL_Ps/ICaL_tauba;
  ICaL_k5t := (1 - ICaL_Ps)/ICaL_tauba;
  ICaL_k4 := ICaL_k3*ICaL_alpha/ICaL_beta*ICaL_k1/ICaL_k2*ICaL_k5/ICaL_k6;
  ICaL_k4t := ICaL_k3t*ICaL_alpha/ICaL_beta*ICaL_k1t/ICaL_k2t*ICaL_k5t/ICaL_k6t;
  ICaL_s1 := 0.0182688*ICaL_fca;
  ICaL_s2 := ICaL_s1*ICaL_r1/ICaL_r2*ICaL_k2/ICaL_k1;
  ICaL_s2t := ICaL_s1t*ICaL_r1/ICaL_r2*ICaL_k2t/ICaL_k1t;
  ICaL_recov := 10 + 4954*exp(V/15.6);
  ICaL_tau_ca := ICaL_tca/(1 + (Ca_dyad/ICaL_cpt)^4) + 0.1;
  ICaL_tauca := (ICaL_recov - ICaL_tau_ca)*ICaL_Pr + ICaL_tau_ca;
  ICaL_tauba := (ICaL_recov - 450)*ICaL_Pr + 450;
  ICaL_Pr := 1 - 1/(1 + exp(-(V - ICaL_vy)/ICaL_sy));
  ICaL_Ps := 1/(1 + exp(-(V - ICaL_vyr)/ICaL_syr));
  ICaL_poi := 1/(1 + exp(-(V - ICaL_vx)/ICaL_sx));
  po := 1 - ICaL_xi1ca - ICaL_xi2ca - ICaL_xi1ba - ICaL_xi2ba - ICaL_c1 - ICaL_c2;
  rxa := ;
  jca := ICaL_gca*po*rxa;
  ek := 1/FonRT*ln(K_o/reversal_potentials_K_i);
  IK1_aki := 1.02/(1 + exp(0.2385*(V - ek - 59.215)));
  IK1_bki := (0.49124*exp(0.08032*(V - ek + 5.476)) + 1*exp(0.06175*(V - ek - 594.31)))/(1 + exp(-0.5143*(V - ek + 4.753)));
  IK1_xkin := IK1_aki/(IK1_aki + IK1_bki);
  IKr_xkrv1 := ;
  IKr_xkrv2 := ;
  IKr_taukr := 1/(IKr_xkrv1 + IKr_xkrv2);
  IKr_xkrinf := 1/(1 + exp(-(V + 50)/7.5));
  IKr_rg := 1/(1 + exp((V + 33)/22.4));
  eks := 1/FonRT*ln((K_o + reversal_potentials_prNaK*Na_o)/(reversal_potentials_K_i + reversal_potentials_prNaK*Na_i));
  IKs_xs1ss := 1/(1 + exp(-(V - 1.5)/16.7));
  IKs_xs2ss := IKs_xs1ss;
  IKs_tauxs1 := ;
  IKs_tauxs2 := 4*IKs_tauxs1;
  IKs_gksx := 1 + 0.8/(1 + (0.5/Ca_i)^3);
  Ito_xitos := Ito_gtos*Ito_xtos*(Ito_ytos + 0.5*Ito_rs_inf)*(V - ek);
  Ito_xitof := Ito_gtof*Ito_xtof*Ito_ytof*(V - ek);
  Ito_rt1 := -(V + 3)/15;
  Ito_rt2 := (V + 33.5)/10;
  Ito_rt3 := (V + 60)/10;
  Ito_rt4 := -V/30*V/30;
  Ito_rt5 := (V + 33.5)/10;
  Ito_xtos_inf := 1/(1 + exp(Ito_rt1));
  Ito_ytos_inf := 1/(1 + exp(Ito_rt2));
  Ito_xtof_inf := Ito_xtos_inf;
  Ito_ytof_inf := Ito_ytos_inf;
  Ito_rs_inf := 1/(1 + exp(Ito_rt2));
  Ito_txs := 9/(1 + exp(-Ito_rt1)) + 0.5;
  Ito_tys := 3000/(1 + exp(Ito_rt3)) + 30;
  Ito_txf := 3.5*exp(Ito_rt4) + 1.5;
  Ito_tyf := 20/(1 + exp(Ito_rt5)) + 20;
  INaK_sigma := (exp(Na_o/67.3) - 1)/7;
  INaK_fNaK := 1/(1 + 0.1245*exp(-0.1*V*FonRT) + 0.0365*INaK_sigma*exp(-V*FonRT));
  INaCa_aloss := 1/(1 + (INaCa_xkdna/Ca_submem)^3);
  INaCa_yz1 := INaCa_xmcao*Na_i^3 + INaCa_xmnao^3*csm;
  INaCa_yz2 := INaCa_xmnai^3*Ca_o*(1 + csm/INaCa_xmcai);
  INaCa_yz3 := INaCa_xmcai*Na_o^3*(1 + (Na_i/INaCa_xmnai)^3);
  INaCa_yz4 := Na_i^3*Ca_o + Na_o^3*csm;
  INaCa_zw3 := Na_i^3*Ca_o*exp(V*0.35*FonRT) - Na_o^3*csm*exp(V*(0.35 - 1)*FonRT);
  INaCa_zw4 := 1 + 0.2*exp(V*(0.35 - 1)*FonRT);
  INaCa_zw8 := INaCa_yz1 + INaCa_yz2 + INaCa_yz3 + INaCa_yz4;
  jNaCa := INaCa_gNaCa*INaCa_aloss*INaCa_zw3/(INaCa_zw4*INaCa_zw8);
  dCa_JSR := -xir + jup - jleak;
  Irel_bv := (1 - Irel_av)*Irel_cstar - 50;
  Irel_Qr0 := ;
  Irel_Qr := Ca_NSR*Irel_Qr0/Irel_cstar;
  Irel_sparkV := exp(-Irel_ay*(V + 30))/(1 + exp(-Irel_ay*(V + 30)));
  Irel_spark_rate := Irel_gryr/1*po*abs(rxa)*Irel_sparkV;
  Irel_xirp := po*Irel_Qr*abs(rxa)*Irel_gbarsr/1*exp(-Irel_ax*(V + 30))/(1 + exp(-Irel_ax*(V + 30)));
  Irel_xicap := po*Irel_gdyad*abs(rxa);
  xiryr := Irel_xirp + Irel_xicap;
  jup := Ileak_Iup_Ixfer_vup*Ca_i*Ca_i/(Ca_i*Ca_i + Ileak_Iup_Ixfer_cup*Ileak_Iup_Ixfer_cup);
  jleak := Ileak_Iup_Ixfer_gleak*Ca_NSR*Ca_NSR/(Ca_NSR*Ca_NSR + Ileak_Iup_Ixfer_kj*Ileak_Iup_Ixfer_kj)*(Ca_NSR*16.667 - Ca_i);
  Ca_bpxs := Ca_bcal*Ca_xkcal/((Ca_xkcal + Ca_submem)*(Ca_xkcal + Ca_submem));
  Ca_spxs := Ca_srmax*Ca_srkd/((Ca_srkd + Ca_submem)*(Ca_srkd + Ca_submem));
  Ca_mempxs := Ca_bmem*Ca_kmem/((Ca_kmem + Ca_submem)*(Ca_kmem + Ca_submem));
  Ca_sarpxs := Ca_bsar*Ca_ksar/((Ca_ksar + Ca_submem)*(Ca_ksar + Ca_submem));
  Ca_dcsib := 1/(1 + Ca_bpxs + Ca_spxs + Ca_mempxs + Ca_sarpxs);
  Ca_bpxi := Ca_bcal*Ca_xkcal/((Ca_xkcal + Ca_i)*(Ca_xkcal + Ca_i));
  Ca_spxi := Ca_srmax*Ca_srkd/((Ca_srkd + Ca_i)*(Ca_srkd + Ca_i));
  Ca_mempxi := Ca_bmem*Ca_kmem/((Ca_kmem + Ca_i)*(Ca_kmem + Ca_i));
  Ca_sarpxi := Ca_bsar*Ca_ksar/((Ca_ksar + Ca_i)*(Ca_ksar + Ca_i));
  Ca_dciib := 1/(1 + Ca_bpxi + Ca_spxi + Ca_mempxi + Ca_sarpxi);
  Ca_xbi := Ca_xkon*Ca_i*(Ca_btrop - Ca_tropi) - Ca_xkoff*Ca_tropi;
  Ca_xbs := Ca_xkon*Ca_submem*(Ca_btrop - Ca_trops) - Ca_xkoff*Ca_trops;
  Ca_jd := (Ca_submem - Ca_i)/Ca_taud;

  // Rate rules:
  V' = cell_Itotal;
  INa_xm' = INa_am*(1 - INa_xm) - INa_bm*INa_xm;
  INa_xh' = INa_ah*(1 - INa_xh) - INa_bh*INa_xh;
  INa_xj' = INa_aj*(1 - INa_xj) - INa_bj*INa_xj;
  Ca_dyad' = xiryr - (Ca_dyad - Ca_submem)/Ca_taups;
  ICaL_c1' = ICaL_alpha*ICaL_c2 + ICaL_k2*ICaL_xi1ca + ICaL_k2t*ICaL_xi1ba + ICaL_r2*po - (ICaL_beta + ICaL_r1 + ICaL_k1t + ICaL_k1)*ICaL_c1;
  ICaL_c2' = ICaL_beta*ICaL_c1 + ICaL_k5*ICaL_xi2ca + ICaL_k5t*ICaL_xi2ba - (ICaL_k6 + ICaL_k6t + ICaL_alpha)*ICaL_c2;
  ICaL_xi1ca' = ICaL_k1*ICaL_c1 + ICaL_k4*ICaL_xi2ca + ICaL_s1*po - (ICaL_k3 + ICaL_k2 + ICaL_s2)*ICaL_xi1ca;
  ICaL_xi1ba' = ICaL_k1t*ICaL_c1 + ICaL_k4t*ICaL_xi2ba + ICaL_s1t*po - (ICaL_k3t + ICaL_k2t + ICaL_s2t)*ICaL_xi1ba;
  ICaL_xi2ca' = ICaL_k3*ICaL_xi1ca + ICaL_k6*ICaL_c2 - (ICaL_k5 + ICaL_k4)*ICaL_xi2ca;
  ICaL_xi2ba' = ICaL_k3t*ICaL_xi1ba + ICaL_k6t*ICaL_c2 - (ICaL_k5t + ICaL_k4t)*ICaL_xi2ba;
  IKr_xr' = (IKr_xkrinf - IKr_xr)/IKr_taukr;
  Ca_i' = Ca_dciib*(Ca_jd - jup + jleak - Ca_xbi);
  IKs_xs1' = (IKs_xs1ss - IKs_xs1)/IKs_tauxs1;
  IKs_xs2' = (IKs_xs2ss - IKs_xs2)/IKs_tauxs2;
  Ito_xtos' = (Ito_xtos_inf - Ito_xtos)/Ito_txs;
  Ito_ytos' = (Ito_ytos_inf - Ito_ytos)/Ito_tys;
  Ito_xtof' = (Ito_xtof_inf - Ito_xtof)/Ito_txf;
  Ito_ytof' = (Ito_ytof_inf - Ito_ytof)/Ito_tyf;
  Na_i' = -(xina + 3*xiNaK + 3*xiNaCa)/(wca*1000);
  Ca_submem' = Ca_dcsib*(50*(xir - Ca_jd - jca + jNaCa) - Ca_xbs);
  Ca_NSR' = dCa_JSR;
  Irel_Ca_JSR' = (Ca_NSR - Irel_Ca_JSR)/Irel_taua;
  xir' = Irel_spark_rate*Irel_Qr - xir*(1 - Irel_taur*dCa_JSR/Ca_NSR)/Irel_taur;
  Ca_tropi' = Ca_xbi;
  Ca_trops' = Ca_xbs;
end
