// SBML level 2 version 4

model Maleckar____main()
  // Originally created by libAntimony v1.4 (using libSBML 4.1.0-b2)

  // Compartments:
  compartment default_compartment = 1;

  // Parameters:
  V = -74.031982;
  R = 8314;
  T = 306.15;
  F = 96487;
  Cm = 50;
  membrane_stim_offset = 0;
  membrane_stim_period = 1;
  membrane_stim_duration = 0.006;
  membrane_stim_amplitude = -15;
  sodium_current_P_Na = 0.0018;
  Na_c = 130.022096;
  Na_i = 8.516766;
  m = 0.003289;
  h1 = 0.877202;
  h2 = 0.873881;
  L_type_Ca_channel_g_Ca_L = 6.75;
  L_type_Ca_channel_E_Ca_app = 60;
  L_type_Ca_channel_k_Ca = 0.025;
  Ca_d = 7.1e-5;
  d_L = 1.4e-5;
  f_L1 = 0.998597;
  f_L2 = 0.998586;
  Ca_independent_transient_outward_K_current_g_t = 8.25;
  K_c = 5.560224;
  K_i = 129.485991;
  r = 0.001089;
  s = 0.948597;
  ultra_rapid_K_current_g_kur = 2.25;
  a_ur = 0.000367;
  i_ur = 0.96729;
  inward_rectifier_g_K1 = 3.1;
  delayed_rectifier_K_currents_g_Ks = 1;
  delayed_rectifier_K_currents_g_Kr = 0.5;
  n = 0.004374;
  pa = 5.3e-5;
  background_currents_g_B_Na = 0.060599;
  background_currents_g_B_Ca = 0.078681;
  Ca_c = 1.815768;
  Ca_i = 6.5e-5;
  sodium_potassium_pump_K_NaK_K = 1;
  sodium_potassium_pump_i_NaK_max = 68.55;
  sodium_potassium_pump_pow_K_NaK_Na_15 = 36.4829;
  sarcolemmal_calcium_pump_current_i_CaP_max = 4;
  sarcolemmal_calcium_pump_current_k_CaP = 0.0002;
  Na_Ca_ion_exchanger_current_K_NaCa = 0.0374842;
  Na_Ca_ion_exchanger_current_d_NaCa = 0.0003;
  Na_Ca_ion_exchanger_current_gamma_Na = 0.45;
  ACh_dependent_K_current_ACh = 1e-24;
  phi_Na_en = 0;
  Vol_i = 0.005884;
  intracellular_ion_concentrations_Vol_d = 0.00011768;
  intracellular_ion_concentrations_tau_di = 0.01;
  intracellular_Ca_buffering_O_C = 0.026766;
  intracellular_Ca_buffering_O_TC = 0.012922;
  intracellular_Ca_buffering_O_TMgC = 0.190369;
  intracellular_Ca_buffering_O_TMgMg = 0.714463;
  intracellular_Ca_buffering_O = 1.38222;
  intracellular_Ca_buffering_Mg_i = 2.5;
  cleft_space_ion_concentrations_Vol_c = 0.000800224;
  cleft_space_ion_concentrations_tau_Na = 14.3;
  cleft_space_ion_concentrations_tau_K = 10;
  cleft_space_ion_concentrations_tau_Ca = 24.7;
  cleft_space_ion_concentrations_Na_b = 130;
  cleft_space_ion_concentrations_Ca_b = 1.8;
  cleft_space_ion_concentrations_K_b = 5.4;
  Ca_handling_by_the_SR_I_up_max = 2800;
  Ca_handling_by_the_SR_k_cyca = 0.0003;
  Ca_handling_by_the_SR_k_srca = 0.5;
  Ca_handling_by_the_SR_k_xcs = 0.4;
  Ca_handling_by_the_SR_alpha_rel = 200000;
  Ca_handling_by_the_SR_Ca_rel = 0.632613;
  Ca_handling_by_the_SR_Ca_up = 0.649195;
  Ca_handling_by_the_SR_Vol_up = 0.0003969;
  Ca_handling_by_the_SR_Vol_rel = 4.41e-5;
  Ca_handling_by_the_SR_r_recov = 0.815;
  Ca_handling_by_the_SR_O_Calse = 0.431547;
  Ca_handling_by_the_SR_F1 = 0.470055;
  Ca_handling_by_the_SR_F2 = 0.002814;
  Ca_handling_by_the_SR_tau_tr = 0.01;
  Ca_handling_by_the_SR_k_rel_i = 0.0003;
  Ca_handling_by_the_SR_k_rel_d = 0.003;
  time_ = ;

  // Assignment rules:
  membrane_Q_tot := 0.05*V;
  i_Na := sodium_current_P_Na*m*m*m*(0.9*h1 + 0.1*h2)*Na_c*V*F*F/(R*T)*(exp((V - E_Na)*F/(R*T)) - 1)/(exp(V*F/(R*T)) - 1);
  i_Ca_L := L_type_Ca_channel_g_Ca_L*d_L*(L_type_Ca_channel_f_Ca*f_L1 + (1 - L_type_Ca_channel_f_Ca)*f_L2)*(V - L_type_Ca_channel_E_Ca_app);
  i_t := Ca_independent_transient_outward_K_current_g_t*r*s*(V - E_K);
  i_Kur := ultra_rapid_K_current_g_kur*a_ur*i_ur*(V - E_K);
  i_K1 := inward_rectifier_g_K1*(K_c/1)^0.4457*(V - E_K)/(1 + exp(1.5*(V - E_K + 3.6)*F/(R*T)));
  i_Kr := delayed_rectifier_K_currents_g_Kr*pa*pip*(V - E_K);
  i_Ks := delayed_rectifier_K_currents_g_Ks*n*(V - E_K);
  i_B_Na := background_currents_g_B_Na*(V - E_Na);
  i_B_Ca := background_currents_g_B_Ca*(V - background_currents_E_Ca);
  i_NaK := sodium_potassium_pump_i_NaK_max*K_c/(K_c + sodium_potassium_pump_K_NaK_K)*sodium_potassium_pump_pow_Na_i_15/(sodium_potassium_pump_pow_Na_i_15 + sodium_potassium_pump_pow_K_NaK_Na_15)*(V + 150)/(V + 200);
  i_CaP := sarcolemmal_calcium_pump_current_i_CaP_max*Ca_i/(Ca_i + sarcolemmal_calcium_pump_current_k_CaP);
  i_NaCa := Na_Ca_ion_exchanger_current_K_NaCa*(Na_i*Na_i*Na_i*Ca_c*exp(F*V*Na_Ca_ion_exchanger_current_gamma_Na/(R*T)) - Na_c*Na_c*Na_c*Ca_i*exp((Na_Ca_ion_exchanger_current_gamma_Na - 1)*V*F/(R*T)))/(1 + Na_Ca_ion_exchanger_current_d_NaCa*(Na_c*Na_c*Na_c*Ca_i + Na_i*Na_i*Na_i*Ca_c));
  i_KACh := 10/(1 + 9.13652*1^0.477811/ACh_dependent_K_current_ACh^0.477811)*(0.0517 + 0.4516/(1 + exp((V + 59.53)/17.18)))*(V - E_K)*Cm;
  membrane_I := (i_Na + i_Ca_L + i_t + i_Kur + i_K1 + i_Kr + i_Ks + i_B_Na + i_B_Ca + i_NaK + i_CaP + i_NaCa + i_KACh)/Cm + i_Stim;
  i_Stim := ;
  membrane_past := floor(time_/membrane_stim_period)*membrane_stim_period;
  E_Na := R*T/F*ln(Na_c/Na_i);
  sodium_current_sodium_current_m_gate_m_infinity := 1/(1 + exp((V + 27.12)/(-8.21)));
  sodium_current_sodium_current_m_gate_m_factor := (V + 25.57)/28.8;
  sodium_current_sodium_current_m_gate_tau_m := 4.2e-5*exp(-sodium_current_sodium_current_m_gate_m_factor*sodium_current_sodium_current_m_gate_m_factor) + 2.4e-5;
  sodium_current_h_infinity := 1/(1 + exp((V + 63.6)/5.3));
  sodium_current_h_factor := 1/(1 + exp((V + 35.1)/3.2));
  sodium_current_sodium_current_h1_gate_tau_h1 := 0.03*sodium_current_h_factor + 0.0003;
  sodium_current_sodium_current_h2_gate_tau_h2 := 0.12*sodium_current_h_factor + 0.003;
  L_type_Ca_channel_f_Ca := Ca_d/(Ca_d + L_type_Ca_channel_k_Ca);
  L_type_Ca_channel_L_type_Ca_channel_d_L_gate_d_L_infinity := 1/(1 + exp((V + 9)/(-5.8)));
  L_type_Ca_channel_L_type_Ca_channel_d_L_gate_d_L_factor := (V + 35)/30;
  L_type_Ca_channel_L_type_Ca_channel_d_L_gate_tau_d_L := 0.0027*exp(-L_type_Ca_channel_L_type_Ca_channel_d_L_gate_d_L_factor*L_type_Ca_channel_L_type_Ca_channel_d_L_gate_d_L_factor) + 0.002;
  L_type_Ca_channel_f_L_infinity := 1/(1 + exp((V + 27.4)/7.1));
  L_type_Ca_channel_f_L_factor := V + 40;
  L_type_Ca_channel_L_type_Ca_channel_f_L1_gate_tau_f_L1 := 0.161*exp(-L_type_Ca_channel_f_L_factor*L_type_Ca_channel_f_L_factor/14.4/14.4) + 0.01;
  L_type_Ca_channel_L_type_Ca_channel_f_L2_gate_tau_f_L2 := 1.3323*exp(-L_type_Ca_channel_f_L_factor*L_type_Ca_channel_f_L_factor/14.2/14.2) + 0.0626;
  E_K := R*T/F*ln(K_c/K_i);
  Ca_independent_transient_outward_K_current_Ca_independent_transient_outward_K_current_r_gate_tau_r := 0.0035*exp(-V*V/30/30) + 0.0015;
  Ca_independent_transient_outward_K_current_Ca_independent_transient_outward_K_current_r_gate_r_infinity := 1/(1 + exp((V - 1)/(-11)));
  Ca_independent_transient_outward_K_current_Ca_independent_transient_outward_K_current_s_gate_tau_s := 0.025635*exp(-Ca_independent_transient_outward_K_current_Ca_independent_transient_outward_K_current_s_gate_s_factor*Ca_independent_transient_outward_K_current_Ca_independent_transient_outward_K_current_s_gate_s_factor) + 0.01414;
  Ca_independent_transient_outward_K_current_Ca_independent_transient_outward_K_current_s_gate_s_infinity := 1/(1 + exp((V + 40.5)/11.5));
  Ca_independent_transient_outward_K_current_Ca_independent_transient_outward_K_current_s_gate_s_factor := (V + 52.45)/15.8827;
  ultra_rapid_K_current_ultra_rapid_K_current_aur_gate_a_ur_infinity := 1/(1 + exp(-(V + 6)/8.6));
  ultra_rapid_K_current_ultra_rapid_K_current_aur_gate_tau_a_ur := 0.009/(1 + exp((V + 5)/12)) + 0.0005;
  ultra_rapid_K_current_ultra_rapid_K_current_iur_gate_i_ur_infinity := 1/(1 + exp((V + 7.5)/10));
  ultra_rapid_K_current_ultra_rapid_K_current_iur_gate_tau_i_ur := 0.59/(1 + exp((V + 60)/10)) + 3.05;
  pip := 1/(1 + exp((V + 55)/24));
  delayed_rectifier_K_currents_delayed_rectifier_K_currents_n_gate_tau_n := 0.7 + 0.4*exp(-delayed_rectifier_K_currents_delayed_rectifier_K_currents_n_gate_n_factor*delayed_rectifier_K_currents_delayed_rectifier_K_currents_n_gate_n_factor);
  delayed_rectifier_K_currents_delayed_rectifier_K_currents_n_gate_n_infinity := 1/(1 + exp((V - 19.9)/(-12.7)));
  delayed_rectifier_K_currents_delayed_rectifier_K_currents_n_gate_n_factor := (V - 20)/20;
  delayed_rectifier_K_currents_delayed_rectifier_K_currents_pa_gate_tau_pa := 0.03118 + 0.21718*exp(-delayed_rectifier_K_currents_delayed_rectifier_K_currents_pa_gate_pa_factor*delayed_rectifier_K_currents_delayed_rectifier_K_currents_pa_gate_pa_factor);
  delayed_rectifier_K_currents_delayed_rectifier_K_currents_pa_gate_pa_factor := (V + 20.1376)/22.1996;
  delayed_rectifier_K_currents_delayed_rectifier_K_currents_pa_gate_p_a_infinity := 1/(1 + exp((V + 15)/(-6)));
  background_currents_E_Ca := R*T/(2*F)*ln(Ca_c/Ca_i);
  sodium_potassium_pump_pow_Na_i_15 := Na_i^1.5;
  intracellular_ion_concentrations_i_di := (Ca_d - Ca_i)*2*intracellular_ion_concentrations_Vol_d*F/intracellular_ion_concentrations_tau_di;
  i_up := Ca_handling_by_the_SR_I_up_max*(Ca_i/Ca_handling_by_the_SR_k_cyca - Ca_handling_by_the_SR_k_xcs*Ca_handling_by_the_SR_k_xcs*Ca_handling_by_the_SR_Ca_up/Ca_handling_by_the_SR_k_srca)/((Ca_i + Ca_handling_by_the_SR_k_cyca)/Ca_handling_by_the_SR_k_cyca + Ca_handling_by_the_SR_k_xcs*(Ca_handling_by_the_SR_Ca_up + Ca_handling_by_the_SR_k_srca)/Ca_handling_by_the_SR_k_srca);
  i_rel := Ca_handling_by_the_SR_alpha_rel*Ca_handling_by_the_SR_i_rel_factor*(Ca_handling_by_the_SR_Ca_rel - Ca_i);
  J_O := 0.08*intracellular_Ca_buffering_J_O_TC + 0.16*intracellular_Ca_buffering_J_O_TMgC + 0.045*intracellular_Ca_buffering_J_O_C;
  intracellular_Ca_buffering_J_O_C := 200000*Ca_i*(1 - intracellular_Ca_buffering_O_C) - 476*intracellular_Ca_buffering_O_C;
  intracellular_Ca_buffering_J_O_TC := 78400*Ca_i*(1 - intracellular_Ca_buffering_O_TC) - 392*intracellular_Ca_buffering_O_TC;
  intracellular_Ca_buffering_J_O_TMgC := 200000*Ca_i*(1 - intracellular_Ca_buffering_O_TMgC - intracellular_Ca_buffering_O_TMgMg) - 6.6*intracellular_Ca_buffering_O_TMgC;
  intracellular_Ca_buffering_J_O_TMgMg := 2000*intracellular_Ca_buffering_Mg_i*(1 - intracellular_Ca_buffering_O_TMgC - intracellular_Ca_buffering_O_TMgMg) - 666*intracellular_Ca_buffering_O_TMgMg;
  Ca_handling_by_the_SR_i_tr := (Ca_handling_by_the_SR_Ca_up - Ca_handling_by_the_SR_Ca_rel)*2*Ca_handling_by_the_SR_Vol_rel*F/Ca_handling_by_the_SR_tau_tr;
  Ca_handling_by_the_SR_r_act := 203.8*(Ca_handling_by_the_SR_r_Ca_i_factor + Ca_handling_by_the_SR_r_Ca_d_factor);
  Ca_handling_by_the_SR_r_inact := 33.96 + 339.6*Ca_handling_by_the_SR_r_Ca_i_factor;
  Ca_handling_by_the_SR_r_Ca_d_term := Ca_d/(Ca_d + Ca_handling_by_the_SR_k_rel_d);
  Ca_handling_by_the_SR_r_Ca_i_term := Ca_i/(Ca_i + Ca_handling_by_the_SR_k_rel_i);
  Ca_handling_by_the_SR_r_Ca_d_factor := Ca_handling_by_the_SR_r_Ca_d_term*Ca_handling_by_the_SR_r_Ca_d_term*Ca_handling_by_the_SR_r_Ca_d_term*Ca_handling_by_the_SR_r_Ca_d_term;
  Ca_handling_by_the_SR_r_Ca_i_factor := Ca_handling_by_the_SR_r_Ca_i_term*Ca_handling_by_the_SR_r_Ca_i_term*Ca_handling_by_the_SR_r_Ca_i_term*Ca_handling_by_the_SR_r_Ca_i_term;
  Ca_handling_by_the_SR_i_rel_f2 := Ca_handling_by_the_SR_F2/(Ca_handling_by_the_SR_F2 + 0.25);
  Ca_handling_by_the_SR_i_rel_factor := Ca_handling_by_the_SR_i_rel_f2*Ca_handling_by_the_SR_i_rel_f2;
  Ca_handling_by_the_SR_J_O_Calse := 480*Ca_handling_by_the_SR_Ca_rel*(1 - Ca_handling_by_the_SR_O_Calse) - 400*Ca_handling_by_the_SR_O_Calse;

  // Rate rules:
  V' = -membrane_I*1000;
  Na_c' = (cleft_space_ion_concentrations_Na_b - Na_c)/cleft_space_ion_concentrations_tau_Na + (i_Na + i_B_Na + 3*i_NaCa + 3*i_NaK + phi_Na_en)/(cleft_space_ion_concentrations_Vol_c*F);
  Na_i' = -(i_Na + i_B_Na + 3*i_NaCa + 3*i_NaK + phi_Na_en)/(Vol_i*F);
  m' = (sodium_current_sodium_current_m_gate_m_infinity - m)/sodium_current_sodium_current_m_gate_tau_m;
  h1' = (sodium_current_h_infinity - h1)/sodium_current_sodium_current_h1_gate_tau_h1;
  h2' = (sodium_current_h_infinity - h2)/sodium_current_sodium_current_h2_gate_tau_h2;
  Ca_d' = -(i_Ca_L + intracellular_ion_concentrations_i_di)/(2*intracellular_ion_concentrations_Vol_d*F);
  d_L' = (L_type_Ca_channel_L_type_Ca_channel_d_L_gate_d_L_infinity - d_L)/L_type_Ca_channel_L_type_Ca_channel_d_L_gate_tau_d_L;
  f_L1' = (L_type_Ca_channel_f_L_infinity - f_L1)/L_type_Ca_channel_L_type_Ca_channel_f_L1_gate_tau_f_L1;
  f_L2' = (L_type_Ca_channel_f_L_infinity - f_L2)/L_type_Ca_channel_L_type_Ca_channel_f_L2_gate_tau_f_L2;
  K_c' = (cleft_space_ion_concentrations_K_b - K_c)/cleft_space_ion_concentrations_tau_K + (i_t + i_Kur + i_K1 + i_Ks + i_Kr - 2*i_NaK)/(cleft_space_ion_concentrations_Vol_c*F);
  K_i' = -(i_t + i_Kur + i_K1 + i_Ks + i_Kr - 2*i_NaK + i_Stim*Cm)/(Vol_i*F);
  r' = (Ca_independent_transient_outward_K_current_Ca_independent_transient_outward_K_current_r_gate_r_infinity - r)/Ca_independent_transient_outward_K_current_Ca_independent_transient_outward_K_current_r_gate_tau_r;
  s' = (Ca_independent_transient_outward_K_current_Ca_independent_transient_outward_K_current_s_gate_s_infinity - s)/Ca_independent_transient_outward_K_current_Ca_independent_transient_outward_K_current_s_gate_tau_s;
  a_ur' = (ultra_rapid_K_current_ultra_rapid_K_current_aur_gate_a_ur_infinity - a_ur)/ultra_rapid_K_current_ultra_rapid_K_current_aur_gate_tau_a_ur;
  i_ur' = (ultra_rapid_K_current_ultra_rapid_K_current_iur_gate_i_ur_infinity - i_ur)/ultra_rapid_K_current_ultra_rapid_K_current_iur_gate_tau_i_ur;
  n' = (delayed_rectifier_K_currents_delayed_rectifier_K_currents_n_gate_n_infinity - n)/delayed_rectifier_K_currents_delayed_rectifier_K_currents_n_gate_tau_n;
  pa' = (delayed_rectifier_K_currents_delayed_rectifier_K_currents_pa_gate_p_a_infinity - pa)/delayed_rectifier_K_currents_delayed_rectifier_K_currents_pa_gate_tau_pa;
  Ca_c' = (cleft_space_ion_concentrations_Ca_b - Ca_c)/cleft_space_ion_concentrations_tau_Ca + (i_Ca_L + i_B_Ca + i_CaP - 2*i_NaCa)/(2*cleft_space_ion_concentrations_Vol_c*F);
  Ca_i' = -(i_B_Ca + i_CaP + i_up - (intracellular_ion_concentrations_i_di + i_rel + 2*i_NaCa))/(2*Vol_i*F) - 1*J_O;
  intracellular_Ca_buffering_O_C' = intracellular_Ca_buffering_J_O_C;
  intracellular_Ca_buffering_O_TC' = intracellular_Ca_buffering_J_O_TC;
  intracellular_Ca_buffering_O_TMgC' = intracellular_Ca_buffering_J_O_TMgC;
  intracellular_Ca_buffering_O_TMgMg' = intracellular_Ca_buffering_J_O_TMgMg;
  intracellular_Ca_buffering_O' = J_O;
  Ca_handling_by_the_SR_Ca_rel' = (Ca_handling_by_the_SR_i_tr - i_rel)/(2*Ca_handling_by_the_SR_Vol_rel*F) - 31*Ca_handling_by_the_SR_J_O_Calse;
  Ca_handling_by_the_SR_Ca_up' = (i_up - Ca_handling_by_the_SR_i_tr)/(2*Ca_handling_by_the_SR_Vol_up*F);
  Ca_handling_by_the_SR_O_Calse' = Ca_handling_by_the_SR_J_O_Calse;
  Ca_handling_by_the_SR_F1' = Ca_handling_by_the_SR_r_recov*(1 - Ca_handling_by_the_SR_F1 - Ca_handling_by_the_SR_F2) - Ca_handling_by_the_SR_r_act*Ca_handling_by_the_SR_F1;
  Ca_handling_by_the_SR_F2' = Ca_handling_by_the_SR_r_act*Ca_handling_by_the_SR_F1 - Ca_handling_by_the_SR_r_inact*Ca_handling_by_the_SR_F2;
end
