// SBML level 2 version 4

model maltsev_2009____main()
  // Originally created by libAntimony v1.3 (using libSBML 4.1.0-b2)

  // Compartments:
  compartment default_compartment = 1;

  // Parameters:
  Vm0 = -57.96393;
  Cm = 32;
  R = 8314.4;
  T = 310.15;
  F = 96485;
  Nai = 10;
  Nao = 140;
  Ki = 140;
  Ko = 5.4;
  E_CaL = 45;
  i_CaL_g_CaL = 0.464;
  Ca_sub = 0.0001381126;
  dL = 0.0005845456;
  fL = 0.8623812;
  fCa = 0.7113959;
  i_CaL_i_CaL_fCa_gate_alpha_fCa = 0.021;
  i_CaL_i_CaL_fCa_gate_Km_fCa = 0.00035;
  i_CaT_g_CaT = 0.1832;
  i_CaT_E_CaT = 45;
  dT = 0.005043934;
  fT = 0.4207578;
  i_Kr_g_Kr = 0.08113973;
  paS = 0.4531006;
  paF = 0.1447551;
  pi_ = 0.8494098;
  i_Ks_g_Ks = 0.0259;
  n = 0.02646004;
  AP_sensitive_currents_g_to = 0.252;
  AP_sensitive_currents_g_sus = 0.02;
  q = 0.6942413;
  r = 0.005581317;
  i_f_g_if = 0.15;
  y = 0.1136432;
  i_f_i_f_y_gate_VIf_half = -64;
  i_st_g_st = 0.003;
  i_st_E_st = 37.4;
  qa = 0.4238024;
  qi = 0.447294;
  i_b_Na_g_b_Na = 0.00486;
  i_NaK_Km_Kp = 1.4;
  i_NaK_Km_Nap = 14;
  i_NaK_i_NaK_max = 2.88;
  i_b_Ca_g_b_Ca = 0.0006;
  i_NaCa_kNaCa = 187.5;
  i_NaCa_Qci = 0.1369;
  i_NaCa_Qn = 0.4315;
  i_NaCa_Qco = 0;
  i_NaCa_K3ni = 26.44;
  i_NaCa_Kci = 0.0207;
  i_NaCa_K1ni = 395.3;
  i_NaCa_K2ni = 2.289;
  i_NaCa_Kcni = 26.44;
  i_NaCa_K3no = 4.663;
  i_NaCa_K1no = 1628;
  i_NaCa_K2no = 561.4;
  i_NaCa_Kco = 3.663;
  Cao = 2;
  j_SRCarel_R = 0.6880478;
  j_SRCarel_O = 1.73402e-7;
  j_SRCarel_I = 7.861817e-8;
  j_SRCarel_RI = 0.311952;
  j_SRCarel_ks = 250000;
  j_SRCarel_MaxSR = 15;
  j_SRCarel_MinSR = 1;
  j_SRCarel_EC50_SR = 0.45;
  j_SRCarel_HSR = 2.5;
  j_SRCarel_koCa = 10;
  j_SRCarel_kiCa = 0.5;
  j_SRCarel_kim = 0.005;
  j_SRCarel_kom = 0.06;
  Ca_jsr = 0.3167627;
  intracellular_calcium_fluxes_tau_dif_Ca = 0.04;
  intracellular_calcium_fluxes_tau_tr = 40;
  intracellular_calcium_fluxes_P_up = 0.012;
  intracellular_calcium_fluxes_K_up = 0.0006;
  Ca_nsr = 1.493481;
  Cai = 0.0001500187;
  TC_tot = 0.031;
  TMC_tot = 0.062;
  CM_tot = 0.045;
  CQ_tot = 10;
  calcium_buffering_fTMM = 0.5010494;
  calcium_buffering_fCMi = 0.05948809;
  calcium_buffering_fCMs = 0.05438137;
  calcium_buffering_fTC = 0.02913162;
  calcium_buffering_fTMC = 0.432695;
  calcium_buffering_fCQ = 0.2732071;
  calcium_buffering_kf_TC = 88.8;
  calcium_buffering_kf_TMM = 2.277;
  calcium_buffering_kf_TMC = 227.7;
  calcium_buffering_kf_CM = 227.7;
  calcium_buffering_kf_CQ = 0.534;
  calcium_buffering_kb_TC = 0.446;
  calcium_buffering_kb_TMC = 0.00751;
  calcium_buffering_kb_TMM = 0.751;
  calcium_buffering_kb_CM = 0.542;
  calcium_buffering_kb_CQ = 0.445;
  Mgi = 2.5;
  model_parameters_V_jsr_part = 0.0012;
  model_parameters_V_i_part = 0.46;
  model_parameters_V_nsr_part = 0.0116;
  model_parameters_R_cell = 4;
  model_parameters_L_cell = 70;
  model_parameters_L_sub = 0.02;
  time_ = ;

  // Assignment rules:
  i_CaT0 := Cm*i_CaT_g_CaT*(Vm0 - i_CaT_E_CaT)*dT*fT;
  i_CaL0 := Cm*i_CaL_g_CaL*(Vm0 - E_CaL)*dL*fL*fCa;
  i_f0 := i_f_Na + i_f_K;
  i_st0 := Cm*i_st_g_st*(Vm0 - i_st_E_st)*qa*qi;
  i_Kr0 := Cm*i_Kr_g_Kr*(Vm0 - E_K)*(0.6*paF + 0.4*paS)*pi_;
  i_Ks0 := Cm*i_Ks_g_Ks*(Vm0 - E_Ks)*n^2;
  i_to := Cm*AP_sensitive_currents_g_to*(Vm0 - E_K)*q*r;
  i_sus := Cm*AP_sensitive_currents_g_sus*(Vm0 - E_K)*r;
  i_NaK0 := Cm*i_NaK_i_NaK_max/((1 + (i_NaK_Km_Kp/Ko)^1.2)*(1 + (i_NaK_Km_Nap/Nai)^1.3)*(1 + exp(-(Vm0 - E_Na + 120)/30)));
  i_NaCa0 := Cm*i_NaCa_kNaCa*(i_NaCa_x2*i_NaCa_k21 - i_NaCa_x1*i_NaCa_k12)/(i_NaCa_x1 + i_NaCa_x2 + i_NaCa_x3 + i_NaCa_x4);
  i_b_Ca0 := Cm*i_b_Ca_g_b_Ca*(Vm0 - E_CaL);
  i_b_Na0 := Cm*i_b_Na_g_b_Na*(Vm0 - E_Na);
  E_Na := R*T/F*ln(Nao/Nai);
  E_K := R*T/F*ln(Ko/Ki);
  E_Ks := R*T/F*ln((Ko + 0.12*Nao)/(Ki + 0.12*Nai));
  i_CaL_i_CaL_dL_gate_dL_infinity := 1/(1 + exp(-(Vm0 + 13.5)/6));
  i_CaL_i_CaL_dL_gate_tau_dL := 1/(i_CaL_i_CaL_dL_gate_alpha_dL + i_CaL_i_CaL_dL_gate_beta_dL);
  i_CaL_i_CaL_dL_gate_alpha_dL := -0.02839*(i_CaL_i_CaL_dL_gate_adVm + 35)/(exp(-(i_CaL_i_CaL_dL_gate_adVm + 35)/2.5) - 1) - 0.0849*i_CaL_i_CaL_dL_gate_adVm/(exp(-i_CaL_i_CaL_dL_gate_adVm/4.8) - 1);
  i_CaL_i_CaL_dL_gate_beta_dL := 0.01143*(i_CaL_i_CaL_dL_gate_bdVm - 5)/(exp((i_CaL_i_CaL_dL_gate_bdVm - 5)/2.5) - 1);
  i_CaL_i_CaL_dL_gate_adVm := ;
  i_CaL_i_CaL_dL_gate_bdVm := ;
  i_CaL_i_CaL_fL_gate_fL_infinity := 1/(1 + exp((Vm0 + 35)/7.3));
  i_CaL_i_CaL_fL_gate_tau_fL := 44.3 + 257.1*exp(-((Vm0 + 32.5)/13.9)^2);
  i_CaL_i_CaL_fCa_gate_fCa_infinity := i_CaL_i_CaL_fCa_gate_Km_fCa/(i_CaL_i_CaL_fCa_gate_Km_fCa + Ca_sub);
  i_CaL_i_CaL_fCa_gate_tau_fCa := i_CaL_i_CaL_fCa_gate_fCa_infinity/i_CaL_i_CaL_fCa_gate_alpha_fCa;
  i_CaT_i_CaT_dT_gate_dT_infinity := 1/(1 + exp(-(Vm0 + 26.3)/6));
  i_CaT_i_CaT_dT_gate_tau_dT := 1/(1.068*exp((Vm0 + 26.3)/30) + 1.068*exp(-(Vm0 + 26.3)/30));
  i_CaT_i_CaT_fT_gate_fT_infinity := 1/(1 + exp((Vm0 + 61.7)/5.6));
  i_CaT_i_CaT_fT_gate_tau_fT := 1/(0.0153*exp(-(Vm0 + 61.7)/83.3) + 0.015*exp((Vm0 + 61.7)/15.38));
  i_Kr_i_Kr_pa_gate_pa_infinity := 1/(1 + exp(-(Vm0 + 23.2)/10.6));
  i_Kr_i_Kr_pa_gate_tau_paS := 0.84655354/(0.0042*exp(Vm0/17) + 0.00015*exp(-Vm0/21.6));
  i_Kr_i_Kr_pa_gate_tau_paF := 0.84655354/(0.0372*exp(Vm0/15.9) + 0.00096*exp(-Vm0/22.5));
  i_Kr_i_Kr_pi_gate_pi_infinity := 1/(1 + exp((Vm0 + 28.6)/17.1));
  i_Kr_i_Kr_pi_gate_tau_pi := 1/(0.1*exp(-Vm0/54.645) + 0.656*exp(Vm0/106.157));
  i_Ks_i_Ks_n_gate_n_infinity := i_Ks_i_Ks_n_gate_alpha_n/(i_Ks_i_Ks_n_gate_alpha_n + i_Ks_i_Ks_n_gate_beta_n);
  i_Ks_i_Ks_n_gate_tau_n := 1/(i_Ks_i_Ks_n_gate_alpha_n + i_Ks_i_Ks_n_gate_beta_n);
  i_Ks_i_Ks_n_gate_alpha_n := 0.014/(1 + exp(-(Vm0 - 40)/9));
  i_Ks_i_Ks_n_gate_beta_n := 0.001*exp(-Vm0/45);
  AP_sensitive_currents_AP_sensitive_currents_q_gate_q_infinity := 1/(1 + exp((Vm0 + 49)/13));
  AP_sensitive_currents_AP_sensitive_currents_q_gate_tau_q := 6.06 + 39.102/(0.57*exp(-0.08*(Vm0 + 44)) + 0.065*exp(0.1*(Vm0 + 45.93)));
  AP_sensitive_currents_AP_sensitive_currents_r_gate_r_infinity := 1/(1 + exp(-(Vm0 - 19.3)/15));
  AP_sensitive_currents_AP_sensitive_currents_r_gate_tau_r := 2.75352 + 14.40516/(1.037*exp(0.09*(Vm0 + 30.61)) + 0.369*exp(-0.12*(Vm0 + 23.84)));
  i_f_Na := Cm*0.3833*i_f_g_if*(Vm0 - E_Na)*y^2;
  i_f_K := Cm*0.6167*i_f_g_if*(Vm0 - E_K)*y^2;
  i_f_i_f_y_gate_y_infinity := 1/(1 + exp((Vm0 - i_f_i_f_y_gate_VIf_half)/13.5));
  i_f_i_f_y_gate_tau_y := 0.7166529/(exp(-(Vm0 + 386.9)/45.302) + exp((Vm0 - 73.08)/19.231));
  i_st_i_st_qa_gate_qa_infinity := 1/(1 + exp(-(Vm0 + 57)/5));
  i_st_i_st_qa_gate_tau_qa := 1/(i_st_i_st_qa_gate_alpha_qa + i_st_i_st_qa_gate_beta_qa);
  i_st_i_st_qa_gate_alpha_qa := 1/(0.15*exp(-Vm0/11) + 0.2*exp(-Vm0/700));
  i_st_i_st_qa_gate_beta_qa := 1/(16*exp(Vm0/8) + 15*exp(Vm0/50));
  i_st_i_st_qi_gate_qi_infinity := i_st_i_st_qi_gate_alpha_qi/(i_st_i_st_qi_gate_alpha_qi + i_st_i_st_qi_gate_beta_qi);
  i_st_i_st_qi_gate_tau_qi := 6.65/(i_st_i_st_qi_gate_alpha_qi + i_st_i_st_qi_gate_beta_qi);
  i_st_i_st_qi_gate_alpha_qi := 1/(3100*exp(Vm0/13) + 700*exp(Vm0/70));
  i_st_i_st_qi_gate_beta_qi := 1/(95*exp(-Vm0/10) + 50*exp(-Vm0/700)) + 0.000229/(1 + exp(-Vm0/5));
  i_NaCa_x1 := i_NaCa_k41*i_NaCa_k34*(i_NaCa_k23 + i_NaCa_k21) + i_NaCa_k21*i_NaCa_k32*(i_NaCa_k43 + i_NaCa_k41);
  i_NaCa_x2 := i_NaCa_k32*i_NaCa_k43*(i_NaCa_k14 + i_NaCa_k12) + i_NaCa_k41*i_NaCa_k12*(i_NaCa_k34 + i_NaCa_k32);
  i_NaCa_x3 := i_NaCa_k14*i_NaCa_k43*(i_NaCa_k23 + i_NaCa_k21) + i_NaCa_k12*i_NaCa_k23*(i_NaCa_k43 + i_NaCa_k41);
  i_NaCa_x4 := i_NaCa_k23*i_NaCa_k34*(i_NaCa_k14 + i_NaCa_k12) + i_NaCa_k14*i_NaCa_k21*(i_NaCa_k34 + i_NaCa_k32);
  i_NaCa_k41 := exp(-i_NaCa_Qn*Vm0/(2*i_NaCa_RTOnF));
  i_NaCa_k34 := Nao/(i_NaCa_K3no + Nao);
  i_NaCa_k23 := Nao/i_NaCa_K1no*Nao/i_NaCa_K2no*(1 + Nao/i_NaCa_K3no)*exp(-i_NaCa_Qn*Vm0/(2*i_NaCa_RTOnF))/i_NaCa_do;
  i_NaCa_k21 := Cao/i_NaCa_Kco*exp(i_NaCa_Qco*Vm0/i_NaCa_RTOnF)/i_NaCa_do;
  i_NaCa_k32 := exp(i_NaCa_Qn*Vm0/(2*i_NaCa_RTOnF));
  i_NaCa_k43 := Nai/(i_NaCa_K3ni + Nai);
  i_NaCa_k12 := Ca_sub/i_NaCa_Kci*exp(-i_NaCa_Qci*Vm0/i_NaCa_RTOnF)/i_NaCa_di;
  i_NaCa_k14 := Nai/i_NaCa_K1ni*Nai/i_NaCa_K2ni*(1 + Nai/i_NaCa_K3ni)*exp(i_NaCa_Qn*Vm0/(2*i_NaCa_RTOnF))/i_NaCa_di;
  i_NaCa_RTOnF := R*T/F;
  i_NaCa_do := 1 + Cao/i_NaCa_Kco*(1 + exp(i_NaCa_Qco*Vm0/i_NaCa_RTOnF)) + Nao/i_NaCa_K1no*(1 + Nao/i_NaCa_K2no*(1 + Nao/i_NaCa_K3no));
  i_NaCa_di := 1 + Ca_sub/i_NaCa_Kci*(1 + exp(-i_NaCa_Qci*Vm0/i_NaCa_RTOnF) + Nai/i_NaCa_Kcni) + Nai/i_NaCa_K1ni*(1 + Nai/i_NaCa_K2ni*(1 + Nai/i_NaCa_K3ni));
  j_SRCarel0 := j_SRCarel_ks*j_SRCarel_O*(Ca_jsr - Ca_sub);
  j_SRCarel_koSRCa := j_SRCarel_koCa/j_SRCarel_kCaSR;
  j_SRCarel_kiSRCa := j_SRCarel_kiCa*j_SRCarel_kCaSR;
  j_SRCarel_kCaSR := j_SRCarel_MaxSR - (j_SRCarel_MaxSR - j_SRCarel_MinSR)/(1 + (j_SRCarel_EC50_SR/Ca_jsr)^j_SRCarel_HSR);
  j_Ca_dif := (Ca_sub - Cai)/intracellular_calcium_fluxes_tau_dif_Ca;
  j_up := intracellular_calcium_fluxes_P_up/(1 + intracellular_calcium_fluxes_K_up/Cai);
  j_tr := (Ca_nsr - Ca_jsr)/intracellular_calcium_fluxes_tau_tr;
  delta_fTC := calcium_buffering_kf_TC*Cai*(1 - calcium_buffering_fTC) - calcium_buffering_kb_TC*calcium_buffering_fTC;
  delta_fTMC := calcium_buffering_kf_TMC*Cai*(1 - (calcium_buffering_fTMC + calcium_buffering_fTMM)) - calcium_buffering_kb_TMC*calcium_buffering_fTMC;
  delta_fCMs := calcium_buffering_kf_CM*Ca_sub*(1 - calcium_buffering_fCMs) - calcium_buffering_kb_CM*calcium_buffering_fCMs;
  delta_fCMi := calcium_buffering_kf_CM*Cai*(1 - calcium_buffering_fCMi) - calcium_buffering_kb_CM*calcium_buffering_fCMi;
  delta_fCQ := calcium_buffering_kf_CQ*Ca_jsr*(1 - calcium_buffering_fCQ) - calcium_buffering_kb_CQ*calcium_buffering_fCQ;
  calcium_buffering_delta_fTMM := calcium_buffering_kf_TMM*Mgi*(1 - (calcium_buffering_fTMC + calcium_buffering_fTMM)) - calcium_buffering_kb_TMM*calcium_buffering_fTMM;
  V_i := model_parameters_V_i_part*model_parameters_V_cell - V_sub;
  V_jsr := model_parameters_V_jsr_part*model_parameters_V_cell;
  V_nsr := model_parameters_V_nsr_part*model_parameters_V_cell;
  V_sub := 0.001*2*pi*model_parameters_L_sub*(model_parameters_R_cell - model_parameters_L_sub/2)*model_parameters_L_cell;
  model_parameters_V_cell := 0.001*pi*model_parameters_R_cell^2*model_parameters_L_cell;

  // Rate rules:
  Vm0' = -(i_CaL0 + i_CaT0 + i_f0 + i_st0 + i_Kr0 + i_Ks0 + i_to + i_sus + i_NaK0 + i_NaCa0 + i_b_Ca0 + i_b_Na0)/Cm;
  Ca_sub' = j_SRCarel0*V_jsr/V_sub - ((i_CaL0 + i_CaT0 + i_b_Ca0 - 2*i_NaCa0)/(2*F*V_sub) + j_Ca_dif + CM_tot*delta_fCMs);
  dL' = (i_CaL_i_CaL_dL_gate_dL_infinity - dL)/i_CaL_i_CaL_dL_gate_tau_dL;
  fL' = (i_CaL_i_CaL_fL_gate_fL_infinity - fL)/i_CaL_i_CaL_fL_gate_tau_fL;
  fCa' = (i_CaL_i_CaL_fCa_gate_fCa_infinity - fCa)/i_CaL_i_CaL_fCa_gate_tau_fCa;
  dT' = (i_CaT_i_CaT_dT_gate_dT_infinity - dT)/i_CaT_i_CaT_dT_gate_tau_dT;
  fT' = (i_CaT_i_CaT_fT_gate_fT_infinity - fT)/i_CaT_i_CaT_fT_gate_tau_fT;
  paS' = (i_Kr_i_Kr_pa_gate_pa_infinity - paS)/i_Kr_i_Kr_pa_gate_tau_paS;
  paF' = (i_Kr_i_Kr_pa_gate_pa_infinity - paF)/i_Kr_i_Kr_pa_gate_tau_paF;
  pi_' = (i_Kr_i_Kr_pi_gate_pi_infinity - pi_)/i_Kr_i_Kr_pi_gate_tau_pi;
  n' = (i_Ks_i_Ks_n_gate_n_infinity - n)/i_Ks_i_Ks_n_gate_tau_n;
  q' = (AP_sensitive_currents_AP_sensitive_currents_q_gate_q_infinity - q)/AP_sensitive_currents_AP_sensitive_currents_q_gate_tau_q;
  r' = (AP_sensitive_currents_AP_sensitive_currents_r_gate_r_infinity - r)/AP_sensitive_currents_AP_sensitive_currents_r_gate_tau_r;
  y' = (i_f_i_f_y_gate_y_infinity - y)/i_f_i_f_y_gate_tau_y;
  qa' = (i_st_i_st_qa_gate_qa_infinity - qa)/i_st_i_st_qa_gate_tau_qa;
  qi' = (i_st_i_st_qi_gate_qi_infinity - qi)/i_st_i_st_qi_gate_tau_qi;
  j_SRCarel_R' = j_SRCarel_kim*j_SRCarel_RI - j_SRCarel_kiSRCa*Ca_sub*j_SRCarel_R - (j_SRCarel_koSRCa*Ca_sub^2*j_SRCarel_R - j_SRCarel_kom*j_SRCarel_O);
  j_SRCarel_O' = j_SRCarel_koSRCa*Ca_sub^2*j_SRCarel_R - j_SRCarel_kom*j_SRCarel_O - (j_SRCarel_kiSRCa*Ca_sub*j_SRCarel_O - j_SRCarel_kim*j_SRCarel_I);
  j_SRCarel_I' = j_SRCarel_kiSRCa*Ca_sub*j_SRCarel_O - j_SRCarel_kim*j_SRCarel_I - (j_SRCarel_kom*j_SRCarel_I - j_SRCarel_koSRCa*Ca_sub^2*j_SRCarel_RI);
  j_SRCarel_RI' = j_SRCarel_kom*j_SRCarel_I - j_SRCarel_koSRCa*Ca_sub^2*j_SRCarel_RI - (j_SRCarel_kim*j_SRCarel_RI - j_SRCarel_kiSRCa*Ca_sub*j_SRCarel_R);
  Ca_jsr' = j_tr - (j_SRCarel0 + CQ_tot*delta_fCQ);
  Ca_nsr' = j_up - j_tr*V_jsr/V_nsr;
  Cai' = (j_Ca_dif*V_sub - j_up*V_nsr)/V_i - (CM_tot*delta_fCMi + TC_tot*delta_fTC + TMC_tot*delta_fTMC);
  calcium_buffering_fTMM' = calcium_buffering_delta_fTMM;
  calcium_buffering_fCMi' = delta_fCMi;
  calcium_buffering_fCMs' = delta_fCMs;
  calcium_buffering_fTC' = delta_fTC;
  calcium_buffering_fTMC' = delta_fTMC;
  calcium_buffering_fCQ' = delta_fCQ;
end
