// SBML level 2 version 4

model marhl_2000____main()
  // Originally created by libAntimony v1.4 (using libSBML 4.1.0-b2)

  // Compartments:
  compartment default_compartment = 1;

  // Parameters:
  total_calcium_Ca_tot = 90;
  rho_ER = 0.01;
  beta_ER = 0.0025;
  rho_m = 0.01;
  beta_m = 0.0025;
  Ca_cyt = 0.05;
  Ca_ER = 1;
  Ca_m = 0.4;
  total_protein_Pr_tot = 120;
  cytosolic_calcium_k_plus = 0.1;
  cytosolic_calcium_k_minus = 0.01;
  ATP_dependent_Ca_uptake_into_the_ER_k_pump = 20;
  Ca_efflux_from_the_ER_k_ch = 4100;
  Ca_efflux_from_the_ER_K1 = 5;
  Ca_leak_flux_from_the_ER_k_leak = 0.05;
  mitochondrial_Ca_uptake_k_in = 300;
  mitochondrial_Ca_uptake_K2 = 0.8;
  mitochondrial_Ca_release_k_out = 125;
  mitochondrial_Ca_release_k_m = 0.00625;
  mitochondrial_Ca_release_K3 = 5;
  time_ = ;

  // Assignment rules:
  Ca_Pr := total_calcium_Ca_tot - (Ca_cyt + rho_ER/beta_ER*Ca_ER + rho_m/beta_m*Ca_m);
  Pr := total_protein_Pr_tot - Ca_Pr;
  J_ch := Ca_efflux_from_the_ER_k_ch*(Ca_cyt^2/(Ca_efflux_from_the_ER_K1^2 + Ca_cyt^2))*(Ca_ER - Ca_cyt);
  J_leak := Ca_leak_flux_from_the_ER_k_leak*(Ca_ER - Ca_cyt);
  J_pump := ATP_dependent_Ca_uptake_into_the_ER_k_pump*Ca_cyt;
  J_out := (mitochondrial_Ca_release_k_out*(Ca_cyt^2/(mitochondrial_Ca_release_K3^2 + Ca_cyt^2)) + mitochondrial_Ca_release_k_m)*Ca_m;
  J_in := mitochondrial_Ca_uptake_k_in*(Ca_cyt^8/(mitochondrial_Ca_uptake_K2^8 + Ca_cyt^8));

  // Rate rules:
  Ca_cyt' = J_ch + J_leak + J_out + cytosolic_calcium_k_minus*Ca_Pr - (J_pump + J_in + cytosolic_calcium_k_plus*Ca_cyt*Pr);
  Ca_ER' = beta_ER/rho_ER*(J_pump - (J_ch + J_leak));
  Ca_m' = beta_m/rho_m*(J_in - J_out);
end
