// SBML level 2 version 4

model marwan_2003_version01____main()
  // Originally created by libAntimony v1.4 (using libSBML 4.1.0-b2)

  // Compartments:
  compartment default_compartment = 1;

  // Parameters:
  Pfr0 = 10;
  Pr0 = 0;
  Ifr_sigma_fr_phi_fr = 0.1;
  Ir_sigma_r_phi_r = 0;
  Pr_kd = 0.1;
  Xi0 = 6;
  Xa0 = 0;
  kia = 0.1;
  kai = 0.8;
  prepreS0 = 200;
  kx = 0.2;
  preS0 = 0;
  Ya0 = 0.9;
  ky = 1;
  S0 = 0;
  S_alpha1 = 30;
  V0 = 50;
  V_alpha2 = 50;
  Ya_kG = 0.1;
  glucose = 1;
  time_ = ;

  // Rate rules:
  Pfr0' = Ir_sigma_r_phi_r*Pr0 - Ifr_sigma_fr_phi_fr*Pfr0;
  Pr0' = Ifr_sigma_fr_phi_fr*Pr0 - (Ir_sigma_r_phi_r*Pr0 + Pr_kd*Pr0);
  Xi0' = kai*Xa0 - kia*Pr0*Xi0;
  Xa0' = kia*Pr0*Xi0 - kai*Xa0;
  prepreS0' = -(kx*Xa0*prepreS0);
  preS0' = kx*Xa0*prepreS0 - ky*Ya0*preS0;
  Ya0' = -(Ya_kG*glucose*Ya0);
  S0' = ky*Ya0*preS0 + S_alpha1/(1 + V0^3) - S0;
  V0' = V_alpha2/(1 + S0^3) - V0;
end
