// SBML level 2 version 4

model maurya_2005____main()
  // Originally created by libAntimony v1.4 (using libSBML 4.1.0-b2)

  // Compartments:
  compartment default_compartment = 1;

  // Parameters:
  A = 0;
  G = 0;
  GA = 0;
  T = 0.000468;
  R = 0;
  GT_ = 0;
  GD = 1e-8;
  Pi_ = 0.0044;
  D = 0.000149;
  RG = 0;
  RGT = 0;
  GAT = 0;
  GAD = 0;
  RGD = 0;
  RGA = 0;
  RGAT = 0;
  RGAD = 0;
  output_G_tot = 1e-8;
  k1 = 0.013;
  k10 = 25;
  k11 = 0.013;
  k12 = 25;
  T1_k1 = 529000;
  D1_k1 = 0.0001;
  T3_k1 = 853000;
  R2_k2 = 1.28;
  A2_k1 = 386000;
  A3_k2 = 0.95;
  R3_k1 = 94700000;
  D3_k1 = 2;
  D2_k1 = 0.0001;
  R4_k1 = 22800000;
  T4_k1 = 1620000;
  A5_k1 = 6300000;
  D4_k1 = 2.75;
  time_ = ;

  // Assignment rules:
  A20 := A2_k1*GT_*A;
  A30 := -A3_k2*GAD;
  A50 := A5_k1*RGT*A;
  R20 := -R2_k2*RGT;
  R30 := R3_k1*GD*R;
  R40 := R4_k1*GA*R;
  T10 := T1_k1*G*T;
  T30 := T3_k1*RG*T;
  T40 := T4_k1*RGA*T;
  P10 := k1*GT_;
  P20 := k10*GAT;
  P30 := k11*RGT;
  P40 := k12*RGAT;
  D10 := D1_k1*GD;
  D20 := D2_k1*GAD;
  D30 := D3_k1*RGD;
  D40 := D4_k1*RGAD;
  output_Z := (GT_ + RGT + RGAT + GAT)/output_G_tot;
  output_v := (k12*RGAT + k10*GAT + k11*RGT + k1*GT_)/output_G_tot;

  // Rate rules:
  A' = -(A20 + A30 + A50);
  G' = D10 - T10;
  GA' = D20 - R40;
  T' = -(T10 + T30 + T40);
  R' = -(R20 + R30 + R40);
  GT_' = T10 - P10 - R20 - A20;
  GD' = P10 - D10 - A30 - R30;
  Pi_' = P10 + P30 + P20 + P40;
  D' = D10 + D30 + D20 + D40;
  RG' = -T30 + D30;
  RGT' = T30 + R20 - P30 - A50;
  GAT' = A20 - P20;
  GAD' = A30 + P20 - D20;
  RGD' = R30 + P30 - D30;
  RGA' = R40 - T40 + D40;
  RGAT' = T40 + A50 - P40;
  RGAD' = P40 - D40;
end
