// SBML level 2 version 4

model mazhari_greenstein_winslow_marban_nuss_2001_version01____main()
  // Originally created by libAntimony v1.4 (using libSBML 4.1.0-b2)

  // Compartments:
  compartment default_compartment = 1;

  // Parameters:
  Vm = -80;
  C10 = ;
  C20 = ;
  Kf = 0.0266;
  Kb = 0.1348;
  C30 = ;
  I0 = ;
  O0 = ;
  time_ = ;

  // Assignment rules:
  alpha_0 := 0.0069*exp(0.0272*Vm);
  beta_0 := 0.0227*exp(-0.0431*Vm);
  alpha_1 := 0.0218*exp(0.0262*Vm);
  beta_1 := 0.0009*exp(-0.0269*Vm);
  alpha_i3 := 1.29e-5*exp(2.71e-6*Vm);
  psi := beta_1*beta_i*alpha_i3/(alpha_1*alpha_i);
  alpha_i := 0.0622*exp(0.012*Vm);
  beta_i := 0.0059*exp(-0.0443*Vm);

  // Rate rules:
  C10' = beta_0*C20 - alpha_0*C10;
  C20' = alpha_0*C10 + Kb*C30 - (beta_0*C20 + Kf*C20);
  C30' = beta_1*O0 + Kf*C20 + psi*I0 - (alpha_i3*C30 + alpha_1*C30 + Kb*C30);
  I0' = alpha_i*O0 + alpha_i3*C30 - (beta_i*I0 + psi*I0);
  O0' = alpha_1*C30 + beta_i*I0 - (beta_1*O0 + alpha_i*O0);
end
