// SBML level 2 version 4

model mcallister_noble_tsien_1975_modelA____main()
  // Originally created by libAntimony v1.3 (using libSBML 4.1.0-b2)

  // Compartments:
  compartment default_compartment = 1;

  // Parameters:
  V = -78.041367;
  membrane_C = 10;
  E_Na = 40;
  fast_sodium_current_g_Na = 150;
  m = 0.02566853;
  h = 0.78656359;
  secondary_inward_current_g_si = 0.8;
  secondary_inward_current_g_si_ = 0.04;
  secondary_inward_current_E_si = 70;
  d = 0.00293135;
  f = 0.80873917;
  pacemaker_potassium_current_E_K = -110;
  s = 0.75473994;
  pacemaker_potassium_current_pacemaker_potassium_current_s_gate_E_s = -52;
  x1 = 0.02030289;
  x2 = 0.0176854;
  E_Cl = -70;
  transient_chloride_current_g_qr = 2.5;
  q = 3.11285794;
  r = 0.13500116;
  time_independent_outward_current_E_K1 = -30;
  sodium_background_current_g_Nab = 0.105;
  chloride_background_current_g_Clb = 0.01;
  time_ = ;

  // Assignment rules:
  i_Na := fast_sodium_current_g_Na*m^3*h*(V - E_Na);
  i_si := secondary_inward_current_g_si*d*f*(V - secondary_inward_current_E_si) + secondary_inward_current_g_si_*d1*(V - secondary_inward_current_E_si);
  i_K2 := I_K2*s;
  i_x1 := x1*plateau_potassium_current1_I_x1;
  i_x2 := x2*plateau_potassium_current2_I_x2;
  i_qr := transient_chloride_current_g_qr*q*r*(V - E_Cl);
  i_K1 := I_K2/2.8 + 0.2*(V - time_independent_outward_current_E_K1)/(1 - exp(-(V - time_independent_outward_current_E_K1)/25));
  i_Na_b := sodium_background_current_g_Nab*(V - E_Na);
  i_Cl_b := chloride_background_current_g_Clb*(V - E_Cl);
  fast_sodium_current_fast_sodium_current_m_gate_alpha_m := 1*(V + 47)/(1 - exp(-(V + 47)/10));
  fast_sodium_current_fast_sodium_current_m_gate_beta_m := 40*exp(-0.056*(V + 72));
  fast_sodium_current_fast_sodium_current_h_gate_alpha_h := 0.0085*exp(-0.184*(V + 71));
  fast_sodium_current_fast_sodium_current_h_gate_beta_h := 2.5/(exp(-0.082*(V + 10)) + 1);
  d1 := 1/(1 + exp(-0.15*(V + 40)));
  secondary_inward_current_secondary_inward_current_d_gate_alpha_d := 0.002*(V + 40)/(1 - exp(-0.1*(V + 40)));
  secondary_inward_current_secondary_inward_current_d_gate_beta_d := 0.02*exp(-0.0888*(V + 40));
  secondary_inward_current_secondary_inward_current_f_gate_alpha_f := 0.000987*exp(-0.04*(V + 60));
  secondary_inward_current_secondary_inward_current_f_gate_beta_f := 0.02/(exp(-0.087*(V + 26)) + 1);
  I_K2 := 2.8*(exp((V - pacemaker_potassium_current_E_K)/25) - 1)/(exp((V + 60)/12.5) + exp((V + 60)/25));
  pacemaker_potassium_current_pacemaker_potassium_current_s_gate_alpha_s := 0.001*(V - pacemaker_potassium_current_pacemaker_potassium_current_s_gate_E_s)/(1 - exp(-0.2*(V - pacemaker_potassium_current_pacemaker_potassium_current_s_gate_E_s)));
  pacemaker_potassium_current_pacemaker_potassium_current_s_gate_beta_s := 5e-5*exp(-0.067*(V - pacemaker_potassium_current_pacemaker_potassium_current_s_gate_E_s));
  plateau_potassium_current1_I_x1 := 1.2*(exp((V + 95)/25) - 1)/exp((V + 45)/25);
  plateau_potassium_current1_plateau_potassium_current1_x1_gate_alpha_x1 := 5e-4*exp((V + 50)/12.1)/(1 + exp((V + 50)/17.5));
  plateau_potassium_current1_plateau_potassium_current1_x1_gate_beta_x1 := 0.0013*exp(-(V + 20)/16.67)/(1 + exp(-(V + 20)/25));
  plateau_potassium_current2_I_x2 := 25 + 1*0.385*V;
  plateau_potassium_current2_plateau_potassium_current2_x2_gate_alpha_x2 := 0.000127*1/(1 + exp(-(V + 19)/5));
  plateau_potassium_current2_plateau_potassium_current2_x2_gate_beta_x2 := 0.0003*exp(-(V + 20)/16.67)/(1 + exp(-(V + 20)/25));
  transient_chloride_current_transient_chloride_current_q_gate_alpha_q := 0.008*V/(1 - exp(-0.1*V));
  transient_chloride_current_transient_chloride_current_q_gate_beta_q := 0.08*exp(-0.0888*V);
  transient_chloride_current_transient_chloride_current_r_gate_alpha_r := 0.00018*exp(-0.04*(V + 80));
  transient_chloride_current_transient_chloride_current_r_gate_beta_r := 0.02/(exp(-0.087*(V + 26)) + 1);

  // Rate rules:
  V' = -(i_Na + i_si + i_K2 + i_x1 + i_x2 + i_qr + i_K1 + i_Na_b + i_Cl_b)/membrane_C;
  m' = fast_sodium_current_fast_sodium_current_m_gate_alpha_m*(1 - m) - fast_sodium_current_fast_sodium_current_m_gate_beta_m*m;
  h' = fast_sodium_current_fast_sodium_current_h_gate_alpha_h*(1 - h) - fast_sodium_current_fast_sodium_current_h_gate_beta_h*h;
  d' = secondary_inward_current_secondary_inward_current_d_gate_alpha_d*(1 - d) - secondary_inward_current_secondary_inward_current_d_gate_beta_d*d;
  f' = secondary_inward_current_secondary_inward_current_f_gate_alpha_f*(1 - f) - secondary_inward_current_secondary_inward_current_f_gate_beta_f*f;
  s' = pacemaker_potassium_current_pacemaker_potassium_current_s_gate_alpha_s*(1 - s) - pacemaker_potassium_current_pacemaker_potassium_current_s_gate_beta_s*s;
  x1' = plateau_potassium_current1_plateau_potassium_current1_x1_gate_alpha_x1*(1 - x1) - plateau_potassium_current1_plateau_potassium_current1_x1_gate_beta_x1*x1;
  x2' = plateau_potassium_current2_plateau_potassium_current2_x2_gate_alpha_x2*(1 - x2) - plateau_potassium_current2_plateau_potassium_current2_x2_gate_beta_x2*x2;
  q' = transient_chloride_current_transient_chloride_current_q_gate_alpha_q*(1 - q) - transient_chloride_current_transient_chloride_current_q_gate_beta_q*q;
  r' = transient_chloride_current_transient_chloride_current_r_gate_alpha_r*(1 - r) - transient_chloride_current_transient_chloride_current_r_gate_beta_r*r;
end
