// SBML level 2 version 4

model mears_1997____main()
  // Originally created by libAntimony v1.4 (using libSBML 4.1.0-b2)

  // Compartments:
  compartment default_compartment = 1;

  // Parameters:
  V = -61;
  membrane_Cm = 6158;
  V_K = -70;
  K_current_g_K = 3900;
  n = 0.0005;
  K_current_K_channel_n_gate_Vn = -15;
  K_current_K_channel_n_gate_Sn = 6;
  K_current_K_channel_n_gate_lambda_n = 1.85;
  K_ATP_current_g_K_ATP = 150;
  V_Ca = 100;
  fast_Ca_current_g_Ca_f = 810;
  fast_Ca_current_fast_Ca_channel_m_gate_Vm_f = -20;
  fast_Ca_current_fast_Ca_channel_m_gate_Sm_f = 7.5;
  slow_Ca_current_g_Ca_s = 510;
  jm = 0.12;
  slow_Ca_current_slow_Ca_channel_m_gate_Vm_s = -16;
  slow_Ca_current_slow_Ca_channel_m_gate_Sm_s = 10;
  slow_Ca_current_slow_Ca_channel_j_gate_Vj = -53;
  slow_Ca_current_slow_Ca_channel_j_gate_Sj = 2;
  K_Ca_current_g_K_Ca = 1200;
  Ca_i = 0.11;
  K_Ca_current_kdkca = 0.55;
  CRAC_current_g_CRAC = 75;
  V_CRAC = 0;
  Ca_er = 60;
  CRAC_current_CRAC_r_gate_Ca_er_bar = 40;
  CRAC_current_CRAC_r_gate_sloper = 3;
  leak_current_g_leak = 0;
  Ca_equations_perl = 0.003;
  Ca_equations_lambda_er = 250;
  Ca_equations_sigma_er = 1;
  Ca_equations_ER_parameters_IP3 = 0;
  Ca_equations_ER_parameters_kerp = 0.09;
  Ca_equations_ER_parameters_verp = 0.24;
  Ca_equations_ER_parameters_dact = 0.35;
  Ca_equations_ER_parameters_dinh = 0.4;
  Ca_equations_ER_parameters_dip3 = 0.2;
  Ca_membrane_flux_kmp = 0.35;
  Ca_membrane_flux_vmp = 0.08;
  Ca_membrane_flux_gamma = 3.607e-6;
  Ca_membrane_flux_f = 0.01;
  time_ = ;

  // Assignment rules:
  i_K := K_current_g_K*n*(V - V_K);
  i_K_Ca := K_Ca_current_g_K_Ca*Ca_i^5/(Ca_i^5 + K_Ca_current_kdkca^5)*(V - V_K);
  i_K_ATP := K_ATP_current_g_K_ATP*(V - V_K);
  i_CRAC := CRAC_current_g_CRAC*r_infinity*(V - V_CRAC);
  i_Ca := i_Ca_f + i_Ca_s;
  i_leak := leak_current_g_leak*(V - V_CRAC);
  K_current_K_channel_n_gate_n_infinity := 1/(1 + exp((K_current_K_channel_n_gate_Vn - V)/K_current_K_channel_n_gate_Sn));
  K_current_K_channel_n_gate_tau_n := 9.09/(1 + exp((V - K_current_K_channel_n_gate_Vn)/K_current_K_channel_n_gate_Sn));
  i_Ca_f := fast_Ca_current_g_Ca_f*m_f_infinity*(V - V_Ca);
  m_f_infinity := 1/(1 + exp((fast_Ca_current_fast_Ca_channel_m_gate_Vm_f - V)/fast_Ca_current_fast_Ca_channel_m_gate_Sm_f));
  i_Ca_s := slow_Ca_current_g_Ca_s*m_s_infinity*(1 - jm)*(V - V_Ca);
  m_s_infinity := 1/(1 + exp((slow_Ca_current_slow_Ca_channel_m_gate_Vm_s - V)/slow_Ca_current_slow_Ca_channel_m_gate_Sm_s));
  slow_Ca_current_slow_Ca_channel_j_gate_jm_infinity := 1 - 1/(1 + exp((V - slow_Ca_current_slow_Ca_channel_j_gate_Vj)/slow_Ca_current_slow_Ca_channel_j_gate_Sj));
  slow_Ca_current_slow_Ca_channel_j_gate_tau_j := 50000/(exp((V - slow_Ca_current_slow_Ca_channel_j_gate_Vj)/4) + exp((slow_Ca_current_slow_Ca_channel_j_gate_Vj - V)/4)) + 1500;
  r_infinity := 1/(1 + exp((Ca_er - CRAC_current_CRAC_r_gate_Ca_er_bar)/CRAC_current_CRAC_r_gate_sloper));
  J_er_tot := Ca_equations_J_er_leak + Ca_equations_J_er_IP3 - J_er_p;
  J_er_p := Ca_equations_ER_parameters_verp*Ca_i^2/(Ca_i^2 + Ca_equations_ER_parameters_kerp^2);
  Ca_equations_J_er_IP3 := O*(Ca_er - Ca_i);
  Ca_equations_J_er_leak := Ca_equations_perl*(Ca_er - Ca_i);
  J_mem_tot := -Ca_membrane_flux_f*(Ca_membrane_flux_gamma*i_Ca + Ca_membrane_flux_Jmp);
  O := Ca_equations_ER_parameters_a_infinity^3*Ca_equations_ER_parameters_b_infinity^3*Ca_equations_ER_parameters_h_infinity^3*1;
  Ca_equations_ER_parameters_a_infinity := 1/(1 + Ca_equations_ER_parameters_dact/Ca_i);
  Ca_equations_ER_parameters_b_infinity := Ca_equations_ER_parameters_IP3/(Ca_equations_ER_parameters_IP3 + Ca_equations_ER_parameters_dip3);
  Ca_equations_ER_parameters_h_infinity := 1/(1 + Ca_i/Ca_equations_ER_parameters_dinh);
  Ca_membrane_flux_Jmp := Ca_membrane_flux_vmp*Ca_i^2/(Ca_i^2 + Ca_membrane_flux_kmp^2);

  // Rate rules:
  V' = -(i_Ca + i_K + i_K_ATP + i_K_Ca + i_CRAC + i_leak)/membrane_Cm;
  n' = K_current_K_channel_n_gate_lambda_n*(K_current_K_channel_n_gate_n_infinity - n)/K_current_K_channel_n_gate_tau_n;
  jm' = (slow_Ca_current_slow_Ca_channel_j_gate_jm_infinity - jm)/slow_Ca_current_slow_Ca_channel_j_gate_tau_j;
  Ca_i' = J_er_tot/Ca_equations_lambda_er + J_mem_tot;
  Ca_er' = -J_er_tot/(Ca_equations_lambda_er*Ca_equations_sigma_er);
end
