// SBML level 2 version 4

model mikane_araki_kohno_nakayama_et_al_1997____main()
  // Originally created by libAntimony v1.3 (using libSBML 4.1.0-b2)

  // Compartments:
  compartment default_compartment = 1;

  // Parameters:
  equations_Ca_t = 0;
  equations_TnCa_t = 0;
  equations_CB_on_t = 0;
  equations_Ca_released = 0;
  equations_Ca_sequestered = 0;
  equations_cumCB_on_t = 0;
  equations_cumCB_off_t = 0;
  equations_Ca_tot_released = 35;
  equations_total_Tn = 70;
  equations_total_CB = 150;
  equations_k_1 = 5000000;
  equations_k_2 = 10;
  equations_k_3 = 1000;
  equations_f = 400000;
  equations_g = 10;
  time_ = ;

  // Assignment rules:
  equations_Ca_release_rate := ;
  equations_dTnCa_t_dt := equations_k_1*equations_Ca_t*(equations_total_Tn - equations_TnCa_t) - equations_k_2*equations_TnCa_t;

  // Rate rules:
  equations_Ca_t' = equations_Ca_release_rate - equations_k_3*equations_Ca_t - equations_dTnCa_t_dt;
  equations_TnCa_t' = equations_k_1*equations_Ca_t*(equations_total_Tn - equations_TnCa_t) - equations_k_2*equations_TnCa_t;
  equations_CB_on_t' = equations_f*equations_TnCa_t*(equations_total_CB - equations_CB_on_t) - equations_g*equations_CB_on_t;
  equations_Ca_released' = equations_Ca_release_rate;
  equations_Ca_sequestered' = equations_k_3*equations_Ca_t;
  equations_cumCB_on_t' = equations_f*equations_TnCa_t*(equations_total_CB - equations_CB_on_t);
  equations_cumCB_off_t' = equations_g*equations_CB_on_t;
end
