// SBML level 2 version 4

model mittler_1998____main()
  // Originally created by libAntimony v1.4 (using libSBML 4.1.0-b2)

  // Compartments:
  compartment default_compartment = 1;

  // Parameters:
  k = 2.4e-5;
  p = 774;
  c = 3;
  delta = 0.5;
  I0 = 0.1;
  E40 = 0;
  VI_0 = 200000;
  VI0 = 200000;
  VNI0 = 0;
  E10 = 0;
  E20 = 0;
  E30 = 0;
  Heavyside_function_tau_p = 0;
  kinetic_parameters_b = 0.25;
  kinetic_parameters_m = 0.01;
  kinetic_parameters_n = 4;
  time_ = ;

  // Assignment rules:
  T0 := c*delta/(k*p);
  I_I_0 := c/p*VI_0;
  k_ := k/(1 + kinetic_parameters_m*kinetic_parameters_b)^kinetic_parameters_n;
  h := ;
  virus_total_V := VI0 + VNI0;
  b_ := kinetic_parameters_b/(1 + kinetic_parameters_m*kinetic_parameters_b);

  // Rate rules:
  I0' = k_*T0*E40 - delta*I0;
  E40' = (E30 - E40)/b_;
  VI0' = (1 - h)*p*I0 - c*VI0;
  VNI0' = h*p*I0 - c*VNI0;
  E10' = (VI0 - E10)/b_;
  E20' = (E10 - E20)/b_;
  E30' = (E20 - E30)/b_;
end
