// SBML level 2 version 4

model BestPractice_Cdecoupled____main()
  // Originally created by libAntimony v1.4 (using libSBML 4.1.0-b2)

  // Compartments:
  compartment default_compartment = 1;

  // Parameters:
  R = 5;
  C0 = 0;
  Cformation_A = 10;
  Cformation_B = 5;
  Cformation_kf1 = 0.2;
  Cformation_kr1 = 0.05;
  Eformation_D = 4;
  Eformation_E = 0;
  Eformation_kf2 = 0.006;
  Eformation_kr2 = 0.001;
  t = ;

  // Assignment rules:
  JPlusRx1 := Cformation_kf1*Cformation_A*Cformation_B - Cformation_kr1*C0;
  JMinusRx2 := Eformation_kf2*C0*Eformation_D - Eformation_kr2*Eformation_E;
  C_interface_Cpc := R/602.2;
  JGain := JPlusRx1 - C_interface_Cpc*JMinusRx2;

  // Rate rules:
  C0' = JGain;
  Cformation_A' = -JPlusRx1;
  Cformation_B' = -JPlusRx1;
  Eformation_D' = -JMinusRx2;
  Eformation_E' = JMinusRx2;
end
