// SBML level 2 version 4

model BidirectionalExample____main()
  // Originally created by libAntimony v1.3 (using libSBML 4.1.0-b2)

  // Compartments:
  compartment default_compartment = 1;

  // Parameters:
  BidirectionalExampleComponent_A = 10;
  BidirectionalExampleComponent_B = 5;
  BidirectionalExampleComponent_C = 0;
  BidirectionalExampleComponent_kf = 0.2;
  BidirectionalExampleComponent_kr = 0.05;
  BidirectionalExampleComponent_t = ;

  // Assignment rules:
  BidirectionalExampleComponent_J := BidirectionalExampleComponent_kf*BidirectionalExampleComponent_A*BidirectionalExampleComponent_B - BidirectionalExampleComponent_kr*BidirectionalExampleComponent_C;

  // Rate rules:
  BidirectionalExampleComponent_A' = -BidirectionalExampleComponent_J;
  BidirectionalExampleComponent_B' = -BidirectionalExampleComponent_J;
  BidirectionalExampleComponent_C' = BidirectionalExampleComponent_J;
end
