// SBML level 2 version 4

model MultienvironmentExample____main()
  // Originally created by libAntimony v1.4 (using libSBML 4.1.0-b2)

  // Compartments:
  compartment default_compartment = 1;

  // Parameters:
  MultienvironmentExampleComponent_C = 200;
  MultienvironmentExampleComponent_D = 4;
  MultienvironmentExampleComponent_E = 0;
  MultienvironmentExampleComponent_kf = 0.006;
  MultienvironmentExampleComponent_kr = 0.001;
  MultienvironmentExampleComponent_R = 5;
  MultienvironmentExampleComponent_t = ;

  // Assignment rules:
  MultienvironmentExampleComponent_J := MultienvironmentExampleComponent_C*MultienvironmentExampleComponent_D*MultienvironmentExampleComponent_kf - MultienvironmentExampleComponent_kr*MultienvironmentExampleComponent_E;
  MultienvironmentExampleComponent_Cpc := MultienvironmentExampleComponent_R/602.2;

  // Rate rules:
  MultienvironmentExampleComponent_C' = -MultienvironmentExampleComponent_Cpc*MultienvironmentExampleComponent_J;
  MultienvironmentExampleComponent_D' = -MultienvironmentExampleComponent_J;
  MultienvironmentExampleComponent_E' = MultienvironmentExampleComponent_J;
end
