// SBML level 2 version 4

model nagerl_novo_mody_vergara_2000_version01____main()
  // Originally created by libAntimony v1.4 (using libSBML 4.1.0-b2)

  // Compartments:
  compartment default_compartment = 1;

  // Parameters:
  CaD0 = ;
  CaDM10 = ;
  CaDM20 = ;
  CaBi0 = ;
  DM_T0 = 5;
  alpha = 0.5;
  D_D_T = 100;
  kon_DM = 0.03;
  koff_DM = 6e-5;
  t_pulse = 1;
  kon_D = 0.124;
  koff_D = 5.6;
  kon_Bi = 1;
  koff_Bi = 1;
  constants_koff_DM_ = 75;
  constants_tau_photolysis = 20;
  time_ = ;
  Ca_Ca_T = ;
  Bi0 = ;

  // Assignment rules:
  Ca0 := Ca_Ca_T - (CaD0 + CaDM10 + CaDM20 + CaBi0);
  DM10 := DM_T0*alpha - CaDM10;
  DM1_T0 := DM10 + CaDM10;
  DM20 := DM_T0*(1 - alpha) - CaDM20;
  DM2_T0 := DM20 + CaDM20;
  D0 := D_D_T - CaD0;
  Bi_Bi_T := Bi0 + CaBi0;
  k_trans := koff_DM + (constants_koff_DM_ - koff_DM)*(1 - exp(-(time_ - t_pulse)/constants_tau_photolysis));

  // Rate rules:
  CaD0' = kon_D*Ca0*D0 - koff_D*CaD0;
  CaDM10' = ;
  CaDM20' = kon_DM*Ca0*DM20 - koff_DM*CaDM20;
  CaBi0' = kon_Bi*Ca0*Bi0 - koff_Bi*CaBi0;
end
