// SBML level 2 version 4

model neumann_1998____main()
  // Originally created by libAntimony v1.4 (using libSBML 4.1.0-b2)

  // Compartments:
  compartment default_compartment = 1;

  // Parameters:
  T = 1000;
  target_cells_s = 10;
  target_cells_d = 0.02;
  eta = 0.8;
  V = 9400000;
  beta = 3e-7;
  I = 0;
  infected_cells_delta = 0.5;
  viral_load_epsilon = 0.99;
  viral_load_p = 100;
  viral_load_c = 5;
  time_ = ;

  // Rate rules:
  T' = target_cells_s - (target_cells_d*T + (1 - eta)*beta*V*T);
  V' = (1 - viral_load_epsilon)*viral_load_p*I - viral_load_c*V;
  I' = (1 - eta)*beta*V*T - infected_cells_delta*I;
end
