// SBML level 2 version 4

model niederer_smith_2007____main()
  // Originally created by libAntimony v1.4 (using libSBML 4.1.0-b2)

  // Compartments:
  compartment default_compartment = 1;

  // Parameters:
  NO_on = 0;
  pH_on = 0;
  SAC_on = 0;
  V_myo = 2.584e-5;
  V_SR = 2.098e-6;
  N = 75000;
  A_cap = 0.01534;
  V = -80.55611;
  R = 8314.5;
  T = 295;
  F = 96487;
  membrane_CmF = 0.0001;
  I_stimulus_stim_period = 1000;
  I_stimulus_stim_duration = 10;
  I_stimulus_stim_amplitude = -0.0006;
  ExtensionRatio = 1;
  SAC_current_g_SAC = 4.1333e-7;
  SAC_current_E_R = -10;
  KSA_current_g_Ko = 1.2e-6;
  sodium_current_g_Na = 0.0008;
  Na_i = 10.97353;
  Na_o = 140;
  m = 0.004192838;
  h = 0.6756475;
  j = 0.6752946;
  Ca_independent_transient_outward_K_current_g_t = 3.5e-5;
  Ca_independent_transient_outward_K_current_a_endo = 0.583;
  Ca_independent_transient_outward_K_current_b_endo = 0.417;
  K_o = 5.4;
  K_i = 142.0213;
  r = 0.002181071;
  s = 0.9225738;
  s_slow = 0.5302075;
  steady_state_outward_K_current_g_ss = 7e-6;
  r_ss = 0.002893747;
  s_ss = 0.3085728;
  inward_rectifier_g_K1 = 2.4e-5;
  hyperpolarisation_activated_current_g_f = 1.45e-6;
  hyperpolarisation_activated_current_f_Na = 0.2;
  y = 0.003317265;
  background_currents_g_B_Na = 8.015e-8;
  background_currents_g_B_K = 1.38e-7;
  background_currents_scale_Na = 0;
  background_currents_scale_K = 0;
  sodium_potassium_pump_i_NaK_max = 9.5e-5;
  sodium_potassium_pump_K_m_K = 1.5;
  sodium_potassium_pump_K_m_Na = 10;
  J_CO2_Pco2 = 5.8e-5;
  CO2i = 1.236108;
  pH_i = 7.20905;
  pH_e = 7.4;
  comp_v_nhe_exchanger_KA = 21.49352;
  comp_v_nhe_exchanger_KB = 1.779486e-7;
  comp_v_nhe_exchanger_kp1 = 0.5115609;
  comp_v_nhe_exchanger_km1 = 0.1406929;
  comp_v_nhe_exchanger_kp2 = 0.001698;
  comp_v_nhe_exchanger_K_Hi = 0.0004168694;
  comp_v_nhe_exchanger_n_Hi = 2;
  comp_v_nhe_exchanger_Q_10Scaler = 0.35;
  Cle = 126;
  Cli = 16.22857;
  comp_v_che_exchanger_K_Cl = 17970.36;
  comp_v_che_exchanger_K_OH = 0.0008907;
  comp_v_che_exchanger_kp1 = 14975.6;
  comp_v_che_exchanger_km1 = 257.4;
  comp_v_che_exchanger_kp2 = 4084.9;
  comp_v_che_exchanger_Q_10Scaler = 0.35;
  HCO3i = 15.14287;
  comp_v_nbc_K_Na = 4866.11;
  comp_v_nbc_K_HCO3 = 0.008017;
  comp_v_nbc_kp1 = 4677;
  comp_v_nbc_km1 = 777.92;
  comp_v_nbc_kp2 = 6.656;
  comp_v_nbc_K_Hi = 0.000183;
  comp_v_nbc_n_Hi = 2.91;
  comp_v_nbc_K_He = 6.53e-5;
  comp_v_nbc_n_He = 2.18;
  comp_v_nbc_Q_10Scaler = 0.35;
  comp_v_ae_K_Cl = 983.5;
  comp_v_ae_K_HCO3 = 110.64;
  comp_v_ae_kp1 = 20789.9;
  comp_v_ae_km1 = 21118.2;
  comp_v_ae_kp2 = 21256.54;
  comp_v_ae_K_Hi = 2.67e-5;
  comp_v_ae_n_Hi = 5.11;
  comp_v_ae_K_He = 0.000312;
  comp_v_ae_n_He = 1.44;
  comp_v_ae_Q_10Scaler = 0.35;
  intracellular_ion_concentrations_PP_co2e = 0.05;
  intracellular_ion_concentrations_CO_2sol = 0.03253;
  intracellular_ion_concentrations_P_atm = 760;
  intracellular_ion_concentrations_kf_co2hyd = 0.000365;
  intracellular_ion_concentrations_kr_co2hyd = 0.481;
  intracellular_ion_concentrations_pKa_ib1 = 6.400131;
  intracellular_ion_concentrations_ib1 = 31.20442;
  intracellular_ion_concentrations_pKa_ib2 = 7.480488;
  intracellular_ion_concentrations_ib2 = 6.845135;
  intracellular_ion_concentrations_pH_scale = 1;
  intracellular_ion_concentrations_g_Cl = 2e-5;
  intracellular_ion_concentrations_g_H = 4e-6;
  intracellular_ion_concentrations_J_CO2 = 0;
  Ca_e = 2;
  SL_pump_g_pCa = 3.5e-6;
  SL_pump_K_mpCa = 0.0005;
  Ca_i = 8.605871e-5;
  delta = 0.075;
  Cab_g_Cab = 2.4216e-8;
  NCX_K_mNa = 87.5;
  NCX_K_mCa = 1.38;
  NCX_eta = 0.35;
  NCX_k_sat = 0.1;
  NCX_g_NCX = 0.0385;
  SERCA_g_SERCA = 0.00045;
  SERCA_K_SERCA = 0.0005;
  Ca_SR = 0.8437339;
  TRPN = 0.06708451;
  ionic_concentrations_B_CMDN = 0.05;
  ionic_concentrations_K_CMDN = 0.00238;
  ionic_concentrations_g_SRl = 5.2e-6;
  B_TRPN = 0.07;
  g_D = 6.5e-11;
  J_R = 2e-11;
  J_L = 9.13e-13;
  Ca_voltage_V_L0 = -2;
  Ca_voltage_delta_VL = 7;
  t_L = 1;
  epsilon_a = 0.0625;
  epsilon_b = 14;
  epsilon_tau_L = 650;
  epsilon_K_L = 0.00022;
  alpha_phi_L = 2.35;
  RyR_param_phi_R_base = 0.05;
  tau_R = 2.43;
  theta_R = 0.012;
  K_RyR = 0.041;
  mu_ij_c = 0.01;
  mu_ij_d = 100;
  z_1 = 0.9889554;
  z_2 = 0.008606866;
  z_3 = 0.002416927;
  k_on = 100;
  k_off = 0.2;
  gamma_trpn = 2;
  TRPN_tot = 0.07;
  T_ref = 56.2;
  z = 0.01751898;
  tropomyosin_alpha_0 = 0.008;
  tropomyosin_alpha_r1 = 0.002;
  tropomyosin_alpha_r2 = 0.00175;
  tropomyosin_n_Rel = 3;
  tropomyosin_K_z = 0.15;
  tropomyosin_n_Hill = 3;
  tropomyosin_Ca_50ref = 0.00105;
  tropomyosin_z_p = 0.85;
  tropomyosin_beta_1 = -4;
  beta_0 = 4.9;
  Cross_Bridges_a = 0.35;
  Cross_Bridges_Q_1 = 0;
  Cross_Bridges_Q_2 = 0;
  Cross_Bridges_Q_3 = 0;
  Cross_Bridges_A_1 = -29;
  Cross_Bridges_A_2 = 138;
  Cross_Bridges_A_3 = 129;
  Cross_Bridges_alpha_1 = 0.03;
  Cross_Bridges_alpha_2 = 0.13;
  Cross_Bridges_alpha_3 = 0.625;
  time_ = ;

  // Assignment rules:
  rho := A_cap/V_myo;
  membrane_Cm := membrane_CmF/A_cap;
  i_Na := sodium_current_g_Na_endo*m^3*h*j*(V - E_Na)/A_cap;
  i_t := Ca_independent_transient_outward_K_current_g_t_endo*r*(Ca_independent_transient_outward_K_current_a_endo*s + Ca_independent_transient_outward_K_current_b_endo*s_slow)*(V - E_K)/A_cap;
  i_ss := steady_state_outward_K_current_g_ss*r_ss*s_ss*(V - E_K)/A_cap;
  i_f := i_f_Na + i_f_K;
  i_K1 := ((48e-3/(exp((V + 37)/25) + exp((V + 37)/(-25))) + 10e-3)*0.001/(1 + exp((V - (E_K + 76.77))/(-17))) + inward_rectifier_g_K1*(V - (E_K + 1.73))/((1 + exp(1.613*F*(V - (E_K + 1.73))/(R*T)))*(1 + exp((K_o - 0.9988)/(-0.124)))))/A_cap;
  i_NaK := sodium_potassium_pump_i_NaK_max/A_cap*sodium_potassium_pump_p_v*K_o/(K_o + sodium_potassium_pump_K_m_K)*sodium_potassium_pump_p_nai;
  i_Stim := ;
  I_CaL := -J_LC*2*V_myo*F/A_cap;
  I_NaCa := NCX_g_NCX/((NCX_Nae3 + NCX_K_mNa^3)*(Ca_e + NCX_K_mCa))*(NCX_edv*NCX_Nai3*Ca_e - NCX_edv2*NCX_Nae3*Ca_i)/(1 + NCX_k_sat*NCX_edv2)*V_myo*F/A_cap;
  I_Cab := Cab_g_Cab*(V - E_Ca)*2*V_myo*F/A_cap;
  I_pCa := SL_pump_g_pCa*Ca_i/(SL_pump_K_mpCa + Ca_i)*2*V_myo*F/A_cap;
  i_B_Na := background_currents_scale_Na*background_currents_g_B_Na*(V - E_Na)/A_cap;
  i_B_K := background_currents_scale_K*background_currents_g_B_K*(V - E_K)/A_cap;
  I_SAC_Na := SAC_current_g_SAC*SAC_current_gamma_SLSAC*(V - E_Na)/A_cap*SAC_current_r;
  I_SAC_K := SAC_current_g_SAC*SAC_current_gamma_SLSAC*(V - E_K)/A_cap;
  I_Ko := KSA_current_g_Ko/(1 + exp(-(10 + V)/45))*(V - E_K)*KSA_current_gamma_SLKO/A_cap;
  I_Cl := intracellular_ion_concentrations_g_Cl*(V - intracellular_ion_concentrations_E_Cl);
  I_H := intracellular_ion_concentrations_g_H*(V - intracellular_ion_concentrations_E_H);
  E_Na := R*T/F*ln(Na_o/Na_i);
  E_K := R*T/F*ln(K_o/K_i);
  I_SAC := I_SAC_K + I_SAC_Na;
  SAC_current_gamma_SLSAC := ;
  SAC_current_r := -(SAC_current_E_R + 85)/(SAC_current_E_R - 65);
  KSA_current_gamma_SLKO := ;
  sodium_current_g_Na_endo := 1.33*sodium_current_g_Na;
  sodium_current_sodium_current_m_gate_m_infinity := 1/(1 + exp((V + 45)/(-6.5)));
  sodium_current_sodium_current_m_gate_tau_m := 0.00136e3/(0.32*(V + 47.13)/(1 - exp(-0.1*(V + 47.13))) + 0.08*exp(-V/11));
  sodium_current_sodium_current_h_gate_h_infinity := 1/(1 + exp((V + 76.1)/6.07));
  sodium_current_sodium_current_h_gate_tau_h := ;
  sodium_current_sodium_current_j_gate_j_infinity := 1/(1 + exp((V + 76.1)/6.07));
  sodium_current_sodium_current_j_gate_tau_j := ;
  Ca_independent_transient_outward_K_current_g_t_endo := 0.4647*Ca_independent_transient_outward_K_current_g_t;
  Ca_independent_transient_outward_K_current_Ca_independent_transient_outward_K_current_r_gate_tau_r := 1e3/(45.16*exp(0.03577*(V + 50)) + 98.9*exp(-0.1*(V + 38)));
  Ca_independent_transient_outward_K_current_Ca_independent_transient_outward_K_current_r_gate_r_infinity := 1/(1 + exp((V + 10.6)/(-11.42)));
  Ca_independent_transient_outward_K_current_Ca_independent_transient_outward_K_current_s_gate_tau_s_endo := 0.55e3*exp(-((V + 70)/25)^2) + 0.049e3;
  Ca_independent_transient_outward_K_current_Ca_independent_transient_outward_K_current_s_gate_s_infinity := 1/(1 + exp((V + 45.3)/6.8841));
  Ca_independent_transient_outward_K_current_Ca_independent_transient_outward_K_current_s_slow_gate_tau_s_slow_endo := 3.3e3*exp(-((V + 70)/30)^2) + 0.049e3;
  Ca_independent_transient_outward_K_current_Ca_independent_transient_outward_K_current_s_slow_gate_s_slow_infinity := 1/(1 + exp((V + 45.3)/6.8841));
  steady_state_outward_K_current_steady_state_outward_K_current_r_ss_gate_tau_r_ss := 10e3/(45.16*exp(0.03577*(V + 50)) + 98.9*exp(-0.1*(V + 38)));
  steady_state_outward_K_current_steady_state_outward_K_current_r_ss_gate_r_ss_infinity := 1/(1 + exp((V + 11.5)/(-11.82)));
  steady_state_outward_K_current_steady_state_outward_K_current_s_ss_gate_tau_s_ss := 2.1e3;
  steady_state_outward_K_current_steady_state_outward_K_current_s_ss_gate_s_ss_infinity := 1/(1 + exp((V + 87.5)/10.3));
  i_f_Na := hyperpolarisation_activated_current_g_f*y*hyperpolarisation_activated_current_f_Na*(V - E_Na)/A_cap;
  i_f_K := hyperpolarisation_activated_current_g_f*y*hyperpolarisation_activated_current_f_K*(V - E_K)/A_cap;
  hyperpolarisation_activated_current_f_K := 1 - hyperpolarisation_activated_current_f_Na;
  hyperpolarisation_activated_current_hyperpolarisation_activated_current_y_gate_tau_y := 1e3/(0.11885*exp((V + 80)/28.37) + 0.5623*exp((V + 80)/(-14.19)));
  hyperpolarisation_activated_current_hyperpolarisation_activated_current_y_gate_y_infinity := 1/(1 + exp((V + 138.6)/10.48));
  sodium_potassium_pump_sigma := (exp(Na_o/67.3) - 1)/7;
  sodium_potassium_pump_p_nai := 1/(1 + (sodium_potassium_pump_K_m_Na/Na_i)^4);
  sodium_potassium_pump_p_v := 1/(1 + 0.1245*exp(-0.1*V*F/(R*T)) + 0.0365*sodium_potassium_pump_sigma*exp(-V*F/(R*T)));
  jco2 := V_myo*rho*J_CO2_Pco2*(CO2e - CO2i);
  CO2e := intracellular_ion_concentrations_PP_co2e*intracellular_ion_concentrations_CO_2sol*intracellular_ion_concentrations_P_atm;
  v_nhe := comp_v_nhe_exchanger_flux_nhe*V_myo*comp_v_nhe_exchanger_Q_10Scaler;
  comp_v_nhe_exchanger_km2 := comp_v_nhe_exchanger_kp1*comp_v_nhe_exchanger_kp2/comp_v_nhe_exchanger_km1;
  comp_v_nhe_exchanger_Be := 10^(-pH_e)*1e3;
  comp_v_nhe_exchanger_Bi := 10^(-pH_i)*1e3;
  comp_v_nhe_exchanger_am1 := comp_v_nhe_exchanger_KB*Na_i*comp_v_nhe_exchanger_km1/(comp_v_nhe_exchanger_KA*comp_v_nhe_exchanger_KB + comp_v_nhe_exchanger_KB*Na_i + Na_i*comp_v_nhe_exchanger_Bi + comp_v_nhe_exchanger_KA*comp_v_nhe_exchanger_Bi);
  comp_v_nhe_exchanger_ap1 := comp_v_nhe_exchanger_KB*Na_o*comp_v_nhe_exchanger_kp1/(comp_v_nhe_exchanger_KA*comp_v_nhe_exchanger_KB + comp_v_nhe_exchanger_KB*Na_o + Na_o*comp_v_nhe_exchanger_Be + comp_v_nhe_exchanger_KA*comp_v_nhe_exchanger_Be);
  comp_v_nhe_exchanger_am2 := comp_v_nhe_exchanger_KA*comp_v_nhe_exchanger_Be*comp_v_nhe_exchanger_km2/(comp_v_nhe_exchanger_KA*comp_v_nhe_exchanger_KB + comp_v_nhe_exchanger_KB*Na_o + Na_o*comp_v_nhe_exchanger_Be + comp_v_nhe_exchanger_KA*comp_v_nhe_exchanger_Be);
  comp_v_nhe_exchanger_ap2 := comp_v_nhe_exchanger_KA*comp_v_nhe_exchanger_Bi*comp_v_nhe_exchanger_kp2/(comp_v_nhe_exchanger_KA*comp_v_nhe_exchanger_KB + comp_v_nhe_exchanger_KB*Na_i + Na_i*comp_v_nhe_exchanger_Bi + comp_v_nhe_exchanger_KA*comp_v_nhe_exchanger_Bi);
  comp_v_nhe_exchanger_reg := comp_v_nhe_exchanger_Bi^comp_v_nhe_exchanger_n_Hi/(comp_v_nhe_exchanger_Bi^comp_v_nhe_exchanger_n_Hi + comp_v_nhe_exchanger_K_Hs^comp_v_nhe_exchanger_n_Hi);
  comp_v_nhe_exchanger_flux_nhe := comp_v_nhe_exchanger_reg*(comp_v_nhe_exchanger_ap1*comp_v_nhe_exchanger_ap2 - comp_v_nhe_exchanger_am1*comp_v_nhe_exchanger_am2)/(comp_v_nhe_exchanger_ap1 + comp_v_nhe_exchanger_ap2 + comp_v_nhe_exchanger_am1 + comp_v_nhe_exchanger_am2);
  comp_v_nhe_exchanger_gamma_NHE := ;
  comp_v_nhe_exchanger_K_Hs := comp_v_nhe_exchanger_K_Hi*comp_v_nhe_exchanger_gamma_NHE;
  v_che := V_myo*(comp_v_che_exchanger_km1*comp_v_che_exchanger_s6 - comp_v_che_exchanger_kp1*comp_v_che_exchanger_s1)/(60*1000)*comp_v_che_exchanger_Q_10Scaler;
  comp_v_che_exchanger_km2 := comp_v_che_exchanger_kp2*comp_v_che_exchanger_km1/comp_v_che_exchanger_kp1;
  comp_v_che_exchanger_OHe := 1000*10^(-14 + pH_e);
  comp_v_che_exchanger_OHi := 1000*10^(-14 + pH_i);
  comp_v_che_exchanger_a := 1 + comp_v_che_exchanger_K_OH/comp_v_che_exchanger_OHe + comp_v_che_exchanger_K_OH*Cle/(comp_v_che_exchanger_OHe*comp_v_che_exchanger_K_Cl);
  comp_v_che_exchanger_b := 1 + comp_v_che_exchanger_K_Cl/Cle + comp_v_che_exchanger_K_Cl*comp_v_che_exchanger_OHe/(Cle*comp_v_che_exchanger_K_OH);
  comp_v_che_exchanger_c := 1 + comp_v_che_exchanger_K_Cl/Cli + comp_v_che_exchanger_K_Cl*comp_v_che_exchanger_OHi/(Cli*comp_v_che_exchanger_K_OH);
  comp_v_che_exchanger_d := 1 + comp_v_che_exchanger_K_OH/comp_v_che_exchanger_OHi + comp_v_che_exchanger_K_OH*Cli/(comp_v_che_exchanger_OHi*comp_v_che_exchanger_K_Cl);
  comp_v_che_exchanger_s1 := 1/(comp_v_che_exchanger_a + comp_v_che_exchanger_d*(comp_v_che_exchanger_kp1 + comp_v_che_exchanger_kp2*comp_v_che_exchanger_a/comp_v_che_exchanger_b)/(comp_v_che_exchanger_km1 + comp_v_che_exchanger_km2*comp_v_che_exchanger_d/comp_v_che_exchanger_c));
  comp_v_che_exchanger_s6 := 1/(comp_v_che_exchanger_d + comp_v_che_exchanger_a*(comp_v_che_exchanger_km1 + comp_v_che_exchanger_km2*comp_v_che_exchanger_d/comp_v_che_exchanger_c)/(comp_v_che_exchanger_kp1 + comp_v_che_exchanger_kp2*comp_v_che_exchanger_a/comp_v_che_exchanger_b));
  HCO3e := intracellular_ion_concentrations_kf_co2hyd/intracellular_ion_concentrations_kr_co2hyd*CO2e/(10^(-pH_e)*1e3);
  v_nbc := V_myo*comp_v_nbc_reg*(comp_v_nbc_km1*comp_v_nbc_s6 - comp_v_nbc_kp1*comp_v_nbc_s1)/(60*1000)*comp_v_nbc_Q_10Scaler;
  comp_v_nbc_km2 := comp_v_nbc_kp2*comp_v_nbc_km1/comp_v_nbc_kp1;
  comp_v_nbc_He := 1000*10^(-pH_e);
  comp_v_nbc_Hi := 1000*10^(-pH_i);
  comp_v_nbc_a := 1 + Na_o/comp_v_nbc_K_Na + Na_o*HCO3e/(comp_v_nbc_K_Na*comp_v_nbc_K_HCO3);
  comp_v_nbc_b := 1 + comp_v_nbc_K_HCO3/HCO3e + comp_v_nbc_K_Na*comp_v_nbc_K_HCO3/(HCO3e*Na_o);
  comp_v_nbc_c := 1 + comp_v_nbc_K_HCO3/HCO3i + comp_v_nbc_K_Na*comp_v_nbc_K_HCO3/(HCO3i*Na_i);
  comp_v_nbc_d := 1 + Na_i/comp_v_nbc_K_Na + Na_i*HCO3i/(comp_v_nbc_K_Na*comp_v_nbc_K_HCO3);
  comp_v_nbc_s1 := 1/(comp_v_nbc_a + comp_v_nbc_d*(comp_v_nbc_kp1 + comp_v_nbc_kp2*comp_v_nbc_a/comp_v_nbc_b)/(comp_v_nbc_km1 + comp_v_nbc_km2*comp_v_nbc_d/comp_v_nbc_c));
  comp_v_nbc_s6 := 1/(comp_v_nbc_d + comp_v_nbc_a*(comp_v_nbc_km1 + comp_v_nbc_km2*comp_v_nbc_d/comp_v_nbc_c)/(comp_v_nbc_kp1 + comp_v_nbc_kp2*comp_v_nbc_a/comp_v_nbc_b));
  comp_v_nbc_reg := comp_v_nbc_Hi^comp_v_nbc_n_Hi/(comp_v_nbc_Hi^comp_v_nbc_n_Hi + comp_v_nbc_K_Hi^comp_v_nbc_n_Hi)*(1 - comp_v_nbc_He^comp_v_nbc_n_He/(comp_v_nbc_He^comp_v_nbc_n_He + comp_v_nbc_K_He^comp_v_nbc_n_He));
  v_ae := V_myo*comp_v_ae_reg*(comp_v_ae_km1*comp_v_ae_s6 - comp_v_ae_kp1*comp_v_ae_s1)/(60*1000)*comp_v_ae_Q_10Scaler;
  comp_v_ae_km2 := comp_v_ae_kp2*comp_v_ae_km1/comp_v_ae_kp1;
  comp_v_ae_He := 1000*10^(-pH_e);
  comp_v_ae_Hi := 1000*10^(-pH_i);
  comp_v_ae_a := 1 + comp_v_ae_K_HCO3/HCO3e + comp_v_ae_K_HCO3*Cle/(HCO3e*comp_v_ae_K_Cl);
  comp_v_ae_b := 1 + comp_v_ae_K_Cl/Cle + comp_v_ae_K_Cl*HCO3e/(Cle*comp_v_ae_K_HCO3);
  comp_v_ae_c := 1 + comp_v_ae_K_Cl/Cli + comp_v_ae_K_Cl*HCO3i/(Cli*comp_v_ae_K_HCO3);
  comp_v_ae_d := 1 + comp_v_ae_K_HCO3/HCO3i + comp_v_ae_K_HCO3*Cli/(HCO3i*comp_v_ae_K_Cl);
  comp_v_ae_s1 := 1/(comp_v_ae_a + comp_v_ae_d*(comp_v_ae_kp1 + comp_v_ae_kp2*comp_v_ae_a/comp_v_ae_b)/(comp_v_ae_km1 + comp_v_ae_km2*comp_v_ae_d/comp_v_ae_c));
  comp_v_ae_s6 := 1/(comp_v_ae_d + comp_v_ae_a*(comp_v_ae_km1 + comp_v_ae_km2*comp_v_ae_d/comp_v_ae_c)/(comp_v_ae_kp1 + comp_v_ae_kp2*comp_v_ae_a/comp_v_ae_b));
  comp_v_ae_reg := comp_v_ae_K_Hs^comp_v_ae_n_Hi/(comp_v_ae_Hi^comp_v_ae_n_Hi + comp_v_ae_K_Hs^comp_v_ae_n_Hi)*comp_v_ae_He^comp_v_ae_n_He/(comp_v_ae_He^comp_v_ae_n_He + comp_v_ae_K_He^comp_v_ae_n_He);
  comp_v_ae_gamma_AE := ;
  comp_v_ae_K_Hs := comp_v_ae_K_Hi*comp_v_ae_gamma_AE;
  intracellular_ion_concentrations_v_co2hyd := (V_myo + V_SR)*(intracellular_ion_concentrations_kf_co2hyd*CO2i - intracellular_ion_concentrations_kr_co2hyd*HCO3i*10^(-pH_i)*1e3);
  intracellular_ion_concentrations_beta_intr := ln(10)*(10^(-pH_i) + 10^(pH_i + intracellular_ion_concentrations_pKa_ib1)*intracellular_ion_concentrations_ib1/(10^pH_i + 10^intracellular_ion_concentrations_pKa_ib1)^2 + 10^(pH_i + intracellular_ion_concentrations_pKa_ib2)*intracellular_ion_concentrations_ib2/(10^pH_i + 10^intracellular_ion_concentrations_pKa_ib2)^2);
  intracellular_ion_concentrations_nai_Nak := i_NaK*3*A_cap/(V_myo*F);
  intracellular_ion_concentrations_nai_NHE := v_nhe/V_myo;
  intracellular_ion_concentrations_nai_NBC := v_nbc/V_myo;
  intracellular_ion_concentrations_nai_flux := -(i_B_Na + I_SAC_Na + i_Na + I_NaCa*3 + i_NaK*3 + i_f_Na)*A_cap/(V_myo*F);
  intracellular_ion_concentrations_nai_bg := i_f_Na*A_cap/(V_myo*F);
  intracellular_ion_concentrations_K_Nak := i_NaK*(-2)*A_cap/(V_myo*F);
  intracellular_ion_concentrations_K_flux := -(I_SAC_K + i_ss + I_Ko + i_t + i_K1 + i_f_K + i_NaK*(-2) + i_B_K)*A_cap/(V_myo*F);
  intracellular_ion_concentrations_E_Cl := R*T/F*ln(Cli/Cle);
  intracellular_ion_concentrations_E_H := R*T/F*ln(intracellular_ion_concentrations_H_o/intracellular_ion_concentrations_H_i);
  intracellular_ion_concentrations_H_o := 1000*10^(-pH_e);
  intracellular_ion_concentrations_H_i := 1000*10^(-pH_i);
  intracellular_ion_concentrations_nai_NaCa := I_NaCa*3*A_cap/(V_myo*F);
  intracellular_ion_concentrations_nai_na := i_Na*A_cap/(V_myo*F);
  intracellular_ion_concentrations_nai_total := intracellular_ion_concentrations_nai_flux + intracellular_ion_concentrations_nai_NHE + intracellular_ion_concentrations_nai_NBC;
  E_Ca := ln(Ca_e/Ca_i)/delta;
  J_LC := (z_1*J_L1 + z_2*J_L2)*N/V_myo;
  NCX_edv := exp(delta*0.5*V*NCX_eta);
  NCX_edv2 := exp(delta*0.5*V*(NCX_eta - 1));
  NCX_Nai3 := Na_i^3;
  NCX_Nae3 := Na_o^3;
  I_SERCA := SERCA_g_SERCA*Ca_i^2/(SERCA_K_SERCA^2 + Ca_i^2);
  J_TPRN := (B_TRPN - TRPN)*troponin_betaCab - Ca_i*TRPN*k_on;
  J_RY := (z_1*J_R1 + z_3*J_R3)*N/V_myo;
  ionic_concentrations_J_SR := -J_RY + I_SERCA - ionic_concentrations_g_SRl*(Ca_SR - Ca_i);
  Ca_b := B_TRPN - TRPN;
  expmdV := exp(-dV);
  expVL := exp((V - Ca_voltage_V_L0)/Ca_voltage_delta_VL);
  dV := delta*V;
  C_cc := Ca_i;
  C_oc := ;
  C_co := (Ca_i + J_R/g_D*Ca_SR)/(1 + J_R/g_D);
  C_oo := ;
  J_Loo := ;
  J_Loc := ;
  J_Rco := J_R*(Ca_SR - Ca_i)/(1 + J_R/g_D);
  J_Roo := ;
  t_R := 1.17*t_L;
  epsilon_m := 1/epsilon_tau_L*epsilon_b*(expVL + epsilon_a)/(epsilon_b*expVL + epsilon_a);
  epsilon_pco := 1/epsilon_tau_L*C_co/epsilon_K_L*(expVL + epsilon_a)/(expVL + 1);
  epsilon_pcc := 1/epsilon_tau_L*Ca_i/epsilon_K_L*(expVL + epsilon_a)/(expVL + 1);
  alpha_p := expVL/(t_L*(expVL + 1));
  alpha_m := alpha_phi_L/t_L;
  phi_R := RyR_param_phi_R_base*RyR_param_gamma_NO;
  RyR_param_gamma_NO := ;
  beta_poc := 1/t_R*C_oc^2/(C_oc^2 + K_RyR^2);
  beta_pcc := 1/t_R*Ca_i^2/(Ca_i^2 + K_RyR^2);
  beta_m := phi_R/t_R;
  mu_poc := 1/tau_R*(C_oc^2 + mu_ij_c*K_RyR^2)/(C_oc^2 + K_RyR^2);
  mu_pcc := 1/tau_R*(Ca_i^2 + mu_ij_c*K_RyR^2)/(Ca_i^2 + K_RyR^2);
  mu_moc := theta_R/tau_R*mu_ij_d*(C_oc^2 + mu_ij_c*K_RyR^2)/(mu_ij_d*C_oc^2 + mu_ij_c*K_RyR^2);
  mu_mcc := theta_R/tau_R*mu_ij_d*(Ca_i^2 + mu_ij_c*K_RyR^2)/(mu_ij_d*Ca_i^2 + mu_ij_c*K_RyR^2);
  y_oc := alpha_p*beta_m*(alpha_p + alpha_m + beta_m + beta_pcc)/y_ij_denom;
  y_co := alpha_m*(beta_pcc*(alpha_m + beta_m + beta_poc) + beta_poc*alpha_p)/y_ij_denom;
  y_oo := alpha_p*(beta_poc*(alpha_p + beta_m + beta_pcc) + beta_pcc*alpha_m)/y_ij_denom;
  y_cc := alpha_m*beta_m*(alpha_m + alpha_p + beta_m + beta_poc)/y_ij_denom;
  y_ij_denom := (alpha_p + alpha_m)*((beta_m + beta_poc + alpha_m)*(beta_m + beta_pcc) + alpha_p*(beta_m + beta_poc));
  r_1 := y_oc*mu_poc + y_cc*mu_pcc;
  r_2 := (alpha_p*mu_moc + alpha_m*mu_mcc)/(alpha_p + alpha_m);
  r_3 := beta_m*mu_pcc/(beta_m + beta_pcc);
  r_4 := mu_mcc;
  r_5 := y_co*epsilon_pco + y_cc*epsilon_pcc;
  r_6 := epsilon_m;
  r_7 := alpha_m*epsilon_pcc/(alpha_p + alpha_m);
  r_8 := epsilon_m;
  z_4 := 1 - z_1 - z_2 - z_3;
  J_R1 := y_oo*J_Roo + J_Rco*y_co;
  J_R3 := J_Rco*beta_pcc/(beta_m + beta_pcc);
  J_L1 := J_Loo*y_oo + J_Loc*y_oc;
  J_L2 := J_Loc*alpha_p/(alpha_p + alpha_m);
  troponin_betaCab := ;
  Tension := ;
  lamda := ;
  dExtensionRatiodt := 0;
  lambda_prev := ExtensionRatio;
  z_max := (tropomyosin_alpha_0/(tropomyosin_Ca_TRPN_50/TRPN_tot)^tropomyosin_n_Hill - tropomyosin_K_2)/(tropomyosin_alpha_r1 + tropomyosin_K_1 + tropomyosin_alpha_0/(tropomyosin_Ca_TRPN_50/TRPN_tot)^tropomyosin_n_Hill);
  tropomyosin_Ca_50 := tropomyosin_Ca_50ref*(1 + tropomyosin_beta_1*(lamda - 1));
  tropomyosin_Ca_TRPN_50 := tropomyosin_Ca_50*TRPN_tot/(tropomyosin_Ca_50 + k_off/k_on*(1 - (1 + beta_0*(lamda - 1))*0.5/gamma_trpn));
  tropomyosin_K_2 := tropomyosin_alpha_r2*tropomyosin_z_p^tropomyosin_n_Rel/(tropomyosin_z_p^tropomyosin_n_Rel + tropomyosin_K_z^tropomyosin_n_Rel)*(1 - tropomyosin_n_Rel*tropomyosin_K_z^tropomyosin_n_Rel/(tropomyosin_z_p^tropomyosin_n_Rel + tropomyosin_K_z^tropomyosin_n_Rel));
  tropomyosin_K_1 := tropomyosin_alpha_r2*tropomyosin_z_p^(tropomyosin_n_Rel - 1)*tropomyosin_n_Rel*tropomyosin_K_z^tropomyosin_n_Rel/(tropomyosin_z_p^tropomyosin_n_Rel + tropomyosin_K_z^tropomyosin_n_Rel)^2;
  tropomyosin_alpha_Tm := tropomyosin_alpha_0*(Ca_b/tropomyosin_Ca_TRPN_50)^tropomyosin_n_Hill;
  tropomyosin_beta_Tm := tropomyosin_alpha_r1 + tropomyosin_alpha_r2*z^(tropomyosin_n_Rel - 1)/(z^tropomyosin_n_Rel + tropomyosin_K_z^tropomyosin_n_Rel);
  overlap := 1 + beta_0*(lamda - 1);
  T_Base := T_ref*z/z_max;
  T_0 := T_Base*overlap;
  Cross_Bridges_Q := Cross_Bridges_Q_1 + Cross_Bridges_Q_2 + Cross_Bridges_Q_3;

  // Rate rules:
  V' = -(I_H + I_Cl + i_Na + I_CaL + i_t + i_ss + i_f + i_K1 + I_Cab + I_SAC_Na + i_B_K + i_B_Na + I_Ko + I_SAC_K + i_NaK + I_NaCa + I_pCa + i_Stim)/membrane_Cm;
  Na_i' = -(i_B_Na + I_SAC_Na + i_Na + I_NaCa*3 + i_NaK*3 + i_f_Na)*A_cap/(V_myo*F) + (v_nhe + v_nbc)/V_myo;
  m' = (sodium_current_sodium_current_m_gate_m_infinity - m)/sodium_current_sodium_current_m_gate_tau_m;
  h' = (sodium_current_sodium_current_h_gate_h_infinity - h)/sodium_current_sodium_current_h_gate_tau_h;
  j' = (sodium_current_sodium_current_j_gate_j_infinity - j)/sodium_current_sodium_current_j_gate_tau_j;
  K_i' = -(i_Stim + I_SAC_K + i_ss + I_Ko + i_t + i_K1 + i_f_K - 2*i_NaK + i_B_K)*A_cap/(V_myo*F);
  r' = (Ca_independent_transient_outward_K_current_Ca_independent_transient_outward_K_current_r_gate_r_infinity - r)/Ca_independent_transient_outward_K_current_Ca_independent_transient_outward_K_current_r_gate_tau_r;
  s' = (Ca_independent_transient_outward_K_current_Ca_independent_transient_outward_K_current_s_gate_s_infinity - s)/Ca_independent_transient_outward_K_current_Ca_independent_transient_outward_K_current_s_gate_tau_s_endo;
  s_slow' = (Ca_independent_transient_outward_K_current_Ca_independent_transient_outward_K_current_s_slow_gate_s_slow_infinity - s_slow)/Ca_independent_transient_outward_K_current_Ca_independent_transient_outward_K_current_s_slow_gate_tau_s_slow_endo;
  r_ss' = (steady_state_outward_K_current_steady_state_outward_K_current_r_ss_gate_r_ss_infinity - r_ss)/steady_state_outward_K_current_steady_state_outward_K_current_r_ss_gate_tau_r_ss;
  s_ss' = (steady_state_outward_K_current_steady_state_outward_K_current_s_ss_gate_s_ss_infinity - s_ss)/steady_state_outward_K_current_steady_state_outward_K_current_s_ss_gate_tau_s_ss;
  y' = (hyperpolarisation_activated_current_hyperpolarisation_activated_current_y_gate_y_infinity - y)/hyperpolarisation_activated_current_hyperpolarisation_activated_current_y_gate_tau_y;
  CO2i' = jco2/V_myo - intracellular_ion_concentrations_v_co2hyd/(V_myo + V_SR) + intracellular_ion_concentrations_J_CO2;
  pH_i' = 1/(-intracellular_ion_concentrations_beta_intr)*((-v_nhe + v_che)/V_myo + intracellular_ion_concentrations_v_co2hyd/(V_myo + V_SR) - I_H*A_cap/(V_myo*F));
  Cli' = I_Cl*A_cap/(V_myo*F) + intracellular_ion_concentrations_pH_scale*(v_che + v_ae)/V_myo;
  HCO3i' = intracellular_ion_concentrations_v_co2hyd/(V_myo + V_SR) + (v_nbc - v_ae)/V_myo;
  Ca_i' = 1/(1 + ionic_concentrations_B_CMDN*ionic_concentrations_K_CMDN/((Ca_i + ionic_concentrations_K_CMDN)*(Ca_i + ionic_concentrations_K_CMDN)))*(J_TPRN - ionic_concentrations_J_SR + (2*I_NaCa - I_pCa - I_Cab - I_CaL)*A_cap/(2*V_myo*F));
  Ca_SR' = V_myo/V_SR*ionic_concentrations_J_SR;
  TRPN' = J_TPRN;
  z_1' = -(r_1 + r_5)*z_1 + r_2*z_2 + r_6*z_3;
  z_2' = r_1*z_1 - (r_2 + r_7)*z_2 + r_8*z_4;
  z_3' = r_5*z_1 - (r_6 + r_3)*z_3 + r_4*z_4;
  z' = tropomyosin_alpha_Tm*(1 - z) - tropomyosin_beta_Tm*z;
  Cross_Bridges_Q_1' = Cross_Bridges_A_1*dExtensionRatiodt - Cross_Bridges_alpha_1*Cross_Bridges_Q_1;
  Cross_Bridges_Q_2' = Cross_Bridges_A_2*dExtensionRatiodt - Cross_Bridges_alpha_2*Cross_Bridges_Q_2;
  Cross_Bridges_Q_3' = Cross_Bridges_A_3*dExtensionRatiodt - Cross_Bridges_alpha_3*Cross_Bridges_Q_3;
end
