// SBML level 2 version 4

model noble_1962_version04____main()
  // Originally created by libAntimony v1.3 (using libSBML 4.1.0-b2)

  // Compartments:
  compartment default_compartment = 1;

  // Parameters:
  V = -87;
  membrane_Cm = 12;
  sodium_channel_g_Na_max = 400000;
  sodium_channel_E_Na = 40;
  m = 0.01;
  h = 0.8;
  n = 0.01;
  leakage_current_g_L = 75;
  leakage_current_E_L = -60;
  time_ = ;

  // Assignment rules:
  i_Na := (sodium_channel_g_Na + 140)*(V - sodium_channel_E_Na);
  i_K := (potassium_channel_g_K1 + potassium_channel_g_K2)*(V + 100);
  i_Leak := leakage_current_g_L*(V - leakage_current_E_L);
  sodium_channel_g_Na := m^3*h*sodium_channel_g_Na_max;
  sodium_channel_sodium_channel_m_gate_alpha_m := 100*(-V - 48)/(exp((-V - 48)/15) - 1);
  sodium_channel_sodium_channel_m_gate_beta_m := 120*(V + 8)/(exp((V + 8)/5) - 1);
  sodium_channel_sodium_channel_h_gate_alpha_h := 170*exp((-V - 90)/20);
  sodium_channel_sodium_channel_h_gate_beta_h := 1000/(1 + exp((-V - 42)/10));
  potassium_channel_g_K1 := 1200*exp((-V - 90)/50) + 15*exp((V + 90)/60);
  potassium_channel_g_K2 := 1200*n^4;
  potassium_channel_potassium_channel_n_gate_alpha_n := 0.1*(-V - 50)/(exp((-V - 50)/10) - 1);
  potassium_channel_potassium_channel_n_gate_beta_n := 2*exp((-V - 90)/80);

  // Rate rules:
  V' = -(i_Na + i_K + i_Leak)/membrane_Cm;
  m' = sodium_channel_sodium_channel_m_gate_alpha_m*(1 - m) - sodium_channel_sodium_channel_m_gate_beta_m*m;
  h' = sodium_channel_sodium_channel_h_gate_alpha_h*(1 - h) - sodium_channel_sodium_channel_h_gate_beta_h*h;
  n' = potassium_channel_potassium_channel_n_gate_alpha_n*(1 - n) - potassium_channel_potassium_channel_n_gate_beta_n*n;
end
