// SBML level 2 version 4

model noble_noble_bett_earm_ho_so_1991____main()
  // Originally created by libAntimony v1.4 (using libSBML 4.1.0-b2)

  // Compartments:
  compartment default_compartment = 1;

  // Parameters:
  V = -93;
  R = 8314.472;
  T = 310;
  F = 96485.3415;
  membrane_Cm = 9.5e-5;
  membrane_stim_start = 0.1;
  membrane_stim_end = 10000;
  membrane_stim_period = 1;
  membrane_stim_duration = 0.002;
  membrane_stim_amplitude = -6;
  K_o = 4;
  Na_o = 140;
  K_i = 140;
  Na_i = 5;
  Ca_o = 2;
  Ca_i = 7.63e-6;
  K_mk1 = 10;
  time_independent_potassium_current_g_K1 = 1;
  time_dependent_potassium_current_i_K_max = 1;
  x = 0.001;
  potassium_background_current_g_bk = 0.0006;
  fast_sodium_current_g_Na = 2.5;
  m = 0.000105;
  h = 0.99816539;
  fast_sodium_current_fast_sodium_current_m_gate_delta_m = 1e-5;
  sodium_background_current_g_bna = 0.0006;
  L_type_Ca_channel_P_Ca_L = 0.25;
  L_type_Ca_channel_P_CaK = 0.002;
  L_type_Ca_channel_P_CaNa = 0.01;
  d = 0;
  f = 1;
  L_type_Ca_channel_L_type_Ca_channel_d_gate_speed_d = 3;
  L_type_Ca_channel_L_type_Ca_channel_f_gate_speed_f = 0.5;
  L_type_Ca_channel_L_type_Ca_channel_f_gate_delta_f = 0.0001;
  calcium_background_current_g_bca = 0.00025;
  transient_outward_current_g_to = 0.005;
  transient_outward_current_g_tos = 0;
  s = 1;
  r = 0;
  sodium_potassium_pump_i_NaK_max = 0.7;
  sodium_potassium_pump_K_mK = 1;
  sodium_potassium_pump_K_mNa = 40;
  sodium_calcium_exchanger_k_NaCa = 0.0005;
  sodium_calcium_exchanger_n_NaCa = 3;
  sodium_calcium_exchanger_d_NaCa = 0;
  sodium_calcium_exchanger_gamma = 0.5;
  sarcoplasmic_reticulum_calcium_pump_K_cyca = 0.0003;
  sarcoplasmic_reticulum_calcium_pump_K_xcs = 0.4;
  sarcoplasmic_reticulum_calcium_pump_K_srca = 0.5;
  sarcoplasmic_reticulum_calcium_pump_alpha_up = 0.4;
  sarcoplasmic_reticulum_calcium_pump_beta_up = 0.03;
  Ca_up = 0.3013;
  Ca_rel = 0.2989;
  calcium_release_K_leak_rate = 0;
  calcium_release_K_m_rel = 250;
  calcium_release_ActFrac = 0;
  calcium_release_ProdFrac = 0;
  intracellular_calcium_concentration_Ca_Calmod = 0.0003;
  intracellular_calcium_concentration_Ca_Trop = 0.0002;
  intracellular_calcium_concentration_Calmod = 0.02;
  intracellular_calcium_concentration_Trop = 0.05;
  intracellular_calcium_concentration_alpha_Calmod = 100000;
  intracellular_calcium_concentration_beta_Calmod = 50;
  intracellular_calcium_concentration_alpha_Trop = 100000;
  intracellular_calcium_concentration_beta_Trop = 200;
  intracellular_calcium_concentration_radius = 0.012;
  intracellular_calcium_concentration_length = 0.074;
  intracellular_calcium_concentration_V_rel_ratio = 0.1;
  intracellular_calcium_concentration_V_e_ratio = 0.4;
  intracellular_calcium_concentration_V_up_ratio = 0.01;
  time_ = ;
  intracellular_calcium_concentration_d = ;

  // Assignment rules:
  i_K1 := time_independent_potassium_current_g_K1*K_o/(K_o + K_mk1)*(V - E_K)/(1 + exp((V - E_K - 10)*F*2/(R*T)));
  i_to := transient_outward_current_g_to*(transient_outward_current_g_tos + s*(1 - transient_outward_current_g_tos))*r*(V - E_K);
  i_K := x*time_dependent_potassium_current_I_K;
  i_Ca_L_K := L_type_Ca_channel_P_CaK*L_type_Ca_channel_P_Ca_L*d*f*(V - 50)*F/(R*T)/(1 - exp(-(V - 50)*F/(R*T)))*(K_i*exp(50*F/(R*T)) - K_o*exp(-(V - 50)*F/(R*T)));
  i_b_K := potassium_background_current_g_bk*(V - E_K);
  i_NaK := sodium_potassium_pump_i_NaK_max*K_o/(sodium_potassium_pump_K_mK + K_o)*Na_i/(sodium_potassium_pump_K_mNa + Na_i);
  i_Na := fast_sodium_current_g_Na*m^3*h*(V - E_mh);
  i_b_Na := sodium_background_current_g_bna*(V - E_Na);
  i_Ca_L_Na := L_type_Ca_channel_P_CaNa*L_type_Ca_channel_P_Ca_L*d*f*(V - 50)*F/(R*T)/(1 - exp(-(V - 50)*F/(R*T)))*(Na_i*exp(50*F/(R*T)) - Na_o*exp(-(V - 50)*F/(R*T)));
  i_NaCa := sodium_calcium_exchanger_k_NaCa*(exp(sodium_calcium_exchanger_gamma*(sodium_calcium_exchanger_n_NaCa - 2)*V*F/(R*T))*Na_i^sodium_calcium_exchanger_n_NaCa*Ca_o - exp((sodium_calcium_exchanger_gamma - 1)*(sodium_calcium_exchanger_n_NaCa - 2)*V*F/(R*T))*Na_o^sodium_calcium_exchanger_n_NaCa*Ca_i)/((1 + sodium_calcium_exchanger_d_NaCa*(Ca_i*Na_o^sodium_calcium_exchanger_n_NaCa + Ca_o*Na_i^sodium_calcium_exchanger_n_NaCa))*(1 + Ca_i/0.0069));
  i_Ca_L_Ca := 4*L_type_Ca_channel_P_Ca_L*d*f*(V - 50)*F/(R*T)/(1 - exp(-(V - 50)*F*2/(R*T)))*(Ca_i*exp(100*F/(R*T)) - Ca_o*exp(-(V - 50)*F*2/(R*T)));
  i_b_Ca := calcium_background_current_g_bca*(V - E_Ca);
  membrane_i_Stim := ;
  E_Na := R*T/F*ln(Na_o/Na_i);
  E_K := R*T/F*ln(K_o/K_i);
  E_Ca := 0.5*R*T/F*ln(Ca_o/Ca_i);
  E_mh := R*T/F*ln((Na_o + 0.12*K_o)/(Na_i + 0.12*K_i));
  time_dependent_potassium_current_I_K := time_dependent_potassium_current_i_K_max*(K_i - K_o*exp(-V*F/(R*T)))/140;
  time_dependent_potassium_current_time_dependent_potassium_current_x_gate_E0xa := V + 50;
  time_dependent_potassium_current_time_dependent_potassium_current_x_gate_E0xb := V + 20;
  time_dependent_potassium_current_time_dependent_potassium_current_x_gate_alpha_x := 0.5*exp(0.0826*time_dependent_potassium_current_time_dependent_potassium_current_x_gate_E0xa)/(1 + exp(0.057*time_dependent_potassium_current_time_dependent_potassium_current_x_gate_E0xa));
  time_dependent_potassium_current_time_dependent_potassium_current_x_gate_beta_x := 1.3*exp(-0.06*time_dependent_potassium_current_time_dependent_potassium_current_x_gate_E0xb)/(1 + exp(-0.04*time_dependent_potassium_current_time_dependent_potassium_current_x_gate_E0xb));
  fast_sodium_current_fast_sodium_current_m_gate_alpha_m := ;
  fast_sodium_current_fast_sodium_current_m_gate_beta_m := 8000*exp(-0.056*(V + 66));
  fast_sodium_current_fast_sodium_current_m_gate_E0_m := V + 41;
  fast_sodium_current_fast_sodium_current_h_gate_alpha_h := 20*exp(-0.125*(V + 75));
  fast_sodium_current_fast_sodium_current_h_gate_beta_h := 2000/(1 + 320*exp(-0.1*(V + 75)));
  i_Ca_L := i_Ca_L_Ca + i_Ca_L_K + i_Ca_L_Na;
  L_type_Ca_channel_L_type_Ca_channel_d_gate_alpha_d := ;
  L_type_Ca_channel_L_type_Ca_channel_d_gate_beta_d := ;
  L_type_Ca_channel_L_type_Ca_channel_d_gate_E0_d := V + 24 - 5;
  L_type_Ca_channel_L_type_Ca_channel_f_gate_alpha_f := ;
  L_type_Ca_channel_L_type_Ca_channel_f_gate_beta_f := 50/(1 + exp(-1*(V + 34)/4));
  L_type_Ca_channel_L_type_Ca_channel_f_gate_E0_f := V + 34;
  transient_outward_current_transient_outward_current_s_gate_alpha_s := 0.033*exp(-V/17);
  transient_outward_current_transient_outward_current_s_gate_beta_s := 33/(1 + exp(-0.125*(V + 10)));
  i_up := Ca_i/sarcoplasmic_reticulum_calcium_pump_K_2*sarcoplasmic_reticulum_calcium_pump_alpha_up - Ca_up*sarcoplasmic_reticulum_calcium_pump_K_1/sarcoplasmic_reticulum_calcium_pump_K_2*sarcoplasmic_reticulum_calcium_pump_beta_up;
  sarcoplasmic_reticulum_calcium_pump_K_1 := sarcoplasmic_reticulum_calcium_pump_K_cyca*sarcoplasmic_reticulum_calcium_pump_K_xcs/sarcoplasmic_reticulum_calcium_pump_K_srca;
  sarcoplasmic_reticulum_calcium_pump_K_2 := Ca_i + Ca_up*sarcoplasmic_reticulum_calcium_pump_K_1 + sarcoplasmic_reticulum_calcium_pump_K_cyca*sarcoplasmic_reticulum_calcium_pump_K_xcs + sarcoplasmic_reticulum_calcium_pump_K_cyca;
  i_trans := 50*(Ca_up - Ca_rel);
  i_rel := ((calcium_release_ActFrac/(calcium_release_ActFrac + 0.25))^2*calcium_release_K_m_rel + calcium_release_K_leak_rate)*Ca_rel;
  calcium_release_VoltDep := exp(0.08*(V - 40));
  calcium_release_RegBindSite := (Ca_i/(Ca_i + 0.0005))^2;
  calcium_release_ActRate := 500*calcium_release_RegBindSite;
  calcium_release_InactRate := 60 + 500*calcium_release_RegBindSite;
  calcium_release_PrecFrac := 1 - calcium_release_ActFrac - calcium_release_ProdFrac;
  V_i := intracellular_calcium_concentration_V_Cell*intracellular_calcium_concentration_V_i_ratio;
  intracellular_calcium_concentration_V_Cell := 3.141593*intracellular_calcium_concentration_radius^2*intracellular_calcium_concentration_length;
  intracellular_calcium_concentration_V_i_ratio := 1 - intracellular_calcium_concentration_V_e_ratio - intracellular_calcium_concentration_V_up_ratio - intracellular_calcium_concentration_V_rel_ratio;

  // Rate rules:
  V' = -1/membrane_Cm*(membrane_i_Stim + i_K1 + i_to + i_K + i_b_K + i_NaK + i_Na + i_b_Na + i_Ca_L_Na + i_NaCa + i_Ca_L_Ca + i_Ca_L_K + i_b_Ca);
  K_i' = -1/(1*V_i*F)*(i_K1 + i_K + i_Ca_L_K + i_to + i_b_K - 2*i_NaK);
  Na_i' = -1/(1*V_i*F)*(i_Na + i_b_Na + 3*i_NaK + 3*i_NaCa + i_Ca_L_Na);
  Ca_i' = -1/(2*1*V_i*F)*(i_Ca_L_Ca + i_b_Ca - 2*i_NaCa) + i_rel*intracellular_calcium_concentration_V_rel_ratio/intracellular_calcium_concentration_V_i_ratio - intracellular_calcium_concentration_d(intracellular_calcium_concentration_Ca_Calmod)/intracellular_calcium_concentration_d(time_) - intracellular_calcium_concentration_d(intracellular_calcium_concentration_Ca_Trop)/intracellular_calcium_concentration_d(time_) - i_up;
  x' = time_dependent_potassium_current_time_dependent_potassium_current_x_gate_alpha_x*(1 - x) - time_dependent_potassium_current_time_dependent_potassium_current_x_gate_beta_x*x;
  m' = fast_sodium_current_fast_sodium_current_m_gate_alpha_m*(1 - m) - fast_sodium_current_fast_sodium_current_m_gate_beta_m*m;
  h' = fast_sodium_current_fast_sodium_current_h_gate_alpha_h*(1 - h) - fast_sodium_current_fast_sodium_current_h_gate_beta_h*h;
  d' = L_type_Ca_channel_L_type_Ca_channel_d_gate_speed_d*(L_type_Ca_channel_L_type_Ca_channel_d_gate_alpha_d*(1 - d) - L_type_Ca_channel_L_type_Ca_channel_d_gate_beta_d*d);
  f' = L_type_Ca_channel_L_type_Ca_channel_f_gate_speed_f*(L_type_Ca_channel_L_type_Ca_channel_f_gate_alpha_f*(1 - f) - L_type_Ca_channel_L_type_Ca_channel_f_gate_beta_f*f);
  s' = transient_outward_current_transient_outward_current_s_gate_alpha_s*(1 - s) - transient_outward_current_transient_outward_current_s_gate_beta_s*s;
  r' = 333*(1/(1 + exp(-(V + 4)/5)) - r);
  Ca_up' = intracellular_calcium_concentration_V_i_ratio/intracellular_calcium_concentration_V_up_ratio*i_up - i_trans;
  Ca_rel' = intracellular_calcium_concentration_V_up_ratio/intracellular_calcium_concentration_V_rel_ratio*i_trans - i_rel;
  calcium_release_ActFrac' = calcium_release_PrecFrac*calcium_release_ActRate - calcium_release_ActFrac*calcium_release_InactRate;
  calcium_release_ProdFrac' = calcium_release_ActFrac*calcium_release_InactRate - 1*calcium_release_ProdFrac;
  intracellular_calcium_concentration_Ca_Calmod' = intracellular_calcium_concentration_alpha_Calmod*Ca_i*(intracellular_calcium_concentration_Calmod - intracellular_calcium_concentration_Ca_Calmod) - intracellular_calcium_concentration_beta_Calmod*intracellular_calcium_concentration_Ca_Calmod;
  intracellular_calcium_concentration_Ca_Trop' = intracellular_calcium_concentration_alpha_Trop*Ca_i*(intracellular_calcium_concentration_Trop - intracellular_calcium_concentration_Ca_Trop) - intracellular_calcium_concentration_beta_Trop*intracellular_calcium_concentration_Ca_Trop;
end
