// SBML level 2 version 4

model novak_csikasznagy_gyorffy_chen_tyson_1998_version01____main()
  // Originally created by libAntimony v1.3 (using libSBML 4.1.0-b2)

  // Compartments:
  compartment default_compartment = 1;

  // Parameters:
  Cdc13_Cdc20 = 1;
  Cdc13_Cdc2_k1 = 0.03;
  ki = 200;
  kir = 1;
  mass0 = 1;
  Cdc13_P_Cdc20 = 0;
  Rum1_Cdc13_Cdc20 = 0;
  Rum10 = 0;
  Rum1_k3 = 0.15;
  Cdc25P0 = 0;
  Cdc25P_k25 = 0.5;
  Cdc25P_k25r_ = 0.2;
  Cdc25P_J25 = 0.2;
  Cdc25P_J25r = 0.2;
  Wee10 = 0;
  Wee1_kw = 0.5;
  Wee1_kwr_ = 0.2;
  Wee1_Jw = 0.2;
  Wee1_Jwr = 0.2;
  Mik10 = 0;
  Mik1_km = 0.1;
  Mik1_kmr_ = 0;
  Mik1_Jm = 0.2;
  Mik1_Jmr = 0.2;
  AAE_total0 = 2;
  AAE_total_kas = 0.25;
  kad = 0.1;
  AAE0 = 2;
  AAE_kaa = 0.001;
  AAE_kaa_ = 1;
  AAE_kai_ = 0.25;
  AAE_kx = 0;
  AAE_Jaa = 0.1;
  AAE_Jai = 0.1;
  APC0 = 0;
  APC_kapr = 0.04;
  APC_kapr_ = 3;
  APC_kap = 4;
  APC_Japr = 0.01;
  APC_Jap = 0.01;
  Puc1 = 0.013;
  mass_mu = 0.005776;
  k2_V2 = 0.03;
  k2_V2_ = 1;
  k2c_V2c = 0.03;
  k2c_V2c_ = 0.16;
  k4_k4_ = 0.15;
  k4_k4__ = 20;
  kcdc25_V25 = 0.01;
  kcdc25_V25_ = 0.4;
  kwee_Vwee = 0.01;
  kwee_Vwee_ = 0.93;
  kwee_Vmik = 0.002;
  kwee_Vmik_ = 0.2;
  MPF_alpha = 0.1;
  time_ = ;

  // Assignment rules:
  kwee0 := kwee_Vwee*((1 - Wee10)*1 + kwee_Vwee_*Wee10 + kwee_Vmik*(1 - Mik10))*1 + kwee_Vmik_*Mik10;
  kcdc250 := kcdc25_V25*(1 - Cdc25P0) + kcdc25_V25_*Cdc25P0;
  k20 := k2_V2*(1 - APC0) + k2_V2_*APC0;
  k40 := k4_k4_ + k4_k4__*(Puc1*mass0 + MPF0);
  k2c0 := k2c_V2c*(1 - APC0) + k2c_V2c_*APC0;
  Cdc25P_k25r := Cdc25P_k25r_ + ks;
  ks := ;
  MPF0 := Cdc13_Cdc20 + MPF_alpha*Cdc13_P_Cdc20;
  Wee1_kwr := Wee1_kwr_ + ks;
  Mik1_kmr := Mik1_kmr_ + ks;
  AAE_kai := AAE_kai_ + AAE_kx;

  // Rate rules:
  Cdc13_Cdc20' = Cdc13_Cdc2_k1*mass0 + kcdc250*Cdc13_P_Cdc20 + Rum1_Cdc13_Cdc20*(kir + k40) - (kwee0*Cdc13_Cdc20 + ki*Cdc13_Cdc20*Rum10 + k20*Cdc13_Cdc20);
  mass0' = mass_mu*mass0;
  Cdc13_P_Cdc20' = kwee0*Cdc13_Cdc20 - (kcdc250*Cdc13_P_Cdc20 + k20*Cdc13_P_Cdc20);
  Rum1_Cdc13_Cdc20' = ki*Rum10*Cdc13_Cdc20 - Rum1_Cdc13_Cdc20*(k40 + k2c0 + kir);
  Rum10' = Rum1_k3 + Rum1_Cdc13_Cdc20*(kir + k2c0) - (k40*Rum10 + ki*Cdc13_Cdc20*Rum10);
  Cdc25P0' = Cdc25P_k25*MPF0*(1 - Cdc25P0)/(Cdc25P_J25 + 1 - Cdc25P0) - Cdc25P_k25r*Cdc25P0/(Cdc25P_J25r + Cdc25P0);
  Wee10' = Wee1_kwr*(1 - Wee10)/(Wee1_Jwr + 1 - Wee10) - Wee1_kw*MPF0*Wee10/(Wee1_Jw + Wee10);
  Mik10' = Mik1_kmr*(1 - Mik10)/(Mik1_Jmr + 1 - Mik10) - Mik1_km*Mik10/(Mik1_Jm + Mik10);
  AAE_total0' = AAE_total_kas*MPF0 - kad*AAE_total0;
  AAE0' = (AAE_kaa + AAE_kaa_*MPF0)*(AAE_total0 - AAE0)/(AAE_Jaa + AAE_total0 - AAE0) - (AAE_kai*AAE0/(AAE_Jai + AAE0) + kad*AAE0);
  APC0' = (APC_kapr + APC_kapr_*AAE0)*(1 - APC0)/(APC_Japr + 1 - APC0) - APC_kap*(Puc1*mass0 + MPF0)*APC0/(APC_Jap + APC0);
end
