// SBML level 2 version 4

model novak_tyson_1993_version01____main()
  // Originally created by libAntimony v1.4 (using libSBML 4.1.0-b2)

  // Compartments:
  compartment default_compartment = 1;

  // Parameters:
  k1AA = 1;
  k3 = 0.01;
  kinh = 0.025;
  kcak = 0.25;
  kbPPase = 0.125;
  kfPPase = 0.1;
  khPPase = 0.087;
  kd_antiIE = 0.095;
  ka = 0.01;
  kc = 0.1;
  ke = 0.0133;
  kg = 0.0065;
  V2_ = 0.015;
  V2__ = 1;
  V25_ = 0.1;
  V25__ = 2;
  Vwee_ = 0.1;
  Vwee__ = 1;
  K_a = 0.1;
  K_b = 0.1;
  K_c = 0.01;
  K_d = 0.01;
  K_e = 0.3;
  K_f = 0.3;
  K_g = 0.01;
  K_h = 0.01;
  Cdc25_T = 1;
  Cdc25_P0 = 0;
  Wee1_P0 = 0;
  Wee1_T = 1;
  UbE_T = 1;
  UbE0 = 0;
  Cdc2_T = 100;
  IE_T = 1;
  cyclin0 = 1;
  cyclin_Cdc20 = 0;
  MPF_active0 = 0;
  Tyr15P_dimer0 = 0;
  MPF_pre0 = 0;
  IE_P0 = 0;
  time_ = ;

  // Assignment rules:
  k25 := V25_*(Cdc25_T - Cdc25_P0) + V25__*Cdc25_P0;
  kwee := Vwee_*Wee1_P0 + Vwee__*(Wee1_T - Wee1_P0);
  k2 := V2_*(UbE_T - UbE0) + V2__*UbE0;
  Cdc20 := Cdc2_T - (cyclin_Cdc20 + MPF_active0 + MPF_pre0 + Tyr15P_dimer0);
  cyclin_T0 := cyclin0 + cyclin_Cdc20 + MPF_active0 + MPF_pre0 + Tyr15P_dimer0;

  // Rate rules:
  Cdc25_P0' = ka*MPF_active0*(Cdc25_T - Cdc25_P0)/(K_a + Cdc25_T - Cdc25_P0) - kbPPase*Cdc25_P0/(K_b + Cdc25_P0);
  Wee1_P0' = ke*MPF_active0*(Wee1_T - Wee1_P0)/(K_e + Wee1_T - Wee1_P0) - kfPPase*Wee1_P0/(K_f + Wee1_P0);
  UbE0' = kc*IE_P0*(UbE_T - UbE0)/(K_c + UbE_T - UbE0) - kd_antiIE*UbE0/(K_d + UbE0);
  cyclin0' = k1AA - k2*cyclin0 - k3*cyclin0*Cdc20;
  cyclin_Cdc20' = kinh*MPF_active0 - (kwee + kcak + k2)*cyclin_Cdc20 + k25*Tyr15P_dimer0 + k3*cyclin0*Cdc20;
  MPF_active0' = kcak*cyclin_Cdc20 - (kinh + kwee + k2)*MPF_active0 + k25*MPF_pre0;
  Tyr15P_dimer0' = kwee*cyclin_Cdc20 - (k25 + kcak + k2)*Tyr15P_dimer0 + kinh*MPF_pre0;
  MPF_pre0' = kwee*MPF_active0 - (kinh + k25 + k2)*MPF_pre0 + kcak*Tyr15P_dimer0;
  IE_P0' = kg*MPF_active0*(IE_T - IE_P0)/(K_g + IE_T - IE_P0) - khPPase*IE_P0/(K_h + IE_P0);
end
