// SBML level 2 version 4

model nygren_fiset_firek_clark_lindblad_clark_giles_1998____main()
  // Originally created by libAntimony v1.3 (using libSBML 4.1.0-b2)

  // Compartments:
  compartment default_compartment = 1;

  // Parameters:
  V = -74.2525;
  R = 8314;
  T = 306.15;
  F = 96487;
  membrane_Cm = 0.05;
  membrane_stim_start = 0.1;
  membrane_stim_end = 100000000;
  membrane_stim_period = 1;
  membrane_stim_duration = 0.006;
  membrane_stim_amplitude = -280;
  sodium_current_P_Na = 0.0016;
  Na_c = 130.011;
  Na_i = 8.5547;
  m = 0.0032017;
  h1 = 0.8814;
  h2 = 0.8742;
  L_type_Ca_channel_g_Ca_L = 6.75;
  L_type_Ca_channel_E_Ca_app = 60;
  L_type_Ca_channel_k_Ca = 0.025;
  Ca_d = 7.2495e-5;
  d_L = 1.3005e-5;
  f_L_1 = 0.9986;
  f_L_2 = 0.9986;
  Ca_independent_transient_outward_K_current_g_t = 7.5;
  K_c = 5.3581;
  K_i = 129.435;
  r = 0.0010678;
  s = 0.949;
  sustained_outward_K_current_g_sus = 2.75;
  r_sus = 0.00015949;
  s_sus = 0.9912;
  delayed_rectifier_K_currents_g_Ks = 1;
  delayed_rectifier_K_currents_g_Kr = 0.5;
  n = 0.0048357;
  p_a = 0.0001;
  inward_rectifier_g_K1 = 3;
  background_currents_g_B_Na = 0.060599;
  background_currents_g_B_Ca = 0.078681;
  Ca_c = 1.8147;
  Ca_i = 6.729e-5;
  sodium_potassium_pump_k_NaK_K = 1;
  sodium_potassium_pump_k_NaK_Na = 11;
  sodium_potassium_pump_i_NaK_max = 70.8253;
  sarcolemmal_calcium_pump_current_i_CaP_max = 4;
  sarcolemmal_calcium_pump_current_k_CaP = 0.0002;
  Na_Ca_ion_exchanger_current_k_NaCa = 0.0374842;
  Na_Ca_ion_exchanger_current_d_NaCa = 0.0003;
  Na_Ca_ion_exchanger_current_gamma = 0.45;
  phi_Na_en = -1.68;
  Vol_i = 0.005884;
  intracellular_ion_concentrations_tau_di = 0.01;
  intracellular_Ca_buffering_O_C = 0.0275;
  intracellular_Ca_buffering_O_TC = 0.0133;
  intracellular_Ca_buffering_O_TMgC = 0.1961;
  intracellular_Ca_buffering_O_TMgMg = 0.7094;
  intracellular_Ca_buffering_Mg_i = 2.5;
  cleft_space_ion_concentrations_tau_Na = 14.3;
  cleft_space_ion_concentrations_tau_K = 10;
  cleft_space_ion_concentrations_tau_Ca = 24.7;
  cleft_space_ion_concentrations_Na_b = 130;
  cleft_space_ion_concentrations_Ca_b = 1.8;
  cleft_space_ion_concentrations_K_b = 5.4;
  Ca_handling_by_the_SR_I_up_max = 2800;
  Ca_handling_by_the_SR_k_cyca = 0.0003;
  Ca_handling_by_the_SR_k_srca = 0.5;
  Ca_handling_by_the_SR_k_xcs = 0.4;
  Ca_handling_by_the_SR_alpha_rel = 200000;
  Ca_handling_by_the_SR_Ca_rel = 0.6465;
  Ca_handling_by_the_SR_Ca_up = 0.6646;
  Ca_handling_by_the_SR_Vol_up = 0.0003969;
  Ca_handling_by_the_SR_Vol_rel = 4.41e-5;
  Ca_handling_by_the_SR_r_recov = 0.815;
  Ca_handling_by_the_SR_O_Calse = 0.4369;
  Ca_handling_by_the_SR_F1 = 0.4284;
  Ca_handling_by_the_SR_F2 = 0.0028;
  Ca_handling_by_the_SR_tau_tr = 0.01;
  Ca_handling_by_the_SR_k_rel_i = 0.0003;
  Ca_handling_by_the_SR_k_rel_d = 0.003;
  time_ = ;
  intracellular_Ca_buffering_d = ;
  Ca_handling_by_the_SR_d = ;

  // Assignment rules:
  i_Na := sodium_current_P_Na*m^3*(0.9*h1 + 0.1*h2)*Na_c*V*F^2/(R*T)*(exp((V - E_Na)*F/(R*T)) - 1)/(exp(V*F/(R*T)) - 1);
  i_Ca_L := L_type_Ca_channel_g_Ca_L*d_L*(L_type_Ca_channel_f_Ca*f_L_1 + (1 - L_type_Ca_channel_f_Ca)*f_L_2)*(V - L_type_Ca_channel_E_Ca_app);
  i_t := Ca_independent_transient_outward_K_current_g_t*r*s*(V - E_K);
  i_sus := sustained_outward_K_current_g_sus*r_sus*s_sus*(V - E_K);
  i_K1 := inward_rectifier_g_K1*(K_c/1)^0.4457*(V - E_K)/(1 + exp(1.5*(V - E_K + 3.6)*F/(R*T)));
  i_Kr := delayed_rectifier_K_currents_g_Kr*p_a*p_i*(V - E_K);
  i_Ks := delayed_rectifier_K_currents_g_Ks*n*(V - E_K);
  i_B_Na := background_currents_g_B_Na*(V - E_Na);
  i_B_Ca := background_currents_g_B_Ca*(V - background_currents_E_Ca);
  i_NaK := sodium_potassium_pump_i_NaK_max*K_c/(K_c + sodium_potassium_pump_k_NaK_K)*Na_i^1.5/(Na_i^1.5 + sodium_potassium_pump_k_NaK_Na^1.5)*(V + 150)/(V + 200);
  i_CaP := sarcolemmal_calcium_pump_current_i_CaP_max*Ca_i/(Ca_i + sarcolemmal_calcium_pump_current_k_CaP);
  i_NaCa := Na_Ca_ion_exchanger_current_k_NaCa*(Na_i^3*Ca_c*exp(Na_Ca_ion_exchanger_current_gamma*F*V/(R*T)) - Na_c^3*Ca_i*exp((Na_Ca_ion_exchanger_current_gamma - 1)*V*F/(R*T)))/(1 + Na_Ca_ion_exchanger_current_d_NaCa*(Na_c^3*Ca_i + Na_i^3*Ca_c));
  membrane_i_Stim := ;
  E_Na := R*T/F*ln(Na_c/Na_i);
  sodium_current_sodium_current_m_gate_m_infinity := 1/(1 + exp((V + 27.12)/(-8.21)));
  sodium_current_sodium_current_m_gate_tau_m := 4.2e-5*exp(-((V + 25.57)/28.8)^2) + 2.4e-5;
  sodium_current_h_infinity := 1/(1 + exp((V + 63.6)/5.3));
  sodium_current_sodium_current_h1_gate_tau_h1 := 0.03/(1 + exp((V + 35.1)/3.2)) + 0.0003;
  sodium_current_sodium_current_h2_gate_tau_h2 := 0.12/(1 + exp((V + 35.1)/3.2)) + 0.003;
  L_type_Ca_channel_f_Ca := Ca_d/(Ca_d + L_type_Ca_channel_k_Ca);
  L_type_Ca_channel_L_type_Ca_channel_d_L_gate_d_L_infinity := 1/(1 + exp((V + 9)/(-5.8)));
  L_type_Ca_channel_L_type_Ca_channel_d_L_gate_tau_d_L := 0.0027*exp(-((V + 35)/30)^2) + 0.002;
  L_type_Ca_channel_f_L_infinity := 1/(1 + exp((V + 27.4)/7.1));
  L_type_Ca_channel_L_type_Ca_channel_f_L1_gate_tau_f_L1 := 0.161*exp(-((V + 40)/14.4)^2) + 0.01;
  L_type_Ca_channel_L_type_Ca_channel_f_L2_gate_tau_f_L2 := 1.3323*exp(-((V + 40)/14.2)^2) + 0.0626;
  E_K := R*T/F*ln(K_c/K_i);
  Ca_independent_transient_outward_K_current_Ca_independent_transient_outward_K_current_r_gate_tau_r := 0.0035*exp(-(V/30)^2) + 0.0015;
  Ca_independent_transient_outward_K_current_Ca_independent_transient_outward_K_current_r_gate_r_infinity := 1/(1 + exp((V - 1)/(-11)));
  Ca_independent_transient_outward_K_current_Ca_independent_transient_outward_K_current_s_gate_tau_s := 0.4812*exp(-((V + 52.45)/14.97)^2) + 0.01414;
  Ca_independent_transient_outward_K_current_Ca_independent_transient_outward_K_current_s_gate_s_infinity := 1/(1 + exp((V + 40.5)/11.5));
  sustained_outward_K_current_sustained_outward_K_current_r_sus_gate_tau_r_sus := 0.009/(1 + exp((V + 5)/12)) + 0.0005;
  sustained_outward_K_current_sustained_outward_K_current_r_sus_gate_r_sus_infinity := 1/(1 + exp((V + 4.3)/(-8)));
  sustained_outward_K_current_sustained_outward_K_current_s_sus_gate_tau_s_sus := 0.047/(1 + exp((V + 60)/10)) + 0.3;
  sustained_outward_K_current_sustained_outward_K_current_s_sus_gate_s_sus_infinity := 0.4/(1 + exp((V + 20)/10)) + 0.6;
  p_i := 1/(1 + exp((V + 55)/24));
  delayed_rectifier_K_currents_delayed_rectifier_K_currents_n_gate_tau_n := 0.7 + 0.4*exp(-((V - 20)/20)^2);
  delayed_rectifier_K_currents_delayed_rectifier_K_currents_n_gate_n_infinity := 1/(1 + exp((V - 19.9)/(-12.7)));
  delayed_rectifier_K_currents_delayed_rectifier_K_currents_pa_gate_tau_p_a := 0.03118 + 0.21718*exp(-((V + 20.1376)/22.1996)^2);
  delayed_rectifier_K_currents_delayed_rectifier_K_currents_pa_gate_p_a_infinity := 1/(1 + exp((V + 15)/(-6)));
  background_currents_E_Ca := R*T/(2*F)*ln(Ca_c/Ca_i);
  intracellular_ion_concentrations_Vol_d := 0.02*Vol_i;
  intracellular_ion_concentrations_i_di := (Ca_d - Ca_i)*2*F*intracellular_ion_concentrations_Vol_d/intracellular_ion_concentrations_tau_di;
  i_up := Ca_handling_by_the_SR_I_up_max*(Ca_i/Ca_handling_by_the_SR_k_cyca - Ca_handling_by_the_SR_k_xcs^2*Ca_handling_by_the_SR_Ca_up/Ca_handling_by_the_SR_k_srca)/((Ca_i + Ca_handling_by_the_SR_k_cyca)/Ca_handling_by_the_SR_k_cyca + Ca_handling_by_the_SR_k_xcs*(Ca_handling_by_the_SR_Ca_up + Ca_handling_by_the_SR_k_srca)/Ca_handling_by_the_SR_k_srca);
  i_rel := Ca_handling_by_the_SR_alpha_rel*(Ca_handling_by_the_SR_F2/(Ca_handling_by_the_SR_F2 + 0.25))^2*(Ca_handling_by_the_SR_Ca_rel - Ca_i);
  dOCdt := intracellular_Ca_buffering_d(intracellular_Ca_buffering_O_C)/intracellular_Ca_buffering_d(time_);
  dOTCdt := intracellular_Ca_buffering_d(intracellular_Ca_buffering_O_TC)/intracellular_Ca_buffering_d(time_);
  dOTMgCdt := intracellular_Ca_buffering_d(intracellular_Ca_buffering_O_TMgC)/intracellular_Ca_buffering_d(time_);
  cleft_space_ion_concentrations_Vol_c := 0.136*Vol_i;
  Ca_handling_by_the_SR_i_tr := (Ca_handling_by_the_SR_Ca_up - Ca_handling_by_the_SR_Ca_rel)*2*F*Ca_handling_by_the_SR_Vol_rel/Ca_handling_by_the_SR_tau_tr;
  Ca_handling_by_the_SR_r_act := 203.8*((Ca_i/(Ca_i + Ca_handling_by_the_SR_k_rel_i))^4 + (Ca_d/(Ca_d + Ca_handling_by_the_SR_k_rel_d))^4);
  Ca_handling_by_the_SR_r_inact := 33.96 + 339.6*(Ca_i/(Ca_i + Ca_handling_by_the_SR_k_rel_i))^4;

  // Rate rules:
  V' = -1/membrane_Cm*(membrane_i_Stim + i_Na + i_Ca_L + i_t + i_sus + i_K1 + i_Kr + i_Ks + i_B_Na + i_B_Ca + i_NaK + i_CaP + i_NaCa);
  Na_c' = (cleft_space_ion_concentrations_Na_b - Na_c)/cleft_space_ion_concentrations_tau_Na + (i_Na + i_B_Na + 3*i_NaK + 3*i_NaCa + phi_Na_en)/(cleft_space_ion_concentrations_Vol_c*F);
  Na_i' = -(i_Na + i_B_Na + 3*i_NaK + 3*i_NaCa + phi_Na_en)/(Vol_i*F);
  m' = (sodium_current_sodium_current_m_gate_m_infinity - m)/sodium_current_sodium_current_m_gate_tau_m;
  h1' = (sodium_current_h_infinity - h1)/sodium_current_sodium_current_h1_gate_tau_h1;
  h2' = (sodium_current_h_infinity - h2)/sodium_current_sodium_current_h2_gate_tau_h2;
  Ca_d' = -(i_Ca_L + intracellular_ion_concentrations_i_di)/(2*intracellular_ion_concentrations_Vol_d*F);
  d_L' = (L_type_Ca_channel_L_type_Ca_channel_d_L_gate_d_L_infinity - d_L)/L_type_Ca_channel_L_type_Ca_channel_d_L_gate_tau_d_L;
  f_L_1' = (L_type_Ca_channel_f_L_infinity - f_L_1)/L_type_Ca_channel_L_type_Ca_channel_f_L1_gate_tau_f_L1;
  f_L_2' = (L_type_Ca_channel_f_L_infinity - f_L_2)/L_type_Ca_channel_L_type_Ca_channel_f_L2_gate_tau_f_L2;
  K_c' = (cleft_space_ion_concentrations_K_b - K_c)/cleft_space_ion_concentrations_tau_K + (i_t + i_sus + i_K1 + i_Kr + i_Ks - 2*i_NaK)/(cleft_space_ion_concentrations_Vol_c*F);
  K_i' = -(i_t + i_sus + i_K1 + i_Kr + i_Ks - 2*i_NaK)/(Vol_i*F);
  r' = (Ca_independent_transient_outward_K_current_Ca_independent_transient_outward_K_current_r_gate_r_infinity - r)/Ca_independent_transient_outward_K_current_Ca_independent_transient_outward_K_current_r_gate_tau_r;
  s' = (Ca_independent_transient_outward_K_current_Ca_independent_transient_outward_K_current_s_gate_s_infinity - s)/Ca_independent_transient_outward_K_current_Ca_independent_transient_outward_K_current_s_gate_tau_s;
  r_sus' = (sustained_outward_K_current_sustained_outward_K_current_r_sus_gate_r_sus_infinity - r_sus)/sustained_outward_K_current_sustained_outward_K_current_r_sus_gate_tau_r_sus;
  s_sus' = (sustained_outward_K_current_sustained_outward_K_current_s_sus_gate_s_sus_infinity - s_sus)/sustained_outward_K_current_sustained_outward_K_current_s_sus_gate_tau_s_sus;
  n' = (delayed_rectifier_K_currents_delayed_rectifier_K_currents_n_gate_n_infinity - n)/delayed_rectifier_K_currents_delayed_rectifier_K_currents_n_gate_tau_n;
  p_a' = (delayed_rectifier_K_currents_delayed_rectifier_K_currents_pa_gate_p_a_infinity - p_a)/delayed_rectifier_K_currents_delayed_rectifier_K_currents_pa_gate_tau_p_a;
  Ca_c' = (cleft_space_ion_concentrations_Ca_b - Ca_c)/cleft_space_ion_concentrations_tau_Ca + (i_Ca_L + i_B_Ca + i_CaP - 2*i_NaCa)/(2*cleft_space_ion_concentrations_Vol_c*F);
  Ca_i' = -(-intracellular_ion_concentrations_i_di + i_B_Ca + i_CaP - 2*i_NaCa + i_up - i_rel)/(2*Vol_i*F) - (0.08*dOTCdt + 0.16*dOTMgCdt + 0.045*dOCdt);
  intracellular_Ca_buffering_O_C' = 200000*Ca_i*(1 - intracellular_Ca_buffering_O_C) - 476*intracellular_Ca_buffering_O_C;
  intracellular_Ca_buffering_O_TC' = 78400*Ca_i*(1 - intracellular_Ca_buffering_O_TC) - 392*intracellular_Ca_buffering_O_TC;
  intracellular_Ca_buffering_O_TMgC' = 200000*Ca_i*(1 - intracellular_Ca_buffering_O_TMgC - intracellular_Ca_buffering_O_TMgMg) - 6.6*intracellular_Ca_buffering_O_TMgC;
  intracellular_Ca_buffering_O_TMgMg' = 2000*intracellular_Ca_buffering_Mg_i*(1 - intracellular_Ca_buffering_O_TMgC - intracellular_Ca_buffering_O_TMgMg) - 666*intracellular_Ca_buffering_O_TMgMg;
  Ca_handling_by_the_SR_Ca_rel' = (Ca_handling_by_the_SR_i_tr - i_rel)/(2*Ca_handling_by_the_SR_Vol_rel*F) - 31*Ca_handling_by_the_SR_d(Ca_handling_by_the_SR_O_Calse)/Ca_handling_by_the_SR_d(time_);
  Ca_handling_by_the_SR_Ca_up' = (i_up - Ca_handling_by_the_SR_i_tr)/(2*Ca_handling_by_the_SR_Vol_up*F);
  Ca_handling_by_the_SR_O_Calse' = 480*Ca_handling_by_the_SR_Ca_rel*(1 - Ca_handling_by_the_SR_O_Calse) - 400*Ca_handling_by_the_SR_O_Calse;
  Ca_handling_by_the_SR_F1' = Ca_handling_by_the_SR_r_recov*(1 - Ca_handling_by_the_SR_F1 - Ca_handling_by_the_SR_F2) - Ca_handling_by_the_SR_r_act*Ca_handling_by_the_SR_F1;
  Ca_handling_by_the_SR_F2' = Ca_handling_by_the_SR_r_act*Ca_handling_by_the_SR_F1 - Ca_handling_by_the_SR_r_inact*Ca_handling_by_the_SR_F2;
end
