// SBML level 2 version 4

model obeyesekere_zimmerman_tecarro_auchmuty_1999_version01____main()
  // Originally created by libAntimony v1.4 (using libSBML 4.1.0-b2)

  // Compartments:
  compartment default_compartment = 1;

  // Parameters:
  a_D = 0.4;
  a_E = 0.16;
  a_X = 0.08;
  k = 0.05;
  q_D = 0.6;
  q_E = 0.6;
  q_X = 0.8;
  f = 0.2;
  g = 0.528;
  p_S = 0.6;
  p_D = 0.48;
  p_E = 0.096;
  p_X = 0.48;
  d_D = 0.4;
  d_E = 0.2;
  d_X = 1.04;
  a_f = 0.9;
  R_T = 2.5;
  theta = 1.5;
  GF = 6.3;
  D0 = 0.1;
  E0 = 0.6;
  R_S0 = 1;
  X0 = 0.7;
  R0 = 0.5;
  time_ = ;

  // Assignment rules:
  unpho_RB0 := R0 + R_S0;
  free_E2F0 := theta - R_S0;

  // Rate rules:
  D0' = a_D*k*GF/(1 + k*GF) - d_D*E0*D0;
  E0' = a_E*(1 + a_f*(theta - R_S0))*1 - d_E*X0*E0;
  R_S0' = p_S*(theta - R_S0)*R0 - p_D*R_S0*D0/(q_D + R_S0 + D0) - p_E*R_S0*E0/(q_E + R_S0 + E0);
  X0' = a_X*E0 + f*(theta - R_S0) + g*X0^2*E0 - d_X*X0;
  R0' = p_X*X0*(R_T - R_S0 - R0)/(q_X + (R_T - R_S0 - R0) + X0) - p_S*(theta - R_S0)*R0;
end
