// SBML level 2 version 4

model olsen_hauser_kummer_2003_version01____main()
  // Originally created by libAntimony v1.3 (using libSBML 4.1.0-b2)

  // Compartments:
  compartment default_compartment = 1;

  // Parameters:
  O20 = 5.33;
  O2_radical0 = ;
  O2_liquid0 = ;
  O2_gas0 = ;
  NADH0 = 0.95;
  NAD0 = 558;
  NAD_radical0 = 5e-4;
  NAD20 = 0.12;
  H2O20 = 0.013;
  H0 = ;
  Per30 = 0.059;
  Per20 = 1e-4;
  coI0 = 8.9e-4;
  coII0 = 0.026;
  coIII0 = 1.31;
  Ar_radical0 = 0.12;
  ArH0 = 299.88;
  v1_k1 = 3;
  v2_k2 = 1.8e7;
  v3_k3 = 1.5e5;
  v4_k4 = 5.2e3;
  v5_k5 = 2e7;
  v6_k6 = 1.7e7;
  v7_k7 = 2e7;
  v8_k8 = 4e7;
  v9_k9 = 6e7;
  v10_k10 = 1.8e6;
  v11_k11 = 1e5;
  v13_O2eq = 1.2e-5;
  v13_k13 = 6e-3;
  v13__k13_ = 6e-3;
  v14_k14 = 7e5;
  time_ = ;
  v12_k12 = ;

  // Assignment rules:
  v15 := v1_k1*NADH0*O20;
  v50 := v5_k5*NAD_radical0*O20;
  v70 := v7_k7*O2_radical0^2;
  v110 := v11_k11*Per20*O20;
  v60 := v6_k6*O2_radical0*Per30;
  v13_0 := v13__k13_*O20;
  v130 := v13_k13*v13_O2eq;
  v120 := v12_k12;
  v140 := v14_k14*Ar_radical0*NADH0;
  v80 := v8_k8*coIII0*NAD_radical0;
  v100 := v10_k10*Per30*NAD_radical0;
  v90 := v9_k9*NAD_radical0^2;
  v20 := v2_k2*H2O20*Per30;
  v40 := v4_k4*coII0*ArH0;
  v30 := v3_k3*coI0*ArH0;

  // Rate rules:
  O20' = v15 + v50 + v70 + v110;
  O2_radical0' = v60 + v50 + v70;
  O2_liquid0' = v130 + v13_0;
  O2_gas0' = v130 + v13_0;
  NADH0' = v15 + v120 + v140;
  NAD0' = v15 + v50 + v80 + v100;
  NAD_radical0' = v90 + v50 + v80 + v100 + v140;
  NAD20' = v90;
  H2O20' = v15 + v20 + v70;
  H0' = v15 + v70;
  Per30' = v20 + v40 + v60 + v100;
  Per20' = v110 + v100;
  coI0' = v20 + v30 + v80;
  coII0' = v30 + v40;
  coIII0' = v60 + v80 + v110;
  Ar_radical0' = v30 + v40 + v140;
  ArH0' = v30 + v40 + v140;
end
