// SBML level 2 version 4

model oomens_maenhout_vanoijen_drost_baaijens_2003_version01____main()
  // Originally created by libAntimony v1.3 (using libSBML 4.1.0-b2)

  // Compartments:
  compartment default_compartment = 1;

  // Parameters:
  mu = 0.2;
  Ct0 = ;
  Ct_km = 0.006;
  Ct_tau0 = 9.2;
  rho = 2.9;
  Ca_in0 = ;
  chi_tau1 = 0.005;
  chi_tau2 = 0.001;
  time_ = ;
  c = ;
  Ct_b = ;
  Ct_Q0 = ;
  c_ = ;
  chi_i = ;
  chi_time_i = ;
  chi_sum = ;
  chi_domainofapplication = ;

  // Assignment rules:
  r0 := c^2/(c^2 + mu*c + mu^2);
  Ct_Ct_initial := c + 2*Ct_b*Ct_Q0 + r0*(2 + mu/c)*(1 - Ct_b*Ct_Q0);
  chi0 := chi_sum(chi_domainofapplication(chi_i), chi_chi_*(time_ - chi_time_i));
  chi_chi_ := (exp(-time_/chi_tau1) - exp(-time_/chi_tau2))*(chi_tau1 - chi_tau2);

  // Rate rules:
  Ct0' = rho*(1 - c/c_)*chi0 - Ct_tau0^(-1)*(c/(c + Ct_km));
  Ca_in0' = rho*(2 - c/c_)*chi0;
end
