// SBML level 2 version 4

model overgaard_baseline_2007____main()
  // Originally created by libAntimony v1.3 (using libSBML 4.1.0-b2)

  // Compartments:
  compartment default_compartment = 1;

  // Parameters:
  T_a = 21;
  T_b = 38;
  delta_T = 1.57;
  kinc = 0.0258;
  M_c_t_day = 17.5;
  M_c_t_night = 6.73;
  M_c_day_length = 86400;
  M0 = 3.5;
  M_km = 1.1375;
  T0 = 38.785;
  T_c = 3.47;
  kb_M_b = 3;
  time_ = ;
  M_c_rem = ;

  // Assignment rules:
  M_c0 := ;
  M_c_tprime := M_c_rem(time_*3600*1, M_c_day_length);
  M_day0 := (kb0 + kinc*(T_day0 - T_b))*(T_day0 - T_a);
  M_night0 := (kb0 + kinc*(T_night0 - T_b))*(T_night0 - T_a);
  k0 := kb0 + kinc*(T0 - T_b);
  kb0 := kb_M_b/(T_b - T_a);
  T_day0 := T_b + delta_T/2;
  T_night0 := T_b - delta_T/2;

  // Rate rules:
  M0' = -M_km*(M0 - M_c0);
  T0' = T_c^(-1)*(M0 - k0*(T0 - T_a));
end
