// SBML level 2 version 4

model panerai_1980____main()
  // Originally created by libAntimony v1.3 (using libSBML 4.1.0-b2)

  // Compartments:
  compartment default_compartment = 1;

  // Parameters:
  x = 10;
  n = 0;
  A_c = 1;
  h = 12;
  Crossbridges_attached_g_mod_g_1 = 40;
  Crossbridges_attached_g_mod_g_2 = 240;
  Crossbridges_attached_f_mod_f_1 = 70;
  Ca_sarcoplasm_t_d = 0.3;
  Ca_sarcoplasm_a_1 = 200;
  Ca_sarcoplasm_b_1 = 5;
  Ca_sarcoplasm_Ca_0 = 4.5e-7;
  Actin_free_c_1 = 200000000000000;
  Actin_free_c_2_0 = 20;
  Actin_free_k_i = 30.9;
  Actin_free_q = 1.45;
  Actin_free_AT_0 = 2;
  alpha_s = 0.1027;
  beta_s = 20;
  x_so = 0.0387;
  L_max = 1;
  alpha_p = 0.00224;
  beta_p = 20;
  x_po = 0.221;
  s_h_F_PL = 3;
  X_0_F_PL = 3;
  t = ;

  // Assignment rules:
  f := ;
  g := ;
  Ca_f := Ca_sarcoplasm_Ca_0*abs(1 - exp(-Ca_sarcoplasm_a_1*t^2))*exp(-Ca_sarcoplasm_b_1*(t - Ca_sarcoplasm_t_d)^2);
  Actin_free_c_2 := Actin_free_c_2_0*exp(Actin_free_k_i*(s_h0/1)^Actin_free_q);
  s_h0 := x_po - 1*1*ln(1 + s_h_F_PL/alpha_p)/beta_p;
  F_SE := alpha_s*(exp(beta_s*x_s/(1*1)) - 1);
  x_s := x_so + s_h0 + x_m - L_max;
  x_m := X_S_0 + L_max - s_h0 - x_so;
  F_PE := alpha_p*(exp(beta_p*x_p/(1*1)) - 1);
  x_p := x_po - s_h0;
  F_CE := F_SE - F_PE;
  X_S_0 := 1*1*ln(1 + X_0_F_PL/alpha_s)/beta_s;

  // Rate rules:
  n' = f*(A_c - n) - g*n;
  A_c' = Actin_free_c_1*(Ca_f/1)^2*(Actin_free_AT_0 - A_c) - Actin_free_c_2*A_c;
end
