// SBML level 2 version 4

model pasek_simurda_christe_2006____main()
  // Originally created by libAntimony v1.4 (using libSBML 4.1.0-b2)

  // Compartments:
  compartment default_compartment = 1;

  // Parameters:
  R = 8310;
  T = 295;
  F = 96500;
  Nae = 140;
  Cae = 1.2;
  Ke = 5.4;
  model_parameters_Rot = 83.33;
  model_parameters_radiust = 1.5e-5;
  model_parameters_ptcm = 30000000;
  model_parameters_Smtot = 0.0001;
  Vms0 = -79.709547;
  Vmt0 = -79.709536;
  i_Stim_stim_offset = 0;
  i_Stim_stim_period = 1;
  i_Stim_stim_duration = 0.001;
  i_Stim_stim_amplitude = 0.0052;
  membrane_permeabilities_gNa = 10;
  membrane_permeabilities_fNat = 0.56;
  membrane_permeabilities_gKf = 0.0145;
  membrane_permeabilities_fKft = 0.56;
  membrane_permeabilities_gKst = 0.07;
  membrane_permeabilities_fKstt = 0.76;
  membrane_permeabilities_gK1 = 0.24;
  membrane_permeabilities_fK1t = 0.56;
  membrane_permeabilities_gKb = 0.00138;
  membrane_permeabilities_fKbt = 0.56;
  membrane_permeabilities_gKto = 0.35;
  membrane_permeabilities_fKtot = 0.56;
  membrane_permeabilities_gNab = 0.0008015;
  membrane_permeabilities_fNabt = 0.56;
  membrane_permeabilities_gCab = 0.000648;
  membrane_permeabilities_fCabt = 0.56;
  membrane_permeabilities_gCa = 0.00021;
  membrane_permeabilities_fCat = 0.87;
  membrane_permeabilities_i_NaCa_max = 0.00018;
  membrane_permeabilities_fNaCat = 0.81;
  membrane_permeabilities_i_NaK_max = 1;
  membrane_permeabilities_fNaKt = 0.59;
  membrane_permeabilities_i_pCa_max = 0.85;
  membrane_permeabilities_fpCat = 0.56;
  Nai = 6.9435814;
  Ki = 137.53311;
  m = 2.1832558e-6;
  h = 0.58232781;
  Nat = 140.01386;
  Kt = 5.3627676;
  m0 = 2.1832694e-6;
  h0 = 0.58232717;
  i_Cas_Co = 2.5436465e-6;
  i_Cas_C1 = 0.99994546;
  i_Cas_C2 = 0.99994546;
  i_Cas_tauCcast = 0.009;
  i_Cas_Ccast = 0.99570063;
  Cass = 4.3112114e-5;
  Cai = 3.5486498e-5;
  i_Cat_Co = 2.543652e-6;
  i_Cat_C1 = 0.99994546;
  i_Cat_C2 = 0.99994546;
  i_Cat_tauCcast = 0.009;
  i_Cat_Ccast = 0.99570063;
  Cat = 1.2271399;
  rs = 0.0023485072;
  ss = 0.98315843;
  sss = 0.6748337;
  rt = 0.0023485094;
  st = 0.98315865;
  sst = 0.67478532;
  rsts = 0.0031079213;
  ssts = 0.30773393;
  i_Ksts_i_Ksts_ssts_gate_taussts = 2.1;
  rstt = 0.0031079241;
  sstt = 0.30773368;
  i_Kstt_i_Kstt_sstt_gate_tausstt = 2.1;
  qs = 0.0034357356;
  qt = 0.0034357175;
  t_tubular_ion_fluxes_tauNa = 0.15;
  t_tubular_ion_fluxes_tauCa = 0.5;
  t_tubular_ion_fluxes_tauK = 0.15;
  CaSRup0 = 0.22755058;
  Jtr_tautr = 0.03448;
  CaSRrel0 = 0.22638169;
  JCaSRrel_kam = 576;
  JCaSRrel_kbm = 1930;
  JCaSRrel_kcp = 18;
  JCaSRrel_kcm = 0.8;
  JCaSRrel_F1 = 0.67606483;
  JCaSRrel_F2 = 0.00038333331;
  JCaSRrel_F3 = 6.4516879e-11;
  JCaSRrel_F4 = 0.32355462;
  JCad_taud = 0.003125;
  ion_concentrations_BTRH = 0.92804169;
  ion_concentrations_BTRL = 0.034317829;
  time_ = ;

  // Assignment rules:
  Vt := 3.14159*model_parameters_radiust^2*model_parameters_Lt_*model_parameters_pt;
  Vd := model_parameters_Vc*7.5e-5;
  Vmyo := model_parameters_Vc*0.585;
  Sms := model_parameters_Smtot - 0.44e4*model_parameters_Vc;
  Smt := model_parameters_Smtot - Sms;
  Cms := Sms*1;
  Cmt := Smt*1;
  Rst := model_parameters_Rot*model_parameters_Lt_/2/(3.14159*model_parameters_radiust^2*model_parameters_pt);
  VSRrel := model_parameters_Vc*0.0035;
  VSRup := model_parameters_Vc*0.0315;
  model_parameters_Vc := model_parameters_Smtot/7850;
  model_parameters_pt := model_parameters_ptcm*Sms;
  model_parameters_Lt_ := Smt/(2*3.14159*model_parameters_radiust*model_parameters_pt);
  i_circ0 := 1000*(Vmt0/Rst - Vms0/Rst);
  i_Stim0 := ;
  i_Stim_past := floor(time_/i_Stim_stim_period)*i_Stim_stim_period;
  gNas := membrane_permeabilities_gNa*(Sms + Smt)*(1 - membrane_permeabilities_fNat);
  gCas := membrane_permeabilities_gCa*(Sms + Smt)*(1 - membrane_permeabilities_fCat);
  gKfs := membrane_permeabilities_gKf*(Sms + Smt)*(1 - membrane_permeabilities_fKft);
  gKsts := membrane_permeabilities_gKst*(Sms + Smt)*(1 - membrane_permeabilities_fKstt);
  gK1s := membrane_permeabilities_gK1*(Sms + Smt)*(1 - membrane_permeabilities_fK1t);
  gKbs := membrane_permeabilities_gKb*(Sms + Smt)*(1 - membrane_permeabilities_fKbt);
  gKtos := membrane_permeabilities_gKto*(Sms + Smt)*(1 - membrane_permeabilities_fKtot);
  gNabs := membrane_permeabilities_gNab*(Sms + Smt)*(1 - membrane_permeabilities_fNabt);
  gCabs := membrane_permeabilities_gCab*(Sms + Smt)*(1 - membrane_permeabilities_fCabt);
  i_pCa_maxs := membrane_permeabilities_i_pCa_max*(Sms + Smt)*(1 - membrane_permeabilities_fpCat);
  i_NaK_maxs := membrane_permeabilities_i_NaK_max*(Sms + Smt)*(1 - membrane_permeabilities_fNaKt);
  i_NaCa_maxs := membrane_permeabilities_i_NaCa_max*(Sms + Smt)*(1 - membrane_permeabilities_fNaCat);
  gNat := membrane_permeabilities_gNa*(Sms + Smt)*membrane_permeabilities_fNat;
  gCat := membrane_permeabilities_gCa*(Sms + Smt)*membrane_permeabilities_fCat;
  gKft := membrane_permeabilities_gKf*(Sms + Smt)*membrane_permeabilities_fKft;
  gKstt := membrane_permeabilities_gKst*(Sms + Smt)*membrane_permeabilities_fKstt;
  gK1t := membrane_permeabilities_gK1*(Sms + Smt)*membrane_permeabilities_fK1t;
  gKbt := membrane_permeabilities_gKb*(Sms + Smt)*membrane_permeabilities_fKbt;
  gKtot := membrane_permeabilities_gKto*(Sms + Smt)*membrane_permeabilities_fKtot;
  gNabt := membrane_permeabilities_gNab*(Sms + Smt)*membrane_permeabilities_fNabt;
  gCabt := membrane_permeabilities_gCab*(Sms + Smt)*membrane_permeabilities_fCabt;
  i_pCa_maxt := membrane_permeabilities_i_pCa_max*(Sms + Smt)*membrane_permeabilities_fpCat;
  i_NaK_maxt := membrane_permeabilities_i_NaK_max*(Sms + Smt)*membrane_permeabilities_fNaKt;
  i_NaCa_maxt := membrane_permeabilities_i_NaCa_max*(Sms + Smt)*membrane_permeabilities_fNaCat;
  i_Nas0 := gNas*m^3*h*(Vms0 - ln((Nae + 0.12*Ke)/(Nai + 0.12*Ki))*R*T/F);
  E_Nas := ln(Nae/Nai)*R*T/F;
  i_Nas_i_Nas_m_gate_alpha_m := 117.26*(Vms0 + 59.3)/(1 - exp(-0.55*(Vms0 + 59.3)));
  i_Nas_i_Nas_m_gate_beta_m := 3800*exp(-0.072*(Vms0 + 61));
  i_Nas_i_Nas_h_gate_alpha_h := 284.4/(1 + exp(0.0812*(Vms0 + 115.9)));
  i_Nas_i_Nas_h_gate_beta_h := 18.77*(Vms0 + 64.4)/(1 - exp(-0.22*(Vms0 + 64.4)));
  i_Nat0 := gNat*m0^3*h0*(Vmt0 - ln((Nat + 0.12*Kt)/(Nai + 0.12*Ki))*R*T/F);
  E_Nat := ln(Nat/Nai)*R*T/F;
  i_Nat_i_Nat_m_gate_alpha_m := 117.26*(Vmt0 + 59.3)/(1 - exp(-0.55*(Vmt0 + 59.3)));
  i_Nat_i_Nat_m_gate_beta_m := 3800*exp(-0.072*(Vmt0 + 61));
  i_Nat_i_Nat_h_gate_alpha_h := 284.4/(1 + exp(0.0812*(Vmt0 + 115.9)));
  i_Nat_i_Nat_h_gate_beta_h := 18.77*(Vmt0 + 64.4)/(1 - exp(-0.22*(Vmt0 + 64.4)));
  i_Cas0 := gCas*4*Vms0*F^2/(R*T)*(Cass*exp(2*Vms0*F/(R*T)) - 0.341*Cae)/(exp(2*Vms0*F/(R*T)) - 1)*i_Cas_Co*((0.9 + i_Cas_Ccast/10)*i_Cas_C1 + (0.1 - i_Cas_Ccast/10)*i_Cas_C2);
  E_Cas := ln(Cae/Cai)*R*T/(2*F);
  i_Cas_tauCo := 0.00025 + 0.00305*exp(-0.0045*(Vms0 + 7)^2) + 0.00105*exp(-0.002*(Vms0 - 18)^2);
  i_Cas_tauC1 := 0.105*exp(-((Vms0 + 45)/12)^2) + 0.04/(1 + exp((-Vms0 + 25)/25)) + 0.015/(1 + exp((Vms0 + 75)/25));
  i_Cas_tauC2 := 0.041*exp(-((Vms0 + 47)/12)^2) + 0.08/(1 + exp(-(Vms0 + 55)/5)) + 0.015/(1 + exp((Vms0 + 75)/25));
  i_Cas_Coinf := 1/(1 + exp(-(Vms0 + 15.3)/5));
  i_Cas_Ccastinf := 1/(1 + Cass/0.01);
  i_Cas_C1inf := 1/(1 + exp((Vms0 + 26.7)/5.4));
  i_Cas_C2inf := i_Cas_C1inf;
  i_Cat0 := gCat*4*Vmt0*F^2/(R*T)*(Cass*exp(2*Vmt0*F/(R*T)) - 0.341*Cat)/(exp(2*Vmt0*F/(R*T)) - 1)*i_Cat_Co*((0.9 + i_Cat_Ccast/10)*i_Cat_C1 + (0.1 - i_Cat_Ccast/10)*i_Cat_C2);
  E_Cat := ln(Cat/Cai)*R*T/(2*F);
  i_Cat_tauCo := 0.00025 + 0.00305*exp(-0.0045*(Vmt0 + 7)^2) + 0.00105*exp(-0.002*(Vmt0 - 18)^2);
  i_Cat_tauC1 := 0.105*exp(-((Vmt0 + 45)/12)^2) + 0.04/(1 + exp((-Vmt0 + 25)/25)) + 0.015/(1 + exp((Vmt0 + 75)/25));
  i_Cat_tauC2 := 0.041*exp(-((Vmt0 + 47)/12)^2) + 0.08/(1 + exp(-(Vmt0 + 55)/5)) + 0.015/(1 + exp((Vmt0 + 75)/25));
  i_Cat_Coinf := 1/(1 + exp(-(Vmt0 + 15.3)/5));
  i_Cat_Ccastinf := 1/(1 + Cass/0.01);
  i_Cat_C1inf := 1/(1 + exp((Vmt0 + 26.7)/5.4));
  i_Cat_C2inf := i_Cat_C1inf;
  i_Ktos0 := gKtos*rs*(0.886*ss + 0.114*sss)*(Vms0 - E_Ks);
  E_Ks := ln(Ke/Ki)*R*T/F;
  i_Ktos_i_Ktos_rs_gate_taurs := 1/(45.16*exp(0.03577*(Vms0 + 50)) + 98.9*exp(-0.1*(Vms0 + 38)));
  i_Ktos_i_Ktos_rs_gate_rinfs := 1/(1 + exp((Vms0 + 10.6)/(-11.42)));
  i_Ktos_i_Ktos_ss_gate_tauss := 0.35*exp(-(0.0666*(Vms0 + 70))^2) + 0.035;
  i_Ktos_i_Ktos_ss_gate_sinfs := 1/(1 + exp((Vms0 + 45.3)/6.8841));
  i_Ktos_i_Ktos_sss_gate_tausss := 3.7*exp(-(0.0333*(Vms0 + 70))^2) + 0.035;
  i_Ktos_i_Ktos_sss_gate_ssinfs := 1/(1 + exp((Vms0 + 45.3)/6.8841));
  i_Ktot0 := gKtot*rt*(0.886*st + 0.114*sst)*(Vmt0 - E_Kt);
  E_Kt := ln(Kt/Ki)*R*T/F;
  i_Ktot_i_Ktot_rt_gate_taurt := 1/(45.16*exp(0.03577*(Vmt0 + 50)) + 98.9*exp(-0.1*(Vmt0 + 38)));
  i_Ktot_i_Ktot_rt_gate_rinft := 1/(1 + exp((Vmt0 + 10.6)/(-11.42)));
  i_Ktot_i_Ktot_st_gate_taust := 0.35*exp(-(0.0666*(Vmt0 + 70))^2) + 0.035;
  i_Ktot_i_Ktot_st_gate_sinft := 1/(1 + exp((Vmt0 + 45.3)/6.8841));
  i_Ktot_i_Ktot_sst_gate_tausst := 3.7*exp(-(0.0333*(Vmt0 + 70))^2) + 0.035;
  i_Ktot_i_Ktot_sst_gate_ssinft := 1/(1 + exp((Vmt0 + 45.3)/6.8841));
  i_Ksts0 := gKsts*rsts*ssts*(Vms0 - E_Ks);
  i_Ksts_i_Ksts_rsts_gate_taursts := 10/(45.16*exp(0.03577*(Vms0 + 50)) + 98.9*exp(-0.1*(Vms0 + 38)));
  i_Ksts_i_Ksts_rsts_gate_rstinfs := 1/(1 + exp(-(Vms0 + 11.5)/11.82));
  i_Ksts_i_Ksts_ssts_gate_sstinfs := 1/(1 + exp((Vms0 + 87.5)/10.3));
  i_Kstt0 := gKstt*rstt*sstt*(Vmt0 - E_Kt);
  i_Kstt_i_Kstt_rstt_gate_taurstt := 10/(45.16*exp(0.03577*(Vmt0 + 50)) + 98.9*exp(-0.1*(Vmt0 + 38)));
  i_Kstt_i_Kstt_rstt_gate_rstinft := 1/(1 + exp(-(Vmt0 + 11.5)/11.82));
  i_Kstt_i_Kstt_sstt_gate_sstinft := 1/(1 + exp((Vmt0 + 87.5)/10.3));
  i_Kfs0 := gKfs*qs*(0.2*(Vms0 - E_Nas) + 0.8*(Vms0 - E_Ks));
  i_Kfs_i_Kfs_qs_gate_tauqs := 1/(0.11885*exp((Vms0 + 80)/28.37) + 0.5623*exp(-(Vms0 + 80)/14.19));
  i_Kfs_i_Kfs_qs_gate_qinfs := 1/(1 + exp((Vms0 + 138.6)/10.48));
  i_Kft0 := gKft*qt*(0.2*(Vmt0 - E_Nat) + 0.8*(Vmt0 - E_Kt));
  i_Kft_i_Kft_qt_gate_tauqt := 1/(0.11885*exp((Vmt0 + 80)/28.37) + 0.5623*exp(-(Vmt0 + 80)/14.19));
  i_Kft_i_Kft_qt_gate_qinft := 1/(1 + exp((Vmt0 + 138.6)/10.48));
  i_K1s0 := gK1s*(Vms0 - E_Ks - 1.73)/(1 + exp(1.613*F/(R*T)*(Vms0 - E_Ks - 1.73))*(1 + exp((Ke - 0.9988)/(-0.124))));
  i_K1t0 := gK1t*(Vmt0 - E_Kt - 1.73)/(1 + exp(1.613*F/(R*T)*(Vmt0 - E_Kt - 1.73))*(1 + exp((Kt - 0.9988)/(-0.124))));
  i_Nabs0 := gNabs*(Vms0 - E_Nas);
  i_Nabt0 := gNabt*(Vmt0 - E_Nat);
  i_Cabs0 := gCabs*(Vms0 - E_Cas);
  i_Cabt0 := gCabt*(Vmt0 - E_Cat);
  i_Kbs0 := gKbs*(Vms0 - E_Ks);
  i_Kbt0 := gKbt*(Vmt0 - E_Kt);
  i_NaCas0 := i_NaCa_maxs*(exp(0.0187*Vms0)*Nai^3*Cae - exp(-0.0187*Vms0)*Nae^3*Cai)/(1 + 0.0001*(Nae^3*Cai + Nai^3*Cae));
  i_NaCat0 := i_NaCa_maxt*(exp(0.0187*Vmt0)*Nai^3*Cat - exp(-0.0187*Vmt0)*Nat^3*Cai)/(1 + 0.0001*(Nat^3*Cai + Nai^3*Cat));
  i_NaKs0 := i_NaK_maxs/(1 + 0.1245*exp(-0.1*Vms0*F/(R*T)) + 0.0365*1/7*(exp(Nae/67.3) - 1)*exp(-Vms0*F/(R*T)))*1/(1 + (10/Nai)^1.5)*Ke/(Ke + 1.5);
  i_NaKt0 := i_NaK_maxt/(1 + 0.1245*exp(-0.1*Vmt0*F/(R*T)) + 0.0365*1/7*(exp(Nat/67.3) - 1)*exp(-Vmt0*F/(R*T)))*1/(1 + (10/Nai)^1.5)*Kt/(Kt + 1.5);
  i_pCas0 := i_pCa_maxs*Cai/(0.0004 + Cai);
  i_pCat0 := i_pCa_maxt*Cai/(0.0004 + Cai);
  JteNa := 1*Vt/t_tubular_ion_fluxes_tauNa*(Nat - Nae);
  JteCa := 1*Vt/t_tubular_ion_fluxes_tauCa*(Cat - Cae);
  JteK := 1*Vt/t_tubular_ion_fluxes_tauK*(Kt - Ke);
  JCaSRup0 := 1*Vmyo*(0.04*10*(Cai/0.000168)^1.2 - 0.9*CaSRup0/3.29)/(1 + (Cai/0.000168)^1.2 + CaSRup0/3.29);
  Jtr0 := 1*VSRrel/Jtr_tautr*(CaSRup0 - CaSRrel0);
  JCaSRrel0 := 1800*VSRrel*(JCaSRrel_F2 + JCaSRrel_F3)*(CaSRrel0 - Cass);
  JCaSRrel_kap := 12.15e12;
  JCaSRrel_kbp := 4.05e9;
  JCad0 := 1*(Cass - Cai)*Vmyo/JCad_taud;
  ion_concentrations_dBTRH := 20000*Cai*(1 - ion_concentrations_BTRH) - 0.07*ion_concentrations_BTRH;
  ion_concentrations_dBTRL := 40000*Cai*(1 - ion_concentrations_BTRL) - ion_concentrations_BTRL*40;

  // Rate rules:
  Vms0' = 1000*(i_Stim0 + i_circ0 - (i_Nas0 + i_Cas0 + i_Ktos0 + i_Ksts0 + i_Kfs0 + i_K1s0 + i_Nabs0 + i_Cabs0 + i_Kbs0 + i_NaKs0 + i_NaCas0 + i_pCas0))/Cms;
  Vmt0' = 1000*(-(i_circ0 + i_Nat0 + i_Cat0 + i_Ktot0 + i_Kstt0 + i_Kft0 + i_K1t0 + i_Nabt0 + i_Cabt0 + i_Kbt0 + i_NaKt0 + i_NaCat0 + i_pCat0))/Cmt;
  Nai' = -(i_Nas0 + i_Nat0 + i_Nabs0 + i_Nabt0 + 3*i_NaCas0 + 3*i_NaCat0 + 3*i_NaKs0 + 3*i_NaKt0)/(F*Vmyo);
  Ki' = -(-i_Stim0 + i_Kfs0 + i_Kft0 + i_Ksts0 + i_Kstt0 + i_K1s0 + i_K1t0 + i_Kbs0 + i_Kbt0 - 2*i_NaKs0 - 2*i_NaKt0 + i_Ktos0 + i_Ktot0)/(F*Vmyo);
  m' = i_Nas_i_Nas_m_gate_alpha_m*(1 - m) - i_Nas_i_Nas_m_gate_beta_m*m;
  h' = i_Nas_i_Nas_h_gate_alpha_h*(1 - h) - i_Nas_i_Nas_h_gate_beta_h*h;
  Nat' = ((i_Nat0 + i_Nabt0 + 3*i_NaCat0 + 3*i_NaKt0)/F - 1*JteNa)/Vt;
  Kt' = ((i_Kft0 + i_Kstt0 + i_K1t0 + i_Kbt0 - 2*i_NaKt0 + i_Ktot0)/F - 1*JteK)/Vt;
  m0' = i_Nat_i_Nat_m_gate_alpha_m*(1 - m0) - i_Nat_i_Nat_m_gate_beta_m*m0;
  h0' = i_Nat_i_Nat_h_gate_alpha_h*(1 - h0) - i_Nat_i_Nat_h_gate_beta_h*h0;
  i_Cas_Co' = (i_Cas_Coinf - i_Cas_Co)/i_Cas_tauCo;
  i_Cas_C1' = (i_Cas_C1inf - i_Cas_C1)/i_Cas_tauC1;
  i_Cas_C2' = (i_Cas_C2inf - i_Cas_C2)/i_Cas_tauC2;
  i_Cas_Ccast' = (i_Cas_Ccastinf - i_Cas_Ccast)/i_Cas_tauCcast;
  Cass' = 1/(1 + 0.05*0.00238/(0.00238 + Cass)^2)*(-(i_Cas0 + i_Cat0)/(2*F*Vd) + 1*JCaSRrel0/Vd - 1*JCad0/Vd);
  Cai' = 1/(1 + 0.05*0.00238/(0.00238 + Cai)^2)*((-2*(i_NaCas0 + i_NaCat0) + i_Cabs0 + i_Cabt0 + i_pCas0 + i_pCat0)/(-2*F*Vmyo) + 1*(JCad0 - JCaSRup0)/Vmyo - ion_concentrations_dBTRH*0.14 - ion_concentrations_dBTRL*0.07);
  i_Cat_Co' = (i_Cat_Coinf - i_Cat_Co)/i_Cat_tauCo;
  i_Cat_C1' = (i_Cat_C1inf - i_Cat_C1)/i_Cat_tauC1;
  i_Cat_C2' = (i_Cat_C2inf - i_Cat_C2)/i_Cat_tauC2;
  i_Cat_Ccast' = (i_Cat_Ccastinf - i_Cat_Ccast)/i_Cat_tauCcast;
  Cat' = ((-2*i_NaCat0 + i_Cat0 + i_Cabt0 + i_pCat0)/(2*F) - 1*JteCa)/Vt;
  rs' = (i_Ktos_i_Ktos_rs_gate_rinfs - rs)/i_Ktos_i_Ktos_rs_gate_taurs;
  ss' = (i_Ktos_i_Ktos_ss_gate_sinfs - ss)/i_Ktos_i_Ktos_ss_gate_tauss;
  sss' = (i_Ktos_i_Ktos_sss_gate_ssinfs - sss)/i_Ktos_i_Ktos_sss_gate_tausss;
  rt' = (i_Ktot_i_Ktot_rt_gate_rinft - rt)/i_Ktot_i_Ktot_rt_gate_taurt;
  st' = (i_Ktot_i_Ktot_st_gate_sinft - st)/i_Ktot_i_Ktot_st_gate_taust;
  sst' = (i_Ktot_i_Ktot_sst_gate_ssinft - sst)/i_Ktot_i_Ktot_sst_gate_tausst;
  rsts' = (i_Ksts_i_Ksts_rsts_gate_rstinfs - rsts)/i_Ksts_i_Ksts_rsts_gate_taursts;
  ssts' = (i_Ksts_i_Ksts_ssts_gate_sstinfs - ssts)/i_Ksts_i_Ksts_ssts_gate_taussts;
  rstt' = (i_Kstt_i_Kstt_rstt_gate_rstinft - rstt)/i_Kstt_i_Kstt_rstt_gate_taurstt;
  sstt' = (i_Kstt_i_Kstt_sstt_gate_sstinft - sstt)/i_Kstt_i_Kstt_sstt_gate_tausstt;
  qs' = (i_Kfs_i_Kfs_qs_gate_qinfs - qs)/i_Kfs_i_Kfs_qs_gate_tauqs;
  qt' = (i_Kft_i_Kft_qt_gate_qinft - qt)/i_Kft_i_Kft_qt_gate_tauqt;
  CaSRup0' = (JCaSRup0 - Jtr0)/(1*VSRup);
  CaSRrel0' = 1/(1 + 15*0.8/(0.8 + CaSRrel0)^2)*(Jtr0 - JCaSRrel0)/VSRrel;
  JCaSRrel_F1' = JCaSRrel_F2*JCaSRrel_kam - JCaSRrel_F1*JCaSRrel_kap*Cass^4;
  JCaSRrel_F2' = JCaSRrel_F1*JCaSRrel_kap*Cass^4 + JCaSRrel_F3*JCaSRrel_kbm + JCaSRrel_F4*JCaSRrel_kcm - JCaSRrel_F2*(JCaSRrel_kam + JCaSRrel_kbp*Cass^3 + JCaSRrel_kcp);
  JCaSRrel_F3' = JCaSRrel_F2*JCaSRrel_kbp*Cass^3 - JCaSRrel_F3*JCaSRrel_kbm;
  JCaSRrel_F4' = JCaSRrel_F2*JCaSRrel_kcp - JCaSRrel_F4*JCaSRrel_kcm;
  ion_concentrations_BTRH' = ion_concentrations_dBTRH;
  ion_concentrations_BTRL' = ion_concentrations_dBTRL;
end
