// SBML level 2 version 4

model pasek_model_2008____main()
  // Originally created by libAntimony v1.3 (using libSBML 4.1.0-b2)

  // Compartments:
  compartment default_compartment = 1;

  // Parameters:
  R = 8310;
  T = 310;
  F = 96500;
  Na_e = 140;
  Ca_e = 1.8;
  K_e = 5.4;
  ATP_i = 6.8;
  model_parameters_Rot = 83.33;
  model_parameters_rt = 1.4815e-5;
  model_parameters_Lt_ = 0.000593;
  model_parameters_rc = 0.000593;
  model_parameters_Lc = 0.013;
  model_parameters_ptcm = 21028875;
  Vm_s0 = -85.207812;
  Vm_t0 = -85.208034;
  membrane_permeabilities_g_Na = 30;
  membrane_permeabilities_fNat = 0.64;
  membrane_permeabilities_g_Naps = 0.0053;
  membrane_permeabilities_fNapst = 0.526;
  membrane_permeabilities_q_Kr = 0.8;
  membrane_permeabilities_fKrt = 0.526;
  membrane_permeabilities_q_Ks = 0.1975;
  membrane_permeabilities_fKst = 0.526;
  membrane_permeabilities_g_Kp = 0.006;
  membrane_permeabilities_fKpt = 0.526;
  membrane_permeabilities_g_Kto = 0;
  membrane_permeabilities_fKtot = 0.526;
  membrane_permeabilities_g_K1 = 0.75;
  membrane_permeabilities_fK1t = 0.8;
  membrane_permeabilities_g_KNa = 0.12848;
  membrane_permeabilities_fKNat = 0.526;
  membrane_permeabilities_g_KATP = 1;
  membrane_permeabilities_fKATPt = 0.526;
  membrane_permeabilities_g_Nab = 0.00075;
  membrane_permeabilities_fNabt = 0.526;
  membrane_permeabilities_g_Cab = 0.0021;
  membrane_permeabilities_fCabt = 0.526;
  membrane_permeabilities_P_CaL = 0.0048;
  membrane_permeabilities_fCaLt = 0.64;
  membrane_permeabilities_P_KL = 4.8e-6;
  membrane_permeabilities_P_nsNa = 1.75e-7;
  membrane_permeabilities_fnsNat = 0.526;
  membrane_permeabilities_P_nsK = 1.75e-7;
  membrane_permeabilities_fnsKt = 0.526;
  membrane_permeabilities_i_NaCa_max = 0.00025;
  membrane_permeabilities_fNaCat = 0.526;
  membrane_permeabilities_i_NaK_max = 1.5;
  membrane_permeabilities_fNaKt = 0.526;
  membrane_permeabilities_i_pCa_max = 1.15;
  membrane_permeabilities_fpCat = 0.2;
  i_Kext_stim_Period = 1;
  Na_i = 11.120279;
  K_i = 136.78926;
  m = 0.0034130493;
  h = 0.82699973;
  Na_t = 139.93239;
  K_t = 5.4140321;
  m0 = 0.0034129472;
  h0 = 0.82700551;
  i_CaL_s_omega = 10;
  i_CaL_s_a = 2;
  i_CaL_s_b = 2;
  i_CaL_s_f = 300;
  i_CaL_s_g = 2000;
  i_CaL_s_f2 = 5;
  i_CaL_s_g2 = 7000;
  i_CaL_s_Cst = 0.99797984;
  i_CaL_s_C1 = 7.5722514e-5;
  i_CaL_s_C2 = 2.1545646e-9;
  i_CaL_s_C3 = 2.7463178e-14;
  i_CaL_s_C4 = -5.7569102e-17;
  i_CaL_s_Co = -1.3496934e-17;
  i_CaL_s_Ccast = 0.0019155065;
  i_CaL_s_Cca1 = 5.8135383e-7;
  i_CaL_s_Cca2 = 6.615513e-11;
  i_CaL_s_Cca3 = 3.3426555e-15;
  i_CaL_s_Cca4 = 4.6640361e-19;
  i_CaL_s_Ccao = 3.7986638e-22;
  Ca_ss = 9.5977033e-5;
  y = 0.78134852;
  i_CaL_t_omega = 10;
  i_CaL_t_a = 2;
  i_CaL_t_b = 2;
  i_CaL_t_f = 300;
  i_CaL_t_g = 2000;
  i_CaL_t_f2 = 5;
  i_CaL_t_g2 = 7000;
  i_CaL_t_TCst = 0.99798934;
  i_CaL_t_TC1 = 7.5720257e-5;
  i_CaL_t_TC2 = 2.1544156e-9;
  i_CaL_t_TC3 = 2.7459475e-14;
  i_CaL_t_TC4 = -5.7367189e-17;
  i_CaL_t_TCo = -1.3449454e-17;
  i_CaL_t_TCcast = 0.0019155245;
  i_CaL_t_TCca1 = 5.8133643e-7;
  i_CaL_t_TCca2 = 6.6150547e-11;
  i_CaL_t_TCca3 = 3.3423167e-15;
  i_CaL_t_TCca4 = 4.6165955e-19;
  i_CaL_t_TCcao = 3.75926e-22;
  Ca_t = 1.8476402;
  y0 = 0.7813477;
  xr = 0.00020469344;
  xr0 = 0.00020469344;
  i_Ks_s_PRNaK = 0.01833;
  Ca_i = 8.8787034e-5;
  xs = 0.0061359896;
  i_Ks_t_PRNaK = 0.01833;
  xs0 = 0.0061359896;
  i_Kto_s_fr2 = 1;
  r2 = 0.9625701;
  r3 = 0.96250049;
  i_Kto_s_i_Kto_s_r2_gate_tau_r2 = 0.02;
  i_Kto_s_i_Kto_s_r3_gate_tau_r3 = 0.08;
  i_Kto_t_fr2 = 1;
  r20 = 0.9625701;
  r30 = 0.96250049;
  i_Kto_t_i_Kto_t_r2_gate_tau_r2 = 0.02;
  i_Kto_t_i_Kto_t_r3_gate_tau_r3 = 0.08;
  t_tubular_ion_fluxes_tau_Na = 0.2;
  t_tubular_ion_fluxes_tau_Ca = 0.24;
  t_tubular_ion_fluxes_tau_K = 0.2;
  CaSRup0 = 1.0200296;
  Jtr_tau_tr = 0.03448;
  CaSRrel0 = 1.0326252;
  JCaSRrel_kam = 576;
  JCaSRrel_kbm = 1930;
  JCaSRrel_kcp = 18;
  JCaSRrel_kcm = 0.8;
  JCaSRrel_F1 = 0.8053082;
  JCaSRrel_F2 = 0.00026639195;
  JCaSRrel_F3 = 4.9455459e-10;
  JCaSRrel_F4 = 0.19442578;
  JCad_tau_d = 0.003125;
  ion_concentrations_BTRH = 0.96700747;
  ion_concentrations_BTRL = 0.081740868;
  time_ = ;

  // Assignment rules:
  Vt := 3.14159*model_parameters_rt^2*model_parameters_Lt_*model_parameters_pt;
  Vd := model_parameters_Vc*0.68*6e-5;
  Vmyo := model_parameters_Vc*0.68;
  Sms := 2*3.141592*model_parameters_rc^2 + 2*3.14159*model_parameters_rc*model_parameters_Lc;
  Smt := 2*3.14159*model_parameters_rt*model_parameters_Lt_*model_parameters_pt;
  Cms := Sms*1;
  Cmt := Smt*1;
  Rst := model_parameters_Rot*model_parameters_Lt_/2/(3.14159*model_parameters_rt^2*model_parameters_pt);
  VSRup := model_parameters_Vc*0.055;
  VSRrel := model_parameters_Vc*0.00316;
  model_parameters_Vc := 3.14159*model_parameters_rc^2*model_parameters_Lc;
  model_parameters_pt := model_parameters_ptcm*2*3.14159*model_parameters_rc*model_parameters_Lc;
  i_circ0 := 1000*(Vm_t0/Rst - Vm_s0/Rst);
  g_Na_s := membrane_permeabilities_g_Na*(Sms + Smt)*(1 - membrane_permeabilities_fNat);
  g_Naps_s := membrane_permeabilities_g_Naps*(Sms + Smt)*(1 - membrane_permeabilities_fNapst);
  q_Kr_s := membrane_permeabilities_q_Kr*(Sms + Smt)*(1 - membrane_permeabilities_fKrt);
  q_Ks_s := membrane_permeabilities_q_Ks*(Sms + Smt)*(1 - membrane_permeabilities_fKst);
  g_Kp_s := membrane_permeabilities_g_Kp*(Sms + Smt)*(1 - membrane_permeabilities_fKpt);
  g_Kto_s := membrane_permeabilities_g_Kto*(Sms + Smt)*(1 - membrane_permeabilities_fKtot);
  g_K1_s := membrane_permeabilities_g_K1*(Sms + Smt)*(1 - membrane_permeabilities_fK1t);
  g_KNa_s := membrane_permeabilities_g_KNa*(Sms + Smt)*(1 - membrane_permeabilities_fKNat);
  g_KATP_s := membrane_permeabilities_g_KATP*(Sms + Smt)*(1 - membrane_permeabilities_fKATPt);
  g_Nab_s := membrane_permeabilities_g_Nab*(Sms + Smt)*(1 - membrane_permeabilities_fNabt);
  g_Cab_s := membrane_permeabilities_g_Cab*(Sms + Smt)*(1 - membrane_permeabilities_fCabt);
  i_pCa_max_s := membrane_permeabilities_i_pCa_max*(Sms + Smt)*(1 - membrane_permeabilities_fpCat);
  i_NaK_max_s := membrane_permeabilities_i_NaK_max*(Sms + Smt)*(1 - membrane_permeabilities_fNaKt);
  i_NaCa_max_s := membrane_permeabilities_i_NaCa_max*(Sms + Smt)*(1 - membrane_permeabilities_fNaCat);
  P_CaL_s := membrane_permeabilities_P_CaL*(Sms + Smt)*(1 - membrane_permeabilities_fCaLt);
  P_KL_s := membrane_permeabilities_P_KL*(Sms + Smt)*(1 - membrane_permeabilities_fCaLt);
  P_nsNa_s := membrane_permeabilities_P_nsNa*(Sms + Smt)*(1 - membrane_permeabilities_fnsNat);
  P_nsK_s := membrane_permeabilities_P_nsK*(Sms + Smt)*(1 - membrane_permeabilities_fnsKt);
  g_Na_t := membrane_permeabilities_g_Na*(Sms + Smt)*membrane_permeabilities_fNat;
  g_Naps_t := membrane_permeabilities_g_Naps*(Sms + Smt)*membrane_permeabilities_fNapst;
  q_Kr_t := membrane_permeabilities_q_Kr*(Sms + Smt)*membrane_permeabilities_fKrt;
  q_Ks_t := membrane_permeabilities_q_Ks*(Sms + Smt)*membrane_permeabilities_fKst;
  g_Kp_t := membrane_permeabilities_g_Kp*(Sms + Smt)*membrane_permeabilities_fKpt;
  g_Kto_t := membrane_permeabilities_g_Kto*(Sms + Smt)*membrane_permeabilities_fKtot;
  g_K1_t := membrane_permeabilities_g_K1*(Sms + Smt)*membrane_permeabilities_fK1t;
  g_KNa_t := membrane_permeabilities_g_KNa*(Sms + Smt)*membrane_permeabilities_fKNat;
  g_KATP_t := membrane_permeabilities_g_KATP*(Sms + Smt)*membrane_permeabilities_fKATPt;
  g_Nab_t := membrane_permeabilities_g_Nab*(Sms + Smt)*membrane_permeabilities_fNabt;
  g_Cab_t := membrane_permeabilities_g_Cab*(Sms + Smt)*membrane_permeabilities_fCabt;
  i_pCa_max_t := membrane_permeabilities_i_pCa_max*(Sms + Smt)*membrane_permeabilities_fpCat;
  i_NaK_max_t := membrane_permeabilities_i_NaK_max*(Sms + Smt)*membrane_permeabilities_fNaKt;
  i_NaCa_max_t := membrane_permeabilities_i_NaCa_max*(Sms + Smt)*membrane_permeabilities_fNaCat;
  P_CaL_t := membrane_permeabilities_P_CaL*(Sms + Smt)*membrane_permeabilities_fCaLt;
  P_KL_t := membrane_permeabilities_P_KL*(Sms + Smt)*membrane_permeabilities_fCaLt;
  P_nsNa_t := membrane_permeabilities_P_nsNa*(Sms + Smt)*membrane_permeabilities_fnsNat;
  P_nsK_t := membrane_permeabilities_P_nsK*(Sms + Smt)*membrane_permeabilities_fnsKt;
  i_Kext0 := ;
  i_Na_s0 := g_Na_s*m^3*h*(Vm_s0 - ln((Na_e + 0.12*K_e)/(Na_i + 0.12*K_i))*R*T/F);
  E_Na_s := ln(Na_e/Na_i)*R*T/F;
  i_Na_s_i_Na_s_m_gate_m_infinity := 1/(1 + exp((Vm_s0 + 52.2 - 9)/(-7.4)));
  i_Na_s_i_Na_s_m_gate_tau_m := (0.001/(101.6*exp(Vm_s0*0.1135) + 0.02268*exp(-0.0717*Vm_s0)) + 0.0001)/4.83;
  i_Na_s_i_Na_s_h_gate_h_infinity := 1/(1 + exp((Vm_s0 + 85.6 - 9)/5.5));
  i_Na_s_i_Na_s_h_gate_tau_h := (0.001/(1.1381e-6*exp(-0.1017*Vm_s0) + 6.537*exp(Vm_s0*0.08016)) + 0.0005)/4.83;
  i_Na_t0 := g_Na_t*m0^3*h0*(Vm_t0 - ln((Na_t + 0.12*K_t)/(Na_i + 0.12*K_i))*R*T/F);
  E_Na_t := ln(Na_t/Na_i)*R*T/F;
  i_Na_t_i_Na_t_m_gate_m_infinity := 1/(1 + exp((Vm_t0 + 52.2 - 9)/(-7.4)));
  i_Na_t_i_Na_t_m_gate_tau_m := (0.001/(101.6*exp(Vm_t0*0.1135) + 0.02268*exp(-0.0717*Vm_t0)) + 0.0001)/4.83;
  i_Na_t_i_Na_t_h_gate_h_infinity := 1/(1 + exp((Vm_t0 + 85.6 - 9)/5.5));
  i_Na_t_i_Na_t_h_gate_tau_h := (0.001/(1.1381e-6*exp(-0.1017*Vm_t0) + 6.537*exp(Vm_t0*0.08016)) + 0.0005)/4.83;
  i_Naps_s0 := g_Naps_s/(1 + exp((-54 - Vm_s0)/8))*(Vm_s0 - ln((Na_e + 0.12*K_e)/(Na_i + 0.12*K_i))*R*T/F);
  i_Naps_t0 := g_Naps_t/(1 + exp((-54 - Vm_t0)/8))*(Vm_t0 - ln((Na_t + 0.12*K_t)/(Na_i + 0.12*K_i))*R*T/F);
  i_CaL_s0 := 1*P_CaL_s*4*(i_CaL_s_Co + i_CaL_s_Ccao)*y*Vm_s0*F^2/(R*T)*(0.001*exp(2*Vm_s0*F/(R*T)) - 0.341*Ca_e)/(exp(2*Vm_s0*F/(R*T)) - 1);
  i_KL_s := 1*P_KL_s/(1 - (i_CaL_s0 + i_CaL_t0)/(0.458*(Sms + Smt)))*(i_CaL_s_Co + i_CaL_s_Ccao)*y*Vm_s0*F^2/(R*T)*(K_i*exp(Vm_s0*F/(R*T)) - K_e)/(exp(Vm_s0*F/(R*T)) - 1);
  i_CaL_s_alfas := 400*exp((Vm_s0 + 12)/10);
  i_CaL_s_betas := 50*exp(-(Vm_s0 + 12)/13);
  i_CaL_s_gama := 187.5*Ca_ss;
  i_CaL_s_alfa2s := i_CaL_s_alfas*i_CaL_s_a;
  i_CaL_s_beta2s := i_CaL_s_betas/i_CaL_s_b;
  i_CaL_t0 := 1*P_CaL_t*4*(i_CaL_t_TCo + i_CaL_t_TCcao)*y0*Vm_t0*F^2/(R*T)*(0.001*exp(2*Vm_t0*F/(R*T)) - 0.341*Ca_t)/(exp(2*Vm_t0*F/(R*T)) - 1);
  i_CaL_s_i_CaL_s_y_gate_y_infinity := 1/(1 + exp((Vm_s0 + 35)/6));
  i_CaL_s_i_CaL_s_y_gate_tau_y := 0.001/(0.02 + 0.0197*exp(-((Vm_s0 + 10)*0.0337)^2)) + 0.55/(1 + exp((Vm_s0 + 40)/9.5*4));
  i_KL_t := 1*P_KL_t/(1 - (i_CaL_s0 + i_CaL_t0)/(0.458*(Sms + Smt)))*(i_CaL_t_TCo + i_CaL_t_TCcao)*y0*Vm_t0*F^2/(R*T)*(K_i*exp(Vm_t0*F/(R*T)) - K_t)/(exp(Vm_t0*F/(R*T)) - 1);
  i_CaL_t_alfat := 400*exp((Vm_t0 + 12)/10);
  i_CaL_t_betat := 50*exp(-(Vm_t0 + 12)/13);
  i_CaL_t_gama := 187.5*Ca_ss;
  i_CaL_t_alfa2t := i_CaL_t_alfat*i_CaL_t_a;
  i_CaL_t_beta2t := i_CaL_t_betat/i_CaL_t_b;
  i_CaL_t_i_CaL_t_y_gate_y_infinity := 1/(1 + exp((Vm_t0 + 35)/6));
  i_CaL_t_i_CaL_t_y_gate_tau_y := 0.001/(0.02 + 0.0197*exp(-((Vm_t0 + 10)*0.0337)^2)) + 0.55/(1 + exp((Vm_t0 + 40)/9.5*4));
  i_Kr_s0 := q_Kr_s*0.02614*sqrt(K_e/5.4)*xr*xri*(Vm_s0 - E_Kr_s);
  E_Kr_s := ln(K_e/K_i)*R*T/F;
  xri := 1/(1 + exp((Vm_s0 + 9)/22.4));
  i_Kr_s_i_Kr_s_xr_gate_xr_infinity := 1/(1 + exp(-(Vm_s0 + 21.5)/7.5));
  i_Kr_s_i_Kr_s_xr_gate_tau_xr := 0.001/(0.00138*(Vm_s0 + 14.2)/(1 - exp(-0.123*(Vm_s0 + 14.2))) + 0.00061*(Vm_s0 + 38.9)/(exp(0.145*(Vm_s0 + 38.9)) - 1));
  i_Kr_t0 := q_Kr_t*0.02614*sqrt(K_t/5.4)*xr0*xri0*(Vm_t0 - E_Kr_t);
  E_Kr_t := ln(K_t/K_i)*R*T/F;
  xri0 := 1/(1 + exp((Vm_t0 + 9)/22.4));
  i_Kr_t_i_Kr_t_xr_gate_xr_infinity := 1/(1 + exp(-(Vm_t0 + 21.5)/7.5));
  i_Kr_t_i_Kr_t_xr_gate_tau_xr := 0.001/(0.00138*(Vm_t0 + 14.2)/(1 - exp(-0.123*(Vm_t0 + 14.2))) + 0.00061*(Vm_t0 + 38.9)/(exp(0.145*(Vm_t0 + 38.9)) - 1));
  i_Ks_s0 := q_Ks_s*(0.2308 + 0.7692/(1 + exp((-ln(1*Ca_i) - 4.2)/0.6)))*xs^2*(Vm_s0 - i_Ks_s_E_Ks_s);
  i_Ks_s_E_Ks_s := ln((K_e + i_Ks_s_PRNaK*Na_e)/(K_i + i_Ks_s_PRNaK*Na_i))*R*T/F;
  i_Ks_s_i_Ks_s_xs_gate_xs_infinity := 1/(1 + exp(-(Vm_s0 - 1.5)/16.7));
  i_Ks_s_i_Ks_s_xs_gate_tau_xs := 0.001/(7.19e-5*(Vm_s0 + 30)/(1 - exp(-0.148*(Vm_s0 + 30))) + 1.31e-4*(Vm_s0 + 30)/(exp(0.0687*(Vm_s0 + 30)) - 1));
  i_Ks_t0 := q_Ks_t*(0.2308 + 0.7692/(1 + exp((-ln(1*Ca_i) - 4.2)/0.6)))*xs0^2*(Vm_t0 - i_Ks_t_E_Ks_t);
  i_Ks_t_E_Ks_t := ln((K_t + i_Ks_t_PRNaK*Na_t)/(K_i + i_Ks_t_PRNaK*Na_i))*R*T/F;
  i_Ks_t_i_Ks_t_xs_gate_xs_infinity := 1/(1 + exp(-(Vm_t0 - 1.5)/16.7));
  i_Ks_t_i_Ks_t_xs_gate_tau_xs := 0.001/(7.19e-5*(Vm_t0 + 30)/(1 - exp(-0.148*(Vm_t0 + 30))) + 1.31e-4*(Vm_t0 + 30)/(exp(0.0687*(Vm_t0 + 30)) - 1));
  i_K1_s0 := g_K1_s*sqrt(K_e/5.4)*i_K1_s_aK1s/(i_K1_s_aK1s + i_K1_s_bK1s)*(Vm_s0 - i_K1_s_E_K1_s);
  i_K1_s_E_K1_s := E_Kr_s;
  i_K1_s_aK1s := 1020/(1 + exp(0.2385*(Vm_s0 - i_K1_s_E_K1_s - 59.215)));
  i_K1_s_bK1s := 1000*(0.49124*exp(0.08032*(Vm_s0 - i_K1_s_E_K1_s + 5.476)) + exp(0.06175*(Vm_s0 - i_K1_s_E_K1_s - 594.31)))/(1 + exp(-0.5143*(Vm_s0 - i_K1_s_E_K1_s + 4.753)));
  i_K1_t0 := g_K1_t*sqrt(K_t/5.4)*i_K1_t_aK1t/(i_K1_t_aK1t + i_K1_t_bK1t)*(Vm_t0 - i_K1_t_E_K1_t);
  i_K1_t_E_K1_t := E_Kr_t;
  i_K1_t_aK1t := 1020/(1 + exp(0.2385*(Vm_t0 - i_K1_t_E_K1_t - 59.215)));
  i_K1_t_bK1t := 1000*(0.49124*exp(0.08032*(Vm_t0 - i_K1_t_E_K1_t + 5.476)) + exp(0.06175*(Vm_t0 - i_K1_t_E_K1_t - 594.31)))/(1 + exp(-0.5143*(Vm_t0 - i_K1_t_E_K1_t + 4.753)));
  i_Kp_s0 := g_Kp_s*i_Kp_s_kps*(Vm_s0 - i_Kp_s_E_Kp_s);
  i_Kp_s_kps := 1/(1 + exp((20 - Vm_s0)/5));
  i_Kp_s_E_Kp_s := E_Kr_s;
  i_Kp_t0 := g_Kp_t*i_Kp_t_kpt*(Vm_t0 - i_Kp_t_E_Kp_t);
  i_Kp_t_kpt := 1/(1 + exp((20 - Vm_t0)/5));
  i_Kp_t_E_Kp_t := E_Kr_t;
  i_Kto_s0 := g_Kto_s/((1 + exp((Vm_s0 + 57.53)/(-5.863)))*(1 + exp((Vm_s0 - 45.8)/25.87)))*(r2*i_Kto_s_fr2 + r3*(1 - i_Kto_s_fr2))*(Vm_s0 - i_Kto_s_E_Kto_s);
  i_Kto_s_E_Kto_s := E_Kr_s;
  i_Kto_s_r2_infinity := 1.006/(1 + exp((Vm_s0 + 36.69 + 10)/12.43));
  i_Kto_s_i_Kto_s_r3_gate_r3_infinity := i_Kto_s_r2_infinity;
  i_Kto_t0 := g_Kto_t/((1 + exp((Vm_t0 + 57.53)/(-5.863)))*(1 + exp((Vm_t0 - 45.8)/25.87)))*(r20*i_Kto_t_fr2 + r30*(1 - i_Kto_t_fr2))*(Vm_t0 - i_Kto_t_E_Kto_t);
  i_Kto_t_E_Kto_t := E_Kr_t;
  i_Kto_t_r2_infinity := 1.006/(1 + exp((Vm_t0 + 36.69 + 10)/12.43));
  i_Kto_t_i_Kto_t_r3_gate_r3_infinity := i_Kto_t_r2_infinity;
  i_KNa_s0 := g_KNa_s*(0.8 - 0.65/(1 + exp((Vm_s0 + 125)/15)))*0.85/(1 + (66/Na_i)^2.8)*(Vm_s0 - i_KNa_s_E_KNa_s);
  i_KNa_s_E_KNa_s := E_Kr_s;
  i_KNa_t0 := g_KNa_t*(0.8 - 0.65/(1 + exp((Vm_t0 + 125)/15)))*0.85/(1 + (66/Na_i)^2.8)*(Vm_t0 - i_KNa_t_E_KNa_t);
  i_KNa_t_E_KNa_t := E_Kr_t;
  i_nsNa_s0 := 1*P_nsNa_s*Vm_s0*F^2/(R*T)*(0.75*Na_i*exp(Vm_s0*F/(R*T)) - 0.75*Na_e)/(exp(Vm_s0*F/(R*T)) - 1)/(1 + (0.0025/Ca_i)^3);
  i_nsNa_t0 := 1*P_nsNa_t*Vm_t0*F^2/(R*T)*(0.75*Na_i*exp(Vm_t0*F/(R*T)) - 0.75*Na_t)/(exp(Vm_t0*F/(R*T)) - 1)/(1 + (0.0025/Ca_i)^3);
  i_nsK_s0 := 1*P_nsK_s*Vm_s0*F^2/(R*T)*(0.75*K_i*exp(Vm_s0*F/(R*T)) - 0.75*K_e)/(exp(Vm_s0*F/(R*T)) - 1)/(1 + (0.0025/Ca_i)^3);
  i_nsK_t0 := 1*P_nsK_t*Vm_t0*F^2/(R*T)*(0.75*K_i*exp(Vm_t0*F/(R*T)) - 0.75*K_t)/(exp(Vm_t0*F/(R*T)) - 1)/(1 + (0.0025/Ca_i)^3);
  i_Nab_s0 := g_Nab_s*(Vm_s0 - E_Na_s);
  i_Nab_t0 := g_Nab_t*(Vm_t0 - E_Na_t);
  i_Cab_s0 := g_Cab_s*(Vm_s0 - i_Cab_s_E_Ca_s);
  i_Cab_s_E_Ca_s := ln(Ca_e/Ca_i)*R*T/(2*F);
  i_Cab_t0 := g_Cab_t*(Vm_t0 - i_Cab_t_E_Ca_t);
  i_Cab_t_E_Ca_t := ln(Ca_t/Ca_i)*R*T/(2*F);
  i_NaCa_s0 := i_NaCa_max_s*exp(-0.85*Vm_s0*F/(R*T))*(exp(Vm_s0*F/(R*T))*Na_i^3*Ca_e - Na_e^3*Ca_i)/(1 + 0.0001*exp(-0.85*Vm_s0*F/(R*T))*(exp(Vm_s0*F/(R*T))*Na_i^3*Ca_e + Na_e^3*Ca_i));
  i_NaCa_t0 := i_NaCa_max_t*exp(-0.85*Vm_t0*F/(R*T))*(exp(Vm_t0*F/(R*T))*Na_i^3*Ca_t - Na_t^3*Ca_i)/(1 + 0.0001*exp(-0.85*Vm_t0*F/(R*T))*(exp(Vm_t0*F/(R*T))*Na_i^3*Ca_t + Na_t^3*Ca_i));
  i_NaK_s0 := i_NaK_max_s/(1 + 0.1245*exp(-0.1*Vm_s0*F/(R*T)) + 0.0365*1/7*(exp(Na_e/67.3) - 1)*exp(-Vm_s0*F/(R*T)))*1/(1 + (10/Na_i)^1.5)*K_e/(K_e + 1.5);
  i_NaK_t0 := i_NaK_max_t/(1 + 0.1245*exp(-0.1*Vm_t0*F/(R*T)) + 0.0365*1/7*(exp(Na_t/67.3) - 1)*exp(-Vm_t0*F/(R*T)))*1/(1 + (10/Na_i)^1.5)*K_t/(K_t + 1.5);
  i_pCa_s0 := i_pCa_max_s*Ca_i/(0.0005 + Ca_i);
  i_pCa_t0 := i_pCa_max_t*Ca_i/(0.0005 + Ca_i);
  i_KATP_s0 := g_KATP_s*1/(1 + (ATP_i/0.114)^2)*(K_e/4)^0.24*(Vm_s0 - i_KATP_s_E_KATP_s);
  i_KATP_s_E_KATP_s := E_Kr_s;
  i_KATP_t0 := g_KATP_t*1/(1 + (ATP_i/0.114)^2)*(K_t/4)^0.24*(Vm_t0 - i_KATP_t_E_KATP_t);
  i_KATP_t_E_KATP_t := E_Kr_t;
  JteNa := 1*Vt/t_tubular_ion_fluxes_tau_Na*(Na_t - Na_e);
  JteCa := 1*Vt/t_tubular_ion_fluxes_tau_Ca*(Ca_t - Ca_e);
  JteK := 1*Vt/t_tubular_ion_fluxes_tau_K*(K_t - K_e);
  JCaSRup0 := 1*1000*Vmyo*0.0018*Ca_i^2/(Ca_i^2 + 0.0005^2);
  JCaSRleak0 := 1250*Vmyo*5.8e-5*(CaSRup0 - Ca_i);
  Jtr0 := 1*VSRrel/Jtr_tau_tr*(CaSRup0 - CaSRrel0);
  JCaSRrel0 := 1800*VSRrel*(JCaSRrel_F2 + JCaSRrel_F3)*(CaSRrel0 - Ca_ss);
  JCaSRrel_kap := 3*12.15e12;
  JCaSRrel_kbp := 4.05e9;
  JCad0 := 1*(Ca_ss - Ca_i)*Vmyo/JCad_tau_d;
  ion_concentrations_dBTRH := 20000*Ca_i*(1 - ion_concentrations_BTRH) - 0.07*ion_concentrations_BTRH;
  ion_concentrations_dBTRL := 40000*Ca_i*(1 - ion_concentrations_BTRL) - ion_concentrations_BTRL*40;

  // Rate rules:
  Vm_s0' = 1000*(i_Kext0 + i_circ0 - i_Na_s0 - i_Naps_s0 - i_CaL_s0 - i_KL_s - i_Ks_s0 - i_Kr_s0 - i_K1_s0 - i_Kp_s0 - i_KNa_s0 - i_KATP_s0 - i_nsNa_s0 - i_nsK_s0 - i_Nab_s0 - i_Cab_s0 - i_NaCa_s0 - i_NaK_s0 - i_pCa_s0 - i_Kto_s0)/Cms;
  Vm_t0' = 1000*(-i_circ0 - i_Na_t0 - i_Naps_t0 - i_CaL_t0 - i_KL_t - i_Ks_t0 - i_Kr_t0 - i_K1_t0 - i_Kp_t0 - i_KNa_t0 - i_KATP_t0 - i_nsNa_t0 - i_nsK_t0 - i_Nab_t0 - i_Cab_t0 - i_NaCa_t0 - i_NaK_t0 - i_pCa_t0 - i_Kto_t0)/Cmt;
  Na_i' = -(i_Na_s0 + i_Na_t0 + i_Naps_s0 + i_Naps_t0 + i_nsNa_s0 + i_nsNa_t0 + i_Nab_s0 + i_Nab_t0 + 3*i_NaCa_s0 + 3*i_NaCa_t0 + 3*i_NaK_s0 + 3*i_NaK_t0)/(F*Vmyo);
  K_i' = -(0*i_Kext0 + i_Ks_s0 + i_Ks_t0 + i_Kr_s0 + i_Kr_t0 + i_K1_s0 + i_K1_t0 + i_Kp_s0 + i_Kp_t0 + i_KL_s + i_KL_t + i_KNa_s0 + i_KNa_t0 + i_nsK_s0 + i_nsK_t0 - 2*i_NaK_s0 - 2*i_NaK_t0 + i_KATP_s0 + i_KATP_t0 + i_Kto_s0 + i_Kto_t0)/(F*Vmyo);
  m' = (i_Na_s_i_Na_s_m_gate_m_infinity - m)/i_Na_s_i_Na_s_m_gate_tau_m;
  h' = (i_Na_s_i_Na_s_h_gate_h_infinity - h)/i_Na_s_i_Na_s_h_gate_tau_h;
  Na_t' = ((i_Na_t0 + i_Naps_t0 + i_nsNa_t0 + i_Nab_t0 + 3*i_NaCa_t0 + 3*i_NaK_t0)/F - 1*JteNa)/Vt;
  K_t' = ((i_Ks_t0 + i_Kr_t0 + i_K1_t0 + i_Kp_t0 + i_KNa_t0 + i_KL_t + i_nsK_t0 - 2*i_NaK_t0 + i_KATP_t0 + i_Kto_t0)/F - 1*JteK)/Vt;
  m0' = (i_Na_t_i_Na_t_m_gate_m_infinity - m0)/i_Na_t_i_Na_t_m_gate_tau_m;
  h0' = (i_Na_t_i_Na_t_h_gate_h_infinity - h0)/i_Na_t_i_Na_t_h_gate_tau_h;
  i_CaL_s_Cst' = i_CaL_s_betas*i_CaL_s_C1 + i_CaL_s_omega*i_CaL_s_Ccast - (4*i_CaL_s_alfas + i_CaL_s_gama)*i_CaL_s_Cst;
  i_CaL_s_C1' = 4*i_CaL_s_alfas*i_CaL_s_Cst + 2*i_CaL_s_betas*i_CaL_s_C2 + i_CaL_s_omega/i_CaL_s_b*i_CaL_s_Cca1 - (i_CaL_s_betas + 3*i_CaL_s_alfas + i_CaL_s_gama*i_CaL_s_a)*i_CaL_s_C1;
  i_CaL_s_C2' = 3*i_CaL_s_alfas*i_CaL_s_C1 + 3*i_CaL_s_betas*i_CaL_s_C3 + i_CaL_s_omega/i_CaL_s_b^2*i_CaL_s_Cca2 - (2*i_CaL_s_betas + 2*i_CaL_s_alfas + i_CaL_s_gama*i_CaL_s_a^2)*i_CaL_s_C2;
  i_CaL_s_C3' = 2*i_CaL_s_alfas*i_CaL_s_C2 + 4*i_CaL_s_betas*i_CaL_s_C4 + i_CaL_s_omega/i_CaL_s_b^3*i_CaL_s_Cca3 - (3*i_CaL_s_betas + i_CaL_s_alfas + i_CaL_s_gama*i_CaL_s_a^3)*i_CaL_s_C3;
  i_CaL_s_C4' = i_CaL_s_alfas*i_CaL_s_C3 + i_CaL_s_g*i_CaL_s_Co + i_CaL_s_omega/i_CaL_s_b^4*i_CaL_s_Cca4 - (4*i_CaL_s_betas + i_CaL_s_f + i_CaL_s_gama*i_CaL_s_a^4)*i_CaL_s_C4;
  i_CaL_s_Co' = i_CaL_s_f*i_CaL_s_C4 - i_CaL_s_g*i_CaL_s_Co;
  i_CaL_s_Ccast' = i_CaL_s_beta2s*i_CaL_s_Cca1 + i_CaL_s_gama*i_CaL_s_Cst - (4*i_CaL_s_alfa2s + i_CaL_s_omega)*i_CaL_s_Ccast;
  i_CaL_s_Cca1' = 4*i_CaL_s_alfa2s*i_CaL_s_Ccast + 2*i_CaL_s_beta2s*i_CaL_s_Cca2 + i_CaL_s_gama*i_CaL_s_a*i_CaL_s_C1 - (i_CaL_s_beta2s + 3*i_CaL_s_alfa2s + i_CaL_s_omega/i_CaL_s_b)*i_CaL_s_Cca1;
  i_CaL_s_Cca2' = 3*i_CaL_s_alfa2s*i_CaL_s_Cca1 + 3*i_CaL_s_beta2s*i_CaL_s_Cca3 + i_CaL_s_gama*i_CaL_s_a^2*i_CaL_s_C2 - (2*i_CaL_s_beta2s + 2*i_CaL_s_alfa2s + i_CaL_s_omega/i_CaL_s_b^2)*i_CaL_s_Cca2;
  i_CaL_s_Cca3' = 2*i_CaL_s_alfa2s*i_CaL_s_Cca2 + 4*i_CaL_s_beta2s*i_CaL_s_Cca4 + i_CaL_s_gama*i_CaL_s_a^3*i_CaL_s_C3 - (3*i_CaL_s_beta2s + i_CaL_s_alfa2s + i_CaL_s_omega/i_CaL_s_b^3)*i_CaL_s_Cca3;
  i_CaL_s_Cca4' = i_CaL_s_alfa2s*i_CaL_s_Cca3 + i_CaL_s_g2*i_CaL_s_Ccao + i_CaL_s_gama*i_CaL_s_a^4*i_CaL_s_C4 - (4*i_CaL_s_beta2s + i_CaL_s_f2 + i_CaL_s_omega/i_CaL_s_b^4)*i_CaL_s_Cca4;
  i_CaL_s_Ccao' = i_CaL_s_f2*i_CaL_s_Cca4 - i_CaL_s_g2*i_CaL_s_Ccao;
  Ca_ss' = 1/(1 + 0.05*0.00238/(0.00238 + Ca_ss)^2)*(-(i_CaL_s0 + i_CaL_t0)/(2*F*Vd) + 1*JCaSRrel0/Vd - 1*JCad0/Vd);
  y' = (i_CaL_s_i_CaL_s_y_gate_y_infinity - y)/i_CaL_s_i_CaL_s_y_gate_tau_y;
  i_CaL_t_TCst' = i_CaL_t_betat*i_CaL_t_TC1 + i_CaL_t_omega*i_CaL_t_TCcast - (4*i_CaL_t_alfat + i_CaL_t_gama)*i_CaL_t_TCst;
  i_CaL_t_TC1' = 4*i_CaL_t_alfat*i_CaL_t_TCst + 2*i_CaL_t_betat*i_CaL_t_TC2 + i_CaL_t_omega/i_CaL_t_b*i_CaL_t_TCca1 - (i_CaL_t_betat + 3*i_CaL_t_alfat + i_CaL_t_gama*i_CaL_t_a)*i_CaL_t_TC1;
  i_CaL_t_TC2' = 3*i_CaL_t_alfat*i_CaL_t_TC1 + 3*i_CaL_t_betat*i_CaL_t_TC3 + i_CaL_t_omega/i_CaL_t_b^2*i_CaL_t_TCca2 - (2*i_CaL_t_betat + 2*i_CaL_t_alfat + i_CaL_t_gama*i_CaL_t_a^2)*i_CaL_t_TC2;
  i_CaL_t_TC3' = 2*i_CaL_t_alfat*i_CaL_t_TC2 + 4*i_CaL_t_betat*i_CaL_t_TC4 + i_CaL_t_omega/i_CaL_t_b^3*i_CaL_t_TCca3 - (3*i_CaL_t_betat + i_CaL_t_alfat + i_CaL_t_gama*i_CaL_t_a^3)*i_CaL_t_TC3;
  i_CaL_t_TC4' = i_CaL_t_alfat*i_CaL_t_TC3 + i_CaL_t_g*i_CaL_t_TCo + i_CaL_t_omega/i_CaL_t_b^4*i_CaL_t_TCca4 - (4*i_CaL_t_betat + i_CaL_t_f + i_CaL_t_gama*i_CaL_t_a^4)*i_CaL_t_TC4;
  i_CaL_t_TCo' = i_CaL_t_f*i_CaL_t_TC4 - i_CaL_t_g*i_CaL_t_TCo;
  i_CaL_t_TCcast' = i_CaL_t_beta2t*i_CaL_t_TCca1 + i_CaL_t_gama*i_CaL_t_TCst - (4*i_CaL_t_alfa2t + i_CaL_t_omega)*i_CaL_t_TCcast;
  i_CaL_t_TCca1' = 4*i_CaL_t_alfa2t*i_CaL_t_TCcast + 2*i_CaL_t_beta2t*i_CaL_t_TCca2 + i_CaL_t_gama*i_CaL_t_a*i_CaL_t_TC1 - (i_CaL_t_beta2t + 3*i_CaL_t_alfa2t + i_CaL_t_omega/i_CaL_t_b)*i_CaL_t_TCca1;
  i_CaL_t_TCca2' = 3*i_CaL_t_alfa2t*i_CaL_t_TCca1 + 3*i_CaL_t_beta2t*i_CaL_t_TCca3 + i_CaL_t_gama*i_CaL_t_a^2*i_CaL_t_TC2 - (2*i_CaL_t_beta2t + 2*i_CaL_t_alfa2t + i_CaL_t_omega/i_CaL_t_b^2)*i_CaL_t_TCca2;
  i_CaL_t_TCca3' = 2*i_CaL_t_alfa2t*i_CaL_t_TCca2 + 4*i_CaL_t_beta2t*i_CaL_t_TCca4 + i_CaL_t_gama*i_CaL_t_a^3*i_CaL_t_TC3 - (3*i_CaL_t_beta2t + i_CaL_t_alfa2t + i_CaL_t_omega/i_CaL_t_b^3)*i_CaL_t_TCca3;
  i_CaL_t_TCca4' = i_CaL_t_alfa2t*i_CaL_t_TCca3 + i_CaL_t_g2*i_CaL_t_TCcao + i_CaL_t_gama*i_CaL_t_a^4*i_CaL_t_TC4 - (4*i_CaL_t_beta2t + i_CaL_t_f2 + i_CaL_t_omega/i_CaL_t_b^4)*i_CaL_t_TCca4;
  i_CaL_t_TCcao' = i_CaL_t_f2*i_CaL_t_TCca4 - i_CaL_t_g2*i_CaL_t_TCcao;
  Ca_t' = ((-2*i_NaCa_t0 + i_CaL_t0 + i_Cab_t0 + i_pCa_t0)/(2*F) - 1*JteCa)/Vt;
  y0' = (i_CaL_t_i_CaL_t_y_gate_y_infinity - y0)/i_CaL_t_i_CaL_t_y_gate_tau_y;
  xr' = (i_Kr_s_i_Kr_s_xr_gate_xr_infinity - xr)/i_Kr_s_i_Kr_s_xr_gate_tau_xr;
  xr0' = (i_Kr_t_i_Kr_t_xr_gate_xr_infinity - xr0)/i_Kr_t_i_Kr_t_xr_gate_tau_xr;
  Ca_i' = 1/(1 + 0.05*0.00238/(0.00238 + Ca_i)^2)*((-2*(i_NaCa_s0 + i_NaCa_t0) + i_Cab_s0 + i_Cab_t0 + i_pCa_s0 + i_pCa_t0)/(-2*F*Vmyo) + 1*(JCad0 + JCaSRleak0 - JCaSRup0)/Vmyo - ion_concentrations_dBTRH*0.14 - ion_concentrations_dBTRL*0.07);
  xs' = (i_Ks_s_i_Ks_s_xs_gate_xs_infinity - xs)/i_Ks_s_i_Ks_s_xs_gate_tau_xs;
  xs0' = (i_Ks_t_i_Ks_t_xs_gate_xs_infinity - xs0)/i_Ks_t_i_Ks_t_xs_gate_tau_xs;
  r2' = (i_Kto_s_r2_infinity - r2)/i_Kto_s_i_Kto_s_r2_gate_tau_r2;
  r3' = (i_Kto_s_i_Kto_s_r3_gate_r3_infinity - r3)/i_Kto_s_i_Kto_s_r3_gate_tau_r3;
  r20' = (i_Kto_t_r2_infinity - r20)/i_Kto_t_i_Kto_t_r2_gate_tau_r2;
  r30' = (i_Kto_t_i_Kto_t_r3_gate_r3_infinity - r30)/i_Kto_t_i_Kto_t_r3_gate_tau_r3;
  CaSRup0' = (JCaSRup0 - JCaSRleak0 - Jtr0)/(1*VSRup);
  CaSRrel0' = 1/(1 + 15*0.8/(0.8 + CaSRrel0)^2)*(Jtr0 - JCaSRrel0)/VSRrel;
  JCaSRrel_F1' = JCaSRrel_F2*JCaSRrel_kam - JCaSRrel_F1*JCaSRrel_kap*Ca_ss^4;
  JCaSRrel_F2' = JCaSRrel_F1*JCaSRrel_kap*Ca_ss^4 + JCaSRrel_F3*JCaSRrel_kbm + JCaSRrel_F4*JCaSRrel_kcm - JCaSRrel_F2*(JCaSRrel_kam + JCaSRrel_kbp*Ca_ss^3 + JCaSRrel_kcp);
  JCaSRrel_F3' = JCaSRrel_F2*JCaSRrel_kbp*Ca_ss^3 - JCaSRrel_F3*JCaSRrel_kbm;
  JCaSRrel_F4' = JCaSRrel_F2*JCaSRrel_kcp - JCaSRrel_F4*JCaSRrel_kcm;
  ion_concentrations_BTRH' = ion_concentrations_dBTRH;
  ion_concentrations_BTRL' = ion_concentrations_dBTRL;
end
