// SBML level 2 version 4

model perelson_1993c____main()
  // Originally created by libAntimony v1.4 (using libSBML 4.1.0-b2)

  // Compartments:
  compartment default_compartment = 1;

  // Parameters:
  uninfected_s = 10;
  uninfected_r = 0.03;
  uninfected_T_max = 1500;
  mu_T = 0.02;
  uninfected_theta = 1;
  k_1 = 2.4e-5;
  T_1 = 0;
  T_2 = 0;
  V = 1e-3;
  T = 1000;
  k_2 = 3e-3;
  mu_b = 0.24;
  free_virus_particle_mu_V = 2.4;
  AZT_tau = 1096;
  AZT_N_initial = 1400;
  AZT_N_AZT = 1050;
  time_ = ;

  // Assignment rules:
  uninfected_s_V := uninfected_theta*uninfected_s/(uninfected_theta + V);
  N := ;
  T_cell_population_T_tot := T + T_1 + T_2;

  // Rate rules:
  T_1' = k_1*V*T - mu_T*T_1 - k_2*T_1;
  T_2' = k_2*T_1 - mu_b*T_2;
  V' = N*mu_b*T_2 - k_1*V*T - free_virus_particle_mu_V*V;
  T' = uninfected_s_V - mu_T*T + uninfected_r*T*(1 - (T + T_1 + T_2)/uninfected_T_max) - k_1*V*T;
end
