// SBML level 2 version 4

model perelson_1993d____main()
  // Originally created by libAntimony v1.4 (using libSBML 4.1.0-b2)

  // Compartments:
  compartment default_compartment = 1;

  // Parameters:
  uninfected_s = 10;
  uninfected_p = 0.01;
  uninfected_gamma = 2e-5;
  N = 1000;
  k_1 = 2.4e-5;
  k_2 = 3e-3;
  k_3 = 0.023;
  mu_V = 2.4;
  T_1 = 0;
  mu_b = 0.24;
  T = 1000;
  latently_infected_k_4 = 2.424;
  latently_infected_T_0 = 1000;
  latently_infected_V_0 = 1e-3;
  latently_infected_t_min = 2;
  time_ = ;

  // Assignment rules:
  uninfected_beta := uninfected_gamma/k_3*(1 + k_2/mu_b);
  latently_infected_T_1_t := k_1*latently_infected_T_0*latently_infected_V_0/(latently_infected_k_4 - k_3)*(exp(-k_3*time_) - exp(-latently_infected_k_4*time_));
  actively_infected_T_2 := k_2*T_1/mu_b;
  free_virus_particle_V := N*k_2*T_1/(k_1*T + mu_V);

  // Rate rules:
  T_1' = ;
  T' = uninfected_s + uninfected_p*T - uninfected_gamma*T^2 - (k_3*uninfected_beta + N*k_1*k_2/(k_1*T + mu_V))*T*T_1;
end
