// SBML level 2 version 4

model phillips_2007____main()
  // Originally created by libAntimony v1.4 (using libSBML 4.1.0-b2)

  // Compartments:
  compartment default_compartment = 1;

  // Parameters:
  Vv = 0;
  v_tau_v = 10;
  v_v_vm = -1.9;
  Qmax = 100;
  theta = 10;
  sigma = 3;
  a_Vao = 1;
  Vm = 0;
  m_tau_m = 10;
  m_v_mv = -1.9;
  m_v_maQao = 1;
  H0 = 15;
  H_chi = 10.8;
  H_mu = 3.6;
  D_c0 = 1;
  D_v_vc = -6.3;
  D_v_vh = 0.19;
  time_ = ;

  // Assignment rules:
  Qv := Qmax/(1 + exp(-(Vv - theta)/sigma));
  Qm := Qmax/(1 + exp(-(Vm - theta)/sigma));
  D0 := D_v_vc*D_C + D_v_vh*H0;
  a_Qa := Qmax/(1 + exp(-(a_Va - theta)/sigma));
  a_Va := a_Vao;
  D_C := D_c0 + cos(D_omega*time_);
  D_omega := 2*pi/24;

  // Rate rules:
  Vv' = (v_v_vm*Qm + D0 - Vv)/(v_tau_v/3600);
  Vm' = (m_v_maQao + m_v_mv*Qv - Vm)/(m_tau_m/3600);
  H0' = (H_mu*Qm - H0)/H_chi;
end
