// SBML level 2 version 4

model plant_1981_version01____main()
  // Originally created by libAntimony v1.3 (using libSBML 4.1.0-b2)

  // Compartments:
  compartment default_compartment = 1;

  // Parameters:
  V = ;
  membrane_Cm = 1;
  sodium_current_g_Na = 4;
  sodium_current_V_Na = 30;
  h = ;
  c = ;
  calcium_current_V_Ca = 140;
  calcium_current_g_Ca = 0.004;
  calcium_current_f = 0.0003;
  calcium_current_k1 = 0.0085;
  x = ;
  calcium_current_calcium_current_x_gate_tau_x = 235;
  V_K = -75;
  potassium_current_g_K = 0.3;
  n = ;
  calcium_activated_potassium_current_g_K_Ca = 0.03;
  leak_current_g_L = 0.003;
  leak_current_V_L = -40;
  time_ = ;

  // Assignment rules:
  i_Na := sodium_current_g_Na*m_infinity^3*h*(V - sodium_current_V_Na);
  i_Ca := calcium_current_g_Ca*x*(V - calcium_current_V_Ca);
  i_K := potassium_current_g_K*n^4*(V - V_K);
  i_K_Ca := calcium_activated_potassium_current_g_K_Ca^c/(0.5 + c)*(V - V_K);
  i_L := leak_current_g_L*(V - leak_current_V_L);
  m_infinity := sodium_current_sodium_current_m_gate_alpha_m*(1.21*V + 78.71)/(sodium_current_sodium_current_m_gate_alpha_m*(1.21*V + 78.71) + sodium_current_sodium_current_m_gate_beta_m*(1.21*V + 78.71));
  sodium_current_sodium_current_m_gate_alpha_m := 0.1*(V - 50)/(1 + (-1*exp((V - 50)/(-10))));
  sodium_current_sodium_current_m_gate_beta_m := 4*exp((V - 25)/(-18));
  sodium_current_sodium_current_h_gate_h_infinity := sodium_current_sodium_current_h_gate_alpha_h*(1.21*V + 78.71)/(sodium_current_sodium_current_h_gate_alpha_h*(1.21*V + 78.71) + sodium_current_sodium_current_h_gate_beta_h*(1.21*V + 78.71));
  sodium_current_sodium_current_h_gate_alpha_h := 0.07*exp((V - 25)/(-20));
  sodium_current_sodium_current_h_gate_beta_h := 0.07*exp((V - 55)/10)/(1 + exp((V - 55)/10));
  sodium_current_sodium_current_h_gate_tau_h := 1/(0.08*(sodium_current_sodium_current_h_gate_alpha_h*(1.21*V + 78.71) + sodium_current_sodium_current_h_gate_beta_h*(1.21*V + 78.71)));
  calcium_current_calcium_current_x_gate_x_infinity := 1/(exp(-0.15*(V + 50)) + 1);
  potassium_current_potassium_current_n_gate_n_infinity := potassium_current_potassium_current_n_gate_alpha_n*(1.21*V + 78.71)/(potassium_current_potassium_current_n_gate_alpha_n*(1.21*V + 78.71) + potassium_current_potassium_current_n_gate_beta_n*(1.21*V + 78.71));
  potassium_current_potassium_current_n_gate_alpha_n := 0.07*(V - 55)/(1 - exp((V - 55)/(-10)));
  potassium_current_potassium_current_n_gate_beta_n := 0.125*exp((V - 45)/(-80));
  potassium_current_potassium_current_n_gate_tau_n := 1/(0.08*(potassium_current_potassium_current_n_gate_alpha_n*(1.21*V + 78.71) + potassium_current_potassium_current_n_gate_beta_n*(1.21*V + 78.71)));

  // Rate rules:
  V' = -(i_Na + i_Ca + i_K + i_K_Ca + i_L)/membrane_Cm;
  h' = (sodium_current_sodium_current_h_gate_h_infinity - h)/sodium_current_sodium_current_h_gate_tau_h;
  c' = calcium_current_f*(calcium_current_k1*x*(V - calcium_current_V_Ca) - c);
  x' = (calcium_current_calcium_current_x_gate_x_infinity - x)/calcium_current_calcium_current_x_gate_tau_x;
  n' = (potassium_current_potassium_current_n_gate_n_infinity - n)/potassium_current_potassium_current_n_gate_tau_n;
end
