// SBML level 2 version 4

model potter_model_2006____main()
  // Originally created by libAntimony v1.3 (using libSBML 4.1.0-b2)

  // Compartments:
  compartment default_compartment = 1;

  // Parameters:
  ATbl0 = 0;
  ATbl_k2T = 0.17;
  Ql = 1.06;
  Qt = 0.061;
  CTbl = 7.6;
  ts = 0.56;
  ADbl0 = 0;
  CDbl = 0.59;
  CT_A0 = 0;
  CT_A_kTA_on = 0.18;
  CT_A_kTA_off = 8131;
  CD_A0 = 0;
  CD_A_kDA_on = 0.15;
  CD_A_kDA_off = 5407;
  CA = 5e5;
  ATl0 = 0;
  k1T = 87.93;
  km5alpha = 40;
  Vmax1 = 3.65;
  PTl = 2.75;
  ADl0 = 0;
  k1D = 77.2;
  PDl = 2;
  CTl = 9.92;
  CDl = 0.92;
  ATif0 = 0;
  mu = 1000;
  PTif = 1.96;
  CTif = 307.29;
  CTst = 307.29;
  CLH = 0.104;
  PTst = 1;
  ATst0 = 0;
  ATp0 = 0;
  Vmax0 = 2.89;
  ADp0 = 0;
  CT_R0 = 0;
  CT_R_kTR_on = 0.14;
  CT_R_kTR_off = 0.069;
  CD_R0 = 0;
  CD_R_kDR_on = 0.053;
  CD_R_kDR_off = 0.018;
  CDT0 = 0;
  CDT_kDT_on = 0.14;
  CDT_kDT_off = 3.13;
  CDD0 = 0;
  CDD_kDD_on = 0.14;
  CDD_kDD_off = 3.13;
  CTT0 = 0;
  CTT_kTT_on = 0.14;
  CTT_kTT_off = 3.13;
  CDD5a0 = 0;
  CDD5a_kDNA_onDD5a = 0.14;
  CDD5a_kDNA_offDD5a = 0.07;
  CDDcd0 = 0;
  CDDcd_kDNA_onDDcd = 0.14;
  CDDcd_kDNA_offDDcd = 0.1;
  CDDsec0 = 0;
  CDDsec_kDNA_onDDsec = 0.14;
  CDDsec_kDNA_offDDsec = 0.2;
  CDDcp0 = 0;
  CDDcp_kDNA_onDDcp = 0.14;
  CDDcp_kDNA_offDDcp = 0.7;
  CDT5a0 = 0;
  CDT5a_kDNA_onDT5a = 0.14;
  CDT5a_kDNA_offDT5a = 0.56;
  CDTcd0 = 0;
  CDTcd_kDNA_onDTcd = 0.14;
  CDTcd_kDNA_offDTcd = 0.8;
  CDTsec0 = 0;
  CDTsec_kDNA_onDTsec = 0.14;
  CDTsec_kDNA_offDTsec = 1.6;
  CDTcp0 = 0;
  CDTcp_kDNA_onDTcp = 0.14;
  CDTcp_kDNA_offDTcp = 5.6;
  CTT5a0 = 0;
  CTT5a_kDNA_onTT5a = 0.14;
  CTT5a_kDNA_offTT5a = 0.84;
  CTTcd0 = 0;
  CTTcd_kDNA_onTTcd = 0.14;
  CTTcd_kDNA_offTTcd = 1.2;
  CTTsec0 = 0;
  CTTsec_kDNA_onTTsec = 0.14;
  CTTsec_kDNA_offTTsec = 2.4;
  CTTcp0 = 0;
  CTTcp_kDNA_onTTcp = 0.14;
  CTTcp_kDNA_offTTcp = 8.4;
  CTpf_NTp = 0.79;
  CTp = 11.38;
  CDpf_NDp = 1;
  CDp = 52.46;
  CDNAcd = 0.075;
  CDNAsec = 0.075;
  CDNA5a = 0.075;
  CDNAcp = 0.075;
  ATb0 = 0;
  CTb = 0.6275;
  PTb = 1;
  ADb0 = 0;
  CDb = 0.019884;
  PDb = 0.62;
  ALH0 = 0;
  ALH_kLH1 = 0.13;
  ALH_kLH2 = 0.026;
  ALH_kLH3 = 1.68e-4;
  ALH_kLH4 = 0.8;
  ALH_alpha_T = 0.25;
  ALH_alpha_D = 0.75;
  AR0 = 0;
  AR_k1R = 68.15;
  AR_keR = 71.9;
  Qp_kQp = 73.84;
  VPC10 = 0;
  VPC2 = 5.08e-5;
  Vmax_k5a = 3.02;
  VPC1_kcpl = 1.17e-7;
  VPC1_kcd1 = 0.014;
  VPC1b = 1e-4;
  VPL10 = 0;
  VPL1_ksec = 8.44e-6;
  VPL1_kflo = 0.043;
  VPL2 = 3.08e-6;
  model_parameters_Qc = 6.08;
  time_ = ;

  // Assignment rules:
  Qb := model_parameters_Qc - (Qp0 + Qt + Ql);
  Qp0 := Qp_kQp*Qp_Vpc;
  CTbf := CTb/PTb;
  CTblf0 := CTbl - CT_A0;
  CTpf0 := (CTp - (CT_R0 + 2*CTT0 + CDT0 + CTpf_T))/(1 + CTpf_NTp);
  CTlf0 := CTl/PTl;
  CTtv0 := CTif/PTif;
  Qbt := model_parameters_Qc - (Qp0 + Ql);
  CDbf := CDb/PDb;
  CDblf0 := CDbl - CD_A0;
  CDpf0 := (CDp - (CD_R0 + 2*CDD0 + CDT0 + CDpf_D))/(1 + CDpf_NDp);
  CDlf0 := CDl/PDl;
  CAf0 := CA - (CT_A0 + CD_A0);
  CRf0 := CR0 - (CT_R0 + CD_R0 + 2*(CTT0 + CDD0 + CDT0) + 2*(CDNAcdf0 + CDNAsecf0 + CDNAcpf0 + CDNA5af0));
  CDNA5af0 := CDNA5a - (CTT5a0 + CDD5a0 + CDT5a0);
  CDNAcdf0 := CDNAcd - (CTTcd0 + CDDcd0 + CDTcd0);
  CDNAsecf0 := CDNAsec - (CTTsec0 + CDDsec0 + CDTsec0);
  CDNAcpf0 := CDNAcp - (CTTcp0 + CDDcp0 + CDTcp0);
  CTpf_T := CTTsec0 + CDTsec0 + CTT5a0 + CDT5a0 + CTTcd0 + CDTcd0 + CTTcp0 + CDTcp0;
  CDpf_D := CDDsec0 + CDTsec0 + CDD5a0 + CDT5a0 + CDDcd0 + CDTcd0 + CDDcp0 + CDTcp0;
  CR0 := AR0/Vp0;
  DNAocp0 := (CTTcp0 + CDDcp0 + CDTcp0)/CDNAcp;
  DNAosec0 := (CTTsec0 + CDDsec0 + CDTsec0)/CDNAsec;
  DNAocd0 := (CTTcd0 + CDDcd0 + CDTcd0)/CDNAcd;
  DNAo5a0 := (CTT5a0 + CDD5a0 + CDT5a0)/CDNA5a;
  ALH_A := -ALH_kLH1*(ALH_alpha_T*CTblf0 + ALH_alpha_D*CDblf0) + ALH_kLH2;
  ALH_B := ALH_kLH3;
  Vp0 := VPC10 + VPC2 + VPL10 + VPL2;
  Qp_Vpc := VPC10 + VPC2;
  Vmax2 := Vmax_k5a*DNAo5a0;

  // Rate rules:
  ATbl0' = Qb*(CTbf - CTblf0) + Qp0*(CTpf0 - CTbl) + Ql*(CTlf0 - CTbl) + Qt*(1 - ts)*(CTtv0 - CTblf0) + ATbl_k2T;
  ADbl0' = Qbt*(CDbf - CDblf0) + Qp0*(CDpf0 - CDblf0) + Ql*(CDlf0 - CDbl);
  CT_A0' = CT_A_kTA_on*CTblf0*CAf0 - CT_A_kTA_off*CT_A0;
  CD_A0' = CD_A_kDA_on*CDblf0*CAf0 - CD_A_kDA_off*CD_A0;
  ATl0' = Ql*(CTbl - CTlf0) - (Vmax1*CTlf0/(km5alpha + CTlf0) + k1T*(ATl0/PTl));
  ADl0' = Ql*(CDbl - CDlf0) - (Vmax1*CTlf0/(km5alpha + CTlf0) + k1D*(ADl0/PDl));
  ATif0' = Qt*(1 - ts)*(CTblf0 - CTif/PTif) + mu*(CTst/PTst - CTif) + k1T*CLH;
  ATst0' = mu*(CTif - CTst/PTst);
  ATp0' = Qp0*(CTbl - CTpf0) - Vmax0*CTpf0/(km5alpha + CTpf0);
  ADp0' = Qp0*(CDbl - CDpf0) - Vmax0*CTpf0/(km5alpha + CTpf0);
  CT_R0' = CT_R_kTR_on*CTpf0*CRf0 - CT_R_kTR_off*CT_R0;
  CD_R0' = CD_R_kDR_on*CDpf0*CRf0 - CD_R_kDR_off*CD_R0;
  CDT0' = CDT_kDT_on*CD_R0*CT_R0 - CDT_kDT_off*CDT0;
  CDD0' = CDD_kDD_on*CD_R0^2 - CDD_kDD_off*CDD0;
  CTT0' = CTT_kTT_on*CT_R0^2 - CTT_kTT_off*CTT0;
  CDD5a0' = CDD5a_kDNA_onDD5a*CDD0*CDNA5af0 - CDD5a_kDNA_offDD5a*CDD5a0;
  CDDcd0' = CDDcd_kDNA_onDDcd*CDD0*CDNAcdf0 - CDDcd_kDNA_offDDcd*CDDcd0;
  CDDsec0' = CDDsec_kDNA_onDDsec*CDD0*CDNAsecf0 - CDDsec_kDNA_offDDsec*CDDsec0;
  CDDcp0' = CDDcp_kDNA_onDDcp*CDD0*CDNAcpf0 - CDDcp_kDNA_offDDcp*CDDcp0;
  CDT5a0' = CDT5a_kDNA_onDT5a*CDT0*CDNA5af0 - CDT5a_kDNA_offDT5a*CDT5a0;
  CDTcd0' = CDTcd_kDNA_onDTcd*CDT0*CDNAcdf0 - CDTcd_kDNA_offDTcd*CDTcd0;
  CDTsec0' = CDTsec_kDNA_onDTsec*CDT0*CDNAsecf0 - CDTsec_kDNA_offDTsec*CDTsec0;
  CDTcp0' = CDTcp_kDNA_onDTcp*CDT0*CDNAcpf0 - CDTcp_kDNA_offDTcp*CDTcp0;
  CTT5a0' = CTT5a_kDNA_onTT5a*CTT0*CDNA5af0 - CTT5a_kDNA_offTT5a*CTT5a0;
  CTTcd0' = CTTcd_kDNA_onTTcd*CTT0*CDNAcdf0 - CTTcd_kDNA_offTTcd*CTTcd0;
  CTTsec0' = CTTsec_kDNA_onTTsec*CTT0*CDNAsecf0 - CTTsec_kDNA_offTTsec*CTTsec0;
  CTTcp0' = CTTcp_kDNA_onTTcp*CTT0*CDNAcpf0 - CTTcp_kDNA_offTTcp*CTTcp0;
  ATb0' = Qb*(CTblf0 - CTb/PTb);
  ADb0' = Qbt*(CDblf0 - CDb/PDb);
  ALH0' = ;
  AR0' = AR_k1R - AR_keR*CRf0;
  VPC10' = VPC10/VPC1b*VPC1_kcpl*DNAocp0 - VPC1_kcd1*(1 - DNAocd0)*VPC10;
  VPL10' = VPC10/VPC1b*VPL1_ksec*DNAosec0 - VPL1_kflo*VPL10;
end
