// SBML level 2 version 4

model puglisi_bers_2001_version01____main()
  // Originally created by libAntimony v1.4 (using libSBML 4.1.0-b2)

  // Compartments:
  compartment default_compartment = 1;

  // Parameters:
  V = -84.09;
  R = 8314;
  T = 310;
  F = 96845;
  membrane_C = 1;
  membrane_I_stim = -100;
  E_Na = 70.54;
  fast_sodium_current_g_Na = 8;
  m = ;
  h = ;
  j = ;
  L_type_Ca_channel_P_Ca = 0.00054;
  L_type_Ca_channel_P_Na = 6.75e-7;
  L_type_Ca_channel_P_K = 1.93e-7;
  L_type_Ca_channel_gamma_Cai = 1;
  L_type_Ca_channel_gamma_Cao = 0.34;
  L_type_Ca_channel_gamma_Nai = 0.75;
  L_type_Ca_channel_gamma_Nao = 0.75;
  L_type_Ca_channel_gamma_Ki = 0.75;
  L_type_Ca_channel_gamma_Ko = 0.75;
  Cai = 0.12;
  Cao = 1.8;
  Nao = 140;
  Ko = 5.4;
  Nai = 10;
  Ki = 145;
  d = ;
  f = ;
  L_type_Ca_channel_L_type_Ca_channel_f_Ca_gate_Km_Ca = 0.6;
  T_type_Ca_channel_g_Ca_T = 0.05;
  b = ;
  g = ;
  Xr = ;
  slow_time_dependent_potassium_current_P_NaK = 0.01833;
  Xs = ;
  Na_Ca_exchanger_K_NaCa = 2600;
  Na_Ca_exchanger_K_mNa = 87.5;
  Na_Ca_exchanger_K_sat = 0.1;
  Na_Ca_exchanger_eta = 0.35;
  K_mCa = 0.1;
  plateau_potassium_current_g_Kp = 0.008;
  sarcolemmal_calcium_pump_K_mpCa = 0.5;
  sarcolemmal_calcium_pump_I_pCa = 1.15;
  sodium_background_current_g_Nab = 0.00141;
  calcium_background_current_g_Cab = 0.003016;
  sodium_potassium_pump_K_mNai = 10;
  sodium_potassium_pump_K_mKo = 1.5;
  calcium_activated_current_g_Cl = 10;
  transient_outward_potassium_current_g_to = 0.06;
  X_to = 3.742e-5;
  Y_to = 1;
  Ca_buffers_in_the_myoplasm_K_mTRPN = 0.5;
  Ca_buffers_in_the_myoplasm_K_mCMDN = 2.38;
  Ca_buffers_in_the_myoplasm_TRPN_max = 70;
  Ca_buffers_in_the_myoplasm_CMDN_max = 50;
  calcium_fluxes_in_the_SR_tau_on = 2;
  calcium_fluxes_in_the_SR_tau_off = 2;
  calcium_fluxes_in_the_SR_tau_tr = 180;
  calcium_fluxes_in_the_SR_t = 0;
  calcium_fluxes_in_the_SR_K_mrel = 0.8;
  calcium_fluxes_in_the_SR_delta_Ca_ith = 0.18;
  calcium_fluxes_in_the_SR_CSQN_max = 10;
  calcium_fluxes_in_the_SR_CSQN_th = 0.7;
  calcium_fluxes_in_the_SR_K_mCSQN = 0.8;
  calcium_fluxes_in_the_SR_K_mup = 0.92;
  calcium_fluxes_in_the_SR_I_up = 0.005;
  calcium_fluxes_in_the_SR_Ca_NSR_max = 0.15;
  Ca_JSR = ;
  Ca_NSR = 15;
  ionic_concentrations_Ca_foot = ;
  ionic_concentrations_A_cap = 0.000153;
  time_ = ;
  sodium_potassium_pump_I_NaK = ;
  calcium_activated_current_E_Cl = ;
  transient_outward_potassium_current_E_K = ;
  calcium_fluxes_in_the_SR_delta_Ca_i2 = ;
  ionic_concentrations_R_A_V = ;
  ionic_concentrations_V_myo = ;
  ionic_concentrations_delta_Ca = ;
  ionic_concentrations_delta_Ca_JSR = ;
  ionic_concentrations_V_cleft = ;
  ionic_concentrations_V_JSR = ;
  ionic_concentrations_V_NSR = ;

  // Assignment rules:
  i_Na := fast_sodium_current_g_Na*m^3*h*j*(V - E_Na);
  i_Ca_L := i_CaCa + i_CaK + i_CaNa;
  i_Ca_T := T_type_Ca_channel_g_Ca_T*b*g*(V - T_type_Ca_channel_E_Ca);
  i_Kr := rapid_time_dependent_potassium_current_g_Kr*Xr*Rr*(V - rapid_time_dependent_potassium_current_E_Kr);
  i_Ks := slow_time_dependent_potassium_current_g_Ks*Xs^2*(V - slow_time_dependent_potassium_current_E_Ks);
  i_NaCa := Na_Ca_exchanger_K_NaCa*(1/(Na_Ca_exchanger_K_mNa^3 + Nao^3))*(1/(K_mCa + Cao))*(1/(1 + Na_Ca_exchanger_K_sat*exp((Na_Ca_exchanger_eta - 1)*V*(F/(R*T)))))*(exp(Na_Ca_exchanger_eta*V*(F/(R*T)))*Nai^3*Cao - exp((Na_Ca_exchanger_eta - 1)*V*(F/(R*T)))*Nao^3*Cai);
  i_K1 := time_independent_potassium_current_g_K1*K1_infinity*(V - E_K1);
  i_Kp := plateau_potassium_current_g_Kp*plateau_potassium_current_Kp*(V - plateau_potassium_current_E_Kp);
  i_p_Ca := sarcolemmal_calcium_pump_I_pCa*(Cai/(sarcolemmal_calcium_pump_K_mpCa + Cai));
  i_Na_b := sodium_background_current_g_Nab*(V - sodium_background_current_E_NaN);
  i_Ca_b := calcium_background_current_g_Cab*(V - calcium_background_current_E_CaN);
  i_NaK := sodium_potassium_pump_I_NaK*sodium_potassium_pump_f_NaK*(1/(1 + sqrt((sodium_potassium_pump_K_mNai/Nai)^3)))*(Ko/(Ko + sodium_potassium_pump_K_mKo));
  i_to := transient_outward_potassium_current_g_to*X_to*Y_to*(V - transient_outward_potassium_current_E_K);
  i_Cl_Ca := calcium_activated_current_g_Cl*((V - calcium_activated_current_E_Cl)/(1 + K_mCa/Cai));
  fast_sodium_current_fast_sodium_current_m_gate_alpha_m := 0.32*(V + 47.13)/(1 - exp(-0.1*(V + 47.13)));
  fast_sodium_current_fast_sodium_current_m_gate_beta_m := 0.08*exp(-V/11);
  fast_sodium_current_fast_sodium_current_h_gate_alpha_h := ;
  fast_sodium_current_fast_sodium_current_h_gate_beta_h := ;
  fast_sodium_current_fast_sodium_current_j_gate_alpha_j := ;
  fast_sodium_current_fast_sodium_current_j_gate_beta_j := ;
  i_CaCa := d*f*f_Ca*L_type_Ca_channel_I_CaCa;
  i_CaK := d*f*f_Ca*L_type_Ca_channel_I_CaK;
  i_CaNa := d*f*f_Ca*L_type_Ca_channel_I_CaNa;
  L_type_Ca_channel_I_CaCa := L_type_Ca_channel_P_Ca*2^2*(V*F^2/(R*T))*((L_type_Ca_channel_gamma_Cai*Cai*exp(2*V*F/(R*T)) - L_type_Ca_channel_gamma_Cao*Cao)/(exp(2*V*F/(R*T)) - 1));
  L_type_Ca_channel_I_CaK := L_type_Ca_channel_P_K*1^2*(V*F^2/(R*T))*((L_type_Ca_channel_gamma_Ki*Ki*exp(1*V*F/(R*T)) - L_type_Ca_channel_gamma_Ko*Ko)/(exp(1*V*F/(R*T)) - 1));
  L_type_Ca_channel_I_CaNa := L_type_Ca_channel_P_Na*1^2*(V*F^2/(R*T))*((L_type_Ca_channel_gamma_Nai*Nai*exp(1*V*F/(R*T)) - L_type_Ca_channel_gamma_Nao*Nao)/(exp(1*V*F/(R*T)) - 1));
  f_Ca := 1/(1 + (Cai/L_type_Ca_channel_L_type_Ca_channel_f_Ca_gate_Km_Ca)^2);
  L_type_Ca_channel_L_type_Ca_channel_d_gate_alpha_d := L_type_Ca_channel_L_type_Ca_channel_d_gate_d_infinity/L_type_Ca_channel_L_type_Ca_channel_d_gate_tau_d;
  L_type_Ca_channel_L_type_Ca_channel_d_gate_beta_d := (1 - L_type_Ca_channel_L_type_Ca_channel_d_gate_d_infinity)/L_type_Ca_channel_L_type_Ca_channel_d_gate_tau_d;
  L_type_Ca_channel_L_type_Ca_channel_d_gate_d_infinity := 1/(1 + exp(-((V + 10)/6.24)));
  L_type_Ca_channel_L_type_Ca_channel_d_gate_tau_d := L_type_Ca_channel_L_type_Ca_channel_d_gate_d_infinity*((1 - exp(-((V + 10)/6.24)))/(0.035*(V + 10)));
  L_type_Ca_channel_L_type_Ca_channel_f_gate_alpha_f := L_type_Ca_channel_L_type_Ca_channel_f_gate_f_infinity/L_type_Ca_channel_L_type_Ca_channel_f_gate_tau_f;
  L_type_Ca_channel_L_type_Ca_channel_f_gate_beta_f := (1 - L_type_Ca_channel_L_type_Ca_channel_f_gate_f_infinity)/L_type_Ca_channel_L_type_Ca_channel_f_gate_tau_f;
  L_type_Ca_channel_L_type_Ca_channel_f_gate_f_infinity := 1/(1 + exp((V + 35.06)/8.6)) + 0.6/(1 + exp((50 - V)/20));
  L_type_Ca_channel_L_type_Ca_channel_f_gate_tau_f := 1/(0.0197*exp(-(0.0337*(V + 10))^2) + 0.02);
  T_type_Ca_channel_E_Ca := R*T/(2*F)*ln(Cao/Cai);
  T_type_Ca_channel_T_type_Ca_channel_b_gate_b_infinity := 1/(1 + exp(-(V + 48)/6.1));
  T_type_Ca_channel_T_type_Ca_channel_b_gate_tau_b := 0.1 + 5.4/(1 + exp((V + 100)/33));
  T_type_Ca_channel_T_type_Ca_channel_g_gate_g_infinity := 1/(1 + exp((V + 66)/6.6));
  T_type_Ca_channel_T_type_Ca_channel_g_gate_tau_g := 8 + 32/(1 + exp((V + 65)/5));
  rapid_time_dependent_potassium_current_g_Kr := 0.02612*sqrt(Ko/5.4);
  rapid_time_dependent_potassium_current_E_Kr := R*T/F*ln(Ko/Ki);
  Rr := 1/(1 + exp((V + 33)/22.4));
  rapid_time_dependent_potassium_current_rapid_time_dependent_potassium_current_Xr_gate_Xr_infinity := 1/(1 + exp(-(V + 50)/7.5));
  rapid_time_dependent_potassium_current_rapid_time_dependent_potassium_current_Xr_gate_tau_Xr := 1/(0.00138*(V + 7)/(1 - exp(-0.123*(V + 7))) + 0.00061*(V + 10)/exp(0.145*(V + 10)*0.145 - 1));
  slow_time_dependent_potassium_current_g_Ks := (0.057 + 0.19)/(1 + exp((-7.2 + slow_time_dependent_potassium_current_p_Ca)/0.6));
  slow_time_dependent_potassium_current_E_Ks := R*T/F*ln((Ko + slow_time_dependent_potassium_current_P_NaK*Nao)/(Ki + slow_time_dependent_potassium_current_P_NaK*Nai));
  slow_time_dependent_potassium_current_p_Ca := -ln(Cai) + 3;
  slow_time_dependent_potassium_current_slow_time_dependent_potassium_current_Xs_gate_tau_Xs := 1/(7.19e-5*(V + 30)/(1 - exp(-0.148*(V + 30))) + 0.000131*(V + 30)/(exp(0.0687*(V + 30)) - 1));
  slow_time_dependent_potassium_current_slow_time_dependent_potassium_current_Xs_gate_Xs_infinity := 1/(1 + exp(-(V + (-1.5))/16.7));
  E_K1 := R*T/F*ln(Ko/Ki);
  time_independent_potassium_current_g_K1 := 0.75*sqrt(Ko/5.4);
  K1_infinity := time_independent_potassium_current_time_independent_potassium_current_K1_gate_alpha_K1/(time_independent_potassium_current_time_independent_potassium_current_K1_gate_alpha_K1 + time_independent_potassium_current_time_independent_potassium_current_K1_gate_beta_K1);
  time_independent_potassium_current_time_independent_potassium_current_K1_gate_alpha_K1 := 1.02/(1 + exp(0.2385*(V - E_K1 - 59.215)));
  time_independent_potassium_current_time_independent_potassium_current_K1_gate_beta_K1 := (0.49124*exp((V + 5.476 - E_K1)/12.45) + exp((V - (E_K1 + 594.31))/16.2))/(1 + exp(-0.5143*(V - (E_K1 + 4.753))));
  plateau_potassium_current_E_Kp := E_K1;
  plateau_potassium_current_Kp := 1/(1 + exp((7.488 - V)/5.98));
  sodium_background_current_E_NaN := E_Na;
  calcium_background_current_E_CaN := R*T/(2*F)*ln(Cao/Cai);
  sodium_potassium_pump_f_NaK := 1/(1 + 0.1245*exp(-0.1*(V*F/(R*T))) + 0.0365*sodium_potassium_pump_sigma*exp(-(V*F/(R*T))));
  sodium_potassium_pump_sigma := 1/7*(exp(Nao/67.3) - 1);
  transient_outward_potassium_current_transient_outward_potassium_current_X_to_gate_alpha_X_to := 0.04561*exp(0.03577*V);
  transient_outward_potassium_current_transient_outward_potassium_current_X_to_gate_beta_X_to := 0.0989*exp(-0.06237*V);
  transient_outward_potassium_current_transient_outward_potassium_current_Y_to_gate_alpha_Y_to := 0.005415*exp(-((V + 33.5)/5)/(1 + 0.051335*exp(-((V + 33.5)/5))));
  transient_outward_potassium_current_transient_outward_potassium_current_Y_to_gate_beta_Y_to := 0.005415*exp((V + 33.5)/5/(1 + 0.051335*exp((V + 33.5)/5)));
  Ca_buffers_in_the_myoplasm_TRPN_buff := Ca_buffers_in_the_myoplasm_TRPN_max*(Cai/(Cai + Ca_buffers_in_the_myoplasm_K_mTRPN));
  Ca_buffers_in_the_myoplasm_CMDN_buff := Ca_buffers_in_the_myoplasm_CMDN_max*(Cai/(Cai + Ca_buffers_in_the_myoplasm_K_mCMDN));
  i_rel := calcium_fluxes_in_the_SR_G_rel*(Ca_JSR - Cai);
  i_up := calcium_fluxes_in_the_SR_I_up*(Cai/(Cai + calcium_fluxes_in_the_SR_K_mup));
  i_leak := calcium_fluxes_in_the_SR_K_leak*Ca_NSR;
  i_tr := (Ca_NSR - Ca_JSR)/calcium_fluxes_in_the_SR_tau_tr;
  calcium_fluxes_in_the_SR_G_rel := calcium_fluxes_in_the_SR_G_rel_max*((calcium_fluxes_in_the_SR_delta_Ca_i2 - calcium_fluxes_in_the_SR_delta_Ca_ith)/(calcium_fluxes_in_the_SR_K_mrel + calcium_fluxes_in_the_SR_delta_Ca_i2 - calcium_fluxes_in_the_SR_delta_Ca_ith))*(1 - exp(-(calcium_fluxes_in_the_SR_t/calcium_fluxes_in_the_SR_tau_on)))*exp(-(calcium_fluxes_in_the_SR_t/calcium_fluxes_in_the_SR_tau_off));
  calcium_fluxes_in_the_SR_G_rel_max := ;
  calcium_fluxes_in_the_SR_CSQN_buff := calcium_fluxes_in_the_SR_CSQN_max*(Ca_JSR/(Ca_JSR + calcium_fluxes_in_the_SR_K_mCSQN));
  calcium_fluxes_in_the_SR_K_leak := calcium_fluxes_in_the_SR_I_up/calcium_fluxes_in_the_SR_Ca_NSR_max;

  // Rate rules:
  V' = (membrane_I_stim - (i_Na + i_Ca_L + i_Ca_T + i_Kr + i_Ks + i_NaCa + i_K1 + i_Kp + i_p_Ca + i_Na_b + i_Ca_b + i_NaK + i_to + i_Cl_Ca))/membrane_C;
  m' = fast_sodium_current_fast_sodium_current_m_gate_alpha_m*(1 - m) - fast_sodium_current_fast_sodium_current_m_gate_beta_m*m;
  h' = fast_sodium_current_fast_sodium_current_h_gate_alpha_h*(1 - h) - fast_sodium_current_fast_sodium_current_h_gate_beta_h*h;
  j' = fast_sodium_current_fast_sodium_current_j_gate_alpha_j*(1 - j) - fast_sodium_current_fast_sodium_current_j_gate_beta_j*j;
  Cai' = (i_CaCa + i_p_Ca + i_Ca_b + i_Ca_T - i_NaCa)*(ionic_concentrations_A_cap/(2*ionic_concentrations_V_myo*F)) + i_rel*(ionic_concentrations_V_JSR/ionic_concentrations_V_myo) + (i_leak - i_up)*(ionic_concentrations_V_NSR/ionic_concentrations_V_myo);
  Ko' = (i_CaK + i_Kr + i_Ks + i_K1 + i_Kp + i_to + (-(i_NaK*2)))*(ionic_concentrations_A_cap/(ionic_concentrations_V_cleft*F));
  Nai' = -(i_Na + i_CaNa + i_Na_b + i_NaCa*3 + i_NaK*3)*(ionic_concentrations_A_cap/(ionic_concentrations_V_myo*F));
  Ki' = -(i_CaK + i_Kr + i_Ks + i_K1 + i_Kp + i_to + (-(i_NaK*2)))*(ionic_concentrations_A_cap/(ionic_concentrations_V_myo*F));
  d' = L_type_Ca_channel_L_type_Ca_channel_d_gate_alpha_d*(1 - d) - L_type_Ca_channel_L_type_Ca_channel_d_gate_beta_d*d;
  f' = L_type_Ca_channel_L_type_Ca_channel_f_gate_alpha_f*(1 - f) - L_type_Ca_channel_L_type_Ca_channel_f_gate_beta_f*f;
  b' = (T_type_Ca_channel_T_type_Ca_channel_b_gate_b_infinity - b)/T_type_Ca_channel_T_type_Ca_channel_b_gate_tau_b;
  g' = (T_type_Ca_channel_T_type_Ca_channel_g_gate_g_infinity - g)/T_type_Ca_channel_T_type_Ca_channel_g_gate_tau_g;
  Xr' = (rapid_time_dependent_potassium_current_rapid_time_dependent_potassium_current_Xr_gate_Xr_infinity - Xr)/rapid_time_dependent_potassium_current_rapid_time_dependent_potassium_current_Xr_gate_tau_Xr;
  Xs' = (slow_time_dependent_potassium_current_slow_time_dependent_potassium_current_Xs_gate_Xs_infinity - Xs)/slow_time_dependent_potassium_current_slow_time_dependent_potassium_current_Xs_gate_tau_Xs;
  Ca_JSR' = -(i_rel - i_tr*(ionic_concentrations_V_NSR/ionic_concentrations_V_JSR));
  Ca_NSR' = -(i_leak + i_tr - i_up);
  ionic_concentrations_Ca_foot' = -i_CaCa*(ionic_concentrations_A_cap/(2*ionic_concentrations_V_myo*F))*ionic_concentrations_R_A_V;
end
