// SBML level 2 version 4

model butera_purvis_2004____main()
  // Originally created by libAntimony v1.4 (using libSBML 4.1.0-b2)

  // Compartments:
  compartment default_compartment = 1;

  // Parameters:
  V = -71.847;
  membrane_C = 0.04;
  sodium_current_g_Na = 0.7;
  E_Na = 60;
  m = 0.015;
  h = 0.981;
  sodium_current_sodium_current_h_gate_theta_h = 44.1;
  sodium_current_sodium_current_h_gate_sigma_h = 7;
  sodium_current_sodium_current_h_gate_theta_1 = 35;
  sodium_current_sodium_current_h_gate_sigma_1 = 4;
  sodium_current_sodium_current_h_gate_sigma_2 = 25;
  sodium_current_sodium_current_m_gate_theta_m = 36;
  sodium_current_sodium_current_m_gate_sigma_m = 8.5;
  sodium_current_sodium_current_m_gate_tau_m = 0.1;
  persistent_sodium_current_g_NaP = 0.05;
  m0 = 0.002;
  h0 = 0.797;
  persistent_sodium_current_persistent_sodium_current_h_gate_theta_h = 65;
  persistent_sodium_current_persistent_sodium_current_h_gate_sigma_h = 5;
  persistent_sodium_current_persistent_sodium_current_h_gate_tau_h = 150;
  persistent_sodium_current_persistent_sodium_current_m_gate_theta_m = 47.1;
  persistent_sodium_current_persistent_sodium_current_m_gate_sigma_m = 4.1;
  persistent_sodium_current_persistent_sodium_current_m_gate_tau_m = 0.1;
  delayed_rectifier_current_g_K = 1.3;
  E_K = -80;
  n = 0.158;
  delayed_rectifier_current_delayed_rectifier_current_n_gate_theta_n = 30;
  delayed_rectifier_current_delayed_rectifier_current_n_gate_sigma_n = 25;
  delayed_rectifier_current_delayed_rectifier_current_n_gate_theta_1 = 30;
  delayed_rectifier_current_delayed_rectifier_current_n_gate_sigma_1 = 40;
  delayed_rectifier_current_delayed_rectifier_current_n_gate_sigma_2 = 50;
  leak_current_g_leak = 0.005;
  leak_current_E_leak = -50;
  LVA_calcium_current_g_T = 0.1;
  E_Ca = 40;
  m1 = 0.001;
  h1 = 0.562;
  LVA_calcium_current_LVA_calcium_current_h_gate_theta_h = 70.1;
  LVA_calcium_current_LVA_calcium_current_h_gate_sigma_h = 7;
  LVA_calcium_current_LVA_calcium_current_h_gate_theta_1 = 70;
  LVA_calcium_current_LVA_calcium_current_h_gate_sigma_1 = 65;
  LVA_calcium_current_LVA_calcium_current_m_gate_theta_m = 38;
  LVA_calcium_current_LVA_calcium_current_m_gate_sigma_m = 5;
  LVA_calcium_current_LVA_calcium_current_m_gate_theta_1 = 28;
  LVA_calcium_current_LVA_calcium_current_m_gate_sigma_1 = 25;
  LVA_calcium_current_LVA_calcium_current_m_gate_sigma_2 = 70;
  N_HVA_calcium_current_g_N = 0.05;
  m2 = 0.001;
  h2 = 0.649;
  N_HVA_calcium_current_N_HVA_calcium_current_h_gate_theta_h = 70;
  N_HVA_calcium_current_N_HVA_calcium_current_h_gate_sigma_h = 3;
  N_HVA_calcium_current_N_HVA_calcium_current_h_gate_tau_h = 25;
  N_HVA_calcium_current_N_HVA_calcium_current_m_gate_theta_m = 30;
  N_HVA_calcium_current_N_HVA_calcium_current_m_gate_sigma_m = 6;
  N_HVA_calcium_current_N_HVA_calcium_current_m_gate_tau_m = 5;
  P_HVA_calcium_current_g_P = 0.05;
  m3 = 0;
  P_HVA_calcium_current_P_HVA_calcium_current_m_gate_theta_m = 17;
  P_HVA_calcium_current_P_HVA_calcium_current_m_gate_sigma_m = 3;
  P_HVA_calcium_current_P_HVA_calcium_current_m_gate_tau_m = 10;
  calcium_dependent_potassium_current_g_SK = 0.3;
  z = 0;
  calcium_dependent_potassium_current_calcium_dependent_potassium_current_z_gate_K1 = -500;
  calcium_dependent_potassium_current_calcium_dependent_potassium_current_z_gate_K2 = 0.04;
  calcium_dependent_potassium_current_calcium_dependent_potassium_current_z_gate_Ca_conc = 0.0604;
  calcium_dependent_potassium_current_calcium_dependent_potassium_current_z_gate_tau_z = 1;
  fast_transient_potassium_current_g_A = 1;
  m4 = 0.057;
  h3 = 0.287;
  fast_transient_potassium_current_fast_transient_potassium_current_h_gate_theta_h = 80;
  fast_transient_potassium_current_fast_transient_potassium_current_h_gate_sigma_h = 11;
  fast_transient_potassium_current_fast_transient_potassium_current_h_gate_tau_h = 20;
  fast_transient_potassium_current_fast_transient_potassium_current_m_gate_theta_m = 27;
  fast_transient_potassium_current_fast_transient_potassium_current_m_gate_sigma_m = 16;
  fast_transient_potassium_current_fast_transient_potassium_current_m_gate_theta_1 = 40;
  fast_transient_potassium_current_fast_transient_potassium_current_m_gate_theta_2 = 74;
  fast_transient_potassium_current_fast_transient_potassium_current_m_gate_sigma_1 = 5;
  fast_transient_potassium_current_fast_transient_potassium_current_m_gate_sigma_2 = 7.5;
  hyperpolarization_activated_current_g_H = 0.005;
  hyperpolarization_activated_current_E_H = -38.8;
  m5 = 0.182;
  hyperpolarization_activated_current_hyperpolarization_activated_current_m_gate_theta_m = 79.8;
  hyperpolarization_activated_current_hyperpolarization_activated_current_m_gate_sigma_m = 5.3;
  hyperpolarization_activated_current_hyperpolarization_activated_current_m_gate_theta_1 = 70;
  hyperpolarization_activated_current_hyperpolarization_activated_current_m_gate_sigma_1 = 11;
  stimulus_protocol_i_stimStart = 10;
  stimulus_protocol_i_stimEnd = 11;
  stimulus_protocol_i_stimAmplitude = 10;
  time_ = ;

  // Assignment rules:
  i_Na := sodium_current_g_Na*m^3*h*(V - E_Na);
  i_NaP := persistent_sodium_current_g_NaP*m0*h0*(V - E_Na);
  i_K := delayed_rectifier_current_g_K*n^4*(V - E_K);
  i_leak := leak_current_g_leak*(V - leak_current_E_leak);
  i_T := LVA_calcium_current_g_T*m1*h1*(V - E_Ca);
  i_N := N_HVA_calcium_current_g_N*m2*h2*(V - E_Ca);
  i_P := P_HVA_calcium_current_g_P*m3*(V - E_Ca);
  i_SK := calcium_dependent_potassium_current_g_SK*z^2*(V - E_K);
  i_A := fast_transient_potassium_current_g_A*m4*h3*(V - E_K);
  i_H := hyperpolarization_activated_current_g_H*m5*(V - hyperpolarization_activated_current_E_H);
  i_app := ;
  sodium_current_sodium_current_h_gate_tau_h := 3.5/(exp((V + sodium_current_sodium_current_h_gate_theta_1)/sodium_current_sodium_current_h_gate_sigma_1) + exp(-(V + sodium_current_sodium_current_h_gate_theta_1)/sodium_current_sodium_current_h_gate_sigma_2)) + 1;
  sodium_current_sodium_current_h_gate_h_infinity := 1/(1 + exp((V + sodium_current_sodium_current_h_gate_theta_h)/sodium_current_sodium_current_h_gate_sigma_h));
  sodium_current_sodium_current_m_gate_m_infinity := 1/(1 + exp((V + sodium_current_sodium_current_m_gate_theta_m)/(-sodium_current_sodium_current_m_gate_sigma_m)));
  persistent_sodium_current_persistent_sodium_current_h_gate_h_infinity := 1/(1 + exp((V + persistent_sodium_current_persistent_sodium_current_h_gate_theta_h)/persistent_sodium_current_persistent_sodium_current_h_gate_sigma_h));
  persistent_sodium_current_persistent_sodium_current_m_gate_m_infinity := 1/(1 + exp(-(V + persistent_sodium_current_persistent_sodium_current_m_gate_theta_m)/persistent_sodium_current_persistent_sodium_current_m_gate_sigma_m));
  delayed_rectifier_current_delayed_rectifier_current_n_gate_tau_n := 2.5/(exp((V + delayed_rectifier_current_delayed_rectifier_current_n_gate_theta_1)/delayed_rectifier_current_delayed_rectifier_current_n_gate_sigma_1) + exp(-(V + delayed_rectifier_current_delayed_rectifier_current_n_gate_theta_1)/delayed_rectifier_current_delayed_rectifier_current_n_gate_sigma_2)) + 0.01;
  delayed_rectifier_current_delayed_rectifier_current_n_gate_n_infinity := 1/(1 + exp(-(V + delayed_rectifier_current_delayed_rectifier_current_n_gate_theta_n)/delayed_rectifier_current_delayed_rectifier_current_n_gate_sigma_n));
  LVA_calcium_current_LVA_calcium_current_h_gate_tau_h := 20/(exp((V + LVA_calcium_current_LVA_calcium_current_h_gate_theta_1)/LVA_calcium_current_LVA_calcium_current_h_gate_sigma_1) + exp(-(V + LVA_calcium_current_LVA_calcium_current_h_gate_theta_1)/LVA_calcium_current_LVA_calcium_current_h_gate_sigma_1)) + 1;
  LVA_calcium_current_LVA_calcium_current_h_gate_h_infinity := 1/(1 + exp((V + LVA_calcium_current_LVA_calcium_current_h_gate_theta_h)/LVA_calcium_current_LVA_calcium_current_h_gate_sigma_h));
  LVA_calcium_current_LVA_calcium_current_m_gate_tau_m := 5/(exp((V + LVA_calcium_current_LVA_calcium_current_m_gate_theta_1)/LVA_calcium_current_LVA_calcium_current_m_gate_sigma_1) + exp(-(V + LVA_calcium_current_LVA_calcium_current_m_gate_theta_1)/LVA_calcium_current_LVA_calcium_current_m_gate_sigma_2)) + 2;
  LVA_calcium_current_LVA_calcium_current_m_gate_m_infinity := 1/(1 + exp(-(V + LVA_calcium_current_LVA_calcium_current_m_gate_theta_m)/LVA_calcium_current_LVA_calcium_current_m_gate_sigma_m));
  N_HVA_calcium_current_N_HVA_calcium_current_h_gate_h_infinity := 1/(1 + exp((V + N_HVA_calcium_current_N_HVA_calcium_current_h_gate_theta_h)/N_HVA_calcium_current_N_HVA_calcium_current_h_gate_sigma_h));
  N_HVA_calcium_current_N_HVA_calcium_current_m_gate_m_infinity := 1/(1 + exp(-(V + N_HVA_calcium_current_N_HVA_calcium_current_m_gate_theta_m)/N_HVA_calcium_current_N_HVA_calcium_current_m_gate_sigma_m));
  P_HVA_calcium_current_P_HVA_calcium_current_m_gate_m_infinity := 1/(1 + exp(-(V + P_HVA_calcium_current_P_HVA_calcium_current_m_gate_theta_m)/P_HVA_calcium_current_P_HVA_calcium_current_m_gate_sigma_m));
  calcium_dependent_potassium_current_calcium_dependent_potassium_current_z_gate_z_infinity := 1/(1 + (0.003/calcium_dependent_potassium_current_calcium_dependent_potassium_current_z_gate_Ca_conc)^2);
  fast_transient_potassium_current_fast_transient_potassium_current_h_gate_h_infinity := 1/(1 + exp((V + fast_transient_potassium_current_fast_transient_potassium_current_h_gate_theta_h)/fast_transient_potassium_current_fast_transient_potassium_current_h_gate_sigma_h));
  fast_transient_potassium_current_fast_transient_potassium_current_m_gate_tau_m := 1/(exp((V + fast_transient_potassium_current_fast_transient_potassium_current_m_gate_theta_1)/fast_transient_potassium_current_fast_transient_potassium_current_m_gate_sigma_1) + exp(-(V + fast_transient_potassium_current_fast_transient_potassium_current_m_gate_theta_2)/fast_transient_potassium_current_fast_transient_potassium_current_m_gate_sigma_2)) + 0.37;
  fast_transient_potassium_current_fast_transient_potassium_current_m_gate_m_infinity := 1/(1 + exp(-(V + fast_transient_potassium_current_fast_transient_potassium_current_m_gate_theta_m)/fast_transient_potassium_current_fast_transient_potassium_current_m_gate_sigma_m));
  hyperpolarization_activated_current_hyperpolarization_activated_current_m_gate_tau_m := 1/(exp((V + hyperpolarization_activated_current_hyperpolarization_activated_current_m_gate_theta_1)/hyperpolarization_activated_current_hyperpolarization_activated_current_m_gate_sigma_1) + exp(-(V + hyperpolarization_activated_current_hyperpolarization_activated_current_m_gate_theta_1)/hyperpolarization_activated_current_hyperpolarization_activated_current_m_gate_sigma_1)) + 50;
  hyperpolarization_activated_current_hyperpolarization_activated_current_m_gate_m_infinity := 1/(1 + exp((V + hyperpolarization_activated_current_hyperpolarization_activated_current_m_gate_theta_m)/hyperpolarization_activated_current_hyperpolarization_activated_current_m_gate_sigma_m));

  // Rate rules:
  V' = (-(i_Na + i_NaP + i_K + i_leak + i_T + i_N + i_P + i_SK + i_A + i_H) + i_app)/membrane_C;
  m' = (sodium_current_sodium_current_m_gate_m_infinity - m)/sodium_current_sodium_current_m_gate_tau_m;
  h' = (sodium_current_sodium_current_h_gate_h_infinity - h)/sodium_current_sodium_current_h_gate_tau_h;
  m0' = (persistent_sodium_current_persistent_sodium_current_m_gate_m_infinity - m0)/persistent_sodium_current_persistent_sodium_current_m_gate_tau_m;
  h0' = (persistent_sodium_current_persistent_sodium_current_h_gate_h_infinity - h0)/persistent_sodium_current_persistent_sodium_current_h_gate_tau_h;
  n' = (delayed_rectifier_current_delayed_rectifier_current_n_gate_n_infinity - n)/delayed_rectifier_current_delayed_rectifier_current_n_gate_tau_n;
  m1' = (LVA_calcium_current_LVA_calcium_current_m_gate_m_infinity - m1)/LVA_calcium_current_LVA_calcium_current_m_gate_tau_m;
  h1' = (LVA_calcium_current_LVA_calcium_current_h_gate_h_infinity - h1)/LVA_calcium_current_LVA_calcium_current_h_gate_tau_h;
  m2' = (N_HVA_calcium_current_N_HVA_calcium_current_m_gate_m_infinity - m2)/N_HVA_calcium_current_N_HVA_calcium_current_m_gate_tau_m;
  h2' = (N_HVA_calcium_current_N_HVA_calcium_current_h_gate_h_infinity - h2)/N_HVA_calcium_current_N_HVA_calcium_current_h_gate_tau_h;
  m3' = (P_HVA_calcium_current_P_HVA_calcium_current_m_gate_m_infinity - m3)/P_HVA_calcium_current_P_HVA_calcium_current_m_gate_tau_m;
  z' = (calcium_dependent_potassium_current_calcium_dependent_potassium_current_z_gate_z_infinity - z)/calcium_dependent_potassium_current_calcium_dependent_potassium_current_z_gate_tau_z;
  calcium_dependent_potassium_current_calcium_dependent_potassium_current_z_gate_Ca_conc' = 1/1000*calcium_dependent_potassium_current_calcium_dependent_potassium_current_z_gate_K1*(i_T + i_N + i_P) - calcium_dependent_potassium_current_calcium_dependent_potassium_current_z_gate_K2*calcium_dependent_potassium_current_calcium_dependent_potassium_current_z_gate_Ca_conc;
  m4' = (fast_transient_potassium_current_fast_transient_potassium_current_m_gate_m_infinity - m4)/fast_transient_potassium_current_fast_transient_potassium_current_m_gate_tau_m;
  h3' = (fast_transient_potassium_current_fast_transient_potassium_current_h_gate_h_infinity - h3)/fast_transient_potassium_current_fast_transient_potassium_current_h_gate_tau_h;
  m5' = (hyperpolarization_activated_current_hyperpolarization_activated_current_m_gate_m_infinity - m5)/hyperpolarization_activated_current_hyperpolarization_activated_current_m_gate_tau_m;
end
