// SBML level 2 version 4

model butera_koizumi_purvis_smith_2006____main()
  // Originally created by libAntimony v1.3 (using libSBML 4.1.0-b2)

  // Compartments:
  compartment default_compartment = 1;

  // Parameters:
  V = 1;
  membrane_C = 0.021;
  membrane_i_app = 0;
  E_Na = 50;
  fast_sodium_current_g_Na = 28;
  n = 0.003;
  fast_sodium_current_fast_sodium_current_m_gate_theta_m = -34;
  fast_sodium_current_fast_sodium_current_m_gate_omega_m = -5;
  potassium_current_g_K = 11.2;
  potassium_current_E_K = -85;
  potassium_current_potassium_current_n_gate_tau_n_max = 10;
  potassium_current_potassium_current_n_gate_theta_n = -29;
  potassium_current_potassium_current_n_gate_omega_n = -4;
  persistent_sodium_current_g_NaP = 2.44;
  h = 0.92;
  persistent_sodium_current_persistent_sodium_current_m_gate_theta_m = -45.1;
  persistent_sodium_current_persistent_sodium_current_m_gate_omega_m = -6;
  persistent_sodium_current_persistent_sodium_current_h_gate_tau_h_max = 10000;
  persistent_sodium_current_persistent_sodium_current_h_gate_theta_h = -53;
  persistent_sodium_current_persistent_sodium_current_h_gate_omega_h = 6;
  leakage_current_g_leak = 2.2;
  leakage_current_E_leak = -70;
  tonic_current_g_tonic_e = 0;
  tonic_current_E_syn_e = 0;
  time_ = ;

  // Assignment rules:
  i_tonic_e := tonic_current_g_tonic_e*(1/1000)*(V - tonic_current_E_syn_e);
  i_Na := fast_sodium_current_g_Na*m_infinity^3*(1 - n)*(1/1000)*(V - E_Na);
  i_NaP := persistent_sodium_current_g_NaP*m_infinity0*h*(1/1000)*(V - E_Na);
  i_K := potassium_current_g_K*n^4*(1/1000)*(V - potassium_current_E_K);
  i_leak := leakage_current_g_leak*(1/1000)*(V - leakage_current_E_leak);
  m_infinity := 1/(1 + exp((V - fast_sodium_current_fast_sodium_current_m_gate_theta_m)/fast_sodium_current_fast_sodium_current_m_gate_omega_m));
  potassium_current_potassium_current_n_gate_n_infinity := 1/(1 + exp((V - potassium_current_potassium_current_n_gate_theta_n)/potassium_current_potassium_current_n_gate_omega_n));
  potassium_current_potassium_current_n_gate_tau_n := potassium_current_potassium_current_n_gate_tau_n_max/cosh((V - potassium_current_potassium_current_n_gate_theta_n)/(2*potassium_current_potassium_current_n_gate_omega_n));
  m_infinity0 := 1/(1 + exp((V - persistent_sodium_current_persistent_sodium_current_m_gate_theta_m)/persistent_sodium_current_persistent_sodium_current_m_gate_omega_m));
  persistent_sodium_current_persistent_sodium_current_h_gate_h_infinity := 1/(1 + exp((V - persistent_sodium_current_persistent_sodium_current_h_gate_theta_h)/persistent_sodium_current_persistent_sodium_current_h_gate_omega_h));
  persistent_sodium_current_persistent_sodium_current_h_gate_tau_h := persistent_sodium_current_persistent_sodium_current_h_gate_tau_h_max/cosh((V - persistent_sodium_current_persistent_sodium_current_h_gate_theta_h)/(2*persistent_sodium_current_persistent_sodium_current_h_gate_omega_h));

  // Rate rules:
  V' = (-(i_Na + i_NaP + i_K + i_leak) + i_tonic_e + membrane_i_app)/membrane_C;
  n' = (potassium_current_potassium_current_n_gate_n_infinity - n)/potassium_current_potassium_current_n_gate_tau_n;
  h' = (persistent_sodium_current_persistent_sodium_current_h_gate_h_infinity - h)/persistent_sodium_current_persistent_sodium_current_h_gate_tau_h;
end
