// SBML level 2 version 4

model qu_maclellan_weiss_2003_version1____main()
  // Originally created by libAntimony v1.4 (using libSBML 4.1.0-b2)

  // Compartments:
  compartment default_compartment = 1;

  // Parameters:
  k1 = 300;
  k2 = 5;
  k3 = 30;
  k4 = 30;
  k5 = 0.1;
  k6 = 1;
  k7 = 10;
  k8 = 100;
  k9 = 1;
  k10 = 10;
  k11 = 1;
  k12 = 0;
  k13 = 1;
  k14 = 1;
  k15 = 1;
  k16 = 2;
  k2u = 50;
  k7u = 0;
  k16u = 25;
  az = 10;
  bz = 0.1;
  cz = 1;
  aw = 10;
  bw = 0.1;
  cw = 1;
  ai = 10;
  bi = 0.1;
  ci = 1;
  cyclin_CDK_active0 = 0.1;
  cyclin0 = 0;
  cyclin_CDK_inactive0 = 0.1;
  APC0 = 0;
  wee10 = 0;
  Cdc25_2P0 = 0;
  CKI0 = 0;
  cyclin_CDK_CKI0 = 0;
  cyclin_CDK_CKI_P0 = 0;
  Cdc250 = 0;
  Cdc25_P0 = 0;
  wee1_P0 = 0;
  APC_tau = 25;
  APC_a = 4;
  CDK_CDK_T = 200;
  time_ = ;

  // Assignment rules:
  kplus_z := bz + cz*cyclin_CDK_active0;
  kplus_w := bw + cw*cyclin_CDK_active0;
  kplus_i := bi + ci*cyclin_CDK_active0;
  kminus_z := az;
  kminus_w := aw;
  kminus_i := ai;
  CDK0 := (CDK_CDK_T - cyclin_CDK_active0 - cyclin_CDK_inactive0 - cyclin_CDK_CKI0 - cyclin_CDK_CKI_P0)/CDK_CDK_T;
  APC_h_x := cyclin_CDK_active0^2/(APC_a^2 + cyclin_CDK_active0^2);
  cyclin_T0 := cyclin0 + cyclin_CDK_active0 + cyclin_CDK_inactive0;

  // Rate rules:
  cyclin_CDK_active0' = k5*cyclin_CDK_inactive0 + Cdc25_2P0*cyclin_CDK_inactive0*1 - k6*cyclin_CDK_active0 - wee10*cyclin_CDK_active0*1 - (k7 + k7u*APC0)*cyclin_CDK_active0 - k14*cyclin_CDK_active0*CKI0 + k15*cyclin_CDK_CKI0 + (k16 + k16u*APC0)*cyclin_CDK_CKI_P0;
  cyclin0' = k1 + k4*cyclin_CDK_inactive0 - k3*cyclin0*CDK0 - (k2 + k2u*APC0)*cyclin0;
  cyclin_CDK_inactive0' = k3*cyclin0*CDK0 + k6*cyclin_CDK_active0 + wee10*cyclin_CDK_active0*1 - k4*cyclin_CDK_inactive0 - k5*cyclin_CDK_inactive0 - Cdc25_2P0*cyclin_CDK_inactive0*1;
  APC0' = (APC_h_x - APC0)/APC_tau;
  wee10' = k10 + kminus_w*wee1_P0 - kplus_w*wee10 - k11*wee10;
  Cdc25_2P0' = kplus_z*Cdc25_P0 - kminus_z*Cdc25_2P0 - k9*Cdc25_2P0;
  CKI0' = k12 - k13*CKI0 - k12*cyclin_CDK_active0*CKI0 + k15*cyclin_CDK_CKI0;
  cyclin_CDK_CKI0' = k14*cyclin_CDK_active0*CKI0 - k15*cyclin_CDK_CKI0 + kminus_i*cyclin_CDK_CKI_P0 - kplus_i*cyclin_CDK_CKI0;
  cyclin_CDK_CKI_P0' = kplus_i*cyclin_CDK_CKI0 - kminus_i*cyclin_CDK_CKI_P0 - (k16 + k16u*APC0)*cyclin_CDK_CKI_P0;
  Cdc250' = k8 + kminus_z*Cdc25_P0 - kplus_z*Cdc250 - k9*Cdc250;
  Cdc25_P0' = kplus_z*(Cdc250 - Cdc25_P0) + kminus_z*(Cdc25_2P0 - Cdc25_P0) - k9*Cdc25_P0;
  wee1_P0' = kplus_w*wee10 - kminus_w*wee1_P0 - k11*wee1_P0;
end
