// SBML level 2 version 4

model riccobene_model_1999____main()
  // Originally created by libAntimony v1.3 (using libSBML 4.1.0-b2)

  // Compartments:
  compartment default_compartment = 1;

  // Parameters:
  R0 = 0.01;
  L0 = 1e-12;
  LR0 = 0.01;
  R_star0 = 0.01;
  kf = 8.4e7;
  kr = 0.37;
  kfR = 10;
  Kact = 1e-4;
  LR_star0 = 0.01;
  alpha = 1e1;
  kds = 1e-4;
  LR_ds0 = 0.01;
  R_ds0 = 0.01;
  kf2 = 8.4e7;
  kr2 = 4.6e-3;
  G_star0 = 0.01;
  G0 = 0.01;
  ka = 1e-7;
  ki = 2e-1;
  time_ = ;

  // Rate rules:
  R0' = kr*LR0 + kfR/Kact*R_star0 - (kf*L0*R0 + kfR*R0);
  LR0' = kf*L0*R0 + kfR/(alpha*Kact)*LR_star0 - (kr*LR0 + kfR*LR0);
  R_star0' = kr*LR_star0 + kfR*R0 - (alpha*kf*L0*R_star0 + kfR/Kact*R_star0);
  LR_star0' = kfR*LR0 + alpha*kf*L0*R_star0 - (kfR/(alpha*Kact)*LR_star0 + kds*LR_star0 + kr*LR_star0);
  LR_ds0' = kds*LR_star0 + kf2*L0*R_ds0 - kr2*LR_ds0;
  R_ds0' = kr2*LR_ds0 - kf2*L0*R_ds0;
  G_star0' = ka*G0*(LR_star0 + R_star0) - ki*G_star0;
  G0' = ki*G_star0 - ka*G0*(LR_star0 + R_star0);
end
