// SBML level 2 version 4

model rice_jafri_winslow_2000_version02____main()
  // Originally created by libAntimony v1.3 (using libSBML 4.1.0-b2)

  // Compartments:
  compartment default_compartment = 1;

  // Parameters:
  A_cap = 1.534e-4;
  V_myo = 25.84e-6;
  V_JSR = 0.16e-6;
  V_NSR = 1.4e-6;
  V_SS = 0.495e-6;
  V = -84.1638;
  R = 8.314;
  T = 310;
  F = 96.5;
  membrane_Cm = 1;
  fast_sodium_current_g_Na = 12.8;
  Nai = ;
  Nao = 140;
  m = 0.0326174;
  h = 0.962369;
  j = 0.975658;
  time_dependent_potassium_current_PNa_K = 0.01833;
  Ko = 5.4;
  Ki = ;
  X = 0.000337175;
  plateau_potassium_current_g_Kp = 0.00828;
  Na_Ca_exchanger_k_NaCa = 9000;
  Na_Ca_exchanger_K_mNa = 87.5;
  Na_Ca_exchanger_K_mCa = 1.38;
  Na_Ca_exchanger_k_sat = 0.1;
  Na_Ca_exchanger_eta = 0.35;
  Cai = ;
  Cao = 1.8;
  sodium_potassium_pump_I_NaK = 2.47;
  sodium_potassium_pump_K_mNai = 10;
  sodium_potassium_pump_K_mKo = 1.5;
  non_specific_calcium_activated_current_K_m_ns_Ca = 1.2;
  non_specific_calcium_activated_current_Pns_Na = 0;
  non_specific_calcium_activated_current_Pns_K = 0;
  sarcolemmal_calcium_pump_K_mpCa = 0.5;
  sarcolemmal_calcium_pump_I_pCa = 0.575;
  calcium_background_current_g_Cab = 0.006032;
  sodium_background_current_g_Nab = 0.00141;
  L_type_Ca_channel_P_Ca = 4.32e-3;
  L_type_Ca_channel_P_K = 1.11e-11;
  L_type_Ca_channel_i_Ca_half = -2.16;
  L_type_Ca_channel_O = 4.2137e-19;
  L_type_Ca_channel_O_Ca = 0;
  L_type_Ca_channel_a = 2;
  L_type_Ca_channel_b = 2;
  L_type_Ca_channel_g = 2;
  L_type_Ca_channel_f = 0.3;
  L_type_Ca_channel_g_ = 0;
  L_type_Ca_channel_f_ = 0;
  L_type_Ca_channel_omega = 0.01;
  L_type_Ca_channel_C0 = 0.998666;
  L_type_Ca_channel_C1 = 1.63594e-4;
  L_type_Ca_channel_C2 = 1.00495e-8;
  L_type_Ca_channel_C3 = 2.74371e-13;
  L_type_Ca_channel_C4 = 2.80908e-18;
  L_type_Ca_channel_C_Ca0 = 0.00272826;
  L_type_Ca_channel_C_Ca1 = 7.67674e-7;
  L_type_Ca_channel_C_Ca2 = 1.88635e-10;
  L_type_Ca_channel_C_Ca3 = 2.06007e-14;
  L_type_Ca_channel_C_Ca4 = 8.43672e-19;
  Ca_SS = ;
  y = 0.86201;
  P_O1 = 0.428917e-3;
  P_O2 = 0.487455e-9;
  RyR_channel_states_P_C1 = 0.637931;
  RyR_channel_states_P_C2 = 0.361643;
  RyR_channel_states_k_a_plus = 0.01215;
  RyR_channel_states_k_a_minus = 0.1425;
  RyR_channel_states_k_b_plus = 0.00405;
  RyR_channel_states_k_b_minus = 1.93;
  RyR_channel_states_k_c_plus = 0.01;
  RyR_channel_states_k_c_minus = 0.0008;
  RyR_channel_states_n = 4;
  RyR_channel_states_m = 3;
  SERCA_pump_k_fb = 0.24;
  SERCA_pump_k_rb = 1.64;
  SERCA_pump_n_fb = 1.4;
  Ca_NSR = ;
  intracellular_Ca_fluxes_v1 = 3.6;
  intracellular_Ca_fluxes_tau_tr = 0.5747;
  intracellular_Ca_fluxes_tau_xfer = 9.09;
  HTRPN_tot = 140;
  LTRPN_tot = 70;
  HTRPNCa = 0.132944;
  LTRPNCa = 0.4068232;
  k_htrpn_plus = 1e8;
  k_htrpn_minus = 0.33;
  k_ltrpn_plus = 4e7;
  k_ltrpn_minus = 40;
  Ca_JSR = ;
  intracellular_ionic_concentrations_K_mCMDN = 2.38;
  intracellular_ionic_concentrations_K_mCSQN = 0.8;
  intracellular_ionic_concentrations_CSQN_tot = 15;
  intracellular_ionic_concentrations_CMDN_tot = 50;
  g_XB = 30;
  SL = 2.15;
  P1 = 1.47026e-6;
  P2 = 1.83527e-6;
  P3 = 1.06786e-6;
  N1 = 3.88506e-6;
  tropomyosin_cross_bridges_f_XB = 10;
  tropomyosin_cross_bridges_N0 = 0.99999027;
  tropomyosin_cross_bridges_P0 = 1.46758e-6;
  force_computation_zeta = 0.1;
  time_ = ;
  non_specific_calcium_activated_current_I_ns_Ca = ;
  SERCA_pump_Vmax_f = ;
  SERCA_pump_Vmax_r = ;
  SERCA_pump_n_rb = ;
  tropomyosin_cross_bridges_K_trop = ;
  tropomyosin_cross_bridges_k_trop_pn = ;

  // Assignment rules:
  i_Na := fast_sodium_current_g_Na*m^3*h*j*(V - E_Na);
  i_Ca := L_type_Ca_channel_i_Ca_max*y*(L_type_Ca_channel_O + L_type_Ca_channel_O_Ca);
  i_Ca_K := L_type_Ca_channel_p_k*y*(L_type_Ca_channel_O + L_type_Ca_channel_O_Ca)*(V*F^2/(R*T))*((Ki*exp(V*F/(R*T)) - Ko)/(exp(V*F/(R*T)) - 1));
  i_K := time_dependent_potassium_current_g_K*Xi*X^2*(V - time_dependent_potassium_current_E_K);
  i_K1 := time_independent_potassium_current_g_K1*K1_infinity*(V - E_K1);
  i_NaCa := Na_Ca_exchanger_k_NaCa*(1/(Na_Ca_exchanger_K_mNa^3 + Nao^3))*(1/(Na_Ca_exchanger_K_mCa + Cao))*(1/(1 + Na_Ca_exchanger_k_sat*exp((Na_Ca_exchanger_eta - 1)*(V*F/(R*T)))))*(exp(Na_Ca_exchanger_eta*(V*F/(R*T)))*Nai^3*Cao - exp((Na_Ca_exchanger_eta - 1)*(V*F/(R*T)))*Nao^3*Cai);
  i_Kp := plateau_potassium_current_g_Kp*plateau_potassium_current_Kp*(V - plateau_potassium_current_E_Kp);
  i_p_Ca := sarcolemmal_calcium_pump_I_pCa*(Cai/(sarcolemmal_calcium_pump_K_mpCa + Cai));
  i_Na_b := sodium_background_current_g_Nab*(V - sodium_background_current_E_NaN);
  i_Ca_b := calcium_background_current_g_Cab*(V - calcium_background_current_E_CaN);
  i_NaK := sodium_potassium_pump_I_NaK*sodium_potassium_pump_f_NaK*(1/(1 + (sodium_potassium_pump_K_mNai/Nai)^1.5))*(Ko/(Ko + sodium_potassium_pump_K_mKo));
  i_ns_Ca := i_ns_Na + i_ns_K;
  E_Na := R*T/F*ln(Nao/Nai);
  fast_sodium_current_fast_sodium_current_m_gate_alpha_m := 0.32*((V + 47.13)/(1 - exp(-0.1*(V + 47.13))));
  fast_sodium_current_fast_sodium_current_m_gate_beta_m := 0.08*exp(-V/11);
  fast_sodium_current_fast_sodium_current_h_gate_alpha_h := ;
  fast_sodium_current_fast_sodium_current_h_gate_beta_h := ;
  fast_sodium_current_fast_sodium_current_j_gate_alpha_j := ;
  fast_sodium_current_fast_sodium_current_j_gate_beta_j := ;
  time_dependent_potassium_current_g_K := 0.1128*sqrt(Ko/5.4);
  time_dependent_potassium_current_E_K := R*T/F*ln((Ko + time_dependent_potassium_current_PNa_K*Nao)/(Ki + time_dependent_potassium_current_PNa_K*Nai));
  Xi := 1/(1 + exp((V - 40)/40));
  time_dependent_potassium_current_time_dependent_potassium_current_X_gate_alpha_X := 7.19e-5*(V + 30)/(1 - exp(-0.148*(V + 30)));
  time_dependent_potassium_current_time_dependent_potassium_current_X_gate_beta_X := 0.000131*(V + 30)/(-1 + exp(0.0687*(V + 30)));
  E_K1 := R*T/F*ln(Ko/Ki);
  time_independent_potassium_current_g_K1 := 0.75*sqrt(Ko/5.4);
  K1_infinity := time_independent_potassium_current_time_independent_potassium_current_K1_gate_alpha_K1/(time_independent_potassium_current_time_independent_potassium_current_K1_gate_alpha_K1 + time_independent_potassium_current_time_independent_potassium_current_K1_gate_beta_K1);
  time_independent_potassium_current_time_independent_potassium_current_K1_gate_alpha_K1 := 1.02/(1 + exp(0.2385*(V - (E_K1 + 59.215))));
  time_independent_potassium_current_time_independent_potassium_current_K1_gate_beta_K1 := (0.49124*exp(0.08032*(V - E_K1 + 5.476)) + exp(0.06175*(V - E_K1 - 594.31)))/(1 + exp(-0.5143*(V - E_K1 + 4.753)));
  plateau_potassium_current_E_Kp := E_K1;
  plateau_potassium_current_Kp := 1/(1 + exp((7.488 - V)/5.98));
  sodium_potassium_pump_f_NaK := 1/(1 + 0.1245*exp(-0.1*(V*F/(R*T))) + 0.0365*sodium_potassium_pump_sigma*exp(-(V*F/(R*T))));
  sodium_potassium_pump_sigma := 1/7*(exp(Nao/67.3) - 1);
  i_ns_Na := non_specific_calcium_activated_current_I_ns_Na*(1/(1 + (non_specific_calcium_activated_current_K_m_ns_Ca/Cai)^3));
  i_ns_K := non_specific_calcium_activated_current_I_ns_K*(1/(1 + (non_specific_calcium_activated_current_K_m_ns_Ca/Cai)^3));
  non_specific_calcium_activated_current_I_ns_Na := non_specific_calcium_activated_current_Pns_Na*(V*F^2/(R*T))*((0.75*Nai*exp(V*F/(R*T)) - 0.75*Nao)/(exp(V*F/(R*T)) - 1));
  non_specific_calcium_activated_current_I_ns_K := non_specific_calcium_activated_current_Pns_K*(V*F^2/(R*T))*((0.75*Ki*exp(V*F/(R*T)) - 0.75*Ko)/(exp(V*F/(R*T)) - 1));
  calcium_background_current_E_CaN := R*T/(2*F)*ln(Cao/Cai);
  sodium_background_current_E_NaN := E_Na;
  L_type_Ca_channel_p_k := L_type_Ca_channel_P_K/(1 + L_type_Ca_channel_i_Ca_max/L_type_Ca_channel_i_Ca_half);
  L_type_Ca_channel_i_Ca_max := L_type_Ca_channel_P_Ca^4*(V*F^2/(R*T))*((0.001*exp(2*V*F/(R*T)) - 0.341*Cao)/(exp(2*V*F/(R*T)) - 1));
  L_type_Ca_channel_alpha := 0.4*exp((V + 12)/10);
  L_type_Ca_channel_beta := 0.05*exp(-(V + 12)/13);
  L_type_Ca_channel_gamma := 0.5625*Ca_SS;
  L_type_Ca_channel_alpha_a := L_type_Ca_channel_alpha*L_type_Ca_channel_a;
  L_type_Ca_channel_beta_b := L_type_Ca_channel_beta/L_type_Ca_channel_b;
  L_type_Ca_channel_L_type_Ca_channel_y_gate_y_infinity := 1/(1 + exp((V + 55)/7.5)) + 0.1/(1 + exp((-V + 21)/6));
  L_type_Ca_channel_L_type_Ca_channel_y_gate_tau_y := 20 + 600/(1 + exp((V + 30)/9.5));
  J_up := (SERCA_pump_Vmax_f*SERCA_pump_fb - SERCA_pump_Vmax_r*SERCA_pump_rb)/(1 + SERCA_pump_fb + SERCA_pump_rb);
  SERCA_pump_fb := (Cai/SERCA_pump_k_fb)^SERCA_pump_n_fb;
  SERCA_pump_rb := (Ca_NSR/SERCA_pump_k_rb)^SERCA_pump_n_rb;
  J_rel := intracellular_Ca_fluxes_v1*(P_O1 + P_O2)*(Ca_JSR - Ca_SS);
  J_trpn := k_htrpn_plus*Cai*(HTRPN_tot - HTRPNCa - k_htrpn_minus*HTRPNCa) + k_ltrpn_plus*Cai*(LTRPN_tot - LTRPNCa - k_ltrpn_minus*LTRPNCa);
  J_tr := (Ca_NSR - Ca_JSR)/intracellular_Ca_fluxes_tau_tr;
  J_xfer := (Ca_SS - Cai)/intracellular_Ca_fluxes_tau_xfer;
  intracellular_ionic_concentrations_betai := 1/(1 + intracellular_ionic_concentrations_CMDN_tot*intracellular_ionic_concentrations_K_mCMDN/(intracellular_ionic_concentrations_K_mCMDN + Cai)^2);
  intracellular_ionic_concentrations_beta_SS := 1/(1 + intracellular_ionic_concentrations_CMDN_tot*intracellular_ionic_concentrations_K_mCMDN/(intracellular_ionic_concentrations_K_mCMDN + Ca_SS)^2);
  intracellular_ionic_concentrations_beta_JSR := 1/(1 + intracellular_ionic_concentrations_CSQN_tot*intracellular_ionic_concentrations_K_mCSQN/(intracellular_ionic_concentrations_K_mCSQN + Ca_JSR)^2);
  Force_norm := force_computation_phi_SL*((P1 + N1 + 2*P2 + 3*P3)/force_computation_Force_max);
  f_01 := 3*tropomyosin_cross_bridges_f_XB;
  f_12 := 10*tropomyosin_cross_bridges_f_XB;
  f_23 := 7*tropomyosin_cross_bridges_f_XB;
  tropomyosin_cross_bridges_g_XB_SL := g_XB*(1 + (1 - tropomyosin_cross_bridges_SL_norm)^1.6);
  tropomyosin_cross_bridges_g_01_SL := 1*tropomyosin_cross_bridges_g_XB_SL;
  tropomyosin_cross_bridges_g_12_SL := 2*tropomyosin_cross_bridges_g_XB_SL;
  tropomyosin_cross_bridges_g_23_SL := 3*tropomyosin_cross_bridges_g_XB_SL;
  tropomyosin_cross_bridges_SL_norm := (SL - 1.7)/0.7;
  tropomyosin_cross_bridges_N_trop := 3.5 + 2.5*tropomyosin_cross_bridges_SL_norm;
  tropomyosin_cross_bridges_k_trop_np := tropomyosin_cross_bridges_k_trop_pn*(LTRPNCa/LTRPN_tot/tropomyosin_cross_bridges_K_trop_half)^tropomyosin_cross_bridges_N_trop;
  tropomyosin_cross_bridges_K_trop_half := (1 + tropomyosin_cross_bridges_K_trop_Ca/(1.7 - 0.9*tropomyosin_cross_bridges_SL_norm))^(-1);
  tropomyosin_cross_bridges_K_trop_Ca := k_ltrpn_minus/k_ltrpn_plus;
  force_computation_Force := force_computation_zeta*Force_norm;
  force_computation_Force_max := force_computation_P1_max + 2*force_computation_P2_max + 3*force_computation_P3_max;
  force_computation_phi_SL := ;
  force_computation_P1_max := f_01*2*g_XB*3*g_XB/(g_XB*2*g_XB*3*g_XB + f_01*2*g_XB*3*g_XB + f_01*f_12*3*g_XB + f_01*f_12*f_23);
  force_computation_P2_max := f_01*f_12*3*g_XB/(g_XB*2*g_XB*3*g_XB + f_01*2*g_XB*3*g_XB + f_01*f_12*3*g_XB + f_01*f_12*f_23);
  force_computation_P3_max := f_01*f_12*f_23/(g_XB*2*g_XB*3*g_XB + f_01*2*g_XB*3*g_XB + f_01*f_12*3*g_XB + f_01*f_12*f_23);

  // Rate rules:
  V' = -1/membrane_Cm*(i_Na + i_Ca + i_Ca_K + i_K + i_K1 + i_Kp + i_NaCa + i_NaK + i_ns_Ca + i_p_Ca + i_Ca_b + i_Na_b);
  Nai' = -(i_Na + i_Na_b + i_ns_Na + i_NaCa*3 + i_NaK*3)*(A_cap/(V_myo*F));
  m' = fast_sodium_current_fast_sodium_current_m_gate_alpha_m*(1 - m) - fast_sodium_current_fast_sodium_current_m_gate_beta_m*m;
  h' = fast_sodium_current_fast_sodium_current_h_gate_alpha_h*(1 - h) - fast_sodium_current_fast_sodium_current_h_gate_beta_h*h;
  j' = fast_sodium_current_fast_sodium_current_j_gate_alpha_j*(1 - j) - fast_sodium_current_fast_sodium_current_j_gate_beta_j*j;
  Ki' = -(i_Ca_K + i_K + i_K1 + i_Kp + i_ns_K + (-(i_NaK*2)))*(A_cap/(V_myo*F));
  X' = time_dependent_potassium_current_time_dependent_potassium_current_X_gate_alpha_X*(1 - X) - time_dependent_potassium_current_time_dependent_potassium_current_X_gate_beta_X*X;
  Cai' = intracellular_ionic_concentrations_betai*(-(J_xfer + J_up + J_trpn + (i_Ca_b + (-(2*i_NaCa)) + i_p_Ca)*(A_cap/(2*V_myo*F))));
  L_type_Ca_channel_O' = L_type_Ca_channel_f*L_type_Ca_channel_C4 - L_type_Ca_channel_g*L_type_Ca_channel_O;
  L_type_Ca_channel_O_Ca' = L_type_Ca_channel_f_*L_type_Ca_channel_C_Ca4 - L_type_Ca_channel_g_*L_type_Ca_channel_O_Ca;
  L_type_Ca_channel_C0' = L_type_Ca_channel_beta*L_type_Ca_channel_C1 + L_type_Ca_channel_omega*L_type_Ca_channel_C_Ca0 - (4*L_type_Ca_channel_alpha + L_type_Ca_channel_gamma)*L_type_Ca_channel_C0;
  L_type_Ca_channel_C1' = 4*L_type_Ca_channel_alpha*L_type_Ca_channel_C0 + 2*L_type_Ca_channel_beta*L_type_Ca_channel_C2 + L_type_Ca_channel_omega/L_type_Ca_channel_b*L_type_Ca_channel_C_Ca1 - (L_type_Ca_channel_beta + 3*L_type_Ca_channel_alpha + L_type_Ca_channel_gamma*L_type_Ca_channel_a)*L_type_Ca_channel_C1;
  L_type_Ca_channel_C2' = 3*L_type_Ca_channel_alpha*L_type_Ca_channel_C1 + 3*L_type_Ca_channel_beta*L_type_Ca_channel_C3 + L_type_Ca_channel_omega/L_type_Ca_channel_b^2*L_type_Ca_channel_C_Ca2 - (L_type_Ca_channel_beta*2 + 2*L_type_Ca_channel_alpha + L_type_Ca_channel_gamma*L_type_Ca_channel_a^2)*L_type_Ca_channel_C2;
  L_type_Ca_channel_C3' = 2*L_type_Ca_channel_alpha*L_type_Ca_channel_C2 + 4*L_type_Ca_channel_beta*L_type_Ca_channel_C4 + L_type_Ca_channel_omega/L_type_Ca_channel_b^3*L_type_Ca_channel_C_Ca3 - (L_type_Ca_channel_beta*3 + L_type_Ca_channel_alpha + L_type_Ca_channel_gamma*L_type_Ca_channel_a^3)*L_type_Ca_channel_C3;
  L_type_Ca_channel_C4' = L_type_Ca_channel_alpha*L_type_Ca_channel_C3 + L_type_Ca_channel_g*L_type_Ca_channel_O + L_type_Ca_channel_omega/L_type_Ca_channel_b^4*L_type_Ca_channel_C_Ca4 - (L_type_Ca_channel_beta*4 + L_type_Ca_channel_f + L_type_Ca_channel_gamma*L_type_Ca_channel_a^4)*L_type_Ca_channel_C4;
  L_type_Ca_channel_C_Ca0' = L_type_Ca_channel_beta_b*L_type_Ca_channel_C_Ca1 + L_type_Ca_channel_gamma*L_type_Ca_channel_C_Ca0 - (4*L_type_Ca_channel_alpha_a + L_type_Ca_channel_omega)*L_type_Ca_channel_C_Ca0;
  L_type_Ca_channel_C_Ca1' = 4*L_type_Ca_channel_alpha_a*L_type_Ca_channel_C_Ca0 + 2*L_type_Ca_channel_beta_b*L_type_Ca_channel_C_Ca2 + L_type_Ca_channel_gamma*L_type_Ca_channel_a*L_type_Ca_channel_C1 - (L_type_Ca_channel_beta_b + 3*L_type_Ca_channel_alpha_a + L_type_Ca_channel_omega/L_type_Ca_channel_b)*L_type_Ca_channel_C_Ca1;
  L_type_Ca_channel_C_Ca2' = 3*L_type_Ca_channel_alpha_a*L_type_Ca_channel_C_Ca1 + 3*L_type_Ca_channel_beta_b*L_type_Ca_channel_C_Ca3 + L_type_Ca_channel_gamma*L_type_Ca_channel_a^2*L_type_Ca_channel_C2 - (L_type_Ca_channel_beta_b*2 + 2*L_type_Ca_channel_alpha_a + L_type_Ca_channel_omega/L_type_Ca_channel_b^2)*L_type_Ca_channel_C_Ca2;
  L_type_Ca_channel_C_Ca3' = 2*L_type_Ca_channel_alpha_a*L_type_Ca_channel_C_Ca2 + 4*L_type_Ca_channel_beta_b*L_type_Ca_channel_C_Ca4 + L_type_Ca_channel_gamma*L_type_Ca_channel_a^3*L_type_Ca_channel_C3 - (L_type_Ca_channel_beta_b*3 + L_type_Ca_channel_alpha_a + L_type_Ca_channel_omega/L_type_Ca_channel_b^3)*L_type_Ca_channel_C_Ca3;
  L_type_Ca_channel_C_Ca4' = L_type_Ca_channel_alpha_a*L_type_Ca_channel_C_Ca3 + L_type_Ca_channel_g_*L_type_Ca_channel_O_Ca + L_type_Ca_channel_gamma*L_type_Ca_channel_a^4*L_type_Ca_channel_C4 - (L_type_Ca_channel_beta_b*4 + L_type_Ca_channel_f_ + L_type_Ca_channel_omega/L_type_Ca_channel_b^4)*L_type_Ca_channel_C_Ca4;
  Ca_SS' = intracellular_ionic_concentrations_beta_SS*(J_rel*(V_JSR/V_SS) - J_xfer*(V_myo/V_SS) - i_Ca*(A_cap/(2*V_SS*F)));
  y' = (L_type_Ca_channel_L_type_Ca_channel_y_gate_y_infinity - y)/L_type_Ca_channel_L_type_Ca_channel_y_gate_tau_y;
  P_O1' = RyR_channel_states_k_a_plus*Ca_SS^RyR_channel_states_n*RyR_channel_states_P_C1 - (RyR_channel_states_k_a_minus*P_O1 + RyR_channel_states_k_b_plus*Ca_SS^RyR_channel_states_m*P_O1 + RyR_channel_states_k_c_plus*P_O1) + RyR_channel_states_k_b_minus*P_O2 + RyR_channel_states_k_c_minus*RyR_channel_states_P_C2;
  P_O2' = RyR_channel_states_k_b_plus*Ca_SS^RyR_channel_states_m*P_O1 - RyR_channel_states_k_b_minus*P_O2;
  RyR_channel_states_P_C1' = -RyR_channel_states_k_a_plus*Ca_SS^RyR_channel_states_n*RyR_channel_states_P_C1 + RyR_channel_states_k_a_minus*P_O1;
  RyR_channel_states_P_C2' = RyR_channel_states_k_c_plus*P_O1 - RyR_channel_states_k_c_minus*RyR_channel_states_P_C2;
  Ca_NSR' = J_up*(V_myo/V_NSR) - J_tr*(V_JSR/V_NSR);
  HTRPNCa' = k_htrpn_plus*Cai*(HTRPN_tot - HTRPNCa) - k_htrpn_minus*HTRPNCa;
  LTRPNCa' = k_ltrpn_plus*Cai*(LTRPN_tot - LTRPNCa) - k_ltrpn_minus*LTRPNCa*(0.333 + 0.667*(1 - Force_norm));
  Ca_JSR' = intracellular_ionic_concentrations_beta_JSR*(J_tr - J_rel);
  P1' = -((tropomyosin_cross_bridges_k_trop_pn + f_12 + tropomyosin_cross_bridges_g_01_SL)*P1) + tropomyosin_cross_bridges_k_trop_np*N1 + tropomyosin_cross_bridges_k_trop_np*N1 + f_01*tropomyosin_cross_bridges_P0 + tropomyosin_cross_bridges_g_12_SL*P2;
  P2' = -((f_23 + tropomyosin_cross_bridges_g_12_SL)*P2) + f_12*P1 + tropomyosin_cross_bridges_g_23_SL*P3;
  P3' = -tropomyosin_cross_bridges_g_23_SL*P3 + f_23*P2;
  tropomyosin_cross_bridges_N0' = tropomyosin_cross_bridges_k_trop_pn*tropomyosin_cross_bridges_P0 - tropomyosin_cross_bridges_k_trop_np*tropomyosin_cross_bridges_N0 + tropomyosin_cross_bridges_g_01_SL*N1;
  tropomyosin_cross_bridges_P0' = -((tropomyosin_cross_bridges_k_trop_pn + f_01)*tropomyosin_cross_bridges_P0) + tropomyosin_cross_bridges_k_trop_np*tropomyosin_cross_bridges_N0 + tropomyosin_cross_bridges_g_01_SL*P1;
end
