// SBML level 2 version 4

model rice_winslow_hunter_1999_version05____main()
  // Originally created by libAntimony v1.3 (using libSBML 4.1.0-b2)

  // Compartments:
  compartment default_compartment = 1;

  // Parameters:
  TCa0 = ;
  kon = 40;
  koff = 20;
  Ca = 1;
  P00 = ;
  N10 = ;
  P10 = ;
  k1_ = 45;
  g = 20;
  f = 10;
  constants_K_Ca = 1.64;
  constants_SL = 1.7;
  force_alpha = 1;
  time_ = ;

  // Assignment rules:
  T0 := 1 - TCa0;
  N00 := 1 - (P00 + N10 + P10);
  k1 := k1_*(TCa0/constants_K_1_2)^constants_N;
  constants_K_1_2 := 1/(1 + constants_K_Ca/(1.5 - constants_SL_norm*1));
  constants_N := 7 + 3*constants_SL_norm;
  constants_SL_norm := (constants_SL - 1.7)/(2.3 - 1.7);
  force_F := force_alpha*(P10 + N10)/force_Fmax;
  force_Fmax := f/(f + g);

  // Rate rules:
  TCa0' = kon*Ca*T0 - koff*TCa0;
  P00' = k1*N00 + g*P10 - (k1_*P00 + f*P00);
  N10' = k1_*P10 - (g*N10 + k1*N10);
  P10' = k1*N10 + f*P00 - (k1_*P10 + g*P10);
end
