// SBML level 2 version 4

model rice_winslow_jafri_1999_version01____main()
  // Originally created by libAntimony v1.3 (using libSBML 4.1.0-b2)

  // Compartments:
  compartment default_compartment = 1;

  // Parameters:
  V = -84.624;
  R = 8.314;
  T = 310;
  F = 96500;
  Ca_o = 1.8;
  V_SS = 2.03e-12;
  Ca_SS = ;
  subspace_J_RyR_perm = 3960;
  subspace_B_SR = 47;
  subspace_K_BSR = 0.87;
  subspace_B_SL = 1124;
  subspace_K_BSL = 8.7;
  subspace_P_Ca = 1.51e-11;
  subspace_tau_xfer = 0.0007;
  subspace_Ca_myo = 0.1;
  subspace_i = 0;
  subspace_V_myo = 0.1;
  Ca_JSR = ;
  sarcoplasmic_reticulum_V_JSR = 2.03e-12;
  sarcoplasmic_reticulum_CSQN_tot = 15;
  sarcoplasmic_reticulum_K_CSQN = 0.8;
  sarcoplasmic_reticulum_tau_tr = 0.005;
  sarcoplasmic_reticulum_Ca_NSR = 800;
  omega = 10;
  a = 2;
  b = 2;
  f = 300;
  g = 2000;
  f_ = 5;
  g_ = 7000;
  k21 = 2.5e5;
  k32 = 9.6e3;
  k52 = 1.235;
  k43 = 1.3e4;
  k45 = 66.67;
  k65 = 3e6;
  time_ = ;
  O0 = ;
  O_Ca0 = ;
  P_O30 = ;
  P_O40 = ;
  subspace_sum = ;
  subspace_lowlimit = ;
  subspace_uplimit = ;
  C00 = ;
  C10 = ;
  C_Ca00 = ;
  C20 = ;
  C_Ca10 = ;
  C30 = ;
  C_Ca20 = ;
  C40 = ;
  C_Ca30 = ;
  C_Ca40 = ;
  P_C10 = ;
  P_C20 = ;
  P_C50 = ;
  P_C60 = ;

  // Assignment rules:
  J_RyR := subspace_sum(bvar(subspace_i), subspace_lowlimit(1), subspace_uplimit(8), subspace_J_RyR_perm*subspace_RyR_open*(Ca_JSR - Ca_SS));
  subspace_J_DHPR := subspace_I_DHPR*subspace_DHPR_open/(2*F*V_SS);
  subspace_DHPR_open := ;
  subspace_RyR_open := ;
  subspace_I_DHPR := subspace_P_Ca*4*(V*F^2/(R*T))*((0.001*exp(2*V*F/(R*T)) - 0.341*Ca_o)/(exp(2*V*F/(R*T)) - 1));
  subspace_beta_SS := (1 + subspace_B_SR*subspace_K_BSR/(subspace_K_BSR + Ca_SS)^2 + subspace_B_SL*subspace_K_BSL/(subspace_K_BSL + Ca_SS)^2)^(-1);
  subspace_J_xfer := 1/subspace_tau_xfer*(Ca_SS - subspace_Ca_myo);
  sarcoplasmic_reticulum_beta_JSR := (1 + sarcoplasmic_reticulum_CSQN_tot*sarcoplasmic_reticulum_K_CSQN/(sarcoplasmic_reticulum_K_CSQN + Ca_JSR)^2)^(-1);
  sarcoplasmic_reticulum_J_tr := 1/sarcoplasmic_reticulum_tau_tr*(sarcoplasmic_reticulum_Ca_NSR - Ca_JSR);
  alpha := 0.4*exp((V + 6)/25);
  beta := 0.05*exp(-(V + 6)/29);
  gamma := Ca_SS*0.1875;
  alpha_ := alpha*a;
  beta_ := beta/b;
  k12 := 3e6*Ca_SS^4/(2.68^4 + Ca_SS^4);
  k23 := 3e7*Ca_SS^4/(2.68^4 + Ca_SS^4);
  k25 := 3e5*Ca_SS^4/(2.68^4 + Ca_SS^4);
  k34 := 3e6*Ca_SS^4/(2.68^4 + Ca_SS^4);
  k54 := 198*Ca_SS^4/(2.68^4 + Ca_SS^4);
  k56 := 3e6*Ca_SS^4/(2.68^4 + Ca_SS^4);

  // Rate rules:
  Ca_SS' = subspace_beta_SS*(subspace_J_DHPR + J_RyR + subspace_V_myo/V_SS*subspace_J_xfer);
  Ca_JSR' = sarcoplasmic_reticulum_beta_JSR*(sarcoplasmic_reticulum_J_tr - V_SS/sarcoplasmic_reticulum_V_JSR*J_RyR);
end
