// SBML level 2 version 4

model rogers_mcculloch_1994_version01____main()
  // Originally created by libAntimony v1.3 (using libSBML 4.1.0-b2)

  // Compartments:
  compartment default_compartment = 1;

  // Parameters:
  Cm = 0.01;
  Vr = -85;
  Vth = -75;
  Vp = 15;
  c1 = 0.26;
  c2 = 0.1;
  b = 0.013;
  d = 0.8;
  Vm = -85;
  v = 0;
  t = ;
  Istim = ;

  // Assignment rules:
  Iion := c1*interface_u*(interface_u - (Vth - Vr)/(Vp - Vr))*(interface_u - 1) + c2*interface_u*v;
  IStimC := Istim;
  interface_u := (Vm - Vr)/(Vp - Vr);

  // Rate rules:
  Vm' = (Istim - Iion)/Cm;
  v' = b*(interface_u - d*v);
end
