// SBML level 2 version 4

model romond_rustici_gonze_goldbeter_1999_version01____main()
  // Originally created by libAntimony v1.3 (using libSBML 4.1.0-b2)

  // Compartments:
  compartment default_compartment = 1;

  // Parameters:
  H_1 = 0.01;
  H_2 = 0.01;
  H_3 = 0.01;
  H_4 = 0.01;
  K_1 = 0.01;
  K_2 = 0.01;
  K_3 = 0.01;
  K_4 = 0.01;
  V_M1 = 0.3;
  V_M3 = 0.1;
  U_M1 = 0.3;
  U_M3 = 0.1;
  V_2 = 0.15;
  V_4 = 0.05;
  U_2 = 0.15;
  U_4 = 0.05;
  K_c1 = 0.5;
  K_c2 = 0.5;
  K_d1 = 0.02;
  K_d2 = 0.02;
  v_d1 = 0.025;
  v_d2 = 0.025;
  v_i1 = 0.05;
  v_i2 = 0.05;
  k_d1 = 0.001;
  k_d2 = 0.001;
  K_im1 = 0.03;
  K_im2 = 0.03;
  C_10 = 2;
  M_20 = 0;
  X_10 = 0;
  M_10 = 1;
  C_20 = 0;
  X_20 = 0;
  time_ = ;

  // Assignment rules:
  V_10 := C_10/(K_c1 + C_10)*V_M1;
  V_30 := M_10*V_M3;
  U_10 := C_20/(K_c2 + C_20)*U_M1;
  U_30 := M_20*U_M3;

  // Rate rules:
  C_10' = v_i1*K_im1/(K_im1 + M_20) - v_d1*X_10*C_10/(K_d1 + C_10) - k_d1*C_10;
  M_20' = U_10*(1 - M_20)/(H_1 + (1 - M_20)) - U_2*M_20/(H_2 + M_20);
  X_10' = V_30*(1 - X_10)/(K_3 + (1 - X_10)) - V_4*X_10/(K_4 + X_10);
  M_10' = V_10*(1 - M_10)/(K_1 + (1 - M_10)) - V_2*M_10/(K_2 + M_10);
  C_20' = v_i2*K_im2/(K_im2 + M_10) - v_d2*X_20*C_20/(K_d2 + C_20) - k_d2*C_20;
  X_20' = U_30*(1 - X_20)/(H_3 + (1 - X_20)) - U_4*X_20/(H_4 + X_20);
end
