// SBML level 2 version 4

model rong_2009a____main()
  // Originally created by libAntimony v1.3 (using libSBML 4.1.0-b2)

  // Compartments:
  compartment default_compartment = 1;

  // Parameters:
  uninfected_lambda_ = 1e4;
  uninfected_d_T = 0.01;
  efficacy = 0.4;
  k = 2.4e-8;
  V = 50;
  T = 600000;
  latently_infected_d_0 = 0.001;
  a_L = 0.1;
  eta = 0.001;
  L = 2;
  delta = 1;
  T_star = 0.3;
  viral_load_N = 2000;
  viral_load_c = 23;
  time_ = ;

  // Rate rules:
  V' = viral_load_N*delta*T_star - viral_load_c*V;
  T' = uninfected_lambda_ - uninfected_d_T*T - (1 - efficacy)*k*V*T;
  L' = eta*(1 - efficacy)*k*V*T - latently_infected_d_0*L - a_L*L;
  T_star' = (1 - eta)*(1 - efficacy)*k*V*T - delta*T_star + a_L*L;
end
