// SBML level 2 version 4

model roux_model_2006____main()
  // Originally created by libAntimony v1.4 (using libSBML 4.1.0-b2)

  // Compartments:
  compartment default_compartment = 1;

  // Parameters:
  R = 8314.472;
  T = 310;
  F = 96485.3415;
  Nai = 12;
  Nao = 130;
  Cao = 2;
  Ki = 150;
  Ko = 5;
  Cli = 55;
  Clo = 140;
  delayed_rectifier_K_current_g_Kdr = 0.035;
  delayed_rectifier_K_current_gamma_KSS = 0.15;
  V = -60;
  xa = 0.001;
  xi1 = 0;
  xi2 = 0;
  delayed_rectifier_K_current_delayed_rectifier_K_current_xi1_gate_tau_xi1 = 0.25;
  delayed_rectifier_K_current_delayed_rectifier_K_current_xi2_gate_tau_xi2 = 1.98;
  L_type_Ca_current_P_CaL = 0.003;
  L_type_Ca_current_V_surf = 150;
  d = 0;
  f = 1;
  L_type_Ca_current_L_type_Ca_current_f_gate_tau_f = 0.0173;
  Ca_activated_K_current_g_KCa = 2.45;
  xCa1 = 1;
  B = 0.001;
  Ca_activated_K_current_Ca_activated_K_current_xCa1_gate_tau_xCa1 = 1;
  Ca_activated_K_current_Ca_activated_K_current_xCa1_gate_alpha = 280;
  Ca_activated_K_current_Ca_activated_K_current_xCa1_gate_beta = 480;
  Ca_activated_Cl_current_g_Cl = 0.01;
  Ca_activated_Cl_current_CaCT = 0.0005;
  Ca_activated_Cl_current_h = 3;
  nonspecific_cationic_current_P_nsCa = 1.75e-7;
  nonspecific_cationic_current_Km_nsCa = 0.0012;
  ns = 1;
  Ca_pump_current_i_pCamax = 1.15;
  Ca_pump_current_Kmp_Ca = 0.05;
  Na_K_pump_current_i_NaKmax = 0.7;
  Na_K_pump_current_Km_Na = 40;
  Na_K_pump_current_Km_K = 1;
  Ca_background_current_g_bCa = 1.194e-5;
  K_background_current_g_bK = 0.008729;
  Na_background_current_g_bNa = 0.003263;
  membrane_cap = 2e-5;
  model_parameters_A = 0.0008;
  model_parameters_B = 8e-5;
  model_parameters_C = 0.00012;
  model_parameters_x1 = 15;
  model_parameters_x2 = 0.8;
  model_parameters_ds = 30;
  model_parameters_p = 0.4;
  model_parameters_n = 0.2;
  model_parameters_t36 = 1.5;
  time_ = ;

  // Assignment rules:
  E_Na := R*T/F*ln(Nao/Nai);
  E_Ca := R*T/(2*F)*ln(Cao/Cai);
  E_K := R*T/F*ln(Ko/Ki);
  E_Cl := R*T/F*ln(Cli/Clo);
  Cai := model_parameters_C + model_parameters_upeak + model_parameters_peak + model_parameters_plat;
  i_Kdr := delayed_rectifier_K_current_g_Kdr*(delayed_rectifier_K_current_gamma_KSS + (xi1 + xi2)*(1 - delayed_rectifier_K_current_gamma_KSS))*xa^2*(V - E_K);
  delayed_rectifier_K_current_delayed_rectifier_K_current_xa_gate_xa_infinity := 1/(1 + exp((5.5 - V)/6));
  delayed_rectifier_K_current_delayed_rectifier_K_current_xa_gate_tau_xa := 0.003262 - 3.552e-5*V;
  delayed_rectifier_K_current_delayed_rectifier_K_current_xi1_gate_xi1_infinity := 1/(1 + exp((V + 4.3)/7.5));
  delayed_rectifier_K_current_delayed_rectifier_K_current_xi2_gate_xi2_infinity := 1/(1 + exp((V + 4.3)/7.5));
  i_CaL := 4*L_type_Ca_current_P_CaL*d*f*L_type_Ca_current_ICaL_perm2;
  L_type_Ca_current_ICaL_perm1 := (V - L_type_Ca_current_V_surf)*F/(R*T*(1 - exp(-(V - L_type_Ca_current_V_surf)*2*F/(R*T))));
  L_type_Ca_current_ICaL_perm2 := L_type_Ca_current_ICaL_perm1*(Cai*exp(L_type_Ca_current_V_surf/(0.5*R*T/F)) - Cao*exp(-(V - L_type_Ca_current_V_surf)/(0.5*R*T/F)));
  L_type_Ca_current_L_type_Ca_current_d_gate_alpha_d := 30*(V + 18)/(1 - exp(-0.25*(V + 18)));
  L_type_Ca_current_L_type_Ca_current_d_gate_beta_d := 12*(V + 18)/(exp(0.1*(V + 18)) - 1);
  L_type_Ca_current_L_type_Ca_current_f_gate_f_infinity := 1/(1 + exp((23 + V)/6.6));
  i_KCa := Ca_activated_K_current_g_KCa*xCa1*B*(V - E_K);
  Ca_activated_K_current_Ca_activated_K_current_xCa1_gate_xCa1_infinity := (Cai^2 + Ca_activated_K_current_Ca_activated_K_current_xCa1_gate_K4*Cai)/(Cai^2 + Ca_activated_K_current_Ca_activated_K_current_xCa1_gate_K4*Cai*(1 + Ca_activated_K_current_Ca_activated_K_current_xCa1_gate_alpha/Ca_activated_K_current_Ca_activated_K_current_xCa1_gate_beta) + Ca_activated_K_current_Ca_activated_K_current_xCa1_gate_K4*Ca_activated_K_current_Ca_activated_K_current_xCa1_gate_K2*Ca_activated_K_current_Ca_activated_K_current_xCa1_gate_alpha/Ca_activated_K_current_Ca_activated_K_current_xCa1_gate_beta);
  Ca_activated_K_current_Ca_activated_K_current_xCa1_gate_K2 := 0.000275*exp(-1.51*V*F/(R*T));
  Ca_activated_K_current_Ca_activated_K_current_xCa1_gate_K4 := 1.25e-5*exp(-1.99*V*F/(R*T));
  Ca_activated_K_current_Ca_activated_K_current_B_gate_K1 := 0.85*exp(0.04*V);
  Ca_activated_K_current_Ca_activated_K_current_B_gate_K_1 := 0.24*exp(-0.012*V);
  i_ClCa := Ca_activated_Cl_current_g_Cl*(V - E_Cl)*1/(1 + (Ca_activated_Cl_current_CaCT/Cai)^Ca_activated_Cl_current_h);
  i_cationic := nonspecific_cationic_current_i_nsNa + nonspecific_cationic_current_i_nsK + nonspecific_cationic_current_i_nsCa;
  nonspecific_cationic_current_i_nsNa := ns*nonspecific_cationic_current_alpha_Ca*nonspecific_cationic_current_P_nsCa*V*F^2/(R*T)*(0.75*Nai*exp(V*F/(R*T)) - 0.75*Nao)/(exp(V*F/(R*T)) - 1);
  nonspecific_cationic_current_i_nsK := ns*nonspecific_cationic_current_alpha_Ca*nonspecific_cationic_current_P_nsCa*V*F^2/(R*T)*(0.75*Ki*exp(V*F/(R*T)) - 0.75*Ko)/(exp(V*F/(R*T)) - 1);
  nonspecific_cationic_current_i_nsCa := ns*nonspecific_cationic_current_alpha_Ca*nonspecific_cationic_current_P_nsCa*4*V*F^2/(R*T)*(1.5*Cai*exp(V*F/(R*T)) - 1.5*Cao)/(exp(V*F/(R*T)) - 1);
  nonspecific_cationic_current_alpha_Ca := 1/(1 + (nonspecific_cationic_current_Km_nsCa/Cai)^3);
  nonspecific_cationic_current_nonspecific_cationic_current_ns_gate_tau_ns := 0.20025 - 0.00089875*V;
  nonspecific_cationic_current_nonspecific_cationic_current_ns_gate_ns_infinity := 1/(1 + exp((V - 69.8)/(-11.9)));
  i_pCa := Ca_pump_current_i_pCamax*Cai/(Ca_pump_current_Kmp_Ca + Cai);
  i_NaK := Na_K_pump_current_i_NaKmax*Ko/(Ko + Na_K_pump_current_Km_K)*Nai/(Nai + Na_K_pump_current_Km_Na);
  i_bCa := Ca_background_current_g_bCa*(V - E_Ca);
  i_bK := K_background_current_g_bK*(V - E_K);
  i_bNa := Na_background_current_g_bNa*(V - E_Na);
  model_parameters_upeak := ;
  model_parameters_up := ;
  model_parameters_peak := ;
  model_parameters_plat := model_parameters_B/(1 + exp((time_ - (model_parameters_x1 + model_parameters_p + model_parameters_ds))/model_parameters_n)) - model_parameters_B/(1 + exp((time_ - (model_parameters_x1 + model_parameters_p))/model_parameters_n));
  model_parameters_x0 := model_parameters_x1 + model_parameters_x2;

  // Rate rules:
  V' = -1/membrane_cap*(i_CaL + i_Kdr + i_KCa + i_ClCa + i_cationic + i_NaK + i_pCa + i_bCa + i_bK + i_bNa);
  xa' = (delayed_rectifier_K_current_delayed_rectifier_K_current_xa_gate_xa_infinity - xa)/delayed_rectifier_K_current_delayed_rectifier_K_current_xa_gate_tau_xa;
  xi1' = (delayed_rectifier_K_current_delayed_rectifier_K_current_xi1_gate_xi1_infinity - xi1)/delayed_rectifier_K_current_delayed_rectifier_K_current_xi1_gate_tau_xi1;
  xi2' = (delayed_rectifier_K_current_delayed_rectifier_K_current_xi2_gate_xi2_infinity - xi2)/delayed_rectifier_K_current_delayed_rectifier_K_current_xi2_gate_tau_xi2;
  d' = L_type_Ca_current_L_type_Ca_current_d_gate_alpha_d - (L_type_Ca_current_L_type_Ca_current_d_gate_alpha_d + L_type_Ca_current_L_type_Ca_current_d_gate_beta_d)*d;
  f' = (L_type_Ca_current_L_type_Ca_current_f_gate_f_infinity - f)/L_type_Ca_current_L_type_Ca_current_f_gate_tau_f;
  xCa1' = (Ca_activated_K_current_Ca_activated_K_current_xCa1_gate_xCa1_infinity - xCa1)/Ca_activated_K_current_Ca_activated_K_current_xCa1_gate_tau_xCa1;
  B' = ;
  ns' = (nonspecific_cationic_current_nonspecific_cationic_current_ns_gate_ns_infinity - ns)/nonspecific_cationic_current_nonspecific_cationic_current_ns_gate_tau_ns;
end
