// SBML level 2 version 4

model sachse_model_2007____main()
  // Originally created by libAntimony v1.3 (using libSBML 4.1.0-b2)

  // Compartments:
  compartment default_compartment = 1;

  // Parameters:
  V = -80.50146;
  R = 8314.5;
  T = 295;
  F = 96487;
  membrane_Cm = 0.0001;
  membrane_stim_start = 0.01;
  membrane_stim_end = 10;
  membrane_stim_period = 1;
  membrane_stim_duration = 0.001;
  membrane_stim_amplitude = -5;
  sodium_current_g_Na = 0.8;
  Na_i = 10.73519;
  Na_o = 140;
  m = 0.004164108;
  h = 0.6735613;
  j = 0.6729362;
  L_type_Ca_channel_g_Ca_L = 0.031;
  L_type_Ca_channel_E_Ca_L = 65;
  Ca_ss = 8.737212e-5;
  d = 2.171081e-6;
  f_11 = 0.9999529;
  f_12 = 0.9999529;
  Ca_inact = 0.9913102;
  L_type_Ca_channel_L_type_Ca_channel_Ca_inact_gate_tau_Ca_inact = 0.009;
  Ca_independent_transient_outward_K_current_g_t = 0.035;
  Ca_independent_transient_outward_K_current_a = 0.886;
  Ca_independent_transient_outward_K_current_b = 0.114;
  K_o = 5.4;
  K_i = 139.2751;
  r = 0.002191519;
  s = 0.9842542;
  s_slow = 0.6421196;
  steady_state_outward_K_current_g_ss = 0.007;
  r_ss = 0.002907171;
  s_ss = 0.3142767;
  inward_rectifier_g_K1 = 0.024;
  hyperpolarisation_activated_current_g_f = 0.00145;
  hyperpolarisation_activated_current_f_Na = 0.2;
  y = 0.003578708;
  background_currents_g_B_Na = 8.015e-5;
  background_currents_g_B_Ca = 3.24e-5;
  background_currents_g_B_K = 0.000138;
  Ca_o = 1.2;
  Ca_i = 7.901351e-5;
  sodium_potassium_pump_i_NaK_max = 0.08;
  sodium_potassium_pump_K_m_K = 1.5;
  sodium_potassium_pump_K_m_Na = 10;
  sarcolemmal_calcium_pump_current_i_Ca_P_max = 0.004;
  Na_Ca_ion_exchanger_current_K_NaCa = 9.984e-6;
  Na_Ca_ion_exchanger_current_d_NaCa = 0.0001;
  Na_Ca_ion_exchanger_current_gamma_NaCa = 0.5;
  SR_Ca_release_channel_v1 = 1800;
  SR_Ca_release_channel_k_a_plus = 12150000000000;
  SR_Ca_release_channel_k_a_minus = 576;
  SR_Ca_release_channel_k_b_plus = 4050000000;
  SR_Ca_release_channel_k_b_minus = 1930;
  SR_Ca_release_channel_k_c_plus = 100;
  SR_Ca_release_channel_k_c_minus = 0.8;
  SR_Ca_release_channel_P_O1 = 0.0004327548;
  SR_Ca_release_channel_P_O2 = 6.06254e-10;
  SR_Ca_release_channel_P_C1 = 0.6348229;
  SR_Ca_release_channel_P_C2 = 0.3647471;
  SR_Ca_release_channel_n = 4;
  SR_Ca_release_channel_m = 3;
  Ca_JSR = 0.06607948;
  SERCA2a_pump_K_fb = 0.000168;
  SERCA2a_pump_K_rb = 3.29;
  SERCA2a_pump_Vmaxf = 0.04;
  SERCA2a_pump_Vmaxr = 0.9;
  SERCA2a_pump_K_SR = 1;
  SERCA2a_pump_N_fb = 1.2;
  SERCA2a_pump_N_rb = 1;
  Ca_NSR = 0.06600742;
  intracellular_and_SR_Ca_fluxes_tau_tr = 0.0005747;
  intracellular_and_SR_Ca_fluxes_tau_xfer = 0.0267;
  intracellular_and_SR_Ca_fluxes_HTRPNCa = 0.1394301;
  intracellular_and_SR_Ca_fluxes_LTRPNCa = 0.0051619;
  intracellular_and_SR_Ca_fluxes_HTRPN_tot = 0.14;
  intracellular_and_SR_Ca_fluxes_LTRPN_tot = 0.07;
  intracellular_and_SR_Ca_fluxes_k_htrpn_plus = 200000;
  intracellular_and_SR_Ca_fluxes_k_htrpn_minus = 0.066;
  intracellular_and_SR_Ca_fluxes_k_ltrpn_plus = 40000;
  intracellular_and_SR_Ca_fluxes_k_ltrpn_minus = 40;
  intracellular_ion_concentrations_V_myo = 9.36e-6;
  intracellular_ion_concentrations_V_JSR = 5.6e-7;
  intracellular_ion_concentrations_V_NSR = 5.04e-6;
  intracellular_ion_concentrations_V_SS = 1.2e-8;
  intracellular_ion_concentrations_K_mCMDN = 0.00238;
  intracellular_ion_concentrations_K_mCSQN = 0.8;
  intracellular_ion_concentrations_K_mEGTA = 0.00015;
  intracellular_ion_concentrations_CMDN_tot = 0.05;
  intracellular_ion_concentrations_CSQN_tot = 15;
  intracellular_ion_concentrations_EGTA_tot = 10;
  membrane_fibro_Cm = 4.5e-6;
  membrane_fibro_VmReal = -80;
  I_Kir_GKir = 0.001;
  I_Kir_aKir = 0.94;
  I_Kir_bKir = 1.26;
  I_Shkr_PShkr = 5.4e-9;
  I_Shkr_C0ShkrReal = 0.911;
  I_Shkr_C1ShkrReal = 0.0857;
  I_Shkr_C2ShkrReal = 0.00302;
  I_Shkr_C3ShkrReal = 4.74e-5;
  I_Shkr_C4ShkrReal = 2.79e-7;
  I_Shkr_OShkrReal = 0;
  I_Shkr_kv0 = 30;
  I_Shkr_zv = 1.28;
  I_Shkr_k_v0 = 2;
  I_Shkr_z_v = -1.53;
  I_Shkr_ko = 77;
  I_Shkr_k_o = 18;
  I_b_Gb = 6.9e-6;
  I_b_Eb = 0;
  I_inter_R_mf = 100000000;
  I_inter_number_of_fibroblasts = 1;
  time_ = ;

  // Assignment rules:
  i_Na := sodium_current_g_Na*m^3*h*j*(V - E_Na);
  i_Ca_L := L_type_Ca_channel_g_Ca_L*d*((0.9 + Ca_inact/10)*f_11 + (0.1 - Ca_inact/10)*f_12)*(V - L_type_Ca_channel_E_Ca_L);
  i_t := Ca_independent_transient_outward_K_current_g_t*r*(Ca_independent_transient_outward_K_current_a*s + Ca_independent_transient_outward_K_current_b*s_slow)*(V - E_K);
  i_ss := steady_state_outward_K_current_g_ss*r_ss*s_ss*(V - E_K);
  i_f := i_f_Na + i_f_K;
  i_K1 := (48/(exp((V + 37)/25) + exp((V + 37)/(-25))) + 10)*0.001/(1 + exp((V - (E_K + 76.77))/(-17))) + inward_rectifier_g_K1*(V - (E_K + 1.73))/((1 + exp(1.613*F*(V - (E_K + 1.73))/(R*T)))*(1 + exp((K_o - 0.9988)/(-0.124))));
  i_B := i_B_Na + i_B_Ca + i_B_K;
  i_NaK := sodium_potassium_pump_i_NaK_max*1/(1 + 0.1245*exp(-0.1*V*F/(R*T)) + 0.0365*sodium_potassium_pump_sigma*exp(-V*F/(R*T)))*K_o/(K_o + sodium_potassium_pump_K_m_K)*1/(1 + (sodium_potassium_pump_K_m_Na/Na_i)^1.5);
  i_NaCa := Na_Ca_ion_exchanger_current_K_NaCa*(Na_i^3*Ca_o*exp(0.03743*V*Na_Ca_ion_exchanger_current_gamma_NaCa) - Na_o^3*Ca_i*exp(0.03743*V*(Na_Ca_ion_exchanger_current_gamma_NaCa - 1)))/(1 + Na_Ca_ion_exchanger_current_d_NaCa*(Ca_i*Na_o^3 + Ca_o*Na_i^3));
  i_Ca_P := sarcolemmal_calcium_pump_current_i_Ca_P_max*Ca_i/(Ca_i + 0.0004);
  membrane_i_Stim := piecewise(membrane_stim_amplitude, (time_ >= membrane_stim_start) && ((time_ <= membrane_stim_end) && (time_ - membrane_stim_start - floor((time_ - membrane_stim_start)/membrane_stim_period)*membrane_stim_period <= membrane_stim_duration)), 0);
  I_inter_myo := -1*I_inter_fibro*I_inter_number_of_fibroblasts;
  E_Na := R*T/F*ln(Na_o/Na_i);
  sodium_current_sodium_current_m_gate_m_infinity := 1/(1 + exp((V + 45)/(-6.5)));
  sodium_current_sodium_current_m_gate_tau_m := 0.00136/(0.32*(V + 47.13)/(1 - exp(-0.1*(V + 47.13))) + 0.08*exp(-V/11));
  sodium_current_sodium_current_h_gate_h_infinity := 1/(1 + exp((V + 76.1)/6.07));
  sodium_current_sodium_current_h_gate_tau_h := ;
  sodium_current_sodium_current_j_gate_j_infinity := 1/(1 + exp((V + 76.1)/6.07));
  sodium_current_sodium_current_j_gate_tau_j := ;
  L_type_Ca_channel_L_type_Ca_channel_d_gate_d_infinity := 1/(1 + exp((V + 15.3)/(-5)));
  L_type_Ca_channel_L_type_Ca_channel_d_gate_tau_d := 0.00305*exp(-0.0045*(V + 7)^2) + 0.00105*exp(-0.002*(V - 18)^2) + 0.00025;
  L_type_Ca_channel_L_type_Ca_channel_f_11_gate_f_11_infinity := 1/(1 + exp((V + 26.7)/5.4));
  L_type_Ca_channel_L_type_Ca_channel_f_11_gate_tau_f_11 := 0.105*exp(-((V + 45)/12)^2) + 0.04/(1 + exp((-V + 25)/25)) + 0.015/(1 + exp((V + 75)/25)) + 0.0017;
  L_type_Ca_channel_L_type_Ca_channel_f_12_gate_f_12_infinity := 1/(1 + exp((V + 26.7)/5.4));
  L_type_Ca_channel_L_type_Ca_channel_f_12_gate_tau_f_12 := 0.041*exp(-((V + 47)/12)^2) + 0.08/(1 + exp((V + 55)/(-5))) + 0.015/(1 + exp((V + 75)/25)) + 0.0017;
  L_type_Ca_channel_L_type_Ca_channel_Ca_inact_gate_Ca_inact_infinity := 1/(1 + Ca_ss/0.01);
  E_K := R*T/F*ln(K_o/K_i);
  Ca_independent_transient_outward_K_current_Ca_independent_transient_outward_K_current_r_gate_tau_r := 1/(45.16*exp(0.03577*(V + 50)) + 98.9*exp(-0.1*(V + 38)));
  Ca_independent_transient_outward_K_current_Ca_independent_transient_outward_K_current_r_gate_r_infinity := 1/(1 + exp((V + 10.6)/(-11.42)));
  Ca_independent_transient_outward_K_current_Ca_independent_transient_outward_K_current_s_gate_tau_s := 0.35*exp(-((V + 70)/15)^2) + 0.035;
  Ca_independent_transient_outward_K_current_Ca_independent_transient_outward_K_current_s_gate_s_infinity := 1/(1 + exp((V + 45.3)/6.8841));
  Ca_independent_transient_outward_K_current_Ca_independent_transient_outward_K_current_s_slow_gate_tau_s_slow := 3.7*exp(-((V + 70)/30)^2) + 0.035;
  Ca_independent_transient_outward_K_current_Ca_independent_transient_outward_K_current_s_slow_gate_s_slow_infinity := 1/(1 + exp((V + 45.3)/6.8841));
  steady_state_outward_K_current_steady_state_outward_K_current_r_ss_gate_tau_r_ss := 10/(45.16*exp(0.03577*(V + 50)) + 98.9*exp(-0.1*(V + 38)));
  steady_state_outward_K_current_steady_state_outward_K_current_r_ss_gate_r_ss_infinity := 1/(1 + exp((V + 11.5)/(-11.82)));
  steady_state_outward_K_current_steady_state_outward_K_current_s_ss_gate_tau_s_ss := 2.1;
  steady_state_outward_K_current_steady_state_outward_K_current_s_ss_gate_s_ss_infinity := 1/(1 + exp((V + 87.5)/10.3));
  i_f_Na := hyperpolarisation_activated_current_g_f*y*hyperpolarisation_activated_current_f_Na*(V - E_Na);
  i_f_K := hyperpolarisation_activated_current_g_f*y*hyperpolarisation_activated_current_f_K*(V - E_K);
  hyperpolarisation_activated_current_f_K := 1 - hyperpolarisation_activated_current_f_Na;
  hyperpolarisation_activated_current_hyperpolarisation_activated_current_y_gate_tau_y := 1/(0.11885*exp((V + 80)/28.37) + 0.5623*exp((V + 80)/(-14.19)));
  hyperpolarisation_activated_current_hyperpolarisation_activated_current_y_gate_y_infinity := 1/(1 + exp((V + 138.6)/10.48));
  i_B_Na := background_currents_g_B_Na*(V - E_Na);
  i_B_Ca := background_currents_g_B_Ca*(V - background_currents_E_Ca);
  i_B_K := background_currents_g_B_K*(V - E_K);
  background_currents_E_Ca := 0.5*R*T/F*ln(Ca_o/Ca_i);
  sodium_potassium_pump_sigma := (exp(Na_o/67.3) - 1)/7;
  J_rel := SR_Ca_release_channel_v1*(SR_Ca_release_channel_P_O1 + SR_Ca_release_channel_P_O2)*(Ca_JSR - Ca_ss);
  J_up := SERCA2a_pump_K_SR*(SERCA2a_pump_Vmaxf*SERCA2a_pump_fb - SERCA2a_pump_Vmaxr*SERCA2a_pump_rb)/(1 + SERCA2a_pump_fb + SERCA2a_pump_rb);
  SERCA2a_pump_fb := (Ca_i/SERCA2a_pump_K_fb)^SERCA2a_pump_N_fb;
  SERCA2a_pump_rb := (Ca_NSR/SERCA2a_pump_K_rb)^SERCA2a_pump_N_rb;
  J_tr := (Ca_NSR - Ca_JSR)/intracellular_and_SR_Ca_fluxes_tau_tr;
  J_xfer := (Ca_ss - Ca_i)/intracellular_and_SR_Ca_fluxes_tau_xfer;
  J_trpn := intracellular_and_SR_Ca_fluxes_J_HTRPNCa + intracellular_and_SR_Ca_fluxes_J_LTRPNCa;
  intracellular_and_SR_Ca_fluxes_J_HTRPNCa := intracellular_and_SR_Ca_fluxes_k_htrpn_plus*Ca_i*(intracellular_and_SR_Ca_fluxes_HTRPN_tot - intracellular_and_SR_Ca_fluxes_HTRPNCa) - intracellular_and_SR_Ca_fluxes_k_htrpn_minus*intracellular_and_SR_Ca_fluxes_HTRPNCa;
  intracellular_and_SR_Ca_fluxes_J_LTRPNCa := intracellular_and_SR_Ca_fluxes_k_ltrpn_plus*Ca_i*(intracellular_and_SR_Ca_fluxes_LTRPN_tot - intracellular_and_SR_Ca_fluxes_LTRPNCa) - intracellular_and_SR_Ca_fluxes_k_ltrpn_minus*intracellular_and_SR_Ca_fluxes_LTRPNCa;
  intracellular_ion_concentrations_beta_i := 1/(1 + intracellular_ion_concentrations_CMDN_tot*intracellular_ion_concentrations_K_mCMDN/(intracellular_ion_concentrations_K_mCMDN + Ca_i)^2 + intracellular_ion_concentrations_EGTA_tot*intracellular_ion_concentrations_K_mEGTA/(intracellular_ion_concentrations_K_mEGTA + Ca_i)^2);
  intracellular_ion_concentrations_beta_SS := 1/(1 + intracellular_ion_concentrations_CMDN_tot*intracellular_ion_concentrations_K_mCMDN/(intracellular_ion_concentrations_K_mCMDN + Ca_ss)^2);
  intracellular_ion_concentrations_beta_JSR := 1/(1 + intracellular_ion_concentrations_CSQN_tot*intracellular_ion_concentrations_K_mCSQN/(intracellular_ion_concentrations_K_mCSQN + Ca_JSR)^2);
  V_fibro := ;
  I_b0 := I_b_Gb*(V_fibro - I_b_Eb);
  I_Kir0 := I_Kir_GKir*I_Kir_OKir*sqrt(K_o*1e-3)*(V_fibro - I_Kir_EK);
  I_Shkr0 := I_Shkr_PShkr*I_Shkr_OShkr*V_fibro*F^2/(R*T)*(K_i - K_o*exp(-V_fibro*F/(R*T)))/(1 - exp(-V_fibro*F/(R*T)));
  I_inter_fibro := 1e6*(V_fibro - V)/I_inter_R_mf;
  I_Kir_EK := R*T/F*ln(K_o/K_i);
  I_Kir_OKir := 1/(I_Kir_aKir + exp(I_Kir_bKir*(V_fibro - I_Kir_EK)*F/(R*T)));
  I_Shkr_C0Shkr := ;
  I_Shkr_C1Shkr := ;
  I_Shkr_C2Shkr := ;
  I_Shkr_C3Shkr := ;
  I_Shkr_C4Shkr := ;
  I_Shkr_OShkr := ;
  I_Shkr_kv := I_Shkr_kv0*exp(V_fibro*I_Shkr_zv*F/(R*T));
  I_Shkr_k_v := I_Shkr_k_v0*exp(V_fibro*I_Shkr_z_v*F/(R*T));

  // Rate rules:
  V' = -(i_Na + i_Ca_L + i_t + i_ss + i_f + i_K1 + i_B + i_NaK + i_NaCa + i_Ca_P + membrane_i_Stim + I_inter_myo)/membrane_Cm;
  Na_i' = -(i_Na + i_B_Na + i_NaCa*3 + i_NaK*3 + i_f_Na)*1/(intracellular_ion_concentrations_V_myo*F);
  m' = (sodium_current_sodium_current_m_gate_m_infinity - m)/sodium_current_sodium_current_m_gate_tau_m;
  h' = (sodium_current_sodium_current_h_gate_h_infinity - h)/sodium_current_sodium_current_h_gate_tau_h;
  j' = (sodium_current_sodium_current_j_gate_j_infinity - j)/sodium_current_sodium_current_j_gate_tau_j;
  Ca_ss' = intracellular_ion_concentrations_beta_SS*(J_rel*intracellular_ion_concentrations_V_JSR/intracellular_ion_concentrations_V_SS - J_xfer*intracellular_ion_concentrations_V_myo/intracellular_ion_concentrations_V_SS - i_Ca_L*1/(2*intracellular_ion_concentrations_V_SS*F));
  d' = (L_type_Ca_channel_L_type_Ca_channel_d_gate_d_infinity - d)/L_type_Ca_channel_L_type_Ca_channel_d_gate_tau_d;
  f_11' = (L_type_Ca_channel_L_type_Ca_channel_f_11_gate_f_11_infinity - f_11)/L_type_Ca_channel_L_type_Ca_channel_f_11_gate_tau_f_11;
  f_12' = (L_type_Ca_channel_L_type_Ca_channel_f_12_gate_f_12_infinity - f_12)/L_type_Ca_channel_L_type_Ca_channel_f_12_gate_tau_f_12;
  Ca_inact' = (L_type_Ca_channel_L_type_Ca_channel_Ca_inact_gate_Ca_inact_infinity - Ca_inact)/L_type_Ca_channel_L_type_Ca_channel_Ca_inact_gate_tau_Ca_inact;
  K_i' = -(i_ss + i_B_K + i_t + i_K1 + i_f_K + i_NaK*(-2))*1/(intracellular_ion_concentrations_V_myo*F);
  r' = (Ca_independent_transient_outward_K_current_Ca_independent_transient_outward_K_current_r_gate_r_infinity - r)/Ca_independent_transient_outward_K_current_Ca_independent_transient_outward_K_current_r_gate_tau_r;
  s' = (Ca_independent_transient_outward_K_current_Ca_independent_transient_outward_K_current_s_gate_s_infinity - s)/Ca_independent_transient_outward_K_current_Ca_independent_transient_outward_K_current_s_gate_tau_s;
  s_slow' = (Ca_independent_transient_outward_K_current_Ca_independent_transient_outward_K_current_s_slow_gate_s_slow_infinity - s_slow)/Ca_independent_transient_outward_K_current_Ca_independent_transient_outward_K_current_s_slow_gate_tau_s_slow;
  r_ss' = (steady_state_outward_K_current_steady_state_outward_K_current_r_ss_gate_r_ss_infinity - r_ss)/steady_state_outward_K_current_steady_state_outward_K_current_r_ss_gate_tau_r_ss;
  s_ss' = (steady_state_outward_K_current_steady_state_outward_K_current_s_ss_gate_s_ss_infinity - s_ss)/steady_state_outward_K_current_steady_state_outward_K_current_s_ss_gate_tau_s_ss;
  y' = (hyperpolarisation_activated_current_hyperpolarisation_activated_current_y_gate_y_infinity - y)/hyperpolarisation_activated_current_hyperpolarisation_activated_current_y_gate_tau_y;
  Ca_i' = intracellular_ion_concentrations_beta_i*(J_xfer - (J_up + J_trpn + (i_B_Ca - 2*i_NaCa + i_Ca_P)*1/(2*intracellular_ion_concentrations_V_myo*F)));
  SR_Ca_release_channel_P_O1' = SR_Ca_release_channel_k_a_plus*(Ca_ss/1)^SR_Ca_release_channel_n*SR_Ca_release_channel_P_C1 - (SR_Ca_release_channel_k_a_minus*SR_Ca_release_channel_P_O1 + SR_Ca_release_channel_k_b_plus*(Ca_ss/1)^SR_Ca_release_channel_m*SR_Ca_release_channel_P_O1 + SR_Ca_release_channel_k_c_plus*SR_Ca_release_channel_P_O1) + SR_Ca_release_channel_k_b_minus*SR_Ca_release_channel_P_O2 + SR_Ca_release_channel_k_c_minus*SR_Ca_release_channel_P_C2;
  SR_Ca_release_channel_P_O2' = SR_Ca_release_channel_k_b_plus*(Ca_ss/1)^SR_Ca_release_channel_m*SR_Ca_release_channel_P_O1 - SR_Ca_release_channel_k_b_minus*SR_Ca_release_channel_P_O2;
  SR_Ca_release_channel_P_C1' = -SR_Ca_release_channel_k_a_plus*(Ca_ss/1)^SR_Ca_release_channel_n*SR_Ca_release_channel_P_C1 + SR_Ca_release_channel_k_a_minus*SR_Ca_release_channel_P_O1;
  SR_Ca_release_channel_P_C2' = SR_Ca_release_channel_k_c_plus*SR_Ca_release_channel_P_O1 - SR_Ca_release_channel_k_c_minus*SR_Ca_release_channel_P_C2;
  Ca_JSR' = intracellular_ion_concentrations_beta_JSR*(J_tr - J_rel);
  Ca_NSR' = J_up*intracellular_ion_concentrations_V_myo/intracellular_ion_concentrations_V_NSR - J_tr*intracellular_ion_concentrations_V_JSR/intracellular_ion_concentrations_V_NSR;
  membrane_fibro_VmReal' = -(I_Kir0 + I_Shkr0 + I_b0 + I_inter_fibro)/membrane_fibro_Cm;
  I_Shkr_C0ShkrReal' = I_Shkr_k_v*I_Shkr_C1Shkr - 4*I_Shkr_kv*I_Shkr_C0Shkr;
  I_Shkr_C1ShkrReal' = 2*I_Shkr_k_v*I_Shkr_C2Shkr + 4*I_Shkr_kv*I_Shkr_C0Shkr - (3*I_Shkr_kv + I_Shkr_k_v)*I_Shkr_C1Shkr;
  I_Shkr_C2ShkrReal' = 3*I_Shkr_k_v*I_Shkr_C3Shkr + 3*I_Shkr_kv*I_Shkr_C1Shkr - (2*I_Shkr_kv + 2*I_Shkr_k_v)*I_Shkr_C2Shkr;
  I_Shkr_C3ShkrReal' = 4*I_Shkr_k_v*I_Shkr_C4Shkr + 2*I_Shkr_kv*I_Shkr_C2Shkr - (I_Shkr_kv + 3*I_Shkr_k_v)*I_Shkr_C3Shkr;
  I_Shkr_C4ShkrReal' = I_Shkr_k_o*I_Shkr_OShkr + I_Shkr_kv*I_Shkr_C3Shkr - (I_Shkr_ko + 4*I_Shkr_k_v)*I_Shkr_C4Shkr;
  I_Shkr_OShkrReal' = I_Shkr_ko*I_Shkr_C4Shkr - I_Shkr_k_o*I_Shkr_OShkr;
end
