// SBML level 2 version 4

model sachse_model_2007____main()
  // Originally created by libAntimony v1.3 (using libSBML 4.1.0-b2)

  // Compartments:
  compartment default_compartment = 1;

  // Parameters:
  membrane_Cm = 4.5e-6;
  membrane_VmReal = -58;
  I_Kir_GKir = 0.001;
  I_Kir_aKir = 0.94;
  I_Kir_bKir = 1.26;
  R = 8310;
  T = 295;
  F = 96500;
  Ko = 5;
  Ki = 140;
  I_Shkr_PShkr = 5.4e-9;
  I_Shkr_C0ShkrReal = 0.911;
  I_Shkr_C1ShkrReal = 0.0857;
  I_Shkr_C2ShkrReal = 0.00302;
  I_Shkr_C3ShkrReal = 4.74e-5;
  I_Shkr_C4ShkrReal = 2.79e-7;
  I_Shkr_OShkrReal = 0;
  I_Shkr_kv0 = 30;
  I_Shkr_zv = 1.28;
  I_Shkr_k_v0 = 2;
  I_Shkr_z_v = -1.53;
  I_Shkr_ko = 77;
  I_Shkr_k_o = 18;
  I_b_Gb = 6.9e-6;
  I_b_Eb = 0;
  I_stim_stim_start = 0.1;
  I_stim_stim_end = 10;
  I_stim_stim_period = 1;
  I_stim_stim_duration = 0.001;
  I_stim_stim_amplitude = 0.1;
  time_ = ;

  // Assignment rules:
  Vm := ;
  I_b0 := I_b_Gb*(Vm - I_b_Eb);
  I_Kir0 := I_Kir_GKir*I_Kir_OKir*sqrt(Ko*1e-3)*(Vm - I_Kir_EK);
  I_Shkr0 := I_Shkr_PShkr*I_Shkr_OShkr*Vm*F^2/(R*T)*(Ki - Ko*exp(-Vm*F/(R*T)))/(1 - exp(-Vm*F/(R*T)));
  I_stim0 := piecewise(I_stim_stim_amplitude, (time_ >= I_stim_stim_start) && ((time_ <= I_stim_stim_end) && (time_ - I_stim_stim_start - floor((time_ - I_stim_stim_start)/I_stim_stim_period)*I_stim_stim_period <= I_stim_stim_duration)), 0);
  I_Kir_EK := R*T/F*ln(Ko/Ki);
  I_Kir_OKir := 1/(I_Kir_aKir + exp(I_Kir_bKir*(Vm - I_Kir_EK)*F/(R*T)));
  I_Shkr_C0Shkr := ;
  I_Shkr_C1Shkr := ;
  I_Shkr_C2Shkr := ;
  I_Shkr_C3Shkr := ;
  I_Shkr_C4Shkr := ;
  I_Shkr_OShkr := ;
  I_Shkr_kv := I_Shkr_kv0*exp(Vm*I_Shkr_zv*F/(R*T));
  I_Shkr_k_v := I_Shkr_k_v0*exp(Vm*I_Shkr_z_v*F/(R*T));

  // Rate rules:
  membrane_VmReal' = -(I_Kir0 + I_Shkr0 + I_b0 - I_stim0)/membrane_Cm;
  I_Shkr_C0ShkrReal' = I_Shkr_k_v*I_Shkr_C1Shkr - 4*I_Shkr_kv*I_Shkr_C0Shkr;
  I_Shkr_C1ShkrReal' = 2*I_Shkr_k_v*I_Shkr_C2Shkr + 4*I_Shkr_kv*I_Shkr_C0Shkr - (3*I_Shkr_kv + I_Shkr_k_v)*I_Shkr_C1Shkr;
  I_Shkr_C2ShkrReal' = 3*I_Shkr_k_v*I_Shkr_C3Shkr + 3*I_Shkr_kv*I_Shkr_C1Shkr - (2*I_Shkr_kv + 2*I_Shkr_k_v)*I_Shkr_C2Shkr;
  I_Shkr_C3ShkrReal' = 4*I_Shkr_k_v*I_Shkr_C4Shkr + 2*I_Shkr_kv*I_Shkr_C2Shkr - (I_Shkr_kv + 3*I_Shkr_k_v)*I_Shkr_C3Shkr;
  I_Shkr_C4ShkrReal' = I_Shkr_k_o*I_Shkr_OShkr + I_Shkr_kv*I_Shkr_C3Shkr - (I_Shkr_ko + 4*I_Shkr_k_v)*I_Shkr_C4Shkr;
  I_Shkr_OShkrReal' = I_Shkr_ko*I_Shkr_C4Shkr - I_Shkr_k_o*I_Shkr_OShkr;
end
