// SBML level 2 version 4

model saftenku_2001____main()
  // Originally created by libAntimony v1.4 (using libSBML 4.1.0-b2)

  // Compartments:
  compartment default_compartment = 1;

  // Parameters:
  C10 = 0.125;
  C1C2 = 2.5;
  C2C1 = 13.3;
  C20 = 0.125;
  Ca = 20;
  C2C3 = 68;
  C3C2 = 8000;
  C2C5 = 0.13;
  C5C2 = 3.6;
  C30 = 0.125;
  C50 = 0.125;
  O1C3 = 3400;
  C3O1 = 1100;
  O2C3 = 92;
  C3O2 = 17;
  O3C3 = 138;
  C3O3 = 14;
  O10 = 0.125;
  O20 = 0.125;
  O30 = 0.125;
  C40 = 0.125;
  O2C4 = 1900;
  C4O2 = 520;
  O3C4 = 300;
  C4O3 = 46;
  time_ = ;

  // Rate rules:
  C10' = C2C1*C20 - C1C2*Ca*C20;
  C20' = C1C2*Ca*C10 + C3C2*C30 + C5C2*C50 - (C2C1*C20 + C2C3*Ca*C20 + C2C5*C20);
  C30' = C2C3*Ca*C20 + O1C3*O10 + O3C3*O30 + O2C3*O20 - (C3C2*C30 + C3O1*C30 + C3O2*C30 + C3O3*C30);
  C50' = C2C5*C20 - C5C2*C50;
  O10' = C3O1*C30 - O1C3*O10;
  O20' = C3O2*C30 + C4O2*C40 - (O2C3*O20 + O2C4*O20);
  O30' = C3O3*C30 + C4O3*C40 - (O3C3*O30 + O3C4*O30);
  C40' = O2C4*O20 + O3C4*O30 - (C4O2*C40 + C4O3*C40);
end
