// SBML level 2 version 4

model salem_model_2002____main()
  // Originally created by libAntimony v1.4 (using libSBML 4.1.0-b2)

  // Compartments:
  compartment default_compartment = 1;

  // Parameters:
  v1_Vmax = 5.9;
  v1_Km = 0.05;
  GL0 = 0.998;
  v2_Vmax = 67.6;
  v2_Km = 0.01;
  O20 = 0.963;
  v3_Vmax = 4.9;
  FA0 = 0.021;
  PS00 = 0.2;
  v4_Vmax = 21.3;
  v4_epsilon = 0.6;
  RS00 = 0.111;
  AF00 = 0.523;
  v5_Vmax = 2.82;
  v5_epsilon = 0.254;
  GP0 = 0.171;
  v6_Vmax = 3.14;
  v6_epsilon = 0.5;
  CS00 = 1;
  v7_Vmax = 0.0162;
  v7_epsilon = 0.5;
  GY0 = 33;
  v8_Vmax = 0.005;
  TG0 = 3.96;
  v9_Vmax = 1.8;
  PY0 = 0.2;
  v10_Vmax = 12.6;
  v10_epsilon = 0.98;
  v11_Vmax = 0.96;
  LA0 = 1.98;
  v12_Vmax = 695.7;
  v12_epsilon = 0.75;
  AC0 = 0.0046;
  v13_Vmax = 0.455;
  CR0 = 3.5;
  v14_Vmax = 0.455;
  PC0 = 8.8;
  v15_Vmax = 626.1;
  v15_epsilon = 0.669;
  CoA_pool0 = 0.043;
  FC1 = 0.0088;
  FC00 = 0.0088;
  v16_Vmax = 67;
  v16_epsilon = 0.775;
  v17_Vmax = 7.76;
  ATP0 = 4.5;
  GL_aGL = 4;
  GL_sigmaGL = 3.76;
  FA_aFA = 0.5;
  FA_sigmaFA = 13.2;
  LA_aLA = 1.8;
  LA_sigmaLA = 0.51;
  O2_aO2 = 6.53;
  O2_sigmaO2 = 1;
  CO20 = 20;
  CO2_aCO2 = 15.5;
  CO2_sigmaCO2 = 1;
  NAD0 = 1.81;
  ADP0 = 0.9;
  NADH0 = 0.19;
  time_ = ;

  // Assignment rules:
  v18 := v1_Vmax*(GL0/(v1_Km + GL0));
  v20 := v2_Vmax*(O20/(v2_Km + O20));
  v30 := v3_k3*FA0;
  v3_k3 := v3_Vmax*(PS1^(-1)/(PS00^(-1) + PS1^(-1)));
  PS1 := ADP0/ATP0;
  v40 := v4_k4*FA0;
  v4_k4 := v4_Vmax*(v4_epsilon*(AF1^(-1)/(AF00^(-1) + AF1^(-1))) + (1 - v4_epsilon)*(RS1^(-1)/(RS00^(-1) + RS1^(-1))));
  RS1 := NADH0/NAD0;
  AF1 := AC0/FC1;
  v50 := v5_k5*GP0;
  v5_k5 := v5_Vmax*(v5_epsilon*(PS1/(PS00 + PS1)) + (1 - v5_epsilon)*(RS1^(-1)/(RS00^(-1) + RS1^(-1))));
  v60 := v6_k6*GP0;
  v6_k6 := v6_Vmax*(v6_epsilon*(PS1^(-1)/(PS00^(-1) + PS1^(-1))) + (1 - v6_epsilon)*(CS1^(-1)/(CS00^(-1) + CS1^(-1)))^2);
  CS1 := CR0/PC0;
  v70 := v7_k7*GY0;
  v7_k7 := v7_Vmax*(v7_epsilon*(PS1/(PS00 + PS1)) + (1 - v7_epsilon)*(CS1/(CS00 + CS1))^2);
  v80 := v8_k8*TG0;
  v8_k8 := v8_Vmax;
  v90 := v9_k9*PY0;
  v9_k9 := v9_Vmax*(RS1/(RS00 + RS1));
  v100 := v10_k10*PY0;
  v10_k10 := v10_Vmax*(v10_epsilon*(RS1^(-1)/(RS00^(-1) + RS1^(-1))) + (1 - v10_epsilon)*(AF1^(-1)/(AF00^(-1) + AF1^(-1))));
  v110 := v11_k11*LA0;
  v11_k11 := v11_Vmax*(RS1^(-1)/(RS00^(-1) + RS1^(-1)));
  v120 := v12_k12*AC0;
  v12_k12 := v12_Vmax*(v12_epsilon*(RS1^(-1)/(RS00^(-1) + RS1^(-1))) + (1 - v12_epsilon)*(PS1/(PS00 + PS1)));
  v130 := v13_k13*CR0;
  v13_k13 := v13_Vmax*(PS1^(-1)/(PS00^(-1) + PS1^(-1)));
  v140 := v14_k14*PC0;
  v14_k14 := v14_Vmax*(PS1/(PS00 + PS1));
  v150 := v15_k15*CoA_pool0;
  v15_k15 := v15_Vmax*(v15_epsilon*(RS1^(-1)/(RS00^(-1) + RS1^(-1))) + (1 - v15_epsilon)*(FC1^(-1)/(FC00^(-1) + FC1^(-1))));
  v160 := v16_k16*AC0;
  v16_k16 := v16_Vmax*(v16_epsilon*(RS1^(-1)/(RS00^(-1) + RS1^(-1))) + (1 - v16_epsilon)*(FC1^(-1)/(FC00^(-1) + FC1^(-1))));
  v170 := v17_k17*ATP0;
  v17_k17 := v17_Vmax;
  F := ;

  // Rate rules:
  GL0' = F*(GL_aGL - GL_sigmaGL*GL0) - v18;
  O20' = F*(O2_aO2 - O2_sigmaO2*O20) - v20;
  FA0' = 3*v80 + F*(FA_aFA - FA_sigmaFA*FA0) - (v30 + v40);
  GP0' = v18 + v70 - (v50 + v60);
  GY0' = v60 - v70;
  TG0' = 1/3*v30 - v80;
  PY0' = 2*v50 + v110 - (v90 + v100);
  LA0' = v90 + F*(LA_aLA - LA_sigmaLA*LA0) - v110;
  AC0' = v100 + v40 - (v120 + v160);
  CR0' = v140 - v130;
  PC0' = v130 - v140;
  CoA_pool0' = v160 - v150;
  FC1' = v120 + v150 + v160 - (v100 + v40);
  CO20' = v100 + 2*v120 + F*(CO2_aCO2 - CO2_sigmaCO2*CO20);
  NAD0' = v90 + 2*v20 - (2*v50 + v100 + v110 + 11/3*v120 + 35/3*v40);
  ADP0' = v18 + v60 + 2*v40 + 2*v30 + v130 + v170 - (3*v50 + v120 + 6*v20 + v140);
end
