// SBML level 2 version 4

model sarai_model_2003____main()
  // Originally created by libAntimony v1.4 (using libSBML 4.1.0-b2)

  // Compartments:
  compartment default_compartment = 1;

  // Parameters:
  Vm = -42.98767;
  R = 8.3143;
  T = 310;
  F = 96.4867;
  Cm = 32;
  Nao = 139.9998;
  Cao = 1.799967;
  Ko = 5.399964;
  Nai = 4.680803;
  Ki = 139.221;
  Vi = 2513.25;
  internal_ion_concentrations_CMDN_max = 0.05;
  internal_ion_concentrations_K_mCMDN = 0.00238;
  internal_ion_concentrations_Ca_Total = 0.003834101;
  ATPi = 4.929308;
  ATP_production_ProducingRate_Max = 0.003;
  ATP_production_Adenosine_Total = 5;
  sodium_current_P_Na = 12;
  p_AP_Na = 5.989863e-5;
  y = 0.0269163;
  sodium_current_sodium_current_voltage_dependent_gate_p_RP_Na = 0.0002226234;
  sodium_current_sodium_current_voltage_dependent_gate_p_AI_Na = 0.9715915;
  sodium_current_sodium_current_voltage_dependent_gate_k_AI_AP = 8.75e-5;
  L_type_Ca_channel_P_CaL = 2112;
  p_AP_CaL = 0.01077321;
  p_U = 0.01841275;
  p_UCa = 0.0002087051;
  y0 = 0.8256168;
  L_type_Ca_channel_L_type_Ca_channel_voltage_dependent_gate_p_RP_CaL = 0.4283304;
  L_type_Ca_channel_L_type_Ca_channel_voltage_dependent_gate_p_AI_CaL = 0.5607107;
  L_type_Ca_channel_L_type_Ca_channel_voltage_dependent_gate_k_AP_AI = 0.004;
  L_type_Ca_channel_L_type_Ca_channel_voltage_dependent_gate_k_AI_AP = 0.001;
  L_type_Ca_channel_L_type_Ca_channel_Ca_dependent_gate_p_C = 0.05040311;
  L_type_Ca_channel_L_type_Ca_channel_Ca_dependent_gate_k_CCa_UCa = 0.0003;
  L_type_Ca_channel_L_type_Ca_channel_Ca_dependent_gate_k_UCa_CCa = 0.35;
  L_type_Ca_channel_L_type_Ca_channel_Ca_dependent_gate_k_C_U = 0.143;
  L_type_Ca_channel_L_type_Ca_channel_Ca_dependent_gate_k_U_C = 0.35;
  L_type_Ca_channel_L_type_Ca_channel_Ca_dependent_gate_k_U_UCa = 6.954;
  L_type_Ca_channel_L_type_Ca_channel_Ca_dependent_gate_k_CCa_C = 0.0042;
  L_type_Ca_channel_L_type_Ca_channel_Ca_dependent_gate_k_C_CCa = 6.954;
  T_type_Ca_channel_P_CaT = 612;
  y1 = 0.04679298;
  y2 = 0.004220637;
  y10 = 0.5375825;
  y20 = 0.3404905;
  y3 = 0.559686;
  st_channel_P_st_Na = 0.236;
  st_channel_P_st_K = 0.138;
  C1 = 0.9999617;
  C2 = 3.757613e-5;
  ha_channel_P_ha_Na = 1.821;
  ha_channel_P_ha_K = 7.7286;
  ha_channel_ha_channel_voltage_dependent_gate_O1 = 7.531036e-7;
  ha_channel_ha_channel_voltage_dependent_gate_O2 = 1.195712e-8;
  time_independent_potassium_current_P_K1_0 = 0.003125;
  y4 = 0.5443457;
  rapid_time_dependent_potassium_current_P_Kr = 0.1045;
  y11 = 0.7520937;
  y21 = 0.6128487;
  y30 = 0.6786243;
  y5 = 0.01824924;
  ACh_dependent_potassium_current_g_ACh = 4.32;
  ACh_dependent_potassium_current_ACh_dependent_potassium_current_y_gate_ACh = 0;
  ACh_dependent_potassium_current_ACh_dependent_potassium_current_y_gate_Km_ACh = 0.0042;
  background_NSC_current_P_bNSC = 0.152;
  background_lCa_current_P_lCa = 0.44;
  background_KATP_current_P_KATP = 0.0236;
  background_KATP_current_N = 1000;
  background_Cab_current_P_Cab = 0.008;
  k3 = 1;
  k4 = 1;
  sodium_calcium_exchanger_Km_Nai = 8.75;
  sodium_calcium_exchanger_Km_Nao = 87.5;
  sodium_calcium_exchanger_Km_Cai = 0.00138;
  sodium_calcium_exchanger_Km_Cao = 1.38;
  y6 = 0.9218643;
  sodium_calcium_exchanger_P_NaCa = 6.81;
  sodium_calcium_exchanger_Partition = 0.32;
  k20 = 0.04;
  k30 = 0.01;
  k40 = 0.165;
  sodium_potassium_pump_Km_Nai = 4.05;
  sodium_potassium_pump_Km_Nao = 69.8;
  sodium_potassium_pump_Km_Ki = 32.88;
  sodium_potassium_pump_Km_Ko = 0.258;
  sodium_potassium_pump_Km_ATP = 0.094;
  y7 = 0.6755031;
  sodium_potassium_pump_P_NaK = 21;
  k11 = 0.01;
  k31 = 1;
  k41 = 0.01;
  SR_calcium_pump_Km_CaSR = 0.08;
  SR_calcium_pump_Km_CaCyto = 0.0008;
  SR_calcium_pump_Km_ATP = 0.1;
  SR_calcium_pump_i_max = 4875;
  Caup = 3.539652;
  y8 = 0.8709733;
  RyR_channel_P_RyR = 1860;
  RyR_channel_k4 = 0.000849;
  RyR_channel_p_open_RyR = 0.01142417;
  RyR_channel_p_close_RyR = 0.00735404;
  RyR_channel_Diadid_Factor = -3;
  SR_T_current_P_SR_T = 11.58;
  SR_L_current_P_SR_L = 13.77;
  Ca_concentrations_in_SR_Ca_Total = 5.185011;
  Ca_concentrations_in_SR_V_rel = 1.50795;
  Ca_concentrations_in_SR_V_up = 3.769875;
  Ca_concentrations_in_SR_CSQN_max = 10;
  Ca_concentrations_in_SR_K_mCSQN = 0.8;
  NL_model_pCa = 0.2429805;
  NL_model_pCaCB = 0.02896444;
  NL_model_pCB = 0.002027535;
  NL_model_T_t = 0.007;
  NL_model_Y_1 = 39;
  NL_model_Y_2 = 0.0039;
  NL_model_Y_3 = 0.03;
  NL_model_Y_4 = 0.12;
  NL_model_Y_d = 0.027;
  NL_model_Z_1 = 0.03;
  NL_model_Z_2 = 0.0039;
  NL_model_Z_3 = 1560;
  NL_model_L_a = 1.17;
  NL_model_L = 0.96024;
  NL_model_X = 0.955245;
  NL_model_KForceEC = 140000;
  NL_model_ZeroForceEL = 0.97;
  NL_model_KForceLinearEc = 200;
  NL_model_ForceFactor = 1800000;
  NL_model_B = 1.2;
  NL_model_h_c = 0.005;
  time_ = ;
  NL_model_d = ;

  // Assignment rules:
  membrane_i_tot := i_Na + i_Ca_L + i_Ca_T + i_K1 + i_Kr + membrane_i_I + i_NaK + i_NaCa + i_st + i_ha + i_KACh;
  membrane_i_I := i_bNSC + i_Cab + i_Kpl + i_lCa + i_KATP;
  i_Na := i_Na_Na + i_Na_K;
  i_Ca_L := i_CaL_Na + i_CaL_Ca + i_CaL_K;
  i_Ca_T := T_type_Ca_channel_P_CaT*CF_Ca*y1*y2;
  i_K1 := time_independent_potassium_current_g_K1*(Vm - E_K)*(time_independent_potassium_current_fO4 + time_independent_potassium_current_fO3 + time_independent_potassium_current_fO2)*y4;
  i_Kr := rapid_time_dependent_potassium_current_g_Kr*(Vm - E_K)*(0.6*y11 + 0.4*y21)*y30;
  i_st := i_st_Na + i_st_K;
  i_ha := i_ha_Na + i_ha_K;
  i_KACh := ACh_dependent_potassium_current_g_ACh*(Vm - E_K)/(1 + exp((Vm + 20)/20))*y5;
  i_NaK := sodium_potassium_pump_P_NaK*Cm*1*(k10*p_E1Na0*y7 - k20*p_E2Na0*(1 - y7));
  i_NaCa := sodium_calcium_exchanger_P_NaCa*Cm*1*(k1*p_E1Na*y6 - k2*p_E2Na*(1 - y6));
  i_bNSC := i_bNSC_K + i_bNSC_Na;
  i_Cab := background_Cab_current_P_Cab*CF_Ca;
  i_Kpl := ;
  i_lCa := i_lCa_K + i_lCa_Na;
  i_KATP := background_KATP_current_gamma*(Vm - E_K)*background_KATP_current_p_open;
  Cai := (sqrt(internal_ion_concentrations_b1^2 + 4*internal_ion_concentrations_c1) - internal_ion_concentrations_b1)/2;
  internal_ion_concentrations_i_net_Na := i_Na_Na + i_CaL_Na + i_st_Na + i_ha_Na + i_bNSC_Na + i_lCa_Na + 3*i_NaK + 3*i_NaCa;
  internal_ion_concentrations_i_net_K := i_K1 + i_Kr + i_KATP + i_KACh + i_Na_K + i_CaL_K + i_st_K + i_ha_K + i_bNSC_K + i_lCa_K + i_Kpl - 2*i_NaK;
  internal_ion_concentrations_i_net_Ca := i_CaL_Ca + i_Ca_T + i_Cab - 2*i_NaCa;
  i_Na_Na := sodium_current_P_Na*CF_Na*p_AP_Na*y;
  i_CaL_Na := 1.85e-5*L_type_Ca_channel_P_CaL*CF_Na*p_open_CaL;
  i_st_Na := st_channel_P_st_Na*CF_Na*y10*y20*y3;
  i_ha_Na := ha_channel_P_ha_Na*CF_Na*(1 - C1 - C2);
  i_bNSC_Na := background_NSC_current_P_bNSC*CF_Na;
  i_lCa_Na := background_lCa_current_P_lCa*CF_Na*background_lCa_current_p_open;
  i_Na_K := 0.1*sodium_current_P_Na*CF_K*p_AP_Na*y;
  i_CaL_K := 0.000365*L_type_Ca_channel_P_CaL*CF_K*p_open_CaL;
  i_st_K := st_channel_P_st_K*CF_K*y10*y20*y3;
  i_ha_K := ha_channel_P_ha_K*CF_K*(1 - C1 - C2);
  i_bNSC_K := 0.4*background_NSC_current_P_bNSC*CF_K;
  i_lCa_K := background_lCa_current_P_lCa*CF_K*background_lCa_current_p_open;
  i_CaL_Ca := L_type_Ca_channel_P_CaL*CF_Ca*p_open_CaL;
  i_RyR := RyR_channel_P_RyR*(Carel - Cai)*RyR_channel_p_open_RyR;
  i_SR_U := SR_calcium_pump_i_max*1*(k11*p_E1Ca0*y8 - k21*p_E2Ca0*(1 - y8));
  i_SR_L := SR_L_current_P_SR_L*(Caup - Cai);
  dCaidt := NL_model_T_t*(NL_model_Q_d2 + NL_model_Q_r - NL_model_Q_b);
  internal_ion_concentrations_b1 := internal_ion_concentrations_CMDN_max - internal_ion_concentrations_Ca_Total + internal_ion_concentrations_K_mCMDN;
  internal_ion_concentrations_c1 := internal_ion_concentrations_K_mCMDN*internal_ion_concentrations_Ca_Total;
  CF_Na := ;
  CF_Ca := ;
  CF_K := ;
  dATPdt := -0.4*NL_model_pCaCB*NL_model_T_t;
  sodium_current_sodium_current_voltage_dependent_gate_p_RI_Na := 1 - sodium_current_sodium_current_voltage_dependent_gate_p_RP_Na - p_AP_Na - sodium_current_sodium_current_voltage_dependent_gate_p_AI_Na;
  sodium_current_sodium_current_voltage_dependent_gate_k_RP_AP := 1/(0.1027*exp(-Vm/8) + 0.25*exp(-Vm/50));
  sodium_current_sodium_current_voltage_dependent_gate_k_AP_RP := 1/(26*exp(Vm/17) + 0.02*exp(Vm/800));
  sodium_current_sodium_current_voltage_dependent_gate_k_RI_AI := 1/(0.0001027*exp(-Vm/8) + 5*exp(-Vm/400));
  sodium_current_sodium_current_voltage_dependent_gate_k_AI_RI := 1/(1300*exp(Vm/20) + 0.04*exp(Vm/800));
  sodium_current_sodium_current_voltage_dependent_gate_k_AP_AI := 1/(0.8*exp(-Vm/400));
  sodium_current_sodium_current_voltage_dependent_gate_k_RP_RI := 0.01/(1 + sodium_current_sodium_current_voltage_dependent_gate_k_AI_AP*sodium_current_sodium_current_voltage_dependent_gate_k_AP_RP*sodium_current_sodium_current_voltage_dependent_gate_k_RI_AI/(sodium_current_sodium_current_voltage_dependent_gate_k_AP_AI*sodium_current_sodium_current_voltage_dependent_gate_k_RP_AP*sodium_current_sodium_current_voltage_dependent_gate_k_AI_RI));
  sodium_current_sodium_current_voltage_dependent_gate_k_RI_RP := 0.01 - sodium_current_sodium_current_voltage_dependent_gate_k_RP_RI;
  sodium_current_sodium_current_ultra_slow_gate_alpha_y := 1/(2147483647*exp(Vm/5) + 8000*exp(Vm/100));
  sodium_current_sodium_current_ultra_slow_gate_beta_y := 1/(0.014*exp(-Vm/5) + 4000*exp(-Vm/100));
  p_open_CaL := p_AP_CaL*(p_U + p_UCa)*y0/(1 + (1.4/ATPi)^3);
  CaDiadic := L_type_Ca_channel_L_type_Ca_channel_Ca_dependent_gate_iCaL*p_open_CaL;
  L_type_Ca_channel_L_type_Ca_channel_voltage_dependent_gate_p_RI_CaL := 1 - p_AP_CaL - L_type_Ca_channel_L_type_Ca_channel_voltage_dependent_gate_p_RP_CaL - L_type_Ca_channel_L_type_Ca_channel_voltage_dependent_gate_p_AI_CaL;
  L_type_Ca_channel_L_type_Ca_channel_voltage_dependent_gate_k_RP_AP := 1/(0.27*exp(-Vm/5.9) + 1.5*exp(-Vm/65));
  L_type_Ca_channel_L_type_Ca_channel_voltage_dependent_gate_k_AP_RP := 1/(480*exp(Vm/7) + 2.2*exp(Vm/65));
  L_type_Ca_channel_L_type_Ca_channel_voltage_dependent_gate_k_RI_AI := 1/(0.0018*exp(-Vm/7.4) + 2*exp(-Vm/100));
  L_type_Ca_channel_L_type_Ca_channel_voltage_dependent_gate_k_AI_RI := 1/(2200000*exp(Vm/7.4) + 11*exp(Vm/100));
  L_type_Ca_channel_L_type_Ca_channel_voltage_dependent_gate_k_RP_RI := 0.04/(1 + L_type_Ca_channel_L_type_Ca_channel_voltage_dependent_gate_k_AI_AP*L_type_Ca_channel_L_type_Ca_channel_voltage_dependent_gate_k_AP_RP*L_type_Ca_channel_L_type_Ca_channel_voltage_dependent_gate_k_RI_AI/(L_type_Ca_channel_L_type_Ca_channel_voltage_dependent_gate_k_AP_AI*L_type_Ca_channel_L_type_Ca_channel_voltage_dependent_gate_k_RP_AP*L_type_Ca_channel_L_type_Ca_channel_voltage_dependent_gate_k_AI_RI));
  L_type_Ca_channel_L_type_Ca_channel_voltage_dependent_gate_k_RI_RP := 0.04 - L_type_Ca_channel_L_type_Ca_channel_voltage_dependent_gate_k_RP_RI;
  L_type_Ca_channel_L_type_Ca_channel_Ca_dependent_gate_iCaL := 0.0676*CF_Ca;
  L_type_Ca_channel_L_type_Ca_channel_Ca_dependent_gate_Cacm := Cai - 0.3*L_type_Ca_channel_L_type_Ca_channel_Ca_dependent_gate_iCaL;
  L_type_Ca_channel_L_type_Ca_channel_Ca_dependent_gate_p_CCa := 1 - L_type_Ca_channel_L_type_Ca_channel_Ca_dependent_gate_p_C - p_U - p_UCa;
  L_type_Ca_channel_L_type_Ca_channel_Ca_dependent_gate_k_UCa_U := L_type_Ca_channel_L_type_Ca_channel_Ca_dependent_gate_k_CCa_C*L_type_Ca_channel_L_type_Ca_channel_Ca_dependent_gate_k_C_U*L_type_Ca_channel_L_type_Ca_channel_Ca_dependent_gate_k_U_UCa*L_type_Ca_channel_L_type_Ca_channel_Ca_dependent_gate_k_UCa_CCa/(L_type_Ca_channel_L_type_Ca_channel_Ca_dependent_gate_k_U_C*L_type_Ca_channel_L_type_Ca_channel_Ca_dependent_gate_k_C_CCa*L_type_Ca_channel_L_type_Ca_channel_Ca_dependent_gate_k_CCa_UCa);
  L_type_Ca_channel_L_type_Ca_channel_Ca_dependent_gate_CaEffC := L_type_Ca_channel_L_type_Ca_channel_Ca_dependent_gate_Cacm*p_AP_CaL;
  L_type_Ca_channel_L_type_Ca_channel_Ca_dependent_gate_CaEffU := L_type_Ca_channel_L_type_Ca_channel_Ca_dependent_gate_CaEffC + Cai*(1 - p_AP_CaL);
  L_type_Ca_channel_L_type_Ca_channel_Ca_dependent_gate_k_UUCa_Ca := L_type_Ca_channel_L_type_Ca_channel_Ca_dependent_gate_k_U_UCa*L_type_Ca_channel_L_type_Ca_channel_Ca_dependent_gate_CaEffU;
  L_type_Ca_channel_L_type_Ca_channel_Ca_dependent_gate_k_CCCa_Ca := L_type_Ca_channel_L_type_Ca_channel_Ca_dependent_gate_k_C_CCa*L_type_Ca_channel_L_type_Ca_channel_Ca_dependent_gate_CaEffC;
  L_type_Ca_channel_L_type_Ca_channel_ultra_slow_gate_alpha_y := 1/(250000*exp(Vm/9) + 58*exp(Vm/65));
  L_type_Ca_channel_L_type_Ca_channel_ultra_slow_gate_beta_y := 1/(1800*exp(-Vm/14) + 66*exp(-Vm/65));
  T_type_Ca_channel_T_type_Ca_channel_y1_gate_alpha_y1 := 1/(0.019*exp(-Vm/5.6) + 0.82*exp(-Vm/250));
  T_type_Ca_channel_T_type_Ca_channel_y1_gate_beta_y1 := 1/(40*exp(Vm/6.3) + 1.5*exp(Vm/10000));
  T_type_Ca_channel_T_type_Ca_channel_y2_gate_alpha_y2 := 1/(62000*exp(Vm/10.1) + 30*exp(Vm/3000));
  T_type_Ca_channel_T_type_Ca_channel_y2_gate_beta_y2 := 1/(0.0006*exp(-Vm/6.7) + 1.2*exp(-Vm/25));
  st_channel_st_channel_y1_gate_alpha_y1 := 1/(0.15*exp(-Vm/11) + 0.2*exp(-Vm/700));
  st_channel_st_channel_y1_gate_beta_y1 := 1/(16*exp(Vm/8) + 15*exp(Vm/50));
  st_channel_st_channel_y2_gate_alpha_y2 := 1/(3100*exp(Vm/13) + 700*exp(Vm/70));
  st_channel_st_channel_y2_gate_beta_y2 := 1/(95*exp(-Vm/10) + 50*exp(-Vm/700)) + Cai*2.5/(1 + exp(-Vm/5));
  st_channel_st_channel_y3_gate_alpha_y3 := 1/(400000*exp(Vm/9) + 60*exp(Vm/65));
  st_channel_st_channel_y3_gate_beta_y3 := 1/(700*exp(-Vm/14) + 60*exp(-Vm/65));
  ha_channel_ha_channel_voltage_dependent_gate_O3 := 1 - C1 - C2 - ha_channel_ha_channel_voltage_dependent_gate_O1 - ha_channel_ha_channel_voltage_dependent_gate_O2;
  ha_channel_ha_channel_voltage_dependent_gate_alpha := 1/(3500*exp(Vm/16.8) + 0.3*exp(Vm/400));
  ha_channel_ha_channel_voltage_dependent_gate_beta := 1/(4*exp(-Vm/14) + 2*exp(-Vm/400));
  ha_channel_ha_channel_voltage_dependent_gate_mu := 1/(45000000*exp(Vm/8) + 500*exp(Vm/200));
  ha_channel_ha_channel_voltage_dependent_gate_lambda_ := 1/(10.5*exp(-Vm/16.4) + 0.4*exp(-Vm/400));
  E_K := R*T/F*ln(Ko/Ki);
  time_independent_potassium_current_g_K1 := time_independent_potassium_current_P_K1_0*Cm*(Ko/5.4)^0.4;
  fO := time_independent_potassium_current_lambda_/(time_independent_potassium_current_mu + time_independent_potassium_current_lambda_);
  time_independent_potassium_current_fO2 := 2*fO^2*time_independent_potassium_current_fB^2;
  time_independent_potassium_current_fO3 := 8/3*fO^3*time_independent_potassium_current_fB;
  time_independent_potassium_current_fO4 := fO^4;
  time_independent_potassium_current_fB := time_independent_potassium_current_mu/(time_independent_potassium_current_mu + time_independent_potassium_current_lambda_);
  time_independent_potassium_current_mu := 0.75*exp(0.035*(Vm - E_K - 10))/(1 + exp(0.015*(Vm - E_K - 140)));
  time_independent_potassium_current_lambda_ := 3*exp(-0.048*(Vm - E_K - 10))*(1 + exp(0.064*(Vm - E_K - 38)))/(1 + exp(0.03*(Vm - E_K - 70)));
  time_independent_potassium_current_time_independent_potassium_current_y_gate_alpha_y := 1/(8000*exp((Vm - E_K - 97)/8.5) + 7*exp((Vm - E_K - 97)/300));
  time_independent_potassium_current_time_independent_potassium_current_y_gate_beta_y := fO^4*1/(0.00014*exp(-(Vm - E_K - 97)/9.1) + 0.2*exp(-(Vm - E_K - 97)/500));
  rapid_time_dependent_potassium_current_g_Kr := rapid_time_dependent_potassium_current_P_Kr*Cm*(Ko/5.4)^0.2;
  rapid_time_dependent_potassium_current_rapid_time_dependent_potassium_current_y1_gate_alpha_y1 := 1/(20*exp(-Vm/11.5) + 5*exp(-Vm/300));
  rapid_time_dependent_potassium_current_rapid_time_dependent_potassium_current_y1_gate_beta_y1 := 1/(160*exp(Vm/28) + 200*exp(Vm/1000)) + 1/(2500*exp(Vm/20));
  rapid_time_dependent_potassium_current_rapid_time_dependent_potassium_current_y2_gate_alpha_y2 := 1/(200*exp(-Vm/13) + 20*exp(-Vm/300));
  rapid_time_dependent_potassium_current_rapid_time_dependent_potassium_current_y2_gate_beta_y2 := 1/(1600*exp(Vm/28) + 2000*exp(Vm/1000)) + 1/(10000*exp(Vm/20));
  rapid_time_dependent_potassium_current_rapid_time_dependent_potassium_current_y3_gate_alpha_y3 := 1/(10*exp(Vm/17) + 2.5*exp(Vm/300));
  rapid_time_dependent_potassium_current_rapid_time_dependent_potassium_current_y3_gate_beta_y3 := 1/(0.35*exp(-Vm/17) + 2*exp(-Vm/150));
  ACh_dependent_potassium_current_ACh_dependent_potassium_current_y_gate_alpha_y := ;
  ACh_dependent_potassium_current_ACh_dependent_potassium_current_y_gate_beta_y := 0.01*exp(0.0133*(Vm + 40));
  background_Kpl_current_P_Kpl := 0.007*(Ko/5.4)^0.16;
  background_lCa_current_p_open := 1/(1 + (0.0012/Cai)^3);
  background_KATP_current_p_open := 0.8/(1 + (ATPi/0.1)^2);
  background_KATP_current_gamma := background_KATP_current_P_KATP*background_KATP_current_N*(Ko/1)^0.24;
  p_E2Na := 1/(1 + (sodium_calcium_exchanger_Km_Nao/Nao)^3*(1 + Cao/sodium_calcium_exchanger_Km_Cao));
  p_E1Na := 1/(1 + (sodium_calcium_exchanger_Km_Nai/Nai)^3*(1 + Cai/sodium_calcium_exchanger_Km_Cai));
  p_E1Ca := 1/(1 + sodium_calcium_exchanger_Km_Cai/Cai*(1 + (Nai/sodium_calcium_exchanger_Km_Nai)^3));
  p_E2Ca := 1/(1 + sodium_calcium_exchanger_Km_Cao/Cao*(1 + (Nao/sodium_calcium_exchanger_Km_Nao)^3));
  k1 := 1*exp(sodium_calcium_exchanger_Partition*F*Vm/(R*T));
  k2 := 1*exp((sodium_calcium_exchanger_Partition - 1)*F*Vm/(R*T));
  sodium_calcium_exchanger_sodium_calcium_exchanger_y_gate_alpha_y := k2*p_E2Na + k4*p_E2Ca;
  sodium_calcium_exchanger_sodium_calcium_exchanger_y_gate_beta_y := k1*p_E1Na + k3*p_E1Ca;
  p_E2Na0 := 1/(1 + (sodium_potassium_pump_Km_Nao/sodium_potassium_pump_Nao_Eff)^1.06*(1 + (Ko/sodium_potassium_pump_Km_Ko)^1.12));
  p_E1Na0 := 1/(1 + (sodium_potassium_pump_Km_Nai/Nai)^1.06*(1 + (Ki/sodium_potassium_pump_Km_Ki)^1.12));
  p_E1K := 1/(1 + (sodium_potassium_pump_Km_Ki/Ki)^1.12*(1 + (Nai/sodium_potassium_pump_Km_Nai)^1.06));
  p_E2K := 1/(1 + (sodium_potassium_pump_Km_Ko/Ko)^1.12*(1 + (sodium_potassium_pump_Nao_Eff/sodium_potassium_pump_Km_Nao)^1.06));
  k10 := 0.37/(1 + sodium_potassium_pump_Km_ATP/ATPi);
  sodium_potassium_pump_Nao_Eff := Nao*exp(-0.82*F*Vm/(R*T));
  sodium_potassium_pump_sodium_potassium_pump_y_gate_alpha_y := k20*p_E2Na0 + k40*p_E2K;
  sodium_potassium_pump_sodium_potassium_pump_y_gate_beta_y := k10*p_E1Na0 + k30*p_E1K;
  p_E2Ca0 := 1/(1 + SR_calcium_pump_Km_CaCyto/Cai);
  p_E1Ca0 := 1/(1 + SR_calcium_pump_Km_CaSR/Caup);
  p_E1 := 1 - p_E1Ca0;
  p_E2 := 1 - p_E2Ca0;
  k21 := 1/(1 + SR_calcium_pump_Km_ATP/ATPi);
  SR_calcium_pump_SR_calcium_pump_y_gate_alpha_y := k21*p_E2Ca0 + k41*p_E2;
  SR_calcium_pump_SR_calcium_pump_y_gate_beta_y := k11*p_E1Ca0 + k31*p_E1;
  RyR_channel_k1 := 280000*(Cai/1)^2 + RyR_channel_Diadid_Factor*CaDiadic;
  RyR_channel_k2 := 0.08/(1 + 0.36/Carel);
  RyR_channel_k3 := 0.000377*(Carel/1)^2;
  Carel := (sqrt(Ca_concentrations_in_SR_b1^2 + 4*Ca_concentrations_in_SR_c1) - Ca_concentrations_in_SR_b1)/2;
  i_SR_T := SR_T_current_P_SR_T*(Caup - Carel);
  Ca_concentrations_in_SR_b1 := Ca_concentrations_in_SR_CSQN_max - Ca_concentrations_in_SR_Ca_Total + Ca_concentrations_in_SR_K_mCSQN;
  Ca_concentrations_in_SR_c1 := Ca_concentrations_in_SR_K_mCSQN*Ca_concentrations_in_SR_Ca_Total;
  NL_model_EffFraction := exp(-20*(NL_model_L - NL_model_L_a)^2);
  NL_model_p := 1 - NL_model_pCa - NL_model_pCaCB - NL_model_pCB;
  NL_model_Q_a := NL_model_Y_2*NL_model_pCa*NL_model_EffFraction - NL_model_Z_2*NL_model_pCaCB;
  NL_model_Q_b := NL_model_Y_1*Cai*NL_model_p - NL_model_Z_1*NL_model_pCa;
  NL_model_Q_r := NL_model_Y_3*NL_model_pCaCB - NL_model_Z_3*NL_model_pCB*Cai;
  NL_model_Q_d := NL_model_Y_4*NL_model_pCB;
  NL_model_Q_d1 := NL_model_Y_d*(NL_model_d(NL_model_X)/NL_model_d(time_))^2*NL_model_pCB;
  NL_model_Q_d2 := NL_model_Y_d*(NL_model_d(NL_model_X)/NL_model_d(time_))^2*NL_model_pCaCB;
  NL_model_h := NL_model_L - NL_model_X;
  NL_model_ForceCB := NL_model_NewCBF*NL_model_h;
  NL_model_NewCBF := NL_model_ForceFactor*NL_model_CBBound;
  NL_model_CBBound := NL_model_T_t*(NL_model_pCaCB + NL_model_pCB);
  NL_model_ForceEcomp := NL_model_KForceEC*(NL_model_ZeroForceEL - NL_model_L)^5 + NL_model_KForceLinearEc*(NL_model_ZeroForceEL - NL_model_L);
  NL_model_ForceExt := -NL_model_ForceEcomp + NL_model_ForceCB;

  // Rate rules:
  Vm' = -membrane_i_tot/Cm;
  Nai' = -internal_ion_concentrations_i_net_Na/(F*Vi);
  Ki' = -internal_ion_concentrations_i_net_K/(F*Vi);
  internal_ion_concentrations_Ca_Total' = -(internal_ion_concentrations_i_net_Ca - i_SR_U - i_RyR - i_SR_L)/(2*F*Vi) + dCaidt;
  ATPi' = ATP_production_ProducingRate_Max*(ATP_production_Adenosine_Total - ATPi) + dATPdt - i_NaK/(F*Vi) + i_SR_U/(4*F*Vi);
  p_AP_Na' = sodium_current_sodium_current_voltage_dependent_gate_p_RP_Na*sodium_current_sodium_current_voltage_dependent_gate_k_RP_AP + sodium_current_sodium_current_voltage_dependent_gate_p_AI_Na*sodium_current_sodium_current_voltage_dependent_gate_k_AI_AP - p_AP_Na*(sodium_current_sodium_current_voltage_dependent_gate_k_AP_RP + sodium_current_sodium_current_voltage_dependent_gate_k_AP_AI);
  y' = sodium_current_sodium_current_ultra_slow_gate_alpha_y*(1 - y) - sodium_current_sodium_current_ultra_slow_gate_beta_y*y;
  sodium_current_sodium_current_voltage_dependent_gate_p_RP_Na' = p_AP_Na*sodium_current_sodium_current_voltage_dependent_gate_k_AP_RP + sodium_current_sodium_current_voltage_dependent_gate_p_RI_Na*sodium_current_sodium_current_voltage_dependent_gate_k_RI_RP - sodium_current_sodium_current_voltage_dependent_gate_p_RP_Na*(sodium_current_sodium_current_voltage_dependent_gate_k_RP_RI + sodium_current_sodium_current_voltage_dependent_gate_k_RP_AP);
  sodium_current_sodium_current_voltage_dependent_gate_p_AI_Na' = sodium_current_sodium_current_voltage_dependent_gate_p_RI_Na*sodium_current_sodium_current_voltage_dependent_gate_k_RI_AI + p_AP_Na*sodium_current_sodium_current_voltage_dependent_gate_k_AP_AI - sodium_current_sodium_current_voltage_dependent_gate_p_AI_Na*(sodium_current_sodium_current_voltage_dependent_gate_k_AI_RI + sodium_current_sodium_current_voltage_dependent_gate_k_AI_AP);
  p_AP_CaL' = L_type_Ca_channel_L_type_Ca_channel_voltage_dependent_gate_p_RP_CaL*L_type_Ca_channel_L_type_Ca_channel_voltage_dependent_gate_k_RP_AP + L_type_Ca_channel_L_type_Ca_channel_voltage_dependent_gate_p_AI_CaL*L_type_Ca_channel_L_type_Ca_channel_voltage_dependent_gate_k_AI_AP - p_AP_CaL*(L_type_Ca_channel_L_type_Ca_channel_voltage_dependent_gate_k_AP_RP + L_type_Ca_channel_L_type_Ca_channel_voltage_dependent_gate_k_AP_AI);
  p_U' = L_type_Ca_channel_L_type_Ca_channel_Ca_dependent_gate_p_C*L_type_Ca_channel_L_type_Ca_channel_Ca_dependent_gate_k_C_U + p_UCa*L_type_Ca_channel_L_type_Ca_channel_Ca_dependent_gate_k_UCa_U - p_U*(L_type_Ca_channel_L_type_Ca_channel_Ca_dependent_gate_k_UUCa_Ca + L_type_Ca_channel_L_type_Ca_channel_Ca_dependent_gate_k_U_C);
  p_UCa' = p_U*L_type_Ca_channel_L_type_Ca_channel_Ca_dependent_gate_k_UUCa_Ca + L_type_Ca_channel_L_type_Ca_channel_Ca_dependent_gate_p_CCa*L_type_Ca_channel_L_type_Ca_channel_Ca_dependent_gate_k_CCa_UCa - p_UCa*(L_type_Ca_channel_L_type_Ca_channel_Ca_dependent_gate_k_UCa_CCa + L_type_Ca_channel_L_type_Ca_channel_Ca_dependent_gate_k_UCa_U);
  y0' = L_type_Ca_channel_L_type_Ca_channel_ultra_slow_gate_alpha_y*(1 - y0) - L_type_Ca_channel_L_type_Ca_channel_ultra_slow_gate_beta_y*y0;
  L_type_Ca_channel_L_type_Ca_channel_voltage_dependent_gate_p_RP_CaL' = p_AP_CaL*L_type_Ca_channel_L_type_Ca_channel_voltage_dependent_gate_k_AP_RP + L_type_Ca_channel_L_type_Ca_channel_voltage_dependent_gate_p_RI_CaL*L_type_Ca_channel_L_type_Ca_channel_voltage_dependent_gate_k_RI_RP - L_type_Ca_channel_L_type_Ca_channel_voltage_dependent_gate_p_RP_CaL*(L_type_Ca_channel_L_type_Ca_channel_voltage_dependent_gate_k_RP_RI + L_type_Ca_channel_L_type_Ca_channel_voltage_dependent_gate_k_RP_AP);
  L_type_Ca_channel_L_type_Ca_channel_voltage_dependent_gate_p_AI_CaL' = L_type_Ca_channel_L_type_Ca_channel_voltage_dependent_gate_p_RI_CaL*L_type_Ca_channel_L_type_Ca_channel_voltage_dependent_gate_k_RI_AI + p_AP_CaL*L_type_Ca_channel_L_type_Ca_channel_voltage_dependent_gate_k_AP_AI - L_type_Ca_channel_L_type_Ca_channel_voltage_dependent_gate_p_AI_CaL*(L_type_Ca_channel_L_type_Ca_channel_voltage_dependent_gate_k_AI_RI + L_type_Ca_channel_L_type_Ca_channel_voltage_dependent_gate_k_AI_AP);
  L_type_Ca_channel_L_type_Ca_channel_Ca_dependent_gate_p_C' = L_type_Ca_channel_L_type_Ca_channel_Ca_dependent_gate_p_CCa*L_type_Ca_channel_L_type_Ca_channel_Ca_dependent_gate_k_CCa_C + p_U*L_type_Ca_channel_L_type_Ca_channel_Ca_dependent_gate_k_U_C - L_type_Ca_channel_L_type_Ca_channel_Ca_dependent_gate_p_C*(L_type_Ca_channel_L_type_Ca_channel_Ca_dependent_gate_k_C_U + L_type_Ca_channel_L_type_Ca_channel_Ca_dependent_gate_k_C_CCa*L_type_Ca_channel_L_type_Ca_channel_Ca_dependent_gate_Cacm*p_AP_CaL);
  y1' = T_type_Ca_channel_T_type_Ca_channel_y1_gate_alpha_y1*(1 - y1) - T_type_Ca_channel_T_type_Ca_channel_y1_gate_beta_y1*y1;
  y2' = T_type_Ca_channel_T_type_Ca_channel_y2_gate_alpha_y2*(1 - y2) - T_type_Ca_channel_T_type_Ca_channel_y2_gate_beta_y2*y2;
  y10' = st_channel_st_channel_y1_gate_alpha_y1*(1 - y10) - st_channel_st_channel_y1_gate_beta_y1*y10;
  y20' = st_channel_st_channel_y2_gate_alpha_y2*(1 - y20) - st_channel_st_channel_y2_gate_beta_y2*y20;
  y3' = st_channel_st_channel_y3_gate_alpha_y3*(1 - y3) - st_channel_st_channel_y3_gate_beta_y3*y3;
  C1' = ha_channel_ha_channel_voltage_dependent_gate_lambda_*C2 - ha_channel_ha_channel_voltage_dependent_gate_mu*C1;
  C2' = ha_channel_ha_channel_voltage_dependent_gate_mu*C1 + ha_channel_ha_channel_voltage_dependent_gate_beta*ha_channel_ha_channel_voltage_dependent_gate_O1 - (ha_channel_ha_channel_voltage_dependent_gate_alpha + ha_channel_ha_channel_voltage_dependent_gate_lambda_)*C2;
  ha_channel_ha_channel_voltage_dependent_gate_O1' = ha_channel_ha_channel_voltage_dependent_gate_alpha*C2 + ha_channel_ha_channel_voltage_dependent_gate_beta*ha_channel_ha_channel_voltage_dependent_gate_O2 - (ha_channel_ha_channel_voltage_dependent_gate_alpha + ha_channel_ha_channel_voltage_dependent_gate_beta)*ha_channel_ha_channel_voltage_dependent_gate_O1;
  ha_channel_ha_channel_voltage_dependent_gate_O2' = ha_channel_ha_channel_voltage_dependent_gate_alpha*ha_channel_ha_channel_voltage_dependent_gate_O1 + ha_channel_ha_channel_voltage_dependent_gate_beta*ha_channel_ha_channel_voltage_dependent_gate_O3 - (ha_channel_ha_channel_voltage_dependent_gate_alpha + ha_channel_ha_channel_voltage_dependent_gate_beta)*ha_channel_ha_channel_voltage_dependent_gate_O2;
  y4' = time_independent_potassium_current_time_independent_potassium_current_y_gate_alpha_y*(1 - y4) - time_independent_potassium_current_time_independent_potassium_current_y_gate_beta_y*y4;
  y11' = rapid_time_dependent_potassium_current_rapid_time_dependent_potassium_current_y1_gate_alpha_y1*(1 - y11) - rapid_time_dependent_potassium_current_rapid_time_dependent_potassium_current_y1_gate_beta_y1*y11;
  y21' = rapid_time_dependent_potassium_current_rapid_time_dependent_potassium_current_y2_gate_alpha_y2*(1 - y21) - rapid_time_dependent_potassium_current_rapid_time_dependent_potassium_current_y2_gate_beta_y2*y21;
  y30' = rapid_time_dependent_potassium_current_rapid_time_dependent_potassium_current_y3_gate_alpha_y3*(1 - y30) - rapid_time_dependent_potassium_current_rapid_time_dependent_potassium_current_y3_gate_beta_y3*y30;
  y5' = ACh_dependent_potassium_current_ACh_dependent_potassium_current_y_gate_alpha_y*(1 - y5) - ACh_dependent_potassium_current_ACh_dependent_potassium_current_y_gate_beta_y*y5;
  y6' = sodium_calcium_exchanger_sodium_calcium_exchanger_y_gate_alpha_y*(1 - y6) - sodium_calcium_exchanger_sodium_calcium_exchanger_y_gate_beta_y*y6;
  y7' = sodium_potassium_pump_sodium_potassium_pump_y_gate_alpha_y*(1 - y7) - sodium_potassium_pump_sodium_potassium_pump_y_gate_beta_y*y7;
  Caup' = (-i_SR_U - i_SR_T - i_SR_L)/(2*F*Ca_concentrations_in_SR_V_up);
  y8' = SR_calcium_pump_SR_calcium_pump_y_gate_alpha_y*(1 - y8) - SR_calcium_pump_SR_calcium_pump_y_gate_beta_y*y8;
  RyR_channel_p_open_RyR' = RyR_channel_p_close_RyR*RyR_channel_k1 - RyR_channel_p_open_RyR*RyR_channel_k2;
  RyR_channel_p_close_RyR' = RyR_channel_k3*(1 - (RyR_channel_p_open_RyR + RyR_channel_p_close_RyR)) - (RyR_channel_k1 + RyR_channel_k4)*RyR_channel_p_close_RyR;
  Ca_concentrations_in_SR_Ca_Total' = (i_SR_T - i_RyR)/(2*F*Ca_concentrations_in_SR_V_rel);
  NL_model_pCa' = NL_model_Q_b - NL_model_Q_a;
  NL_model_pCaCB' = NL_model_Q_a - NL_model_Q_r - NL_model_Q_d2;
  NL_model_pCB' = NL_model_Q_r - NL_model_Q_d - NL_model_Q_d1;
  NL_model_X' = NL_model_B*(NL_model_h - NL_model_h_c);
end
