// SBML level 2 version 4

model saucerman_model_dyadic_cleft_2008____main()
  // Originally created by libAntimony v1.3 (using libSBML 4.1.0-b2)

  // Compartments:
  compartment default_compartment = 1;

  // Parameters:
  CaM = 0.1;
  Ca2CaM = 0.1;
  Ca4CaM = 0.1;
  dyadic_cleft_k20 = 10;
  dyadic_cleft_K = 135;
  dyadic_cleft_Mg = 1;
  dyadic_cleft_Ca = 1;
  dyadic_cleft_k42 = 500;
  dyadic_cleft_Reaction_02B_k20B = 0.1;
  dyadic_cleft_CaMB0 = 0.1;
  dyadic_cleft_Ca2CaMB0 = 0.1;
  dyadic_cleft_Ca4CaMB0 = 0.1;
  dyadic_cleft_Reaction_2B_k2B_on = 0.007;
  dyadic_cleft_Reaction_2B_k2B_off = 1.4e-5;
  dyadic_cleft_Reaction_0B_k0B_on = 0.007;
  dyadic_cleft_Reaction_0B_k0B_off = 0.0014;
  dyadic_cleft_Reaction_4B_k4B_on = 0.007;
  dyadic_cleft_Reaction_4B_k4B_off = 1.4e-5;
  dyadic_cleft_B_mod_Btot = 1860;
  dyadic_cleft_CaMKIItot = 120;
  dyadic_cleft_Pb20 = 0.1;
  dyadic_cleft_Pb0 = 0.1;
  dyadic_cleft_Pt0 = 0.1;
  dyadic_cleft_Pt20 = 0.1;
  dyadic_cleft_Pa0 = 0.1;
  dyadic_cleft_kPP1 = 1.72;
  dyadic_cleft_KmPP1 = 11.5;
  dyadic_cleft_PP1tot = 96.5;
  dyadic_cleft_Reaction_CKib2_kib2 = 65.67;
  dyadic_cleft_Reaction_CKib2_kb2i = 328.36;
  dyadic_cleft_Reaction_CKib_kib = 6.567;
  dyadic_cleft_Reaction_CKib_kbi = 2.2;
  dyadic_cleft_Reaction_CKta_kat = 6.567;
  dyadic_cleft_Reaction_CKta_kta = 0.0022;
  dyadic_cleft_Reaction_CKt2a_kat2 = 6.567;
  dyadic_cleft_Reaction_CKt2a_kt2a = 32.835;
  dyadic_cleft_Ca2CaN_CaNtot = 3.62;
  dyadic_cleft_Ca4CaN0 = 0.1;
  dyadic_cleft_CaMCaN0 = 0.1;
  dyadic_cleft_Ca2CaMCaN0 = 0.1;
  dyadic_cleft_Ca4CaMCaN0 = 0.1;
  dyadic_cleft_Reaction_Ca4CaN_kCaNCa_on = 2;
  dyadic_cleft_Reaction_Ca4CaN_kCaNCa_off = 1;
  dyadic_cleft_Reaction_2CaN_kCaN2_on = 46;
  dyadic_cleft_Reaction_2CaN_kCaN2_off = 3.2604;
  dyadic_cleft_Reaction_4CaN_kCaN4_on = 46;
  dyadic_cleft_Reaction_4CaN_kCaN4_off = 1.3e-3;
  dyadic_cleft_Reaction_0CaN_kCaN0_on = 46;
  dyadic_cleft_Reaction_0CaN_kCaN0_off = 537.966;
  time_ = ;

  // Assignment rules:
  B := dyadic_cleft_B_mod_Btot - (dyadic_cleft_CaMB0 + dyadic_cleft_Ca2CaMB0 + dyadic_cleft_Ca4CaMB0);
  dyadic_cleft_Reaction_020 := dyadic_cleft_k02*dyadic_cleft_Ca^2*CaM - dyadic_cleft_k20*Ca2CaM;
  dyadic_cleft_k02 := dyadic_cleft_k20/dyadic_cleft_Reaction_02_Kd02;
  dyadic_cleft_Reaction_02_Kd02 := ;
  dyadic_cleft_Reaction_240 := dyadic_cleft_k24*dyadic_cleft_Ca^2*Ca2CaM - dyadic_cleft_k42*Ca4CaM;
  dyadic_cleft_k24 := dyadic_cleft_k42/dyadic_cleft_Reaction_24_Kd24;
  dyadic_cleft_Reaction_24_Kd24 := ;
  dyadic_cleft_Reaction_02B0 := dyadic_cleft_Reaction_02B_k02B*dyadic_cleft_Ca^2*dyadic_cleft_CaMB0 - dyadic_cleft_Reaction_02B_k20B*dyadic_cleft_Ca2CaMB0;
  dyadic_cleft_Reaction_02B_k02B := dyadic_cleft_k02;
  dyadic_cleft_Reaction_24B0 := dyadic_cleft_Reaction_24B_k24B*dyadic_cleft_Ca^2*dyadic_cleft_Ca2CaMB0 - dyadic_cleft_Reaction_24B_k42B*dyadic_cleft_Ca4CaMB0;
  dyadic_cleft_Reaction_24B_k24B := dyadic_cleft_k24;
  dyadic_cleft_Reaction_24B_k42B := dyadic_cleft_k42;
  dyadic_cleft_Reaction_2B0 := dyadic_cleft_Reaction_2B_k2B_on*Ca2CaM*B - dyadic_cleft_Reaction_2B_k2B_off*dyadic_cleft_Ca2CaMB0;
  dyadic_cleft_Reaction_0B0 := dyadic_cleft_Reaction_0B_k0B_on*CaM*B - dyadic_cleft_Reaction_0B_k0B_off*dyadic_cleft_CaMB0;
  dyadic_cleft_Reaction_4B0 := dyadic_cleft_Reaction_4B_k4B_on*Ca4CaM*B - dyadic_cleft_Reaction_4B_k4B_off*dyadic_cleft_Ca4CaMB0;
  dyadic_cleft_Reaction_0CaN0 := dyadic_cleft_Reaction_0CaN_kCaN0_on*CaM*dyadic_cleft_Ca4CaN0 - dyadic_cleft_Reaction_0CaN_kCaN0_off*dyadic_cleft_CaMCaN0;
  dyadic_cleft_Reaction_2CaN0 := dyadic_cleft_Reaction_2CaN_kCaN2_on*Ca2CaM*dyadic_cleft_Ca4CaN0 - dyadic_cleft_Reaction_2CaN_kCaN2_off*dyadic_cleft_Ca2CaMCaN0;
  dyadic_cleft_Reaction_CKt2a0 := dyadic_cleft_Reaction_CKt2a_kt2a*dyadic_cleft_Pt20 - dyadic_cleft_Reaction_CKt2a_kat2*Ca2CaM*dyadic_cleft_Pa0;
  dyadic_cleft_Reaction_CKib20 := dyadic_cleft_Reaction_CKib2_kib2*Ca2CaM*dyadic_cleft_Pi_0 - dyadic_cleft_Reaction_CKib2_kb2i*dyadic_cleft_Pb20;
  dyadic_cleft_Reaction_4CaN0 := dyadic_cleft_Reaction_4CaN_kCaN4_on*Ca4CaM*dyadic_cleft_Ca4CaN0 - dyadic_cleft_Reaction_4CaN_kCaN4_off*dyadic_cleft_Ca4CaMCaN0;
  dyadic_cleft_Reaction_CKta0 := dyadic_cleft_Reaction_CKta_kta*dyadic_cleft_Pt0 - dyadic_cleft_Reaction_CKta_kat*Ca4CaM*dyadic_cleft_Pa0;
  dyadic_cleft_Reaction_CKib0 := dyadic_cleft_Reaction_CKib_kib*Ca4CaM*dyadic_cleft_Pi_0 - dyadic_cleft_Reaction_CKib_kbi*dyadic_cleft_Pb0;
  dyadic_cleft_CaMKIIi_CaMKIIi := dyadic_cleft_Pi_0*dyadic_cleft_CaMKIItot;
  dyadic_cleft_Pi_0 := 1 - (dyadic_cleft_Pb0 + dyadic_cleft_Pb20 + dyadic_cleft_Pt0 + dyadic_cleft_Pt20 + dyadic_cleft_Pa0);
  dyadic_cleft_CaMKIIb2_CaMKIIb2 := dyadic_cleft_Pb20*dyadic_cleft_CaMKIItot;
  dyadic_cleft_CaMKIIb_CaMKIIb := dyadic_cleft_Pb0*dyadic_cleft_CaMKIItot;
  dyadic_cleft_CaMKIIt_CaMKIIt := dyadic_cleft_Pt0*dyadic_cleft_CaMKIItot;
  dyadic_cleft_CaMKIIt2_CaMKIIt2 := dyadic_cleft_Pt20*dyadic_cleft_CaMKIItot;
  dyadic_cleft_CaMKIIa_CaMKIIa := dyadic_cleft_Pa0*dyadic_cleft_CaMKIItot;
  dyadic_cleft_T0 := dyadic_cleft_Pb0 + dyadic_cleft_Pt0 + dyadic_cleft_Pt20 + dyadic_cleft_Pa0;
  dyadic_cleft_Reaction_CKbt0 := dyadic_cleft_Reaction_CKbt_kbt*dyadic_cleft_Pb0 - dyadic_cleft_kPP1*dyadic_cleft_PP1tot*dyadic_cleft_Pt0/(dyadic_cleft_KmPP1 + dyadic_cleft_CaMKIItot*dyadic_cleft_Pt0);
  dyadic_cleft_Reaction_CKbt_kbt := 0.055*dyadic_cleft_T0 + 0.0074*dyadic_cleft_T0^2 + 0.015*dyadic_cleft_T0^3;
  dyadic_cleft_Reaction_CKb2b0 := dyadic_cleft_Reaction_CKb2b_kb24*dyadic_cleft_Ca^2*dyadic_cleft_Pb20 - dyadic_cleft_Reaction_CKb2b_kb42*dyadic_cleft_Pb20;
  dyadic_cleft_Reaction_CKb2b_kb24 := dyadic_cleft_k24;
  dyadic_cleft_Reaction_CKb2b_kb42 := dyadic_cleft_k42*(33.5e-3/5);
  dyadic_cleft_Reaction_CKtt20 := dyadic_cleft_Reaction_CKtt2_kt42*dyadic_cleft_Pt0 - dyadic_cleft_Reaction_CKtt2_kt24*dyadic_cleft_Ca^2*dyadic_cleft_Pt20;
  dyadic_cleft_Reaction_CKtt2_kt24 := dyadic_cleft_k24;
  dyadic_cleft_Reaction_CKtt2_kt42 := dyadic_cleft_k42*(33.5e-6/5);
  dyadic_cleft_Reaction_CKt2b20 := dyadic_cleft_kPP1*dyadic_cleft_PP1tot*dyadic_cleft_Pt20/(dyadic_cleft_KmPP1 + dyadic_cleft_CaMKIItot*dyadic_cleft_Pt20);
  dyadic_cleft_Reaction_CKai0 := dyadic_cleft_kPP1*dyadic_cleft_PP1tot*dyadic_cleft_Pa0/(dyadic_cleft_KmPP1 + dyadic_cleft_CaMKIItot*dyadic_cleft_Pa0);
  dyadic_cleft_Ca2CaN0 := dyadic_cleft_Ca2CaN_CaNtot - (dyadic_cleft_Ca4CaN0 + dyadic_cleft_CaMCaN0 + dyadic_cleft_Ca2CaMCaN0 + dyadic_cleft_Ca4CaMCaN0);
  dyadic_cleft_Reaction_Ca4CaN0 := dyadic_cleft_Reaction_Ca4CaN_kCaNCa_on*dyadic_cleft_Ca^2*dyadic_cleft_Ca2CaN0 - dyadic_cleft_Reaction_Ca4CaN_kCaNCa_off*dyadic_cleft_Ca4CaN0;
  dyadic_cleft_Reaction_02CaN0 := dyadic_cleft_Reaction_02CaN_k02CaN*dyadic_cleft_Ca^2*dyadic_cleft_CaMCaN0 - dyadic_cleft_Reaction_02CaN_k20CaN*dyadic_cleft_Ca2CaMCaN0;
  dyadic_cleft_Reaction_02CaN_k02CaN := dyadic_cleft_k02;
  dyadic_cleft_Reaction_02CaN_k20CaN := dyadic_cleft_k20/160;
  dyadic_cleft_Reaction_24CaN0 := dyadic_cleft_Reaction_24CaN_k24CaN*dyadic_cleft_Ca^2*dyadic_cleft_Ca2CaMCaN0 - dyadic_cleft_Reaction_24CaN_k42CaN*dyadic_cleft_Ca4CaMCaN0;
  dyadic_cleft_Reaction_24CaN_k24CaN := dyadic_cleft_k24;
  dyadic_cleft_Reaction_24CaN_k42CaN := dyadic_cleft_k42/2508;

  // Rate rules:
  CaM' = 1e-3*(-(dyadic_cleft_Reaction_020 + dyadic_cleft_Reaction_0B0 + dyadic_cleft_Reaction_0CaN0));
  Ca2CaM' = 1e-3*(dyadic_cleft_CaMKIItot*(dyadic_cleft_Reaction_CKt2a0 - dyadic_cleft_Reaction_CKib20) + dyadic_cleft_Reaction_020 - (dyadic_cleft_Reaction_240 + dyadic_cleft_Reaction_2B0 + dyadic_cleft_Reaction_2CaN0));
  Ca4CaM' = 1e-3*(dyadic_cleft_CaMKIItot*(dyadic_cleft_Reaction_CKta0 - dyadic_cleft_Reaction_CKib0) + dyadic_cleft_Reaction_240 - (dyadic_cleft_Reaction_4CaN0 + dyadic_cleft_Reaction_4B0));
  dyadic_cleft_CaMB0' = 1e-3*(dyadic_cleft_Reaction_0B0 - dyadic_cleft_Reaction_02B0);
  dyadic_cleft_Ca2CaMB0' = 1e-3*(dyadic_cleft_Reaction_02B0 + dyadic_cleft_Reaction_2B0 - dyadic_cleft_Reaction_24B0);
  dyadic_cleft_Ca4CaMB0' = 1e-3*(dyadic_cleft_Reaction_24B0 + dyadic_cleft_Reaction_4B0);
  dyadic_cleft_Pb20' = 1e-3*(dyadic_cleft_Reaction_CKt2b20 - (dyadic_cleft_Reaction_CKib20 + dyadic_cleft_Reaction_CKb2b0));
  dyadic_cleft_Pb0' = 1e-3*(dyadic_cleft_Reaction_CKib0 + dyadic_cleft_Reaction_CKb2b0 - dyadic_cleft_Reaction_CKbt0);
  dyadic_cleft_Pt0' = 1e-3*(-(dyadic_cleft_Reaction_CKbt0 + dyadic_cleft_Reaction_CKta0 + dyadic_cleft_Reaction_CKtt20));
  dyadic_cleft_Pt20' = 1e-3*(-(dyadic_cleft_Reaction_CKtt20 + dyadic_cleft_Reaction_CKt2a0 + dyadic_cleft_Reaction_CKt2b20));
  dyadic_cleft_Pa0' = 1e-3*(dyadic_cleft_Reaction_CKta0 + dyadic_cleft_Reaction_CKt2a0 - dyadic_cleft_Reaction_CKai0);
  dyadic_cleft_Ca4CaN0' = 1e-3*(dyadic_cleft_Reaction_Ca4CaN0 - (dyadic_cleft_Reaction_0CaN0 + dyadic_cleft_Reaction_2CaN0 + dyadic_cleft_Reaction_4CaN0));
  dyadic_cleft_CaMCaN0' = 1e-3*(dyadic_cleft_Reaction_0CaN0 - dyadic_cleft_Reaction_02CaN0);
  dyadic_cleft_Ca2CaMCaN0' = 1e-3*(dyadic_cleft_Reaction_2CaN0 + dyadic_cleft_Reaction_02CaN0 - dyadic_cleft_Reaction_24CaN0);
  dyadic_cleft_Ca4CaMCaN0' = 1e-3*(dyadic_cleft_Reaction_4CaN0 + dyadic_cleft_Reaction_24CaN0);
end
