// SBML level 2 version 4

model saucerman_mcculloch_2004_version01____main()
  // Originally created by libAntimony v1.4 (using libSBML 4.1.0-b2)

  // Compartments:
  compartment default_compartment = 1;

  // Parameters:
  PKACII_RyR_PKACII_RyRtot = 0.034;
  Ks_RyR_PKAC = 21;
  epsilon = 10;
  PP1_RyR_PP1_RyRtot = 0.034;
  Ks_RyR_PP1 = 7;
  PP2A_RyR_PP2A_RyRtot = 0.034;
  Ks_RyR_PP2A = 4.1;
  RyRptot0 = ;
  RyRsum = 0.135;
  RyRptot_kPKA_RyR = 54;
  RyRptot_kPP1_RyR = 8.52;
  RyRptot_kPP2A_RyR = 10.1;
  TnItot = 70;
  TnIp0 = ;
  TnIp_kPKA_TnI = 54;
  TnIp_kPP2A_TnI = 10.1;
  TnIp_KM_PKA_TnI = 21;
  TnIp_KM_PP2A_TnI = 3;
  time_ = ;
  PKACII_RyR0 = ;
  RyR0 = ;
  PP1_RyR0 = ;
  RyRp0 = ;
  PP2A_RyR0 = ;
  KMrel_KMrel0 = ;
  TnIp_PKAC = ;
  TnIp_PP2A = ;
  KMTnC_KMTnC0 = ;

  // Assignment rules:
  RyRtot0 := RyRsum - RyRptot0;
  KMrel0 := 1.64/(1 + RyRptot0/RyRsum)*KMrel_KMrel0;
  TnI0 := TnItot - TnIp0;
  KMTnC0 := (1 + 0.45 + TnIp0/TnItot)*KMTnC_KMTnC0;

  // Rate rules:
  RyRptot0' = RyRptot_kPKA_RyR*(epsilon*RyR0*PKACII_RyR0/Ks_RyR_PKAC) - (RyRptot_kPP1_RyR*(epsilon*RyRp0*PP1_RyR0/Ks_RyR_PP1) + RyRptot_kPP2A_RyR*(epsilon*RyRp0*PP2A_RyR0/Ks_RyR_PP2A));
  TnIp0' = TnIp_kPKA_TnI*TnIp_PKAC*TnI0/(TnIp_KM_PKA_TnI + TnIp0) - TnIp_kPP2A_TnI*TnIp_PP2A*TnIp0/(TnIp_KM_PP2A_TnI + TnIp0);
end
