// SBML level 2 version 4

model schenzle_1994____main()
  // Originally created by libAntimony v1.4 (using libSBML 4.1.0-b2)

  // Compartments:
  compartment default_compartment = 1;

  // Parameters:
  X0 = 1e11;
  X_mu0 = 0.004;
  K0 = 1.35e-14;
  V0 = 1000;
  Y0 = 100;
  Y_mu1 = 0.3;
  Y_delta1 = 0.3;
  Z0 = 0;
  V_mu2 = 1;
  V_phi = 1000;
  V_delta2 = 1;
  Z_alpha = 1e-6;
  Z_beta = 0.5;
  Z_gamma = 0.5;
  Z_a = 1000;
  Z_b = 0.2;
  Z_X0 = 1e11;
  K_omega = 0.16e-15;
  time_ = ;

  // Assignment rules:
  X_s := X_mu0*1e11;
  CD4_CD4 := (X0 + Y0)/1e11;
  Z_f_X := (X0/Z_X0)^2/(Z_b + (X0/Z_X0)^2);
  K_Kmax := 1.35e-14*20;

  // Rate rules:
  X0' = X_s - (X_mu0*X0 + K0*V0*X0);
  K0' = K_omega*V0*(K_Kmax - K0);
  V0' = V_phi*Y0 - (V_mu2 + V_delta2*Z0)*V0;
  Y0' = K0*V0*Y0 - (Y_mu1 + Y_delta1*Z0)*Y0;
  Z0' = Z_alpha*(V0/(Z_a + V0)) + Z_beta*Z_f_X*Z0 - Z_gamma*Z0^2;
end
