// SBML level 2 version 4

model sedaghat_2002_feedback____main()
  // Originally created by libAntimony v1.4 (using libSBML 4.1.0-b2)

  // Compartments:
  compartment default_compartment = 1;

  // Parameters:
  x22 = 9e-13;
  k1 = 60000000;
  k_minus1 = 0.2;
  k_minus4 = 0.003;
  x30 = 0;
  x50 = 0;
  x60 = 1e-13;
  k3 = 2500;
  x40 = 0;
  k4b = 0.0021;
  k_minus4b = 0.00021;
  x70 = 0;
  x80 = 0;
  k_minus5 = 1.67e-18;
  k6 = 0.461;
  x90 = 1e-12;
  k7 = 4.16;
  x100 = 0;
  x10a0 = 0;
  IRp = 8.97e-13;
  k_minus8 = 10;
  x111 = 1e-13;
  x120 = 2.54e-15;
  x130 = 0.31;
  k_minus10 = 2.77;
  x140 = 99.4;
  x150 = 0.29;
  PTEN = 1;
  SHIP = 1;
  x160 = 100;
  x170 = 0;
  x180 = 100;
  x190 = 0;
  x200 = 96;
  k_minus13 = 0.167;
  k_minus14 = 0.001155;
  x210 = 4;
  reaction_constants_V_max = 20;
  reaction_constants_K_d = 12;
  reaction_constants_n = 4;
  reaction_constants_tau = 1.5;
  reaction_constants_k9_stimulated = 1.39;
  reaction_constants_APequil = 9.09;
  time_ = ;

  // Assignment rules:
  x110 := ;
  k4 := k_minus4/9;
  k_minus3 := k_minus1/1;
  PTP := ;
  k2 := k1;
  k_minus2 := 100*k_minus1;
  k5 := ;
  k_minus7 := 2.5/7.45*k7;
  k7b := ln(2)/2;
  k_minus7b := k7b*2.5/7.45*3.7e-13/(6.27e-13 - 2.5/7.45*3.7e-13);
  PKC := reaction_constants_V_max*x190^reaction_constants_n/(reaction_constants_K_d^reaction_constants_n + x190^reaction_constants_n);
  k8 := k_minus8*5/70.775*1e12;
  k9 := (reaction_constants_k9_stimulated - reaction_constants_k9_basal)*x120/reaction_constants_PI3K + reaction_constants_k9_basal;
  k_minus9 := 94/3.1*reaction_constants_k9_stimulated;
  k10 := 3.1/2.9*k_minus10;
  k11 := 0.1*k_minus11*(x130 - 0.31)/(3.1 - 0.31);
  k_minus11 := 10*ln(2)*1;
  k12 := 0.1*k_minus12*(x130 - 0.31)/(3.1 - 0.31);
  k_minus12 := 10*ln(2)*1;
  k13 := 4/96*k_minus13;
  k13b := (40/60 - 4/96)*k_minus13*reaction_constants_effect;
  k14 := k_minus14/96;
  reaction_constants_k9_basal := 0.31/99.4*k_minus9;
  reaction_constants_effect := (0.2*x170 + 0.8*x190)/reaction_constants_APequil;
  reaction_constants_PI3K := k8*3.7e-13*1e-13/(k8*3.7e-13 + k_minus8);

  // Rate rules:
  x22' = k_minus1*x30 + k_minus3*PTP*x50 + k_minus4*x60 - (k1*x110*x22 + k4*x22);
  x30' = k1*x110*x22 - (k_minus1*x30 + k3*x30);
  x50' = k3*x30 + k_minus2*x40 + k_minus4b*x80 - (k2*x110*x50 + k_minus3*PTP*x50 + k4b*x50);
  x60' = k5 + k6*PTP*(x70 + x80) + k4*x22 - (k_minus5*x60 + k_minus4*x60);
  x40' = k2*x110*x50 + k_minus4b*x70 - (k_minus2*x40 + k4b*x40);
  x70' = k4b*x40 - (k_minus4b*x70 + k6*PTP*x70);
  x80' = k4b*x50 - (k_minus4b*x80 + k6*PTP*x80);
  x90' = k_minus7*PTP*x100 - k7*x90*(x40 + x50)/IRp + k_minus7b*x10a0 - k7b*PKC*x90;
  x100' = k7*x90*(x40 + x50)/IRp + k_minus8*x120 - (k_minus7*PTP + k8*x111)*x100;
  x10a0' = k7b*PKC*x90 - k_minus7b*x10a0;
  x111' = k_minus8*x120 - k8*x100*x111;
  x120' = k8*x100*x111 - k_minus8*x120;
  x130' = k9*x140 + k10*x150 - (k_minus9*PTEN + k_minus10*SHIP)*x130;
  x140' = k_minus9*PTEN*x130 - k9*x140;
  x150' = k_minus10*SHIP*x130 - k10*x150;
  x160' = k_minus11*x170 - k11*x160;
  x170' = k11*x160 - k_minus11*x170;
  x180' = k_minus12*x190 - k12*x180;
  x190' = k12*x180 - k_minus12*x190;
  x200' = k_minus13*x210 + k14 - ((k13 + k13b)*x200 + k_minus14*x200);
  x210' = -k_minus13*x210 + (k13 + k13b)*x200;
end
