// SBML level 2 version 4

model sedaghat_sherman_quon_2002_version01____main()
  // Originally created by libAntimony v1.3 (using libSBML 4.1.0-b2)

  // Compartments:
  compartment default_compartment = 1;

  // Parameters:
  x110 = 1e-7;
  x22 = 9e-13;
  k1 = 6e7;
  k1_ = 0.2;
  k4_ = 0.003;
  x30 = 0;
  x50 = 0;
  x60 = 1e-13;
  PTP = 1;
  k3 = 2500;
  x40 = 0;
  k4b = 2.1e-3;
  k4b_ = 2.1e-4;
  x70 = 0;
  x80 = 0;
  k5_ = 1.67e-18;
  k6 = 0.461;
  x90 = 1e-13;
  k7 = 4.16;
  x100 = 1e-13;
  IRp = 8.97e-13;
  k8_ = 10;
  x111 = 1e-13;
  x120 = 0;
  x130 = 0.31;
  k10_ = 2.77;
  x140 = 99.4;
  x150 = 0.29;
  PTEN = 1;
  SHIP = 1;
  x160 = 100;
  x170 = 0;
  x180 = 100;
  x190 = 0;
  x200 = 96;
  k13_ = 0.167;
  k14_ = 0.001155;
  x210 = 4;
  reaction_constants_k9_stimulated = 1.39;
  reaction_constants_APequil = 9.09;
  reaction_constants_PI3K = 5e-15;
  time_ = ;

  // Assignment rules:
  k4 := k4_/9;
  k3_ := k1_;
  k2 := k1;
  k2_ := 100*k1_;
  k5 := ;
  k7_ := 2.5/7.45*k7;
  k8 := k8_*(5/70.775)*1e12;
  k9 := (reaction_constants_k9_stimulated - reaction_constants_k9_basal)*(x120/reaction_constants_PI3K) + reaction_constants_k9_basal;
  k9_ := 94/3.1*reaction_constants_k9_stimulated;
  k10 := 3.1/2.9*k10_;
  k11 := 0.1*k11_*((x130 - 0.31)/(3.1 - 0.31));
  k11_ := 10*ln(2);
  k12 := 0.1*k12_*((x130 - 0.31)/(3.1 - 0.31));
  k12_ := 10*ln(2);
  k13 := 4/96*k13_;
  k13b := (40/60 - 4/96)*k13_*reaction_constants_effect;
  k14 := k14_/96;
  reaction_constants_k9_basal := 0.31/99.4*k9_;
  reaction_constants_effect := (0.2*x170 + 0.8*x190)/reaction_constants_APequil;

  // Rate rules:
  x22' = k1_*x30 + k3_*PTP*x50 + k4_*x60 - (k1*x110*x22 + k4*x22);
  x30' = k1*x110*x22 - (k1_*x30 + k3*x30);
  x50' = k3*x30 + k2_*x40 + k4b_*x80 - (k2*x110*x50 + k3_*PTP*x50 + k4b*x50);
  x60' = k5 + k6*PTP*(x70 + x80) + k4*x22 - (k5_*x60 + k4_*x60);
  x40' = k2*x110*x50 + k4b_*x70 - (k2_*x40 + k4b*x40);
  x70' = k4b*x40 - (k4b_*x70 + k6*PTP*x70);
  x80' = k4b*x50 - (k4b_*x80 + k6*PTP*x80);
  x90' = k7_*PTP*x100 - k7*x90*(x40 + x50)/IRp;
  x100' = k7*x90*(x40 + x50)/IRp + k8_*x120 - (k7_*PTP + k8*x111)*x100;
  x111' = k8_*x120 - k8*x100*x111;
  x120' = k8*x100*x111 - k8_*x120;
  x130' = k9*x140 + k10*x150 - (k9_*PTEN + k10_*SHIP)*x130;
  x140' = k9_*PTEN*x130 - k9*x140;
  x150' = k10_*SHIP*x130 - k10*x150;
  x160' = k11_*x170 - k11*x160;
  x170' = k11*x160 - k11_*x170;
  x180' = k12_*x190 - k12*x180;
  x190' = k12*x180 - k12_*x190;
  x200' = k13_*x210 + k14 - ((k13 + k13b)*x200 + k14_*x200);
  x210' = k13_*x210 - (k13 + k13b)*x200;
end
