// SBML level 2 version 4

model shaw_1997____main()
  // Originally created by libAntimony v1.4 (using libSBML 4.1.0-b2)

  // Compartments:
  compartment default_compartment = 1;

  // Parameters:
  V = -84.624;
  R = 8314;
  T = 310;
  F = 96500;
  membrane_Cm = 1;
  membrane_I_st = -100;
  fast_sodium_current_g_Na = 16;
  Nai = 10;
  Nao = 140;
  m = ;
  h = ;
  j = ;
  gamma_Nai = 0.75;
  gamma_Nao = 0.75;
  gamma_Ki = 0.75;
  gamma_Ko = 0.75;
  L_type_Ca_channel_P_Ca = 0.00054;
  L_type_Ca_channel_P_Na = 6.75e-7;
  L_type_Ca_channel_P_K = 1.93e-7;
  L_type_Ca_channel_gamma_Cai = 1;
  L_type_Ca_channel_gamma_Cao = 0.34;
  Cao = 1.8;
  Ko = 5.4;
  Ki = 145;
  d = ;
  f = ;
  L_type_Ca_channel_L_type_Ca_channel_f_Ca_gate_Km_Ca = 0.6;
  T_type_Ca_channel_g_Ca_T = 0.05;
  b = ;
  g = ;
  Xr = ;
  slow_time_dependent_potassium_current_P_NaK = 0.01833;
  Xs = ;
  plateau_potassium_current_g_Kp = 0.0183;
  sarcolemmal_calcium_pump_K_mpCa = 0.5;
  sarcolemmal_calcium_pump_I_pCa = 1.15;
  sodium_background_current_g_Nab = 0.00141;
  calcium_background_current_g_Cab = 0.003016;
  sodium_potassium_pump_K_mNai = 10;
  sodium_potassium_pump_K_mKo = 1.5;
  non_specific_calcium_activated_current_P_ns_Ca = 1.75e-7;
  non_specific_calcium_activated_current_K_m_ns_Ca = 1.2;
  ATP_dependent_potassium_current_Ko_normal = 4;
  ATP_dependent_potassium_current_K_05 = 0.25;
  ATP_dependent_potassium_current_ATP_i = 3;
  ATP_dependent_potassium_current_n = 0.24;
  ATP_dependent_potassium_current_H = 2;
  ATP_dependent_potassium_current_Nichols_area = 0.005;
  Na_Ca_exchanger_K_NaCa = 2000;
  Na_Ca_exchanger_K_mNa = 87.5;
  Na_Ca_exchanger_K_mCa = 1.38;
  Na_Ca_exchanger_K_sat = 0.1;
  Na_Ca_exchanger_eta = 0.35;
  calcium_buffers_in_the_myoplasm_K_mTRPN = 0.5;
  calcium_buffers_in_the_myoplasm_K_mCMDN = 2.38;
  calcium_buffers_in_the_myoplasm_TRPN_max = 70;
  calcium_buffers_in_the_myoplasm_CMDN_max = 50;
  CSQN_max = 10;
  K_mCSQN = 0.8;
  calcium_fluxes_in_the_SR_tau_on = 2;
  calcium_fluxes_in_the_SR_tau_off = 2;
  calcium_fluxes_in_the_SR_tau_tr = 180;
  calcium_fluxes_in_the_SR_t = 0;
  calcium_fluxes_in_the_SR_K_mrel = 0.8;
  calcium_fluxes_in_the_SR_delta_Ca_ith = 0.18;
  calcium_fluxes_in_the_SR_CSQN_th = 0.7;
  calcium_fluxes_in_the_SR_K_mup = 0.92;
  calcium_fluxes_in_the_SR_I_up = 0.005;
  calcium_fluxes_in_the_SR_Ca_NSR_max = 0.15;
  Ca_NSR = 15;
  ionic_concentrations_Ca_foot = ;
  ionic_concentrations_A_cap = 0.000153;
  time_ = ;
  sodium_potassium_pump_I_NaK = ;
  calcium_buffers_in_the_myoplasm_Ca_total = ;
  calcium_buffers_in_the_myoplasm_Ca_JSR_old = ;
  calcium_buffers_in_the_myoplasm_Cai_old = ;
  calcium_buffers_in_the_myoplasm_b1 = ;
  calcium_buffers_in_the_myoplasm_c1 = ;
  calcium_fluxes_in_the_SR_delta_Ca_i2 = ;
  calcium_fluxes_in_the_SR_calcium_overload = ;
  ionic_concentrations_R_A_V = ;
  ionic_concentrations_V_myo = ;
  ionic_concentrations_V_cleft = ;

  // Assignment rules:
  i_Na := fast_sodium_current_g_Na*m^3*h*j*(V - E_Na);
  i_Ca_L := i_CaCa + i_CaK + i_CaNa;
  i_Ca_T := T_type_Ca_channel_g_Ca_T*b^2*g*(V - T_type_Ca_channel_E_Ca);
  i_Kr := rapid_time_dependent_potassium_current_g_Kr*Xr*Rr*(V - rapid_time_dependent_potassium_current_E_Kr);
  i_Ks := slow_time_dependent_potassium_current_g_Ks*Xs^2*(V - slow_time_dependent_potassium_current_E_Ks);
  i_NaCa := Na_Ca_exchanger_K_NaCa*(1/(Na_Ca_exchanger_K_mNa^3 + Nao^3))*(1/(Na_Ca_exchanger_K_mCa + Cao))*(1/(1 + Na_Ca_exchanger_K_sat*exp((Na_Ca_exchanger_eta - 1)*V*(F/(R*T)))))*(exp(Na_Ca_exchanger_eta*V*(F/(R*T)))*Nai^3*Cao - exp((Na_Ca_exchanger_eta - 1)*V*(F/(R*T)))*Nao^3*Cai);
  i_K1 := time_independent_potassium_current_g_K1*K1_infinity*(V - E_K1);
  i_Kp := plateau_potassium_current_g_Kp*plateau_potassium_current_Kp*(V - plateau_potassium_current_E_Kp);
  i_p_Ca := sarcolemmal_calcium_pump_I_pCa*(Cai/(sarcolemmal_calcium_pump_K_mpCa + Cai));
  i_Na_b := sodium_background_current_g_Nab*(V - sodium_background_current_E_NaN);
  i_Ca_b := calcium_background_current_g_Cab*(V - calcium_background_current_E_CaN);
  i_NaK := sodium_potassium_pump_I_NaK*sodium_potassium_pump_f_NaK*(1/(1 + (sodium_potassium_pump_K_mNai/Nai)^1.5))*(Ko/(Ko + sodium_potassium_pump_K_mKo));
  i_ns_Ca := i_ns_Na + i_ns_K;
  i_K_ATP := ATP_dependent_potassium_current_g_K_ATP*(V - ATP_dependent_potassium_current_E_K);
  E_Na := R*T/F*ln(Nao/Nai);
  fast_sodium_current_fast_sodium_current_m_gate_alpha_m := 0.32*(V + 47.13)/(1 - exp(-0.1*(V + 47.13)));
  fast_sodium_current_fast_sodium_current_m_gate_beta_m := 0.08*exp(-V/11);
  fast_sodium_current_fast_sodium_current_h_gate_alpha_h := ;
  fast_sodium_current_fast_sodium_current_h_gate_beta_h := ;
  fast_sodium_current_fast_sodium_current_j_gate_alpha_j := ;
  fast_sodium_current_fast_sodium_current_j_gate_beta_j := ;
  i_CaCa := d*f*f_Ca*L_type_Ca_channel_I_CaCa;
  i_CaK := d*f*f_Ca*L_type_Ca_channel_I_CaK;
  i_CaNa := d*f*f_Ca*L_type_Ca_channel_I_CaNa;
  L_type_Ca_channel_I_CaCa := L_type_Ca_channel_P_Ca*2^2*(V*F^2/(R*T))*((L_type_Ca_channel_gamma_Cai*Cai*exp(2*V*F/(R*T)) - L_type_Ca_channel_gamma_Cao*Cao)/(exp(2*V*F/(R*T)) - 1));
  L_type_Ca_channel_I_CaK := L_type_Ca_channel_P_K*1^2*(V*F^2/(R*T))*((gamma_Ki*Ki*exp(1*V*F/(R*T)) - gamma_Ko*Ko)/(exp(1*V*F/(R*T)) - 1));
  L_type_Ca_channel_I_CaNa := L_type_Ca_channel_P_Na*1^2*(V*F^2/(R*T))*((gamma_Nai*Nai*exp(1*V*F/(R*T)) - gamma_Nao*Nao)/(exp(1*V*F/(R*T)) - 1));
  Cai := 2/3*sqrt(calcium_buffers_in_the_myoplasm_b^2 - 3*calcium_buffers_in_the_myoplasm_c)*cos(acos((9*calcium_buffers_in_the_myoplasm_b*calcium_buffers_in_the_myoplasm_c - (2*calcium_buffers_in_the_myoplasm_b^3 + 27*calcium_buffers_in_the_myoplasm_d))/(2*(calcium_buffers_in_the_myoplasm_b^2 - 3*calcium_buffers_in_the_myoplasm_c)^(3/2)))/3) - calcium_buffers_in_the_myoplasm_b/3;
  f_Ca := 1/(1 + (Cai/L_type_Ca_channel_L_type_Ca_channel_f_Ca_gate_Km_Ca)^2);
  L_type_Ca_channel_L_type_Ca_channel_d_gate_alpha_d := L_type_Ca_channel_L_type_Ca_channel_d_gate_d_infinity/L_type_Ca_channel_L_type_Ca_channel_d_gate_tau_d;
  L_type_Ca_channel_L_type_Ca_channel_d_gate_beta_d := (1 - L_type_Ca_channel_L_type_Ca_channel_d_gate_d_infinity)/L_type_Ca_channel_L_type_Ca_channel_d_gate_tau_d;
  L_type_Ca_channel_L_type_Ca_channel_d_gate_d_infinity := 1/(1 + exp(-((V + 10)/6.24)));
  L_type_Ca_channel_L_type_Ca_channel_d_gate_tau_d := L_type_Ca_channel_L_type_Ca_channel_d_gate_d_infinity*((1 - exp(-((V + 10)/6.24)))/(0.035*(V + 10)));
  L_type_Ca_channel_L_type_Ca_channel_f_gate_alpha_f := L_type_Ca_channel_L_type_Ca_channel_f_gate_f_infinity/L_type_Ca_channel_L_type_Ca_channel_f_gate_tau_f;
  L_type_Ca_channel_L_type_Ca_channel_f_gate_beta_f := (1 - L_type_Ca_channel_L_type_Ca_channel_f_gate_f_infinity)/L_type_Ca_channel_L_type_Ca_channel_f_gate_tau_f;
  L_type_Ca_channel_L_type_Ca_channel_f_gate_f_infinity := 1/(1 + exp((V + 35.06)/8.6)) + 0.6/(1 + exp((50 - V)/20));
  L_type_Ca_channel_L_type_Ca_channel_f_gate_tau_f := 1/(0.0197*exp(-(0.0337*(V + 10))^2) + 0.02);
  T_type_Ca_channel_E_Ca := R*T/(2*F)*ln(Cao/Cai);
  T_type_Ca_channel_T_type_Ca_channel_b_gate_b_infinity := 1/(1 + exp(-((V + 14)/10.8)));
  T_type_Ca_channel_T_type_Ca_channel_b_gate_tau_b := (3.7 + 6.1)/(1 + exp((25 + V)/4.5));
  T_type_Ca_channel_T_type_Ca_channel_g_gate_g_infinity := 1/(1 + exp((V + 60)/5.6));
  T_type_Ca_channel_T_type_Ca_channel_g_gate_tau_g := ;
  rapid_time_dependent_potassium_current_g_Kr := 0.02614*sqrt(Ko/5.4);
  rapid_time_dependent_potassium_current_E_Kr := R*T/F*ln(Ko/Ki);
  Rr := 1/(1 + exp((V + 9)/22.4));
  rapid_time_dependent_potassium_current_rapid_time_dependent_potassium_current_Xr_gate_Xr_infinity := 1/(1 + exp(-((V + 21.5)/7.5)));
  rapid_time_dependent_potassium_current_rapid_time_dependent_potassium_current_Xr_gate_tau_Xr := 1/(0.00138*(V + 14.2)/(1 - exp(-0.123*(V + 14.2))) + 0.00061*(V + 38.9)/(exp(0.145*(V + 38.9)) - 1));
  slow_time_dependent_potassium_current_g_Ks := (0.057 + 0.19)/(1 + exp((-7.2 + slow_time_dependent_potassium_current_P_Ca)/0.6));
  slow_time_dependent_potassium_current_E_Ks := R*T/F*ln((Ko + slow_time_dependent_potassium_current_P_NaK*Nao)/(Ki + slow_time_dependent_potassium_current_P_NaK*Nai));
  slow_time_dependent_potassium_current_P_Ca := -ln(Cai) + 3;
  slow_time_dependent_potassium_current_tau_Xs := 1/(7.19e-5*(V + 30)/(1 - exp(-0.148*(V + 30))) + 0.000131*(V + 30)/(exp(0.0687*(V + 30)) - 1));
  slow_time_dependent_potassium_current_slow_time_dependent_potassium_current_Xs_gate_Xs_infinity := 1/(1 + exp(-(V + (-1.5))/16.7));
  E_K1 := R*T/F*ln(Ko/Ki);
  time_independent_potassium_current_g_K1 := 0.75*sqrt(Ko/5.4);
  K1_infinity := time_independent_potassium_current_time_independent_potassium_current_K1_gate_alpha_K1/(time_independent_potassium_current_time_independent_potassium_current_K1_gate_alpha_K1 + time_independent_potassium_current_time_independent_potassium_current_K1_gate_beta_K1);
  time_independent_potassium_current_time_independent_potassium_current_K1_gate_alpha_K1 := 1.02/(1 + exp(0.2385*(V - E_K1 - 59.215)));
  time_independent_potassium_current_time_independent_potassium_current_K1_gate_beta_K1 := (0.49124*exp(0.08032*(V + 5.476 - E_K1)) + exp(0.06175*(V - (E_K1 + 594.31))))/(1 + exp(-0.5143*(V - (E_K1 + 4.753))));
  plateau_potassium_current_E_Kp := E_K1;
  plateau_potassium_current_Kp := 1/(1 + exp((7.488 - V)/5.98));
  sodium_background_current_E_NaN := E_Na;
  calcium_background_current_E_CaN := R*T/(2*F)*ln(Cao/Cai);
  sodium_potassium_pump_f_NaK := 1/(1 + 0.1245*exp(-0.1*(V*F/(R*T))) + 0.0365*sodium_potassium_pump_sigma*exp(-(V*F/(R*T))));
  sodium_potassium_pump_sigma := 1/7*(exp(Nao/67.3) - 1);
  i_ns_Na := non_specific_calcium_activated_current_I_ns_Na*(1/(1 + (non_specific_calcium_activated_current_K_m_ns_Ca/Cai)^3));
  i_ns_K := non_specific_calcium_activated_current_I_ns_K*(1/(1 + (non_specific_calcium_activated_current_K_m_ns_Ca/Cai)^3));
  non_specific_calcium_activated_current_I_ns_Na := non_specific_calcium_activated_current_P_ns_Ca*1^2*(V*F^2/(R*T))*((gamma_Nai*Nai*exp(1*V*F/(R*T)) - gamma_Nao*Nao)/(exp(1*V*F/(R*T)) - 1));
  non_specific_calcium_activated_current_I_ns_K := non_specific_calcium_activated_current_P_ns_Ca*1^2*(V*F^2/(R*T))*((gamma_Ki*Ki*exp(1*V*F/(R*T)) - gamma_Ko*Ko)/(exp(1*V*F/(R*T)) - 1));
  ATP_dependent_potassium_current_g_K_ATP := ATP_dependent_potassium_current_G_K_ATP*ATP_dependent_potassium_current_P_ATP*(Ko/ATP_dependent_potassium_current_Ko_normal)^ATP_dependent_potassium_current_n;
  ATP_dependent_potassium_current_G_K_ATP := 0.000195/ATP_dependent_potassium_current_Nichols_area;
  ATP_dependent_potassium_current_P_ATP := 1/(1 + (ATP_dependent_potassium_current_ATP_i/ATP_dependent_potassium_current_K_05)^ATP_dependent_potassium_current_H);
  ATP_dependent_potassium_current_E_K := R*T/F*ln(Ko/Ki);
  Ca_JSR_new := (sqrt(calcium_buffers_in_the_myoplasm_b1^2 + 4*calcium_buffers_in_the_myoplasm_c1) - calcium_buffers_in_the_myoplasm_b1)/2;
  calcium_buffers_in_the_myoplasm_TRPN_buff := calcium_buffers_in_the_myoplasm_TRPN_max*(Cai/(Cai + calcium_buffers_in_the_myoplasm_K_mTRPN));
  calcium_buffers_in_the_myoplasm_CMDN_buff := calcium_buffers_in_the_myoplasm_CMDN_max*(Cai/(Cai + calcium_buffers_in_the_myoplasm_K_mCMDN));
  calcium_buffers_in_the_myoplasm_delta_Ca_JSR := calcium_buffers_in_the_myoplasm_Ca_JSR_old - Ca_JSR_new;
  calcium_buffers_in_the_myoplasm_delta_Cai := calcium_buffers_in_the_myoplasm_Cai_old - Cai;
  calcium_buffers_in_the_myoplasm_b := calcium_buffers_in_the_myoplasm_CMDN_max + calcium_buffers_in_the_myoplasm_TRPN_max + calcium_buffers_in_the_myoplasm_K_mTRPN + calcium_buffers_in_the_myoplasm_K_mCMDN - calcium_buffers_in_the_myoplasm_Ca_total;
  calcium_buffers_in_the_myoplasm_c := calcium_buffers_in_the_myoplasm_K_mCMDN*calcium_buffers_in_the_myoplasm_K_mTRPN + calcium_buffers_in_the_myoplasm_TRPN_max*calcium_buffers_in_the_myoplasm_K_mCMDN + calcium_buffers_in_the_myoplasm_CMDN_max*calcium_buffers_in_the_myoplasm_K_mTRPN - calcium_buffers_in_the_myoplasm_Ca_total*(calcium_buffers_in_the_myoplasm_K_mTRPN + calcium_buffers_in_the_myoplasm_K_mCMDN);
  calcium_buffers_in_the_myoplasm_d := -(calcium_buffers_in_the_myoplasm_K_mTRPN*calcium_buffers_in_the_myoplasm_K_mCMDN)*calcium_buffers_in_the_myoplasm_Ca_total;
  CSQN_buff := CSQN_max*(Ca_JSR_new/(Ca_JSR_new + K_mCSQN));
  i_rel := calcium_fluxes_in_the_SR_G_rel*(Ca_JSR_new - Cai);
  i_up := calcium_fluxes_in_the_SR_I_up*(Cai/(Cai + calcium_fluxes_in_the_SR_K_mup));
  i_leak := calcium_fluxes_in_the_SR_K_leak*Ca_NSR;
  i_tr := (Ca_NSR - Ca_JSR_new)/calcium_fluxes_in_the_SR_tau_tr;
  calcium_fluxes_in_the_SR_G_rel := ;
  calcium_fluxes_in_the_SR_G_rel_max := ;
  calcium_fluxes_in_the_SR_K_leak := calcium_fluxes_in_the_SR_I_up/calcium_fluxes_in_the_SR_Ca_NSR_max;

  // Rate rules:
  V' = -(1/membrane_Cm)*(i_Na + i_Ca_L + i_Ca_T + i_Kr + i_Ks + i_K1 + i_Kp + i_NaCa + i_K_ATP + i_p_Ca + i_Na_b + i_Ca_b + i_NaK + i_ns_Ca + membrane_I_st);
  Nai' = -(i_Na + i_CaNa + i_Na_b + i_ns_Na + i_NaCa*3 + i_NaK*3)*(ionic_concentrations_A_cap/(ionic_concentrations_V_myo*F));
  m' = fast_sodium_current_fast_sodium_current_m_gate_alpha_m*(1 - m) - fast_sodium_current_fast_sodium_current_m_gate_beta_m*m;
  h' = fast_sodium_current_fast_sodium_current_h_gate_alpha_h*(1 - h) - fast_sodium_current_fast_sodium_current_h_gate_beta_h*h;
  j' = fast_sodium_current_fast_sodium_current_j_gate_alpha_j*(1 - j) - fast_sodium_current_fast_sodium_current_j_gate_beta_j*j;
  Ko' = (i_CaK + i_Kr + i_Ks + i_K1 + i_Kp + i_K_ATP + i_ns_K + (-(i_NaK*2)))*(ionic_concentrations_A_cap/(ionic_concentrations_V_cleft*F));
  Ki' = -(i_CaK + i_Kr + i_Ks + i_K1 + i_Kp + i_K_ATP + i_ns_K + (-(i_NaK*2)))*(ionic_concentrations_A_cap/(ionic_concentrations_V_myo*F));
  d' = L_type_Ca_channel_L_type_Ca_channel_d_gate_alpha_d*(1 - d) - L_type_Ca_channel_L_type_Ca_channel_d_gate_beta_d*d;
  f' = L_type_Ca_channel_L_type_Ca_channel_f_gate_alpha_f*(1 - f) - L_type_Ca_channel_L_type_Ca_channel_f_gate_beta_f*f;
  b' = (T_type_Ca_channel_T_type_Ca_channel_b_gate_b_infinity - b)/T_type_Ca_channel_T_type_Ca_channel_b_gate_tau_b;
  g' = (T_type_Ca_channel_T_type_Ca_channel_g_gate_g_infinity - g)/T_type_Ca_channel_T_type_Ca_channel_g_gate_tau_g;
  Xr' = (rapid_time_dependent_potassium_current_rapid_time_dependent_potassium_current_Xr_gate_Xr_infinity - Xr)/rapid_time_dependent_potassium_current_rapid_time_dependent_potassium_current_Xr_gate_tau_Xr;
  Xs' = (slow_time_dependent_potassium_current_slow_time_dependent_potassium_current_Xs_gate_Xs_infinity - Xs)/slow_time_dependent_potassium_current_tau_Xs;
  Ca_NSR' = -(i_leak + i_tr - i_up);
  ionic_concentrations_Ca_foot' = -i_CaCa*(ionic_concentrations_A_cap/(2*ionic_concentrations_V_myo*F))*ionic_concentrations_R_A_V;
end
