// SBML level 2 version 4

model ModelHeart____main()
  // Originally created by libAntimony v1.4 (using libSBML 4.1.0-b2)

  // Compartments:
  compartment default_compartment = 1;

  // Parameters:
  LeftHeart_CV0 = 350;
  LeftHeart_LV_V = LeftHeart_V00;
  LeftHeart_V00 = 500;
  LeftHeart_Pini0 = 1;
  LeftHeart_Vini0 = 5;
  LeftHeart_CV = 400;
  LeftHeart_LA_V = LeftHeart_V0;
  LeftHeart_V0 = 20;
  LeftHeart_Pini = 1;
  LeftHeart_Vini = 4;
  LeftHeart_Emax0 = 2.5;
  LeftHeart_Emin0 = 0.1;
  LeftHeart_T = 1;
  LeftHeart_Ts1 = 0.3;
  LeftHeart_Ts2 = 0.45;
  LeftHeart_Emax = 0.25;
  LeftHeart_Emin = 0.15;
  LeftHeart_Tpwb = 0.92;
  LeftHeart_Tpww = 0.09;
  LeftHeart_EraMax = 0.25;
  LeftHeart_EraMin = 0.15;
  LeftHeart_PraIni = 1;
  LeftHeart_VraIni = 4;
  LeftHeart_ErvMax = 1.15;
  LeftHeart_ErvMin = 0.1;
  LeftHeart_PrvIni = 1;
  LeftHeart_VrvIni = 10;
  LeftHeart_CVpa = 350;
  LeftHeart_CVti = 400;
  LeftHeart_Vra0 = 20;
  LeftHeart_Vrv0 = 500;
  RightHeart_CV0 = 350;
  RightHeart_RV_V = RightHeart_V00;
  RightHeart_V00 = 500;
  RightHeart_Pini0 = 1;
  RightHeart_Vini0 = 10;
  RightHeart_CV = 400;
  RightHeart_RA_V = RightHeart_V0;
  RightHeart_V0 = 20;
  RightHeart_Pini = 1;
  RightHeart_Vini = 4;
  RightHeart_Emax0 = 1.15;
  RightHeart_Emin0 = 0.1;
  RightHeart_T = 1;
  RightHeart_Ts1 = 0.3;
  RightHeart_Ts2 = 0.45;
  RightHeart_Emax = 0.25;
  RightHeart_Emin = 0.15;
  RightHeart_Tpwb = 0.92;
  RightHeart_Tpww = 0.09;
  RightHeart_ElaMax = 0.25;
  RightHeart_ElaMin = 0.15;
  RightHeart_PlaIni = 1;
  RightHeart_VlaIni = 4;
  RightHeart_ElvMax = 2.5;
  RightHeart_ElvMin = 0.1;
  RightHeart_PlvIni = 1;
  RightHeart_VlvIni = 5;
  RightHeart_CVao = 350;
  RightHeart_CVmi = 400;
  RightHeart_Vlv0 = 500;
  RightHeart_Vla0 = 20;
  Po = ;
  Qi = ;
  t = ;
  Po0 = ;
  Qi0 = ;
  t0 = ;

  // Assignment rules:
  Pi_ := LeftHeart_Pini + LeftHeart_E*(LeftHeart_LA_V - LeftHeart_Vini);
  Qo := ;
  LeftHeart_Pi_0 := LeftHeart_Pini0 + LeftHeart_E0*(LeftHeart_LV_V - LeftHeart_Vini0);
  LeftHeart_Qi0 := ;
  LeftHeart_E0 := LeftHeart_Emin0 + LeftHeart_Elv_et*(LeftHeart_Emax0 - LeftHeart_Emin0)/2;
  LeftHeart_LV_Tao := ;
  LeftHeart_E := LeftHeart_Emin + LeftHeart_Ela_et*(LeftHeart_Emax - LeftHeart_Emin)/2;
  LeftHeart_Tao := ;
  LeftHeart_Elv_mt := t - LeftHeart_T*floor(t/LeftHeart_T);
  LeftHeart_Elv_et := ;
  LeftHeart_Ela_mt := t - LeftHeart_T*floor(t/LeftHeart_T);
  LeftHeart_Ela_et := ;
  Pi_0 := RightHeart_Pini + RightHeart_E*(RightHeart_RA_V - RightHeart_Vini);
  Qo0 := ;
  RightHeart_Pi_0 := RightHeart_Pini0 + RightHeart_E0*(RightHeart_RV_V - RightHeart_Vini0);
  RightHeart_Qi0 := ;
  RightHeart_E0 := RightHeart_Emin0 + RightHeart_Erv_et*(RightHeart_Emax0 - RightHeart_Emin0)/2;
  RightHeart_RV_Tao := ;
  RightHeart_E := RightHeart_Emin + RightHeart_Era_et*(RightHeart_Emax - RightHeart_Emin)/2;
  RightHeart_Tao := ;
  RightHeart_Erv_mt := t0 - RightHeart_T*floor(t0/RightHeart_T);
  RightHeart_Erv_et := ;
  RightHeart_Era_mt := t0 - RightHeart_T*floor(t0/RightHeart_T);
  RightHeart_Era_et := ;

  // Rate rules:
  LeftHeart_LV_V' = LeftHeart_Qi0 - Qo;
  LeftHeart_LA_V' = Qi - LeftHeart_Qi0;
  RightHeart_RV_V' = RightHeart_Qi0 - Qo0;
  RightHeart_RA_V' = Qi0 - RightHeart_Qi0;
end
