// SBML level 2 version 4

model ModelMain____main()
  // Originally created by libAntimony v1.4 (using libSBML 4.1.0-b2)

  // Compartments:
  compartment default_compartment = 1;

  // Parameters:
  Pi_ = SysLoop_P0;
  LEFTHeart_CV0 = 350;
  LEFTHeart_LV_V = LEFTHeart_V00;
  LEFTHeart_V00 = 500;
  LEFTHeart_Pini0 = 1;
  LEFTHeart_Vini0 = 5;
  LEFTHeart_CV = 400;
  LEFTHeart_LA_V = LEFTHeart_V0;
  LEFTHeart_V0 = 20;
  LEFTHeart_Pini = 1;
  LEFTHeart_Vini = 4;
  LEFTHeart_Emax0 = 2.5;
  LEFTHeart_Emin0 = 0.1;
  LEFTHeart_T = 1;
  LEFTHeart_Ts1 = 0.3;
  LEFTHeart_Ts2 = 0.45;
  LEFTHeart_Emax = 0.25;
  LEFTHeart_Emin = 0.15;
  LEFTHeart_Tpwb = 0.92;
  LEFTHeart_Tpww = 0.09;
  LEFTHeart_EraMax = 0.25;
  LEFTHeart_EraMin = 0.15;
  LEFTHeart_PraIni = 1;
  LEFTHeart_VraIni = 4;
  LEFTHeart_ErvMax = 1.15;
  LEFTHeart_ErvMin = 0.1;
  LEFTHeart_PrvIni = 1;
  LEFTHeart_VrvIni = 10;
  LEFTHeart_CVpa = 350;
  LEFTHeart_CVti = 400;
  LEFTHeart_Vra0 = 20;
  LEFTHeart_Vrv0 = 500;
  Pi_1 = PulLoop_P0;
  RIGHTHeart_CV0 = 350;
  RIGHTHeart_RV_V = RIGHTHeart_V00;
  RIGHTHeart_V00 = 500;
  RIGHTHeart_Pini0 = 1;
  RIGHTHeart_Vini0 = 10;
  RIGHTHeart_CV = 400;
  RIGHTHeart_RA_V = RIGHTHeart_V0;
  RIGHTHeart_V0 = 20;
  RIGHTHeart_Pini = 1;
  RIGHTHeart_Vini = 4;
  RIGHTHeart_Emax0 = 1.15;
  RIGHTHeart_Emin0 = 0.1;
  RIGHTHeart_T = 1;
  RIGHTHeart_Ts1 = 0.3;
  RIGHTHeart_Ts2 = 0.45;
  RIGHTHeart_Emax = 0.25;
  RIGHTHeart_Emin = 0.15;
  RIGHTHeart_Tpwb = 0.92;
  RIGHTHeart_Tpww = 0.09;
  RIGHTHeart_ElaMax = 0.25;
  RIGHTHeart_ElaMin = 0.15;
  RIGHTHeart_PlaIni = 1;
  RIGHTHeart_VlaIni = 4;
  RIGHTHeart_ElvMax = 2.5;
  RIGHTHeart_ElvMin = 0.1;
  RIGHTHeart_PlvIni = 1;
  RIGHTHeart_VlvIni = 5;
  RIGHTHeart_CVao = 350;
  RIGHTHeart_CVmi = 400;
  RIGHTHeart_Vlv0 = 500;
  RIGHTHeart_Vla0 = 20;
  SysLoop_P0 = 100;
  SysLoop_Pi_0 = SysLoop_P00;
  SysLoop_Qi0 = SysLoop_Q0;
  SysLoop_Q0 = 0;
  SysLoop_R = 0.003;
  SysLoop_C = 0.08;
  SysLoop_L = 6.2e-5;
  SysLoop_P00 = 100;
  SysLoop_Qi1 = SysLoop_Q00;
  SysLoop_Q00 = 0;
  SysLoop_R0 = 0.05;
  SysLoop_C0 = 1.6;
  SysLoop_L0 = 0.0017;
  SysLoop_R1 = 0.5;
  SysLoop_Pi_3 = SysLoop_P01;
  SysLoop_R2 = 0.52;
  SysLoop_P01 = 0;
  SysLoop_R3 = 0.075;
  SysLoop_C1 = 20.5;
  PulLoop_P0 = 30;
  PulLoop_Pi_0 = PulLoop_P00;
  PulLoop_Qi0 = PulLoop_Q0;
  PulLoop_Q0 = 0;
  PulLoop_R = 0.002;
  PulLoop_C = 0.18;
  PulLoop_L = 5.2e-5;
  PulLoop_P00 = 30;
  PulLoop_Qi1 = PulLoop_Q00;
  PulLoop_Q00 = 0;
  PulLoop_R0 = 0.01;
  PulLoop_C0 = 3.8;
  PulLoop_L0 = 0.0017;
  PulLoop_R1 = 0.05;
  PulLoop_Pi_3 = PulLoop_P01;
  PulLoop_R2 = 0.25;
  PulLoop_P01 = 0;
  PulLoop_R3 = 0.0006;
  PulLoop_C1 = 20.5;
  t = ;

  // Assignment rules:
  Pi_2 := LEFTHeart_Pini + LEFTHeart_E*(LEFTHeart_LA_V - LEFTHeart_Vini);
  Qi2 := (PulLoop_Pi_3 - Pi_2)/PulLoop_R3;
  Qi := ;
  LEFTHeart_Pi_0 := LEFTHeart_Pini0 + LEFTHeart_E0*(LEFTHeart_LV_V - LEFTHeart_Vini0);
  LEFTHeart_Qi0 := ;
  LEFTHeart_E0 := LEFTHeart_Emin0 + LEFTHeart_Elv_et*(LEFTHeart_Emax0 - LEFTHeart_Emin0)/2;
  LEFTHeart_LV_Tao := ;
  LEFTHeart_E := LEFTHeart_Emin + LEFTHeart_Ela_et*(LEFTHeart_Emax - LEFTHeart_Emin)/2;
  LEFTHeart_Tao := ;
  LEFTHeart_Elv_mt := t - LEFTHeart_T*floor(t/LEFTHeart_T);
  LEFTHeart_Elv_et := ;
  LEFTHeart_Ela_mt := t - LEFTHeart_T*floor(t/LEFTHeart_T);
  LEFTHeart_Ela_et := ;
  Pi_0 := RIGHTHeart_Pini + RIGHTHeart_E*(RIGHTHeart_RA_V - RIGHTHeart_Vini);
  Qi0 := (SysLoop_Pi_3 - Pi_0)/SysLoop_R3;
  Qi1 := ;
  RIGHTHeart_Pi_0 := RIGHTHeart_Pini0 + RIGHTHeart_E0*(RIGHTHeart_RV_V - RIGHTHeart_Vini0);
  RIGHTHeart_Qi0 := ;
  RIGHTHeart_E0 := RIGHTHeart_Emin0 + RIGHTHeart_Erv_et*(RIGHTHeart_Emax0 - RIGHTHeart_Emin0)/2;
  RIGHTHeart_RV_Tao := ;
  RIGHTHeart_E := RIGHTHeart_Emin + RIGHTHeart_Era_et*(RIGHTHeart_Emax - RIGHTHeart_Emin)/2;
  RIGHTHeart_Tao := ;
  RIGHTHeart_Erv_mt := t - RIGHTHeart_T*floor(t/RIGHTHeart_T);
  RIGHTHeart_Erv_et := ;
  RIGHTHeart_Era_mt := t - RIGHTHeart_T*floor(t/RIGHTHeart_T);
  RIGHTHeart_Era_et := ;
  SysLoop_Pi_1 := SysLoop_Pi_2 + SysLoop_R1*SysLoop_Qi1;
  SysLoop_Pi_2 := SysLoop_Pi_3 + SysLoop_R2*SysLoop_Qi2;
  SysLoop_Qi2 := SysLoop_Qi1;
  SysLoop_Qi3 := SysLoop_Qi2;
  PulLoop_Pi_1 := PulLoop_Pi_2 + PulLoop_R1*PulLoop_Qi1;
  PulLoop_Pi_2 := PulLoop_Pi_3 + PulLoop_R2*PulLoop_Qi2;
  PulLoop_Qi2 := PulLoop_Qi1;
  PulLoop_Qi3 := PulLoop_Qi2;

  // Rate rules:
  Pi_' = (Qi - SysLoop_Qi0)/SysLoop_C;
  LEFTHeart_LV_V' = LEFTHeart_Qi0 - Qi;
  LEFTHeart_LA_V' = Qi2 - LEFTHeart_Qi0;
  Pi_1' = (Qi1 - PulLoop_Qi0)/PulLoop_C;
  RIGHTHeart_RV_V' = RIGHTHeart_Qi0 - Qi1;
  RIGHTHeart_RA_V' = Qi0 - RIGHTHeart_Qi0;
  SysLoop_Pi_0' = (SysLoop_Qi0 - SysLoop_Qi1)/SysLoop_C0;
  SysLoop_Qi0' = (Pi_ - SysLoop_Pi_0 - SysLoop_R*SysLoop_Qi0)/SysLoop_L;
  SysLoop_Qi1' = (SysLoop_Pi_0 - SysLoop_Pi_1 - SysLoop_R0*SysLoop_Qi1)/SysLoop_L0;
  SysLoop_Pi_3' = (SysLoop_Qi3 - Qi0)/SysLoop_C1;
  PulLoop_Pi_0' = (PulLoop_Qi0 - PulLoop_Qi1)/PulLoop_C0;
  PulLoop_Qi0' = (Pi_1 - PulLoop_Pi_0 - PulLoop_R*PulLoop_Qi0)/PulLoop_L;
  PulLoop_Qi1' = (PulLoop_Pi_0 - PulLoop_Pi_1 - PulLoop_R0*PulLoop_Qi1)/PulLoop_L0;
  PulLoop_Pi_3' = (PulLoop_Qi3 - Qi2)/PulLoop_C1;
end
