// SBML level 2 version 4

model shim_2006____main()
  // Originally created by libAntimony v1.4 (using libSBML 4.1.0-b2)

  // Compartments:
  compartment default_compartment = 1;

  // Parameters:
  stimPeriod = 1000;
  stimDuration = 1;
  stimCurrent = 100;
  ICa_additional = 0;
  INa_additional = 0;
  JCaSR_additional = 0;
  Am = 200;
  Cm = 0.01;
  Capacitance = 0.00185;
  T = 310;
  vC = 0.49;
  vSR = 0.1;
  g_Na = 0.14838;
  g_K1 = 0.05405;
  g_to = 0.00294;
  g_Kr = 0.00096;
  g_Ks = 0.00245;
  g_pK = 0.000146;
  g_bNa = 2.9e-6;
  g_bCa = 5.92e-6;
  multiplier_2 = 0.03;
  P_NaK = 0.01362;
  K_mNa = 40;
  K_mK = 1;
  g_CaL = 1.75e-6;
  Bufc = 0.104;
  Kbufc = 0.001;
  Bufsr = 10;
  Kbufsr = 0.3;
  Nao = 140;
  Ko = 5.4;
  Cao = 2;
  V_leak = 8e-5;
  K_up = 0.00025;
  Vmax_up = 0.000425;
  a_rel = 0.016464;
  b_rel = 0.25;
  c_rel = 0.008232;
  tau_g = 2;
  g_pCa = 0.00825;
  K_pCa = 0.0005;
  k_NaCa = 10;
  K_mNai = 87.5;
  K_mCa = 1.38;
  k_sat = 0.1;
  gamma = 0.35;
  alpha = 2.5;
  V_initial = -86.2;
  m_initial = 0;
  h_initial = 0.75;
  j_initial = 0.75;
  s_initial = 1;
  r_initial = 0;
  Xr1_initial = 0;
  Xr2_initial = 1;
  Xs_initial = 0;
  d_initial = 0;
  f_initial = 1;
  fCa_initial = 1;
  g_initial = 1;
  Nai_initial = 11.6;
  Ki_initial = 138.3;
  Cai_total_initial = 0.0064;
  CaSR_total_initial = 4.2;
  V = -86.20189;
  F0 = 96485;
  F = 96485;
  F1 = 96485;
  m = 0.001394965;
  h = 0.7705752;
  j = 0.7704434;
  s = 0.9999982;
  r = 2.055193e-8;
  Xr1 = 0.0001844563;
  Xr2 = 0.4812784;
  Xs = 0.003018013;
  R = 8314.472;
  Nai0 = 10.95327;
  R0 = 8314.472;
  d = 1.985732e-5;
  f = 0.9996721;
  fCa = 1.006032;
  ENa_z = 1;
  EK_z = 1;
  Ki0 = 138.0485;
  R1 = 8314.472;
  ECa_z = 2;
  EKs_z = 1;
  EKs_multiplier_1 = 1;
  R2 = 8314.472;
  F2 = 96485;
  Cai_total = 0.00682343;
  CaSR_total = 6.39862;
  g = 0.9999389;
  tau_fCa = 2;
  stimulus_protocol_IstimStart = 100;
  stimulus_protocol_IstimEnd = 5000000;
  stimulus_protocol_stimCurrent = 100;
  stimulus_protocol_IstimPeriod = 1000;
  stimulus_protocol_IstimPulseDuration = 1;
  NL_model_cTnCa = 0.07451192;
  NL_model_cTnCaCB = 0.01450194;
  NL_model_cTnCB = 0.001905492;
  NL_model_Y_1 = 39;
  NL_model_Y_2 = 0.0039;
  NL_model_Y_3 = 0.03;
  NL_model_Y_4 = 0.12;
  NL_model_Y_d = 0.027;
  NL_model_Z_1 = 0.03;
  NL_model_Z_2 = 0.0039;
  NL_model_Z_3 = 1560;
  NL_model_OptiHSL = 1.17;
  NL_model_xLLimitCB = 0.005;
  NL_model_R = 20;
  NL_model_SlidingR = 1.2;
  NL_model_xInext = 1.132952;
  NL_model_trpnbar = 0.07;
  NL_model_AForceCB = 1800000;
  NL_model_xKcoeff = 140000;
  NL_model_Fmult = 0.8;
  circulation_R_A = 1000;
  circulation_R_AO = 60;
  circulation_R_V = 28;
  circulation_R_RO = 3;
  circulation_R_PA = 80;
  circulation_R_PV = 10;
  circulation_R_LO = 6;
  circulation_C_A = 3.5;
  circulation_C_AO = 0.3;
  circulation_C_V = 110;
  circulation_C_PA = 4.3;
  circulation_C_PV = 8.4;
  circulation_V_A0 = 715;
  circulation_V_V0 = 2750;
  circulation_V_RV0 = 20;
  circulation_V_PA0 = 90;
  circulation_V_PV0 = 490;
  circulation_V_LV0 = 20;
  circulation_V_AO0 = 0;
  circulation_Vs_LV = 144.6877;
  circulation_Vs_RV = -5851.583;
  circulation_Vs_A = 435.4633;
  circulation_Vs_V = 5965.819;
  circulation_Vs_PA = 356.5318;
  circulation_Vs_PV = 685.2847;
  circulation_Vs_AO = 37.4256;
  circulation_EmaxLV = 2.95;
  circulation_EmaxRV = 1.75;
  circulation_kelv = 0.014;
  circulation_kerv = 0.011;
  circulation_P0lv = 1.5;
  circulation_P0rv = 1.5;
  time_0 = ;

  // Assignment rules:
  IK_additional := -IStim;
  IStim := ;
  Itotal := ICa_additional + INa_additional + IK_additional + INa0 + IK10 + Ito0 + IKr0 + IKs0 + ICaL0 + INaCa0 + INaK0 + IbNa0 + IbCa0 + IpCa0 + IpK0;
  INa0 := g_Na*m^3*h*j*(V - reversal_potential0);
  IK10 := g_K1*sqrt(Ko/5.4)*K1_infinity*(V - reversal_potential);
  Ito0 := g_to*r*s*(V - reversal_potential);
  IKr0 := g_Kr*sqrt(Ko/5.4)*Xr1*Xr2*(V - reversal_potential);
  IKs0 := g_Ks*Xs^2*(V - reversal_potential1);
  ICaL0 := g_CaL*d*f*fCa*4*V*F1^2/(R0*T)*(Cai0*exp(2*V*F1/(R0*T)) - 0.341*Cao)/(exp(2*V*F1/(R0*T)) - 1);
  INaCa0 := k_NaCa*(exp(gamma*V*F/(R*T))*Nai0^3*Cao - exp((gamma - 1)*V*F/(R*T))*Nao^3*Cai0*alpha)/((K_mNai^3 + Nao^3)*(K_mCa + Cao)*(1 + k_sat*exp((gamma - 1)*V*F/(R*T))));
  INaK0 := P_NaK*Ko*Nai0/((Ko + K_mK)*(Nai0 + K_mNa)*(1 + 0.1245*exp(-0.1*V*F/(R*T)) + 0.0353*exp(-V*F/(R*T))));
  IpCa0 := g_pCa*Cai0/(K_pCa + Cai0);
  IpK0 := g_pK*(V - reversal_potential)/(1 + exp((25 - V)/5.98));
  IbCa0 := g_bCa*(V - reversal_potential2);
  IbNa0 := g_bNa*(V - reversal_potential0);
  K_flux0 := Am/(vC*F0)*(IK_additional + IK10 + Ito0 + IKr0 + IKs0 + IpK0 - INaK0*2);
  Na_flux0 := Am/(vC*F)*(INa0 + INa_additional + IbNa0 + INaK0*3 + INaCa0*3);
  Ca_flux0 := Am/(2*vC*F1)*(2*INaCa0 - (ICa_additional + ICaL0 + IbCa0 + IpCa0));
  Ca_SR_flux0 := Jleak0 + Jrel0 + JCaSR_additional - Jup0;
  Jleak0 := V_leak*(CaSR - Cai0);
  Jup0 := Vmax_up/(1 + K_up^2/Cai0^2);
  Jrel0 := (a_rel*CaSR^2/(b_rel^2 + CaSR^2) + c_rel)*d*g;
  reversal_potential0 := R*T/(ENa_z*F)*ln(Nao/Nai0);
  reversal_potential := R1*T/(EK_z*F0)*ln(Ko/Ki0);
  K1_infinity := K1_gate_alpha_K1/(K1_gate_alpha_K1 + K1_gate_beta_K1);
  reversal_potential1 := R2*T/(EKs_z*F2)*ln((EKs_multiplier_1*Ko + multiplier_2*Nao)/(EKs_multiplier_1*Ki0 + multiplier_2*Nai0));
  Cai0 := Cai_total - Cai_buf;
  reversal_potential2 := R0*T/(ECa_z*F1)*ln(Cao/Cai0);
  CaSR := CaSR_total - CaSR_buf;
  Cai_buf := (sqrt(Cai_bCai^2 - 4*Cai_aCai*Cai_cCai) - Cai_bCai)/(2*Cai_aCai);
  CaSR_buf := (sqrt(Cai_bCaSR^2 - 4*Cai_aCaSR*Cai_cCaSR) - Cai_bCaSR)/(2*Cai_aCaSR);
  Cai_aCai := -1;
  Cai_bCai := Cai_total + Kbufc + Bufc;
  Cai_cCai := -Bufc*Cai_total;
  Cai_aCaSR := -1;
  Cai_bCaSR := CaSR_total + Kbufsr + Bufsr;
  Cai_cCaSR := -Bufsr*CaSR_total;
  tau_m := 1*m_gate_alpha_m*m_gate_beta_m;
  m_infinity := 1/(1 + exp((-56.86 - V)/9.03))^2;
  m_gate_alpha_m := 1/(1 + exp((-60 - V)/5));
  m_gate_beta_m := 0.1/(1 + exp((35 + V)/5)) + 0.1/(1 + exp((V - 50)/200));
  tau_h := 1/(h_gate_alpha_h + h_gate_beta_h);
  h_infinity := 1/(1 + exp((71.55 + V)/7.43))^2;
  h_gate_alpha_h := ;
  h_gate_beta_h := ;
  tau_j := 1/(j_gate_alpha_j + j_gate_beta_j);
  j_infinity := 1/(1 + exp((71.55 + V)/7.43))^2;
  j_gate_alpha_j := ;
  j_gate_beta_j := ;
  K1_gate_alpha_K1 := 0.1/(1 + exp(0.06*(V - (reversal_potential + 200))));
  K1_gate_beta_K1 := (3*exp(0.0002*(V - reversal_potential + 100)) + exp(0.1*(V - (reversal_potential + 10))))/(1 + exp(-0.5*(V - reversal_potential)));
  r_gate_r_infinity := 1/(1 + exp((20 - V)/6));
  r_gate_tau_r := 9.5*exp(-(V + 40)^2/1800) + 0.8;
  s_gate_s_infinity := 1/(1 + exp((20 + V)/5));
  s_gate_tau_s := 85*exp(-(V + 45)^2/320) + 5/(1 + exp((V - 20)/5)) + 3;
  Xr1_gate_alpha_Xr1 := 450/(1 + exp((-45 - V)/10));
  Xr1_gate_beta_Xr1 := 6/(1 + exp((V + 30)/11.5));
  Xr1_gate_Xr1_infinity := 1/(1 + exp((-26 - V)/7));
  Xr1_gate_tau_Xr1 := 1*Xr1_gate_alpha_Xr1*Xr1_gate_beta_Xr1;
  Xr2_gate_alpha_Xr2 := 3/(1 + exp((-60 - V)/20));
  Xr2_gate_beta_Xr2 := 1.12/(1 + exp((V - 60)/20));
  Xr2_gate_Xr2_infinity := 1/(1 + exp((88 + V)/24));
  Xr2_gate_tau_Xr2 := 1*Xr2_gate_alpha_Xr2*Xr2_gate_beta_Xr2;
  Xs_gate_alpha_Xs := 1100/sqrt(1 + exp((-10 - V)/6));
  Xs_gate_beta_Xs := 1/(1 + exp((V - 60)/20));
  Xs_gate_Xs_infinity := 1/(1 + exp((-5 - V)/14));
  Xs_gate_tau_Xs := 1*Xs_gate_alpha_Xs*Xs_gate_beta_Xs;
  alpha_d := 1.4/(1 + exp((-35 - V)/13)) + 0.25;
  beta_d := 1.4/(1 + exp((5 + V)/5));
  tau_d := 1*alpha_d*beta_d + gamma_d;
  gamma_d := 1/(1 + exp((50 - V)/20));
  d_infinity := 1/(1 + exp((-5 - V)/7.5));
  tau_f := 1125*exp(-(V + 27)^2/240) + 165/(1 + exp((25 - V)/10)) + 80;
  f_infinity := 1/(1 + exp((20 + V)/7));
  fCa_gate_alpha_fCa := 1/(1 + (Cai0/0.000325)^8);
  fCa_gate_beta_fCa := 0.1/(1 + exp((Cai0 - 0.0005)/0.0001));
  fCa_gate_gamma_fCa := 0.2/(1 + exp((Cai0 - 0.00075)/0.0008));
  fCa_infinity := (fCa_gate_alpha_fCa + fCa_gate_beta_fCa + fCa_gate_gamma_fCa + 0.23)/1.46;
  g_infinity := ;
  NL_model_xHalfSL := 10000*2*pi*NL_model_radiusLV/236550;
  ForceExt := NL_model_ForceP + NL_model_ForceB;
  NL_model_cTnCaEff := NL_model_cTnCa/exp(NL_model_R*(NL_model_xHalfSL - NL_model_OptiHSL)^2);
  NL_model_Q_a := NL_model_Y_2*NL_model_cTnCaEff/1 - NL_model_Z_2*NL_model_cTnCaCB/1;
  NL_model_Q_b := NL_model_Y_1*Cai0*NL_model_cTn/1 - NL_model_Z_1*NL_model_cTnCa/1;
  NL_model_Q_r := NL_model_Y_3*NL_model_cTnCaCB/1 - NL_model_Z_3*NL_model_cTnCB*Cai0/1;
  NL_model_Q_d := NL_model_Y_4*NL_model_cTnCB/1;
  NL_model_Q_d1 := NL_model_Y_d*(NL_model_SlidingR*(NL_model_xHalfSL - NL_model_xInext - NL_model_xLLimitCB))^2*NL_model_cTnCaCB/1;
  NL_model_Q_d2 := NL_model_Y_d*(NL_model_SlidingR*(NL_model_xHalfSL - NL_model_xInext - NL_model_xLLimitCB))^2*NL_model_cTnCB/1;
  NL_model_cTn := 1 - NL_model_cTnCa - NL_model_cTnCaCB - NL_model_cTnCB;
  NL_model_cCaTropC := NL_model_trpnbar*(NL_model_Q_r + NL_model_Q_d2 - NL_model_Q_b)/1;
  NL_model_xhhh := NL_model_xHalfSL - NL_model_xInext;
  cTRPN := (NL_model_cTnCaCB + NL_model_cTnCB)*NL_model_trpnbar/1;
  NL_model_xNewCBF := NL_model_AForceCB*(NL_model_cTnCaCB + NL_model_cTnCB)*NL_model_trpnbar/1;
  NL_model_ForceP := ;
  NL_model_ForceB := NL_model_xNewCBF*NL_model_xhhh;
  V_LV := circulation_Vs_LV + circulation_V_LV0;
  NL_model_radiusLV := (3*V_LV/2/pi)^(1/3);
  NL_model_Tension := ForceExt*NL_model_Fmult;
  P_LV := 2*NL_model_Tension/NL_model_radiusLV*1000/133;
  circulation_P_RV := (P_LV - circulation_lvb)*circulation_rva/(circulation_lva - circulation_lvb) + (circulation_lva - P_LV)*circulation_rvb/(circulation_lva - circulation_lvb);
  circulation_P_A := circulation_Vs_A/circulation_C_A;
  circulation_P_V := circulation_Vs_V/circulation_C_V;
  circulation_P_PA := circulation_Vs_PA/circulation_C_PA;
  circulation_P_PV := circulation_Vs_PV/circulation_C_PV;
  circulation_P_AO := circulation_Vs_AO/circulation_C_AO;
  circulation_F_PV := ;
  circulation_F_LO := ;
  circulation_F_AO := (circulation_P_AO - circulation_P_A)/circulation_R_AO;
  circulation_F_A := (circulation_P_A - circulation_P_V)/circulation_R_A;
  circulation_F_V := ;
  circulation_F_RO := ;
  circulation_F_PA := (circulation_P_PA - circulation_P_PV)/circulation_R_PA;
  circulation_V_A := circulation_Vs_A + circulation_V_A0;
  circulation_V_AO := circulation_Vs_AO + circulation_V_AO0;
  circulation_V_V := circulation_Vs_V + circulation_V_V0;
  circulation_V_RV := circulation_Vs_RV + circulation_V_RV0;
  circulation_V_PA := circulation_Vs_PA + circulation_V_PA0;
  circulation_V_PV := circulation_Vs_PV + circulation_V_PV0;
  circulation_lva := circulation_EmaxLV*(V_LV - circulation_Vs_LV);
  circulation_rva := circulation_EmaxRV*(circulation_V_RV - circulation_Vs_RV);
  circulation_lvb := circulation_P0lv*(exp(circulation_kelv*V_LV) - 1);
  circulation_rvb := circulation_P0rv*(exp(circulation_kerv*circulation_V_RV) - 1);

  // Rate rules:
  V' = -Itotal/Cm;
  m' = (m_infinity - m)/tau_m;
  h' = (h_infinity - h)/tau_h;
  j' = (j_infinity - j)/tau_j;
  s' = (s_gate_s_infinity - s)/s_gate_tau_s;
  r' = (r_gate_r_infinity - r)/r_gate_tau_r;
  Xr1' = (Xr1_gate_Xr1_infinity - Xr1)/Xr1_gate_tau_Xr1;
  Xr2' = (Xr2_gate_Xr2_infinity - Xr2)/Xr2_gate_tau_Xr2;
  Xs' = (Xs_gate_Xs_infinity - Xs)/Xs_gate_tau_Xs;
  Nai0' = -Na_flux0;
  d' = (d_infinity - d)/tau_d;
  f' = (f_infinity - f)/tau_f;
  fCa' = ;
  Ki0' = -K_flux0;
  Cai_total' = Ca_flux0 + Ca_SR_flux0;
  CaSR_total' = vC/vSR*(-Ca_SR_flux0);
  g' = ;
  NL_model_cTnCa' = NL_model_Q_b*1 - NL_model_Q_a*1;
  NL_model_cTnCaCB' = NL_model_Q_a*1 - NL_model_Q_r*1 - NL_model_Q_d1*1;
  NL_model_cTnCB' = NL_model_Q_r*1 - NL_model_Q_d*1 - NL_model_Q_d2*1;
  NL_model_xInext' = NL_model_SlidingR*(NL_model_xHalfSL - NL_model_xInext - NL_model_xLLimitCB);
  circulation_Vs_LV' = circulation_F_PV - circulation_F_LO;
  circulation_Vs_RV' = circulation_F_V - circulation_F_RO;
  circulation_Vs_A' = circulation_F_AO - circulation_F_A;
  circulation_Vs_V' = circulation_F_A - circulation_F_V;
  circulation_Vs_PA' = circulation_F_RO - circulation_F_PA;
  circulation_Vs_PV' = circulation_F_PA - circulation_F_PV;
  circulation_Vs_AO' = circulation_F_LO - circulation_F_AO;
end
