// SBML level 2 version 4

model siebert_2008____main()
  // Originally created by libAntimony v1.3 (using libSBML 4.1.0-b2)

  // Compartments:
  compartment default_compartment = 1;

  // Parameters:
  contraction_L_1 = -24;
  contraction_L_2 = -14;
  contraction_L_3 = 4;
  contraction_L_4 = 14;
  contraction_f_c = 0.51;
  contraction_v_max = -152;
  contraction_curv = 9.5;
  contraction_k_1 = 0.0064;
  contraction_k_2 = 0.414;
  contraction_F_1 = 8.9;
  contraction_d_LSEC1 = 2.9;
  contraction_k_sh = 2.5;
  contraction_L_m = 2.6;
  contraction_F_im = 20.6;
  contraction_tau = 0.065;
  contraction_delta_L_sec1 = 4.1;
  contraction_k = 8.2;
  contraction_L_cc = 0.2;
  contraction_A = 1;
  time_ = ;
  contraction_f_v = ;

  // Assignment rules:
  contraction_v_cc := 1/contraction_f_v*(contraction_f_sec/(contraction_A*contraction_f_L*contraction_F_im));
  contraction_f_L := ;
  contraction_f_sec := ;
  contraction_delta_L_sec := contraction_L_mtc - contraction_L_cc - contraction_L_m;
  contraction_L_mtc := ;

  // Rate rules:
  contraction_L_cc' = contraction_v_cc;
end
