// SBML level 2 version 4

model siebert_2008____main()
  // Originally created by libAntimony v1.3 (using libSBML 4.1.0-b2)

  // Compartments:
  compartment default_compartment = 1;

  // Parameters:
  contraction_L_1 = -23;
  contraction_L_2 = -14;
  contraction_L_3 = 2;
  contraction_L_4 = 19;
  contraction_f_c = 0.49;
  contraction_v_max = -141;
  contraction_curv = 5.8;
  contraction_k_1 = 0.012;
  contraction_k_2 = 0.317;
  contraction_F_1 = 4.1;
  contraction_d_LSEC1 = 4.1;
  contraction_k_sh = 3.3;
  contraction_L_m = 0.3;
  contraction_F_im = 18.1;
  contraction_tau = 0.006;
  contraction_delta_L_sec1 = 4.1;
  contraction_delta_L_pec = 0.2;
  contraction_k = 3.5;
  contraction_A = 1;
  contraction_L_mslack = 0.3;
  time_ = ;
  contraction_f_v = ;

  // Assignment rules:
  contraction_v_cc := 1/contraction_f_v*((contraction_f_sec - contraction_f_pec)/(contraction_A*contraction_f_L*contraction_F_im));
  contraction_f_L := ;
  contraction_f_sec := ;
  contraction_f_pec := ;
  contraction_delta_L_sec := contraction_L_mtc - contraction_delta_L_pec - contraction_L_mslack;
  contraction_L_mtc := ;

  // Rate rules:
  contraction_delta_L_pec' = contraction_v_cc;
end
