// SBML level 2 version 4

model skouibine_trayanova_moore_1999_version02____main()
  // Originally created by libAntimony v1.3 (using libSBML 4.1.0-b2)

  // Compartments:
  compartment default_compartment = 1;

  // Parameters:
  V = -86.9;
  membrane_C = 0.01;
  fast_sodium_current_g_Na = 0.15;
  fast_sodium_current_E_Na = 40;
  m = 0;
  h = 0.99;
  x1 = 0;
  slow_inward_current_g_s = 0.0009;
  slow_inward_current_Cai = 0.0001;
  d = 0;
  f = 1;
  slow_inward_current_slow_inward_current_d_gate_R_d = 1;
  slow_inward_current_slow_inward_current_f_gate_R_f = 1;
  time_ = ;
  membrane_I_stim = ;

  // Assignment rules:
  i_Na := fast_sodium_current_g_Na*m^3*h*(V - fast_sodium_current_E_Na);
  i_s := slow_inward_current_g_s*d*f*(V - slow_inward_current_E_s);
  i_x1 := x1*0.8e-2*((exp(0.04*(V + 77)) - 1)/exp(0.04*(V + 35)));
  i_K1 := 0.35e-2*(4*((exp(0.04*(V + 85)) - 1)/(exp(0.08*(V + 53)) + exp(0.04*(V + 53)))) + 0.2*((V + 23)/(1 - exp(-0.04*(V + 23)))));
  fast_sodium_current_fast_sodium_current_m_gate_alpha_m := ;
  fast_sodium_current_fast_sodium_current_m_gate_beta_m := ;
  fast_sodium_current_fast_sodium_current_h_gate_alpha_h := ;
  fast_sodium_current_fast_sodium_current_h_gate_beta_h := 1.7/(1 + exp(-0.095*V - 1.9475));
  time_dependent_outward_current_time_dependent_outward_current_x1_gate_alpha_x1 := ;
  time_dependent_outward_current_time_dependent_outward_current_x1_gate_beta_x1 := 0.0013*(exp(V*(-0.06) - 1.2)/(1 + exp(-0.04*V - 0.8)));
  slow_inward_current_E_s := -82.3 - 13.0287*ln(slow_inward_current_Cai*0.001);
  slow_inward_current_slow_inward_current_d_gate_alpha_d := 0.095*exp(-((V - 5)/100))/(1 + exp(-((V - 5)/13.89)));
  slow_inward_current_slow_inward_current_d_gate_beta_d := 0.07*exp(-((V + 44)/59))/(1 + exp((V + 44)/20));
  slow_inward_current_slow_inward_current_f_gate_alpha_f := 0.012*exp(-((V + 28)/125))/(1 + exp((V + 28)/6.67));
  slow_inward_current_slow_inward_current_f_gate_beta_f := 0.0065*exp(-((V + 30)/50))/(1 + exp(-((V + 30)/5)));

  // Rate rules:
  V' = (membrane_I_stim - (i_Na + i_s + i_x1 + i_K1))/membrane_C;
  m' = fast_sodium_current_fast_sodium_current_m_gate_alpha_m*(1 - m) - fast_sodium_current_fast_sodium_current_m_gate_beta_m*m;
  h' = fast_sodium_current_fast_sodium_current_h_gate_alpha_h*(1 - h) - fast_sodium_current_fast_sodium_current_h_gate_beta_h*h;
  x1' = time_dependent_outward_current_time_dependent_outward_current_x1_gate_alpha_x1*(1 - x1) - time_dependent_outward_current_time_dependent_outward_current_x1_gate_beta_x1*x1;
  slow_inward_current_Cai' = ;
  d' = slow_inward_current_slow_inward_current_d_gate_alpha_d/slow_inward_current_slow_inward_current_d_gate_R_d*(1 - d) - slow_inward_current_slow_inward_current_d_gate_beta_d*d;
  f' = slow_inward_current_slow_inward_current_f_gate_alpha_f/slow_inward_current_slow_inward_current_f_gate_R_f*(1 - f) - slow_inward_current_slow_inward_current_f_gate_beta_f*f;
end
