// SBML level 2 version 4

model sneyd_1995____main()
  // Originally created by libAntimony v1.3 (using libSBML 4.1.0-b2)

  // Compartments:
  compartment default_compartment = 1;

  // Parameters:
  P0 = 0;
  P_V_p = 0.08;
  P_k_p = 1;
  P_IPR_3_flux = 0.72;
  c0 = 0.3;
  J_flux_k_flux = 3;
  h0 = 1;
  J_flux_b = 0.11;
  J_flux_k_1 = 0.7;
  J_pump_gamma = 1;
  J_pump_k_gamma = 0.27;
  J_leak_beta = 0.15;
  mu_k_mu = 0.01;
  h_k_2 = 0.7;
  h_tau_h = 0.2;
  time_ = ;

  // Assignment rules:
  J_flux0 := J_flux_k_flux*mu0*h0*(J_flux_b + (1 - J_flux_b)*c0/(J_flux_k_1 + c0));
  J_pump0 := J_pump_gamma*c0^2/(J_pump_k_gamma^2 + c0^2);
  J_leak0 := J_leak_beta;
  mu0 := P0^3/(mu_k_mu^3 + P0^3);

  // Rate rules:
  P0' = ;
  c0' = J_flux0 - J_pump0 + J_leak0;
  h0' = (h_k_2^2/(h_k_2^2 + c0^2) - h0)/h_tau_h;
end
