// SBML level 2 version 4

model soboleva_model_2005_version01____main()
  // Originally created by libAntimony v1.4 (using libSBML 4.1.0-b2)

  // Compartments:
  compartment default_compartment = 1;

  // Parameters:
  R0 = 1;
  R_delta_R = 1.905;
  U0 = 1;
  U_delta_U = 7.5;
  alpha0 = 4.15;
  alpha1 = 3.02;
  d01 = 13;
  d12 = 4.72e3;
  B10 = 1;
  B20 = 1;
  B1_delta_b1 = 7.5;
  B2_delta_b2 = 50;
  P_PE = 20.55;
  P_G = 35.6;
  P_ti = 1;
  P_T = 9;
  P00 = 0.25;
  f1_a = 3.58e5;
  f1_a0 = 2.33e4;
  f1_b = 100;
  f1_b0 = 263;
  x0 = 0;
  x_P1 = 20;
  x_s = 3.71e5;
  x_delta_x = 0.207;
  f2_kappa = 2.4e5;
  f2_kappa0 = 6.55e3;
  time_ = ;

  // Assignment rules:
  R_logR := ln(R0);
  f10 := f1_a0*(1 - B20/(f1_b + B20)) + x0*(1 - exp(-x0/f1_a))*B20/(f1_b0 + B20);
  U_logU := ln(U0);
  P0 := P00 + P_PE*P_q;
  f20 := f2_kappa*R0/(f2_kappa0 + R0);
  B1_logB1 := ln(B10);
  B2_logB2 := ln(B20);
  P_q := ;

  // Rate rules:
  R0' = f10 - R_delta_R*R0;
  U0' = f20 + d01*B10 + d12*B20 - (U_delta_U*U0 + alpha0*P0*U0 + alpha1*B10*U0);
  B10' = alpha0*P0*U0 + d12*B20 - (d01*B10 + B1_delta_b1*B10 + alpha1*B10*U0);
  B20' = alpha1*B10*U0 - (d12*B20 + B2_delta_b2*B20);
  x0' = x_s*(P0 - P00)/(P0 + x_P1) - x_delta_x*x0;
end
