// SBML level 2 version 4

model spiro_model_1997____main()
  // Originally created by libAntimony v1.3 (using libSBML 4.1.0-b2)

  // Compartments:
  compartment default_compartment = 1;

  // Parameters:
  T20 = 0.01;
  LT20 = 0.01;
  T2R0 = 0.01;
  R0 = 0.3;
  T30 = 0.01;
  L0 = 3;
  Bp0 = 0.01;
  T2p0 = 0.01;
  Y00 = 20;
  Yp0 = 0.01;
  B00 = 1.7;
  k5 = 7e7;
  k_5 = 70;
  k8 = 15;
  k_1 = 4e5;
  ky = 3e7;
  kb = 8e5;
  k1a = 10;
  k1b = 17;
  k1c = 0.17;
  LT30 = 0.01;
  T3R0 = 0.01;
  T40 = 0.01;
  T3p0 = 0.01;
  k6 = 7e7;
  k_6 = 70;
  k9 = 45;
  k_2 = 3e4;
  k2a = 10;
  k2b = 17;
  k2c = 0.017;
  LT40 = 0.01;
  T4p0 = 0.01;
  k7 = 7e7;
  k_7 = 70;
  k10 = 48;
  LT2p0 = 0.01;
  T2pR0 = 0.01;
  LT3p0 = 0.01;
  T3pR0 = 0.01;
  LT4p0 = 0.01;
  LT2R0 = 0.01;
  k11 = 0;
  k_3 = 4e5;
  k3a = 10;
  k3b = 17;
  k3c = 5.1;
  LT3R0 = 0.01;
  k12 = 16.5;
  k_4 = 3e4;
  k4a = 10;
  k4b = 17;
  k4c = 0.51;
  k13 = 34.56;
  LT2pR0 = 0.01;
  LT3pR0 = 0.01;
  Z0 = 40;
  k_y = 5e5;
  k_b = 0.35;
  time_ = ;

  // Assignment rules:
  T2_Vmax := k1c*(R0 + T2R0);
  T2_KR := (k1a + k1c)/k1b;
  T3_Vmax := k2c*(R0 + T3R0);
  T3_KR := (k2a + k2c)/k2b;
  T2p_Vmax := k1c*(R0 + T2pR0);
  T2p_KR := (k1a + k1c)/k1b;
  T3p_Vmax := k2c*(R0 + T3pR0);
  T3p_KR := (k2a + k2c)/k2b;
  LT2_Vmax := k3c*(R0 + LT2R0);
  LT2_KR := (k3a + k3c)/k3b;
  LT3_Vmax := k4c*(R0 + LT3R0);
  LT3_KR := (k4a + k4c)/k4b;
  LT2p_Vmax := k3c*(R0 + LT2pR0);
  LT2p_KR := (k3a + k3c)/k3b;
  LT3p_Vmax := k4c*(R0 + LT3pR0);
  LT3p_KR := (k4a + k4c)/k4b;
  P0 := T2p0 + LT2p0 + T3p0 + LT3p0 + T4p0 + LT4p0;

  // Rate rules:
  T20' = k_5*LT20 + k_1*Bp0*T30 + ky*T2p0*(Y00 - Yp0) + kb*T2p0*(B00 - Bp0) - (k5*L0*T20 + k8*T20 + T2_Vmax*(T20/(T2_KR + T20)));
  LT20' = k_5*T20 + k_3*Bp0*LT30 + ky*LT2p0*(Y00 - Yp0) + kb*LT2p0*(B00 - Bp0) - (k5*L0*LT20 + k11*LT20 + LT2_Vmax*(LT20/(LT2_KR + LT20)));
  T2R0' = k1b*T20*R0 - (k1a*T2R0 + k1c*T2R0);
  T30' = k_6*LT30 + k_2*Bp0*T40 + ky*T3p0*(Y00 - Yp0) + kb*T3p0*(B00 - Bp0) - (k6*L0*T30 + k9*T30 + T3_Vmax*(T30/(T3_KR + T30)));
  Bp0' = kb*P0*(B00 - Bp0) - k_b*Bp0;
  T2p0' = k_5*LT2p0 + k_1*Bp0*T3p0 + ky*T20*(Y00 - Yp0) + kb*T20*(B00 - Bp0) - (k5*L0*T2p0 + k8*T2p0 + T2p_Vmax*(T2p0/(T2p_KR + T2p0)));
  Yp0' = ky*P0*(Y00 - Yp0) - k_y*Z0*Yp0;
  LT30' = k_6*T30 + k_4*Bp0*LT40 + ky*LT3p0*(Y00 - Yp0) + kb*LT3p0*(B00 - Bp0) - (k6*L0*LT30 + k12*LT30 + LT3_Vmax*(LT30/(LT3_KR + LT30)));
  T3R0' = k2b*T30*R0 - (k2a*T3R0 + k2c*T3R0);
  T40' = k_7*LT40 + ky*T4p0*(Y00 - Yp0) + kb*T4p0*(B00 - Bp0) - (k7*L0*T40 + k10*T40);
  T3p0' = k_6*LT3p0 + k_2*Bp0*T4p0 + ky*T30*(Y00 - Yp0) + kb*T30*(B00 - Bp0) - (k6*L0*T3p0 + k9*T3p0 + T3p_Vmax*(T3p0/(T3p_KR + T3p0)));
  LT40' = k_7*T40 + ky*LT4p0*(Y00 - Yp0) + kb*LT4p0*(B00 - Bp0) - (k7*L0*LT40 + k13*LT40);
  T4p0' = k_7*LT4p0 + ky*T40*(Y00 - Yp0) + kb*T40*(B00 - Bp0) - (k7*L0*T4p0 + k10*T4p0);
  LT2p0' = k_5*T2p0 + k_3*Bp0*LT3p0 + ky*LT20*(Y00 - Yp0) + kb*LT20*(B00 - Bp0) - (k5*L0*LT2p0 + k11*LT2p0 + LT2p_Vmax*(LT2p0/(LT2p_KR + LT2p0)));
  T2pR0' = k1b*T2p0*R0 - (k1a*T2pR0 + k1c*T2pR0);
  LT3p0' = k_6*T3p0 + k_4*Bp0*LT4p0 + ky*LT30*(Y00 - Yp0) + kb*LT30*(B00 - Bp0) - (k6*L0*LT3p0 + k12*LT3p0 + LT3p_Vmax*(LT3p0/(LT3p_KR + LT3p0)));
  T3pR0' = k2b*T3p0*R0 - (k2a*T3pR0 + k2c*T3pR0);
  LT4p0' = k_7*T4p0 + ky*LT4p0*(Y00 - Yp0) + kb*LT4p0*(B00 - Bp0) - (k7*L0*LT4p0 + k13*LT4p0);
  LT2R0' = k3b*LT20*R0 - (k3a*LT2R0 + k3c*LT2R0);
  LT3R0' = k4b*LT30*R0 - (k4a*LT3R0 + k4c*LT3R0);
  LT2pR0' = k3b*LT2p0*R0 - (k3a*LT2pR0 + k3c*LT2pR0);
  LT3pR0' = k4b*LT3p0*R0 - (k4a*LT3pR0 + k4c*LT3pR0);
end
