// SBML level 2 version 4

model sriram_bernot_kepes_2007_version01____main()
  // Originally created by libAntimony v1.3 (using libSBML 4.1.0-b2)

  // Compartments:
  compartment default_compartment = 1;

  // Parameters:
  j_1 = 0.9;
  j_2 = 0.5;
  j_3 = 0.6;
  v_d1 = 6;
  v_d2 = 1.052;
  v_d3 = 3;
  k_d1 = 0.8;
  k_d2 = 0.9;
  k_d3 = 0.8;
  k_c1 = 0.2;
  k_c2 = 0.22;
  k_c3 = 0.6;
  k_m1 = 5;
  k_m2 = 5;
  k_m3 = 5;
  v_12 = 15;
  v_11 = 15;
  v_10 = 15;
  k_120 = 10;
  k_110 = 10;
  k_100 = 10;
  k_d4 = 0.16;
  k_d5 = 0.16;
  k_d6 = 0.16;
  n = 2;
  C_10 = 0;
  C_20 = 0;
  T_10 = 6;
  C_30 = 0;
  T_20 = 5;
  T_30 = 1;
  time_ = ;

  // Rate rules:
  C_10' = v_12*T_10^n/(k_120^n + T_10^n + C_20^n) - k_d4*C_10;
  C_20' = v_11*T_20^n/(k_110^n + T_20^n + C_30^n) - k_d5*C_20;
  T_10' = j_1 + v_d1*T_30^n/(k_m1^n + T_30^n) + k_c1*C_10 - k_d1*T_10;
  C_30' = v_10*T_30^n/(k_100^n + T_30^n + C_10^n) - k_d6*C_30;
  T_20' = j_2 + v_d2*T_10^n/(k_m2^n + T_10^n) + k_c2*C_20 - k_d2*T_20;
  T_30' = j_3 + v_d3*T_20^n/(k_m3^n + T_20^n) + k_c3*C_30 - k_d3*T_30;
end
