// SBML level 2 version 4

model starbuck_wiley_lauffenburger_1990_version01____main()
  // Originally created by libAntimony v1.3 (using libSBML 4.1.0-b2)

  // Compartments:
  compartment default_compartment = 1;

  // Parameters:
  Rs0 = ;
  kr = 3.6e-2;
  ks = 1;
  kt = 0.05;
  krec_c = 0.05;
  krec_i = 0.05;
  Ric0 = ;
  Rii0 = ;
  Lo0 = ;
  Cs0 = ;
  kc = 3.8e-7;
  Ts0 = ;
  Ps0 = ;
  Cic0 = ;
  Cii0 = ;
  lamda = 1.8;
  krec_p = 20;
  Pi_0 = ;
  Lic0 = ;
  kr_ = 3.6e-1;
  kdeg = 0.02;
  Lii0 = ;
  ku_ = 0.1216;
  Ti0 = ;
  kuc = 1.2e-2;
  kinetic_constants_kf = 1.2e6;
  kinetic_constants_K_DC = 3e-8;
  kinetic_constants_K_DT = 3.2e5;
  kinetic_constants_Kcp = 3.125e-6;
  kinetic_constants_RT = 1.8e5;
  kinetic_constants_PT = 6.6e4;
  kinetic_constants_PT_RT = 0.37;
  kinetic_constants_Vendosome = 5e-19;
  kinetic_constants_Vvesicle = 5e-15;
  kinetic_constants_Nav = 6.0221419e23;
  time_ = ;
  fr = ;
  kinetic_constants_cell = ;
  kinetic_constants_plate = ;
  kinetic_constants_L = ;

  // Assignment rules:
  kfc := kinetic_constants_kf*numcell/(kinetic_constants_Nav*kinetic_constants_Vplate);
  numcell := kinetic_constants_cell/kinetic_constants_plate;
  ku := kc/kinetic_constants_Kcp;
  kfe := kinetic_constants_kf/(kinetic_constants_Nav*kinetic_constants_Vendosome);
  kfv := kinetic_constants_kf/(kinetic_constants_Nav*kinetic_constants_Vvesicle);
  kinetic_constants_Vplate := kinetic_constants_L/kinetic_constants_plate;

  // Rate rules:
  Rs0' = kr*Cs0 + krec_c*Ric0 + krec_i*(1 - fr)*Rii0 + ks - (kfc/numcell*Rs0*Lo0 + kt*Rs0);
  Ric0' = kr*Cic0 + kt*Rs0 - (kfv/numcell*Ric0*Lic0 + krec_c*Ric0);
  Rii0' = kr_*Cii0 - (kfe/numcell*Rii0*Lii0 + krec_i*(1 - fr)*Rii0 + fr*kdeg*Rii0);
  Lo0' = numcell*kr*Cs0 + krec_c*Lic0 - kfc*Rs0*Lo0;
  Cs0' = ku*Ts0 + krec_c*Cic0 + krec_i*(1 - fr)*Cii0 - (kfc/numcell*Rs0*Lo0 + kr*Cs0 + kc*Cs0*Ps0 + kt*Cs0);
  Ts0' = kc*Cs0*Ps0 - (ku*Ts0 + lamda*Ts0);
  Ps0' = ku*Ts0 + krec_p*Pi_0 - (kc*Cs0*Ps0 + lamda*Ps0);
  Cic0' = kfv/numcell*Ric0*Lic0 + kt*Cs0 - (kr*Cic0 + krec_c*Cic0);
  Cii0' = kfe/numcell*Rii0*Lii0 + ku_*Ti0 - (kr_*Cii0 + fr*kdeg*Cii0 + krec_i*(1 - fr)*Cii0);
  Pi_0' = ku_*Ti0 + lamda*Pi_0 - krec_p*Pi_0;
  Lic0' = numcell*kr*Cic0 - (krec_c*Lic0 + kfv*Ric0*Lic0);
  Lii0' = numcell*kr_*Cii0 - (kdeg*Lii0 + kfe*Rii0*Lii0);
  Ti0' = lamda*Ts0 - (ku_*Ti0 + kdeg*Ti0);
end
