// SBML level 2 version 4

model stilianakis_1997____main()
  // Originally created by libAntimony v1.4 (using libSBML 4.1.0-b2)

  // Compartments:
  compartment default_compartment = 1;

  // Parameters:
  X0 = 1e11;
  X_mu0 = 4e-3;
  X_lamda = 4e8;
  K0 = 1.35e-14;
  V0 = 1;
  Y0 = 1;
  Y_mu1 = 0.3;
  Y_a = 1;
  Z0 = 0;
  V_mu2 = 1;
  V_beta = 1e3;
  V_b = 1;
  Z_theta = 1e-6;
  Z_rho = 0.5;
  Z_C1 = 0.04;
  Z_C2 = 1e3;
  Z_X0 = 1e11;
  K_omega = 1e-16;
  K_Kmax = 20;
  time_ = ;

  // Assignment rules:
  CD4_CD4 := (X0 + Y0)/1e11;
  Z_f_X := (1 + Z_C1)*(X0/Z_X0)^2/(Z_C1 + (X0/Z_X0)^2);
  Z_g_V := V0/(Z_C2 + V0);

  // Rate rules:
  X0' = X_lamda - (X_mu0*X0 + K0*V0*X0);
  K0' = K_omega*V0*(K_Kmax - K0);
  V0' = V_beta*Y0 - V_mu2*(1 + V_b*Z0)*V0;
  Y0' = K0*V0*Y0 - Y_mu1*(1 + Y_a*Z0)*Y0;
  Z0' = Z_theta*Z_g_V + Z_rho*(Z_f_X - Z0)*Z0;
end
