// SBML level 2 version 4

model tabak_2007_b____main()
  // Originally created by libAntimony v1.3 (using libSBML 4.1.0-b2)

  // Compartments:
  compartment default_compartment = 1;

  // Parameters:
  V = -60;
  membrane_C = 10;
  I_K_gK = 4;
  VK = -75;
  n = 0.1;
  I_K_n_mod_lambda_ = 0.7;
  I_K_n_mod_tau_n = 30;
  I_K_n_mod_vn = -5;
  I_K_n_mod_sn = 10;
  I_Ca_gCa = 2;
  VCa = 50;
  I_Ca_m_vm = -20;
  I_Ca_m_sm = 12;
  I_SK_gSK = 1.7;
  I_SK_ks = 0.5;
  Ca0 = 0.1;
  I_DA_gA = 25;
  h = 0.1;
  I_DA_a_va = -20;
  I_DA_a_sa = 10;
  I_DA_h_mod_tau_h = 20;
  I_DA_h_mod_vh = -60;
  I_DA_h_mod_sh = 5;
  Ca_fc = 0.01;
  Ca_alpha = 0.0015;
  Ca_kc = 0.16;
  PRL_kPRL = 1;
  time_ = ;

  // Assignment rules:
  I_Ca0 := I_Ca_gCa*m_infinity*(V - VCa);
  I_K0 := I_K_gK*n*(V - VK);
  I_SK0 := I_SK_gSK*I_SK_s_infinity*(V - VK);
  I_DA0 := I_DA_I_A;
  I_K_n_mod_n_infinity := 1/(1 + exp((I_K_n_mod_vn - V)/I_K_n_mod_sn));
  m_infinity := 1/(1 + exp((I_Ca_m_vm - V)/I_Ca_m_sm));
  I_SK_s_infinity := Ca0^2/(Ca0^2 + I_SK_ks^2);
  I_DA_I_A := I_DA_gA*a_infinity*h*(V - VK);
  a_infinity := 1/(1 + exp((I_DA_a_va - V)/I_DA_a_sa));
  I_DA_h_mod_h_infinity := 1/(1 + exp((V - I_DA_h_mod_vh)/I_DA_h_mod_sh));
  PRL_PRL := PRL_kPRL*Ca0^4;

  // Rate rules:
  V' = -(I_Ca0 + I_K0 + I_SK0 + I_DA0)/membrane_C;
  n' = I_K_n_mod_lambda_*(I_K_n_mod_n_infinity - n)/I_K_n_mod_tau_n;
  Ca0' = -Ca_fc*(Ca_alpha*I_Ca0 + Ca_kc*Ca0);
  h' = (I_DA_h_mod_h_infinity - h)/I_DA_h_mod_tau_h;
end
