// SBML level 2 version 4

model Hinch_et_al_2004____main()
  // Originally created by libAntimony v1.3 (using libSBML 4.1.0-b2)

  // Compartments:
  compartment default_compartment = 1;

  // Parameters:
  V_myo = 25840;
  V_SR = 2098;
  A_cap = 15340;
  R = 8314.5;
  T = 295;
  F = 96487;
  g_D = 0.065;
  J_R = 0.02;
  J_L = 0.000913;
  N = 50000;
  Ca_i = 0.0001;
  Ca_o = 1;
  Ca_SR = 0.7;
  CaRU_CaRU_Transitions_V_L = -2;
  CaRU_CaRU_Transitions_del_VL = 7;
  CaRU_CaRU_Transitions_phi_L = 2.35;
  CaRU_CaRU_Transitions_t_L = 1;
  CaRU_CaRU_Transitions_tau_L = 650;
  CaRU_CaRU_Transitions_tau_R = 2.43;
  CaRU_CaRU_Transitions_phi_R = 0.05;
  CaRU_CaRU_Transitions_theta_R = 0.012;
  CaRU_CaRU_Transitions_K_RyR = 0.041;
  CaRU_CaRU_Transitions_K_L = 0.00022;
  CaRU_CaRU_Transitions_a = 0.0625;
  CaRU_CaRU_Transitions_b = 14;
  CaRU_CaRU_Transitions_c = 0.01;
  CaRU_CaRU_Transitions_d = 100;
  CaRU_z_1 = 0.98859;
  CaRU_z_2 = 0.0087302;
  CaRU_z_3 = 0.0026566;
  Na_Ca_Exchanger_K_mNa = 87.5;
  Na_Ca_Exchanger_K_mCa = 1.38;
  Na_Ca_Exchanger_eta = 0.35;
  Na_Ca_Exchanger_k_sat = 0.1;
  Na_Ca_Exchanger_g_NCX = 0.0385;
  Na_i = 10;
  Na_o = 140;
  SERCA_g_SERCA = 0.00045;
  SERCA_K_SERCA = 0.0005;
  Sarcolemmal_Ca_pump_g_pCa = 3.5e-6;
  Sarcolemmal_Ca_pump_K_mpCa = 0.0005;
  Background_Ca_current_g_CaB = 2.6875e-8;
  SR_Ca_leak_current_g_SRl = 1.8951e-5;
  troponin_Ca_buffer_k_m_TRPN = 0.04;
  troponin_Ca_buffer_k_p_TRPN = 40;
  troponin_Ca_buffer_B_TRPN = 0.07;
  TRPN = 0.0636364;
  calmodulin_Ca_buffer_k_CMDN = 0.002382;
  calmodulin_Ca_buffer_B_CMDN = 0.05;
  time_ = ;

  // Assignment rules:
  V := ;
  FVRT := F*V/(R*T);
  FVRT_Ca := 2*FVRT;
  I_RyR := (CaRU_z_1*CaRU_J_R1 + CaRU_z_3*CaRU_J_R3)*N/V_myo;
  I_LCC := (CaRU_z_1*CaRU_J_L1 + CaRU_z_2*CaRU_J_L2)*N/V_myo;
  CaRU_C_oc := ;
  CaRU_C_co := (Ca_i + J_R/g_D*Ca_SR)/(1 + J_R/g_D);
  CaRU_CaRU_Transitions_t_R := 1.17*CaRU_CaRU_Transitions_t_L;
  CaRU_CaRU_Transitions_expVL := exp((V - CaRU_CaRU_Transitions_V_L)/CaRU_CaRU_Transitions_del_VL);
  CaRU_alpha_p := CaRU_CaRU_Transitions_expVL/(CaRU_CaRU_Transitions_t_L*(CaRU_CaRU_Transitions_expVL + 1));
  CaRU_alpha_m := CaRU_CaRU_Transitions_phi_L/CaRU_CaRU_Transitions_t_L;
  CaRU_beta_poc := CaRU_C_oc^2/(CaRU_CaRU_Transitions_t_R*(CaRU_C_oc^2 + CaRU_CaRU_Transitions_K_RyR^2));
  CaRU_beta_pcc := Ca_i^2/(CaRU_CaRU_Transitions_t_R*(Ca_i^2 + CaRU_CaRU_Transitions_K_RyR^2));
  CaRU_beta_m := CaRU_CaRU_Transitions_phi_R/CaRU_CaRU_Transitions_t_R;
  CaRU_epsilon_pco := CaRU_C_co*(CaRU_CaRU_Transitions_expVL + CaRU_CaRU_Transitions_a)/(CaRU_CaRU_Transitions_tau_L*CaRU_CaRU_Transitions_K_L*(CaRU_CaRU_Transitions_expVL + 1));
  CaRU_epsilon_pcc := Ca_i*(CaRU_CaRU_Transitions_expVL + CaRU_CaRU_Transitions_a)/(CaRU_CaRU_Transitions_tau_L*CaRU_CaRU_Transitions_K_L*(CaRU_CaRU_Transitions_expVL + 1));
  CaRU_epsilon_m := CaRU_CaRU_Transitions_b*(CaRU_CaRU_Transitions_expVL + CaRU_CaRU_Transitions_a)/(CaRU_CaRU_Transitions_tau_L*(CaRU_CaRU_Transitions_b*CaRU_CaRU_Transitions_expVL + CaRU_CaRU_Transitions_a));
  CaRU_mu_poc := (CaRU_C_oc^2 + CaRU_CaRU_Transitions_c*CaRU_CaRU_Transitions_K_RyR^2)/(CaRU_CaRU_Transitions_tau_R*(CaRU_C_oc^2 + CaRU_CaRU_Transitions_K_RyR^2));
  CaRU_mu_pcc := (Ca_i^2 + CaRU_CaRU_Transitions_c*CaRU_CaRU_Transitions_K_RyR^2)/(CaRU_CaRU_Transitions_tau_R*(Ca_i^2 + CaRU_CaRU_Transitions_K_RyR^2));
  CaRU_mu_moc := CaRU_CaRU_Transitions_theta_R*CaRU_CaRU_Transitions_d*(CaRU_C_oc^2 + CaRU_CaRU_Transitions_c*CaRU_CaRU_Transitions_K_RyR^2)/(CaRU_CaRU_Transitions_tau_R*(CaRU_CaRU_Transitions_d*CaRU_C_oc^2 + CaRU_CaRU_Transitions_c*CaRU_CaRU_Transitions_K_RyR^2));
  CaRU_mu_mcc := CaRU_CaRU_Transitions_theta_R*CaRU_CaRU_Transitions_d*(Ca_i^2 + CaRU_CaRU_Transitions_c*CaRU_CaRU_Transitions_K_RyR^2)/(CaRU_CaRU_Transitions_tau_R*(CaRU_CaRU_Transitions_d*Ca_i^2 + CaRU_CaRU_Transitions_c*CaRU_CaRU_Transitions_K_RyR^2));
  CaRU_CaRU_states_denom := (CaRU_alpha_p + CaRU_alpha_m)*((CaRU_alpha_m + CaRU_beta_m + CaRU_beta_poc)*(CaRU_beta_m + CaRU_beta_pcc) + CaRU_alpha_p*(CaRU_beta_m + CaRU_beta_poc));
  CaRU_y_oc := CaRU_alpha_p*CaRU_beta_m*(CaRU_alpha_p + CaRU_alpha_m + CaRU_beta_m + CaRU_beta_pcc)/CaRU_CaRU_states_denom;
  CaRU_y_co := CaRU_alpha_m*(CaRU_beta_pcc*(CaRU_alpha_m + CaRU_beta_m + CaRU_beta_poc) + CaRU_beta_poc*CaRU_alpha_p)/CaRU_CaRU_states_denom;
  CaRU_y_oo := CaRU_alpha_p*(CaRU_beta_poc*(CaRU_alpha_p + CaRU_beta_m + CaRU_beta_pcc) + CaRU_beta_pcc*CaRU_alpha_m)/CaRU_CaRU_states_denom;
  CaRU_y_cc := CaRU_alpha_m*CaRU_beta_m*(CaRU_alpha_m + CaRU_alpha_p + CaRU_beta_m + CaRU_beta_poc)/CaRU_CaRU_states_denom;
  CaRU_y_ci := CaRU_alpha_m/(CaRU_alpha_p + CaRU_alpha_m);
  CaRU_y_oi := CaRU_alpha_p/(CaRU_alpha_p + CaRU_alpha_m);
  CaRU_y_ic := CaRU_beta_m/(CaRU_beta_pcc + CaRU_beta_m);
  CaRU_y_io := CaRU_beta_pcc/(CaRU_beta_pcc + CaRU_beta_m);
  CaRU_y_ii := 1 - CaRU_y_oc - CaRU_y_co - CaRU_y_oo - CaRU_y_cc - CaRU_y_ci - CaRU_y_ic - CaRU_y_oi - CaRU_y_io;
  CaRU_r_1 := CaRU_y_oc*CaRU_mu_poc + CaRU_y_cc*CaRU_mu_pcc;
  CaRU_r_2 := (CaRU_alpha_p*CaRU_mu_moc + CaRU_alpha_m*CaRU_mu_mcc)/(CaRU_alpha_p + CaRU_alpha_m);
  CaRU_r_3 := CaRU_beta_m*CaRU_mu_pcc/(CaRU_beta_m + CaRU_beta_pcc);
  CaRU_r_4 := CaRU_mu_mcc;
  CaRU_r_5 := CaRU_y_co*CaRU_epsilon_pco + CaRU_y_cc*CaRU_epsilon_pcc;
  CaRU_r_6 := CaRU_epsilon_m;
  CaRU_r_7 := CaRU_alpha_m*CaRU_epsilon_pcc/(CaRU_alpha_p + CaRU_alpha_m);
  CaRU_r_8 := CaRU_epsilon_m;
  CaRU_z_4 := 1 - CaRU_z_1 - CaRU_z_2 - CaRU_z_3;
  CaRU_C_cc := Ca_i;
  CaRU_C_oo := ;
  CaRU_J_Loo := ;
  CaRU_J_Loc := ;
  CaRU_J_Rco := J_R*(Ca_SR - Ca_i)/(1 + J_R/g_D);
  CaRU_J_Roo := ;
  CaRU_J_R1 := CaRU_y_oo*CaRU_J_Roo + CaRU_J_Rco*CaRU_y_co;
  CaRU_J_R3 := CaRU_J_Rco*CaRU_beta_pcc/(CaRU_beta_m + CaRU_beta_pcc);
  CaRU_J_L1 := CaRU_J_Loo*CaRU_y_oo + CaRU_J_Loc*CaRU_y_oc;
  CaRU_J_L2 := CaRU_J_Loc*CaRU_alpha_p/(CaRU_alpha_p + CaRU_alpha_m);
  I_NaCa := Na_Ca_Exchanger_g_NCX*(exp(Na_Ca_Exchanger_eta*FVRT)*Na_i^3*Ca_o - exp((Na_Ca_Exchanger_eta - 1)*FVRT)*Na_o^3*Ca_i)/((Na_o^3 + Na_Ca_Exchanger_K_mNa^3)*(Ca_o + Na_Ca_Exchanger_K_mCa)*(1 + Na_Ca_Exchanger_k_sat*exp((Na_Ca_Exchanger_eta - 1)*FVRT)));
  I_SERCA := SERCA_g_SERCA*Ca_i^2/(SERCA_K_SERCA^2 + Ca_i^2);
  I_pCa := Sarcolemmal_Ca_pump_g_pCa*Ca_i/(Sarcolemmal_Ca_pump_K_mpCa + Ca_i);
  E_Ca := R*T/(2*F)*ln(Ca_o/Ca_i);
  I_CaB := Background_Ca_current_g_CaB*(E_Ca - V);
  I_SR := SR_Ca_leak_current_g_SRl*(Ca_SR - Ca_i);
  I_TRPN := troponin_Ca_buffer_k_m_TRPN*(troponin_Ca_buffer_B_TRPN - TRPN) - troponin_Ca_buffer_k_p_TRPN*TRPN*Ca_i;
  beta_CMDN := (1 + calmodulin_Ca_buffer_k_CMDN*calmodulin_Ca_buffer_B_CMDN/(calmodulin_Ca_buffer_k_CMDN + Ca_i)^2)^(-1);
  intracellular_ion_concentrations_CaSR_plot := Ca_SR*V_SR/V_myo;

  // Rate rules:
  Ca_i' = beta_CMDN*(I_LCC + I_RyR - I_SERCA + I_SR + I_NaCa - I_pCa + I_CaB + I_TRPN);
  Ca_SR' = V_myo/V_SR*(-I_RyR + I_SERCA - I_SR);
  CaRU_z_1' = -(CaRU_r_1 + CaRU_r_5)*CaRU_z_1 + CaRU_r_2*CaRU_z_2 + CaRU_r_6*CaRU_z_3;
  CaRU_z_2' = CaRU_r_1*CaRU_z_1 - (CaRU_r_2 + CaRU_r_7)*CaRU_z_2 + CaRU_r_8*CaRU_z_4;
  CaRU_z_3' = CaRU_r_5*CaRU_z_1 - (CaRU_r_6 + CaRU_r_3)*CaRU_z_3 + CaRU_r_4*CaRU_z_4;
  TRPN' = I_TRPN;
end
