// SBML level 2 version 4

model Niederer_et_al_2006____main()
  // Originally created by libAntimony v1.3 (using libSBML 4.1.0-b2)

  // Compartments:
  compartment default_compartment = 1;

  // Parameters:
  TRPN = 0.06759314;
  Ca_TRPN_Max = 0.07;
  z = 0.01441794;
  k_on = 100;
  k_Ref_off = 0.2;
  gamma_trpn = 2;
  tropomyosin_alpha_0 = 0.008;
  tropomyosin_alpha_r1 = 0.002;
  tropomyosin_alpha_r2 = 0.00175;
  tropomyosin_n_Rel = 3;
  tropomyosin_K_z = 0.15;
  tropomyosin_n_Hill = 3;
  tropomyosin_Ca_50ref = 0.00105;
  tropomyosin_z_p = 0.85;
  tropomyosin_beta_1 = -4;
  beta_0 = 4.9;
  T_ref = 56.2;
  Cross_Bridges_a = 0.35;
  Cross_Bridges_Q_1 = 0;
  Cross_Bridges_Q_2 = 0;
  Cross_Bridges_Q_3 = 0;
  Cross_Bridges_A_1 = -29;
  Cross_Bridges_A_2 = 138;
  Cross_Bridges_A_3 = 129;
  Cross_Bridges_alpha_1 = 0.03;
  Cross_Bridges_alpha_2 = 0.13;
  Cross_Bridges_alpha_3 = 0.625;
  time_ = ;

  // Assignment rules:
  Ca_i := ;
  Ca_b := Ca_TRPN_Max - TRPN;
  J_TRPN := (Ca_TRPN_Max - TRPN)*troponin_k_off - Ca_i*TRPN*k_on;
  z_max := (tropomyosin_alpha_0/(tropomyosin_Ca_TRPN_50/Ca_TRPN_Max)^tropomyosin_n_Hill - tropomyosin_K_2)/(tropomyosin_alpha_r1 + tropomyosin_K_1 + tropomyosin_alpha_0/(tropomyosin_Ca_TRPN_50/Ca_TRPN_Max)^tropomyosin_n_Hill);
  tropomyosin_Ca_50 := tropomyosin_Ca_50ref*(1 + tropomyosin_beta_1*(lambda_ - 1));
  tropomyosin_Ca_TRPN_50 := tropomyosin_Ca_50*Ca_TRPN_Max/(tropomyosin_Ca_50 + k_Ref_off/k_on*(1 - (1 + beta_0*(lambda_ - 1))*0.5/gamma_trpn));
  tropomyosin_K_2 := tropomyosin_alpha_r2*tropomyosin_z_p^tropomyosin_n_Rel/(tropomyosin_z_p^tropomyosin_n_Rel + tropomyosin_K_z^tropomyosin_n_Rel)*(1 - tropomyosin_n_Rel*tropomyosin_K_z^tropomyosin_n_Rel/(tropomyosin_z_p^tropomyosin_n_Rel + tropomyosin_K_z^tropomyosin_n_Rel));
  tropomyosin_K_1 := tropomyosin_alpha_r2*tropomyosin_z_p^(tropomyosin_n_Rel - 1)*tropomyosin_n_Rel*tropomyosin_K_z^tropomyosin_n_Rel/(tropomyosin_z_p^tropomyosin_n_Rel + tropomyosin_K_z^tropomyosin_n_Rel)^2;
  tropomyosin_alpha_Tm := tropomyosin_alpha_0*(Ca_b/tropomyosin_Ca_TRPN_50)^tropomyosin_n_Hill;
  tropomyosin_beta_Tm := tropomyosin_alpha_r1 + tropomyosin_alpha_r2*z^(tropomyosin_n_Rel - 1)/(z^tropomyosin_n_Rel + tropomyosin_K_z^tropomyosin_n_Rel);
  lambda_ := ;
  troponin_k_off := ;
  Tension := ;
  ExtensionRatio := ;
  dExtensionRatiodt := 0;
  lambda_prev := ExtensionRatio;
  overlap := 1 + beta_0*(lambda_ - 1);
  T_Base := T_ref*z/z_max;
  T_0 := T_Base*overlap;
  Cross_Bridges_Q := Cross_Bridges_Q_1 + Cross_Bridges_Q_2 + Cross_Bridges_Q_3;

  // Rate rules:
  TRPN' = J_TRPN;
  z' = tropomyosin_alpha_Tm*(1 - z) - tropomyosin_beta_Tm*z;
  Cross_Bridges_Q_1' = Cross_Bridges_A_1*dExtensionRatiodt - Cross_Bridges_alpha_1*Cross_Bridges_Q_1;
  Cross_Bridges_Q_2' = Cross_Bridges_A_2*dExtensionRatiodt - Cross_Bridges_alpha_2*Cross_Bridges_Q_2;
  Cross_Bridges_Q_3' = Cross_Bridges_A_3*dExtensionRatiodt - Cross_Bridges_alpha_3*Cross_Bridges_Q_3;
end
