// SBML level 2 version 4

model Pandit_Hinch_Niederer_Model____main()
  // Originally created by libAntimony v1.3 (using libSBML 4.1.0-b2)

  // Compartments:
  compartment default_compartment = 1;

  // Parameters:
  V = -80.50146;
  R = 8314.5;
  T = 295;
  F = 96487;
  membrane_Cm = 0.0001;
  membrane_stim_period = 1000;
  membrane_stim_duration = 10;
  membrane_stim_amplitude = -0.0006;
  V_myo = 25850;
  V_SR = 2098;
  V_myo_uL = 2.585e-5;
  V_SR_uL = 2.098e-6;
  sodium_potassium_pump_i_NaK_max = 9.5e-5;
  sodium_potassium_pump_K_m_K = 1.5;
  sodium_potassium_pump_K_m_Na = 10;
  K_o = 5.4;
  Na_o = 140;
  Na_i = 10.73519;
  Ca_i = 7.901351e-5;
  Ca_SR = 0.7;
  K_i = 139.2751;
  TRPN = 0.06759314;
  Ca_TRPN_Max = 0.07;
  pandit_sodium_current_g_Na = 0.8;
  m = 0.004164108;
  h = 0.6735613;
  j = 0.6729362;
  pandit_Ca_independent_transient_outward_K_current_g_t = 0.035;
  pandit_Ca_independent_transient_outward_K_current_a_endo = 0.583;
  pandit_Ca_independent_transient_outward_K_current_b_endo = 0.417;
  r = 0.002191519;
  s = 0.9842542;
  s_slow = 0.6421196;
  pandit_steady_state_outward_K_current_g_ss = 0.007;
  r_ss = 0.002907171;
  s_ss = 0.3142767;
  pandit_inward_rectifier_g_K1 = 0.024;
  pandit_hyperpolarisation_activated_current_g_f = 0.00145;
  pandit_hyperpolarisation_activated_current_f_Na = 0.2;
  y = 0.003578708;
  pandit_background_currents_g_B_Na = 8.015e-5;
  pandit_background_currents_g_B_Ca = 3.24e-5;
  pandit_background_currents_g_B_K = 0.000138;
  pandit_background_currents_E_Ca = 65;
  Ca_o = 1.2;
  g_D = 0.065;
  J_R = 0.02;
  J_L = 0.000913;
  N = 50000;
  hinch_CaRU_CaRU_Transitions_V_L = -2;
  hinch_CaRU_CaRU_Transitions_del_VL = 7;
  hinch_CaRU_CaRU_Transitions_phi_L = 2.35;
  hinch_CaRU_CaRU_Transitions_t_L = 1;
  hinch_CaRU_CaRU_Transitions_tau_L = 650;
  hinch_CaRU_CaRU_Transitions_tau_R = 2.43;
  hinch_CaRU_CaRU_Transitions_phi_R = 0.05;
  hinch_CaRU_CaRU_Transitions_theta_R = 0.012;
  hinch_CaRU_CaRU_Transitions_K_RyR = 0.041;
  hinch_CaRU_CaRU_Transitions_K_L = 0.00022;
  hinch_CaRU_CaRU_Transitions_a = 0.0625;
  hinch_CaRU_CaRU_Transitions_b = 14;
  hinch_CaRU_CaRU_Transitions_c = 0.01;
  hinch_CaRU_CaRU_Transitions_d = 100;
  hinch_CaRU_z_1 = 0.98859;
  hinch_CaRU_z_2 = 0.0087302;
  hinch_CaRU_z_3 = 0.0026566;
  hinch_Na_Ca_Exchanger_K_mNa = 87.5;
  hinch_Na_Ca_Exchanger_K_mCa = 1.38;
  hinch_Na_Ca_Exchanger_eta = 0.35;
  hinch_Na_Ca_Exchanger_k_sat = 0.1;
  hinch_Na_Ca_Exchanger_g_NCX = 0.0385;
  hinch_SERCA_g_SERCA = 0.00045;
  hinch_SERCA_K_SERCA = 0.0005;
  hinch_Sarcolemmal_Ca_pump_g_pCa = 3.5e-6;
  hinch_Sarcolemmal_Ca_pump_K_mpCa = 0.0005;
  hinch_Background_Ca_current_g_CaB = 2.6875e-8;
  hinch_SR_Ca_leak_current_g_SRl = 1.8951e-5;
  hinch_calmodulin_Ca_current_k_CMDN = 0.002382;
  hinch_calmodulin_Ca_current_B_CMDN = 0.05;
  z = 0.01441794;
  k_on = 100;
  k_Ref_off = 0.2;
  gamma_trpn = 2;
  niederer_tropomyosin_alpha_0 = 0.008;
  niederer_tropomyosin_alpha_r1 = 0.002;
  niederer_tropomyosin_alpha_r2 = 0.00175;
  niederer_tropomyosin_n_Rel = 3;
  niederer_tropomyosin_K_z = 0.15;
  niederer_tropomyosin_n_Hill = 3;
  niederer_tropomyosin_Ca_50ref = 0.00105;
  niederer_tropomyosin_z_p = 0.85;
  niederer_tropomyosin_beta_1 = -4;
  beta_0 = 4.9;
  T_ref = 56.2;
  niederer_Cross_Bridges_a = 0.35;
  niederer_Cross_Bridges_Q_1 = 0;
  niederer_Cross_Bridges_Q_2 = 0;
  niederer_Cross_Bridges_Q_3 = 0;
  niederer_Cross_Bridges_A_1 = -29;
  niederer_Cross_Bridges_A_2 = 138;
  niederer_Cross_Bridges_A_3 = 129;
  niederer_Cross_Bridges_alpha_1 = 0.03;
  niederer_Cross_Bridges_alpha_2 = 0.13;
  niederer_Cross_Bridges_alpha_3 = 0.625;
  time_ = ;

  // Assignment rules:
  I_Stim := ;
  I_Na := pandit_sodium_current_g_Na_endo*m^3*h*j*(V - E_Na);
  I_t := pandit_Ca_independent_transient_outward_K_current_g_t_endo*r*(pandit_Ca_independent_transient_outward_K_current_a_endo*s + pandit_Ca_independent_transient_outward_K_current_b_endo*s_slow)*(V - E_K);
  I_ss := pandit_steady_state_outward_K_current_g_ss*r_ss*s_ss*(V - E_K);
  I_f := I_f_Na + I_f_K;
  I_K1 := (48/(exp((V + 37)/25) + exp((V + 37)/(-25))) + 10)*0.001/(1 + exp((V - (E_K + 76.77))/(-17))) + pandit_inward_rectifier_g_K1*(V - (E_K + 1.73))/((1 + exp(1.613*F*(V - (E_K + 1.73))/(R*T)))*(1 + exp((K_o - 0.9988)/(-0.124))));
  I_B_Na := pandit_background_currents_g_B_Na*(V - E_Na);
  I_B_K := pandit_background_currents_g_B_K*(V - E_K);
  I_NaK := sodium_potassium_pump_i_NaK_max*1/(1 + 0.1245*exp(-0.1*V*F/(R*T)) + 0.0365*sodium_potassium_pump_sigma*exp(-V*F/(R*T)))*K_o/(K_o + sodium_potassium_pump_K_m_K)*1/(1 + (sodium_potassium_pump_K_m_Na/Na_i)^4);
  I_LCC := -1.5*hinch_I_LCC*2*V_myo_uL*F;
  I_NaCa := hinch_I_NaCa*V_myo_uL*F;
  I_pCa := hinch_I_pCa*2*V_myo_uL*F;
  I_CaB := -hinch_I_CaB*2*V_myo_uL*F;
  FVRT := F*V/(R*T);
  FVRT_Ca := 2*FVRT;
  hinch_I_LCC := (hinch_CaRU_z_1*hinch_CaRU_J_L1 + hinch_CaRU_z_2*hinch_CaRU_J_L2)*N/V_myo;
  hinch_I_NaCa := hinch_Na_Ca_Exchanger_g_NCX*(exp(hinch_Na_Ca_Exchanger_eta*FVRT)*Na_i^3*Ca_o - exp((hinch_Na_Ca_Exchanger_eta - 1)*FVRT)*Na_o^3*Ca_i)/((Na_o^3 + hinch_Na_Ca_Exchanger_K_mNa^3)*(Ca_o + hinch_Na_Ca_Exchanger_K_mCa)*(1 + hinch_Na_Ca_Exchanger_k_sat*exp((hinch_Na_Ca_Exchanger_eta - 1)*FVRT)));
  hinch_I_pCa := hinch_Sarcolemmal_Ca_pump_g_pCa*Ca_i/(hinch_Sarcolemmal_Ca_pump_K_mpCa + Ca_i);
  hinch_I_CaB := hinch_Background_Ca_current_g_CaB*(E_Ca - V);
  hinch_I_RyR := (hinch_CaRU_z_1*hinch_CaRU_J_R1 + hinch_CaRU_z_3*hinch_CaRU_J_R3)*N/V_myo;
  I_RyR := 1.5*hinch_I_RyR;
  sodium_potassium_pump_sigma := (exp(Na_o/67.3) - 1)/7;
  I_f_Na := pandit_hyperpolarisation_activated_current_g_f*y*pandit_hyperpolarisation_activated_current_f_Na*(V - E_Na);
  I_f_K := pandit_hyperpolarisation_activated_current_g_f*y*pandit_hyperpolarisation_activated_current_f_K*(V - E_K);
  I_SERCA := hinch_SERCA_g_SERCA*Ca_i^2/(hinch_SERCA_K_SERCA^2 + Ca_i^2);
  I_SR := hinch_SR_Ca_leak_current_g_SRl*(Ca_SR - Ca_i);
  Ca_b := Ca_TRPN_Max - TRPN;
  I_TRPN := (Ca_TRPN_Max - TRPN)*niederer_troponin_k_off - Ca_i*TRPN*k_on;
  beta_CMDN := (1 + hinch_calmodulin_Ca_current_k_CMDN*hinch_calmodulin_Ca_current_B_CMDN/(hinch_calmodulin_Ca_current_k_CMDN + Ca_i)^2)^(-1);
  E_Na := R*T/F*ln(Na_o/Na_i);
  pandit_sodium_current_g_Na_endo := 1.33*pandit_sodium_current_g_Na;
  pandit_sodium_current_sodium_current_m_gate_m_infinity := 1/(1 + exp((V + 45)/(-6.5)));
  pandit_sodium_current_sodium_current_m_gate_tau_m := 0.00136/(0.32*(V + 47.13)/(1 - exp(-0.1*(V + 47.13))) + 0.08*exp(-V/11));
  pandit_sodium_current_sodium_current_h_gate_h_infinity := 1/(1 + exp((V + 76.1)/6.07));
  pandit_sodium_current_sodium_current_h_gate_tau_h := ;
  pandit_sodium_current_sodium_current_j_gate_j_infinity := 1/(1 + exp((V + 76.1)/6.07));
  pandit_sodium_current_sodium_current_j_gate_tau_j := ;
  E_K := R*T/F*ln(K_o/K_i);
  pandit_Ca_independent_transient_outward_K_current_g_t_endo := 0.4647*pandit_Ca_independent_transient_outward_K_current_g_t;
  pandit_Ca_independent_transient_outward_K_current_Ca_independent_transient_outward_K_current_r_gate_tau_r := 1/(45.16*exp(0.03577*(V + 50)) + 98.9*exp(-0.1*(V + 38)));
  pandit_Ca_independent_transient_outward_K_current_Ca_independent_transient_outward_K_current_r_gate_r_infinity := 1/(1 + exp((V + 10.6)/(-11.42)));
  pandit_Ca_independent_transient_outward_K_current_Ca_independent_transient_outward_K_current_s_gate_tau_s_endo := 0.55*exp(-((V + 70)/25)^2) + 0.049;
  pandit_Ca_independent_transient_outward_K_current_Ca_independent_transient_outward_K_current_s_gate_s_infinity := 1/(1 + exp((V + 45.3)/6.8841));
  pandit_Ca_independent_transient_outward_K_current_Ca_independent_transient_outward_K_current_s_slow_gate_tau_s_slow_endo := 3.3*exp(-(V + 70)/30*(V + 70)/30) + 0.049;
  pandit_Ca_independent_transient_outward_K_current_Ca_independent_transient_outward_K_current_s_slow_gate_s_slow_infinity := 1/(1 + exp((V + 45.3)/6.8841));
  pandit_steady_state_outward_K_current_steady_state_outward_K_current_r_ss_gate_tau_r_ss := 10/(45.16*exp(0.03577*(V + 50)) + 98.9*exp(-0.1*(V + 38)));
  pandit_steady_state_outward_K_current_steady_state_outward_K_current_r_ss_gate_r_ss_infinity := 1/(1 + exp((V + 11.5)/(-11.82)));
  pandit_steady_state_outward_K_current_steady_state_outward_K_current_s_ss_gate_tau_s_ss := 2.1;
  pandit_steady_state_outward_K_current_steady_state_outward_K_current_s_ss_gate_s_ss_infinity := 1/(1 + exp((V + 87.5)/10.3));
  pandit_hyperpolarisation_activated_current_f_K := 1 - pandit_hyperpolarisation_activated_current_f_Na;
  pandit_hyperpolarisation_activated_current_hyperpolarisation_activated_current_y_gate_tau_y := 1/(0.11885*exp((V + 80)/28.37) + 0.5623*exp((V + 80)/(-14.19)));
  pandit_hyperpolarisation_activated_current_hyperpolarisation_activated_current_y_gate_y_infinity := 1/(1 + exp((V + 138.6)/10.48));
  i_B := I_B_Na + i_B_Ca + I_B_K;
  i_B_Ca := pandit_background_currents_g_B_Ca*(V - pandit_background_currents_E_Ca);
  hinch_CaRU_C_oc := ;
  hinch_CaRU_C_co := (Ca_i + J_R/g_D*Ca_SR)/(1 + J_R/g_D);
  hinch_CaRU_CaRU_Transitions_t_R := 1.17*hinch_CaRU_CaRU_Transitions_t_L;
  hinch_CaRU_CaRU_Transitions_expVL := exp((V - hinch_CaRU_CaRU_Transitions_V_L)/hinch_CaRU_CaRU_Transitions_del_VL);
  hinch_CaRU_alpha_p := hinch_CaRU_CaRU_Transitions_expVL/(hinch_CaRU_CaRU_Transitions_t_L*(hinch_CaRU_CaRU_Transitions_expVL + 1));
  hinch_CaRU_alpha_m := hinch_CaRU_CaRU_Transitions_phi_L/hinch_CaRU_CaRU_Transitions_t_L;
  hinch_CaRU_beta_poc := hinch_CaRU_C_oc^2/(hinch_CaRU_CaRU_Transitions_t_R*(hinch_CaRU_C_oc^2 + hinch_CaRU_CaRU_Transitions_K_RyR^2));
  hinch_CaRU_beta_pcc := Ca_i^2/(hinch_CaRU_CaRU_Transitions_t_R*(Ca_i^2 + hinch_CaRU_CaRU_Transitions_K_RyR^2));
  hinch_CaRU_beta_m := hinch_CaRU_CaRU_Transitions_phi_R/hinch_CaRU_CaRU_Transitions_t_R;
  hinch_CaRU_epsilon_pco := hinch_CaRU_C_co*(hinch_CaRU_CaRU_Transitions_expVL + hinch_CaRU_CaRU_Transitions_a)/(hinch_CaRU_CaRU_Transitions_tau_L*hinch_CaRU_CaRU_Transitions_K_L*(hinch_CaRU_CaRU_Transitions_expVL + 1));
  hinch_CaRU_epsilon_pcc := Ca_i*(hinch_CaRU_CaRU_Transitions_expVL + hinch_CaRU_CaRU_Transitions_a)/(hinch_CaRU_CaRU_Transitions_tau_L*hinch_CaRU_CaRU_Transitions_K_L*(hinch_CaRU_CaRU_Transitions_expVL + 1));
  hinch_CaRU_epsilon_m := hinch_CaRU_CaRU_Transitions_b*(hinch_CaRU_CaRU_Transitions_expVL + hinch_CaRU_CaRU_Transitions_a)/(hinch_CaRU_CaRU_Transitions_tau_L*(hinch_CaRU_CaRU_Transitions_b*hinch_CaRU_CaRU_Transitions_expVL + hinch_CaRU_CaRU_Transitions_a));
  hinch_CaRU_mu_poc := (hinch_CaRU_C_oc^2 + hinch_CaRU_CaRU_Transitions_c*hinch_CaRU_CaRU_Transitions_K_RyR^2)/(hinch_CaRU_CaRU_Transitions_tau_R*(hinch_CaRU_C_oc^2 + hinch_CaRU_CaRU_Transitions_K_RyR^2));
  hinch_CaRU_mu_pcc := (Ca_i^2 + hinch_CaRU_CaRU_Transitions_c*hinch_CaRU_CaRU_Transitions_K_RyR^2)/(hinch_CaRU_CaRU_Transitions_tau_R*(Ca_i^2 + hinch_CaRU_CaRU_Transitions_K_RyR^2));
  hinch_CaRU_mu_moc := hinch_CaRU_CaRU_Transitions_theta_R*hinch_CaRU_CaRU_Transitions_d*(hinch_CaRU_C_oc^2 + hinch_CaRU_CaRU_Transitions_c*hinch_CaRU_CaRU_Transitions_K_RyR^2)/(hinch_CaRU_CaRU_Transitions_tau_R*(hinch_CaRU_CaRU_Transitions_d*hinch_CaRU_C_oc^2 + hinch_CaRU_CaRU_Transitions_c*hinch_CaRU_CaRU_Transitions_K_RyR^2));
  hinch_CaRU_mu_mcc := hinch_CaRU_CaRU_Transitions_theta_R*hinch_CaRU_CaRU_Transitions_d*(Ca_i^2 + hinch_CaRU_CaRU_Transitions_c*hinch_CaRU_CaRU_Transitions_K_RyR^2)/(hinch_CaRU_CaRU_Transitions_tau_R*(hinch_CaRU_CaRU_Transitions_d*Ca_i^2 + hinch_CaRU_CaRU_Transitions_c*hinch_CaRU_CaRU_Transitions_K_RyR^2));
  hinch_CaRU_CaRU_states_denom := (hinch_CaRU_alpha_p + hinch_CaRU_alpha_m)*((hinch_CaRU_alpha_m + hinch_CaRU_beta_m + hinch_CaRU_beta_poc)*(hinch_CaRU_beta_m + hinch_CaRU_beta_pcc) + hinch_CaRU_alpha_p*(hinch_CaRU_beta_m + hinch_CaRU_beta_poc));
  hinch_CaRU_y_oc := hinch_CaRU_alpha_p*hinch_CaRU_beta_m*(hinch_CaRU_alpha_p + hinch_CaRU_alpha_m + hinch_CaRU_beta_m + hinch_CaRU_beta_pcc)/hinch_CaRU_CaRU_states_denom;
  hinch_CaRU_y_co := hinch_CaRU_alpha_m*(hinch_CaRU_beta_pcc*(hinch_CaRU_alpha_m + hinch_CaRU_beta_m + hinch_CaRU_beta_poc) + hinch_CaRU_beta_poc*hinch_CaRU_alpha_p)/hinch_CaRU_CaRU_states_denom;
  hinch_CaRU_y_oo := hinch_CaRU_alpha_p*(hinch_CaRU_beta_poc*(hinch_CaRU_alpha_p + hinch_CaRU_beta_m + hinch_CaRU_beta_pcc) + hinch_CaRU_beta_pcc*hinch_CaRU_alpha_m)/hinch_CaRU_CaRU_states_denom;
  hinch_CaRU_y_cc := hinch_CaRU_alpha_m*hinch_CaRU_beta_m*(hinch_CaRU_alpha_m + hinch_CaRU_alpha_p + hinch_CaRU_beta_m + hinch_CaRU_beta_poc)/hinch_CaRU_CaRU_states_denom;
  hinch_CaRU_y_ci := hinch_CaRU_alpha_m/(hinch_CaRU_alpha_p + hinch_CaRU_alpha_m);
  hinch_CaRU_y_oi := hinch_CaRU_alpha_p/(hinch_CaRU_alpha_p + hinch_CaRU_alpha_m);
  hinch_CaRU_y_ic := hinch_CaRU_beta_m/(hinch_CaRU_beta_pcc + hinch_CaRU_beta_m);
  hinch_CaRU_y_io := hinch_CaRU_beta_pcc/(hinch_CaRU_beta_pcc + hinch_CaRU_beta_m);
  hinch_CaRU_y_ii := 1 - hinch_CaRU_y_oc - hinch_CaRU_y_co - hinch_CaRU_y_oo - hinch_CaRU_y_cc - hinch_CaRU_y_ci - hinch_CaRU_y_ic - hinch_CaRU_y_oi - hinch_CaRU_y_io;
  hinch_CaRU_r_1 := hinch_CaRU_y_oc*hinch_CaRU_mu_poc + hinch_CaRU_y_cc*hinch_CaRU_mu_pcc;
  hinch_CaRU_r_2 := (hinch_CaRU_alpha_p*hinch_CaRU_mu_moc + hinch_CaRU_alpha_m*hinch_CaRU_mu_mcc)/(hinch_CaRU_alpha_p + hinch_CaRU_alpha_m);
  hinch_CaRU_r_3 := hinch_CaRU_beta_m*hinch_CaRU_mu_pcc/(hinch_CaRU_beta_m + hinch_CaRU_beta_pcc);
  hinch_CaRU_r_4 := hinch_CaRU_mu_mcc;
  hinch_CaRU_r_5 := hinch_CaRU_y_co*hinch_CaRU_epsilon_pco + hinch_CaRU_y_cc*hinch_CaRU_epsilon_pcc;
  hinch_CaRU_r_6 := hinch_CaRU_epsilon_m;
  hinch_CaRU_r_7 := hinch_CaRU_alpha_m*hinch_CaRU_epsilon_pcc/(hinch_CaRU_alpha_p + hinch_CaRU_alpha_m);
  hinch_CaRU_r_8 := hinch_CaRU_epsilon_m;
  hinch_CaRU_z_4 := 1 - hinch_CaRU_z_1 - hinch_CaRU_z_2 - hinch_CaRU_z_3;
  hinch_CaRU_C_cc := Ca_i;
  hinch_CaRU_C_oo := ;
  hinch_CaRU_J_Loo := ;
  hinch_CaRU_J_Loc := ;
  hinch_CaRU_J_Rco := J_R*(Ca_SR - Ca_i)/(1 + J_R/g_D);
  hinch_CaRU_J_Roo := ;
  hinch_CaRU_J_R1 := hinch_CaRU_y_oo*hinch_CaRU_J_Roo + hinch_CaRU_J_Rco*hinch_CaRU_y_co;
  hinch_CaRU_J_R3 := hinch_CaRU_J_Rco*hinch_CaRU_beta_pcc/(hinch_CaRU_beta_m + hinch_CaRU_beta_pcc);
  hinch_CaRU_J_L1 := hinch_CaRU_J_Loo*hinch_CaRU_y_oo + hinch_CaRU_J_Loc*hinch_CaRU_y_oc;
  hinch_CaRU_J_L2 := hinch_CaRU_J_Loc*hinch_CaRU_alpha_p/(hinch_CaRU_alpha_p + hinch_CaRU_alpha_m);
  E_Ca := R*T/(2*F)*ln(Ca_o/Ca_i);
  z_max := (niederer_tropomyosin_alpha_0/(niederer_tropomyosin_Ca_TRPN_50/Ca_TRPN_Max)^niederer_tropomyosin_n_Hill - niederer_tropomyosin_K_2)/(niederer_tropomyosin_alpha_r1 + niederer_tropomyosin_K_1 + niederer_tropomyosin_alpha_0/(niederer_tropomyosin_Ca_TRPN_50/Ca_TRPN_Max)^niederer_tropomyosin_n_Hill);
  niederer_tropomyosin_Ca_50 := niederer_tropomyosin_Ca_50ref*(1 + niederer_tropomyosin_beta_1*(lambda_ - 1));
  niederer_tropomyosin_Ca_TRPN_50 := niederer_tropomyosin_Ca_50*Ca_TRPN_Max/(niederer_tropomyosin_Ca_50 + k_Ref_off/k_on*(1 - (1 + beta_0*(lambda_ - 1))*0.5/gamma_trpn));
  niederer_tropomyosin_K_2 := niederer_tropomyosin_alpha_r2*niederer_tropomyosin_z_p^niederer_tropomyosin_n_Rel/(niederer_tropomyosin_z_p^niederer_tropomyosin_n_Rel + niederer_tropomyosin_K_z^niederer_tropomyosin_n_Rel)*(1 - niederer_tropomyosin_n_Rel*niederer_tropomyosin_K_z^niederer_tropomyosin_n_Rel/(niederer_tropomyosin_z_p^niederer_tropomyosin_n_Rel + niederer_tropomyosin_K_z^niederer_tropomyosin_n_Rel));
  niederer_tropomyosin_K_1 := niederer_tropomyosin_alpha_r2*niederer_tropomyosin_z_p^(niederer_tropomyosin_n_Rel - 1)*niederer_tropomyosin_n_Rel*niederer_tropomyosin_K_z^niederer_tropomyosin_n_Rel/(niederer_tropomyosin_z_p^niederer_tropomyosin_n_Rel + niederer_tropomyosin_K_z^niederer_tropomyosin_n_Rel)^2;
  niederer_tropomyosin_alpha_Tm := niederer_tropomyosin_alpha_0*(Ca_b/niederer_tropomyosin_Ca_TRPN_50)^niederer_tropomyosin_n_Hill;
  niederer_tropomyosin_beta_Tm := niederer_tropomyosin_alpha_r1 + niederer_tropomyosin_alpha_r2*z^(niederer_tropomyosin_n_Rel - 1)/(z^niederer_tropomyosin_n_Rel + niederer_tropomyosin_K_z^niederer_tropomyosin_n_Rel);
  lambda_ := ;
  niederer_troponin_k_off := ;
  Tension := ;
  ExtensionRatio := ;
  dExtensionRatiodt := 0;
  lambda_prev := ExtensionRatio;
  overlap := 1 + beta_0*(lambda_ - 1);
  T_Base := T_ref*z/z_max;
  T_0 := T_Base*overlap;
  niederer_Cross_Bridges_Q := niederer_Cross_Bridges_Q_1 + niederer_Cross_Bridges_Q_2 + niederer_Cross_Bridges_Q_3;

  // Rate rules:
  V' = -(I_Na + I_t + I_ss + I_f + I_K1 + I_B_Na + I_B_K + I_NaK + I_Stim + I_CaB + I_NaCa + I_pCa + I_LCC)/membrane_Cm;
  Na_i' = -(I_Na + I_B_Na + I_NaCa*3 + I_NaK*3 + I_f_Na)*1/(V_myo_uL*F);
  Ca_i' = beta_CMDN*(I_RyR - I_SERCA + I_SR + I_TRPN - (-2*I_NaCa + I_pCa + I_CaB + I_LCC)/(2*V_myo_uL*F));
  Ca_SR' = V_myo_uL/V_SR_uL*(-I_RyR + I_SERCA - I_SR);
  K_i' = -(I_Stim + I_ss + I_B_K + I_t + I_K1 + I_f_K + I_NaK*(-2))*1/(V_myo_uL*F);
  TRPN' = I_TRPN;
  m' = (pandit_sodium_current_sodium_current_m_gate_m_infinity - m)/pandit_sodium_current_sodium_current_m_gate_tau_m;
  h' = (pandit_sodium_current_sodium_current_h_gate_h_infinity - h)/pandit_sodium_current_sodium_current_h_gate_tau_h;
  j' = (pandit_sodium_current_sodium_current_j_gate_j_infinity - j)/pandit_sodium_current_sodium_current_j_gate_tau_j;
  r' = (pandit_Ca_independent_transient_outward_K_current_Ca_independent_transient_outward_K_current_r_gate_r_infinity - r)/pandit_Ca_independent_transient_outward_K_current_Ca_independent_transient_outward_K_current_r_gate_tau_r;
  s' = (pandit_Ca_independent_transient_outward_K_current_Ca_independent_transient_outward_K_current_s_gate_s_infinity - s)/pandit_Ca_independent_transient_outward_K_current_Ca_independent_transient_outward_K_current_s_gate_tau_s_endo;
  s_slow' = (pandit_Ca_independent_transient_outward_K_current_Ca_independent_transient_outward_K_current_s_slow_gate_s_slow_infinity - s_slow)/pandit_Ca_independent_transient_outward_K_current_Ca_independent_transient_outward_K_current_s_slow_gate_tau_s_slow_endo;
  r_ss' = (pandit_steady_state_outward_K_current_steady_state_outward_K_current_r_ss_gate_r_ss_infinity - r_ss)/pandit_steady_state_outward_K_current_steady_state_outward_K_current_r_ss_gate_tau_r_ss;
  s_ss' = (pandit_steady_state_outward_K_current_steady_state_outward_K_current_s_ss_gate_s_ss_infinity - s_ss)/pandit_steady_state_outward_K_current_steady_state_outward_K_current_s_ss_gate_tau_s_ss;
  y' = (pandit_hyperpolarisation_activated_current_hyperpolarisation_activated_current_y_gate_y_infinity - y)/pandit_hyperpolarisation_activated_current_hyperpolarisation_activated_current_y_gate_tau_y;
  hinch_CaRU_z_1' = -(hinch_CaRU_r_1 + hinch_CaRU_r_5)*hinch_CaRU_z_1 + hinch_CaRU_r_2*hinch_CaRU_z_2 + hinch_CaRU_r_6*hinch_CaRU_z_3;
  hinch_CaRU_z_2' = hinch_CaRU_r_1*hinch_CaRU_z_1 - (hinch_CaRU_r_2 + hinch_CaRU_r_7)*hinch_CaRU_z_2 + hinch_CaRU_r_8*hinch_CaRU_z_4;
  hinch_CaRU_z_3' = hinch_CaRU_r_5*hinch_CaRU_z_1 - (hinch_CaRU_r_6 + hinch_CaRU_r_3)*hinch_CaRU_z_3 + hinch_CaRU_r_4*hinch_CaRU_z_4;
  z' = niederer_tropomyosin_alpha_Tm*(1 - z) - niederer_tropomyosin_beta_Tm*z;
  niederer_Cross_Bridges_Q_1' = niederer_Cross_Bridges_A_1*dExtensionRatiodt - niederer_Cross_Bridges_alpha_1*niederer_Cross_Bridges_Q_1;
  niederer_Cross_Bridges_Q_2' = niederer_Cross_Bridges_A_2*dExtensionRatiodt - niederer_Cross_Bridges_alpha_2*niederer_Cross_Bridges_Q_2;
  niederer_Cross_Bridges_Q_3' = niederer_Cross_Bridges_A_3*dExtensionRatiodt - niederer_Cross_Bridges_alpha_3*niederer_Cross_Bridges_Q_3;
end
