// SBML level 2 version 4

model teusink_model_2000____main()
  // Originally created by libAntimony v1.4 (using libSBML 4.1.0-b2)

  // Compartments:
  compartment default_compartment = 1;

  // Parameters:
  GLCo0 = 50;
  GLCi0 = 0.087;
  G6P0 = 2.45;
  v_trehalose0 = 2.4;
  v_glycogen0 = 6;
  F6P0 = 0.62;
  F16P0 = 5.51;
  F26P0 = 0.02;
  TRIO0 = 0.96;
  BPG0 = 0;
  P3G0 = 0.9;
  P2G0 = 0.12;
  PEP0 = 0.07;
  PYR0 = 1.85;
  ACE0 = 0.17;
  P0 = 6.31;
  NADH0 = 0.39;
  NAD0 = 1.2;
  Keq_TPI = 0.045;
  SUM_P = 4.1;
  ADP_Keq_AK = 0.45;
  ETOH0 = 50;
  GLY0 = 0.15;
  v_PGI_Km_G6P = 1.4;
  v_PGI_Km_F6P = 0.3;
  v_PGI_Keq_PGI = 0.314;
  v_PGI_v_max = 339.677;
  v_PGM_Km_P3G = 1.2;
  v_PGM_Km_P2G = 0.08;
  v_PGM_Keq_PGM = 0.19;
  v_PGM_v_max = 2525.81;
  v_ENO_Km_P2G = 0.04;
  v_ENO_Km_PEP = 0.5;
  v_ENO_Keq_ENO = 6.7;
  v_ENO_v_max = 365.806;
  v_GLK_Km_GLCi = 0.08;
  v_GLK_Km_G6P = 30;
  v_GLK_Km_ATP = 0.15;
  v_GLK_Km_ADP = 0.23;
  v_GLK_Keq_GLK = 3800;
  v_GLK_v_max = 226.452;
  v_GAPDH_Km_GAP = 0.21;
  v_GAPDH_Km_BPG = 0.0098;
  v_GAPDH_Km_NAD = 0.09;
  v_GAPDH_Km_NADH = 0.06;
  v_GAPDH_v_max_f = 1184.52;
  v_GAPDH_v_max_r = 6549.68;
  v_PGK_Km_BPG = 0.003;
  v_PGK_Km_P3G = 0.53;
  v_PGK_Km_ADP = 0.2;
  v_PGK_Km_ATP = 0.3;
  v_PGK_Keq_PGK = 3200;
  v_PGK_v_max = 1306.45;
  v_PYK_Km_PEP = 0.14;
  v_PYK_Km_PYR = 21;
  v_PYK_Km_ADP = 0.53;
  v_PYK_Km_ATP = 1.5;
  v_PYK_Keq_PYK = 6500;
  v_PYK_v_max = 1088.71;
  v_GLT_Km_Glco = 1.1918;
  v_GLT_Km_Glci = 1.1918;
  v_GLT_Keq_Glc = 1;
  v_GLT_v_max = 97.264;
  v_ALD_Km_F16P = 0.3;
  v_ALD_Km_GAP = 2;
  v_ALD_Km_GAPi = 10;
  v_ALD_Km_DHAP = 2.4;
  v_ALD_Keq_ALD = 0.069;
  v_ALD_v_max = 322.258;
  v_PDC_nPDC = 1.9;
  v_PDC_Km_PYR = 4.33;
  v_PDC_v_max = 174.194;
  v_ADH_Km_NAD = 0.17;
  v_ADH_Km_NADH = 0.11;
  v_ADH_Km_ACE = 1.11;
  v_ADH_Km_ETOH = 17;
  v_ADH_Ki_NADH = 0.031;
  v_ADH_Ki_NAD = 0.92;
  v_ADH_Ki_ACE = 1.1;
  v_ADH_Ki_ETOH = 90;
  v_ADH_v_max = 810;
  v_ADH_Keq_ADH = 6.9e-5;
  v_ATP_Km_ATPase = 33.7;
  v_PFK_v_max = 182.903;
  v_PFK_gR = 5.12;
  v_PFK_L0 = 0.66;
  v_PFK_Km_F6P = 0.1;
  v_PFK_Km_ATP = 0.71;
  v_PFK_CATP = 3;
  v_PFK_Km_AMP = 0.0995;
  v_PFK_CAMP = 0.0845;
  v_PFK_Ki_ATP = 0.65;
  v_PFK_Ci_ATP = 100;
  v_PFK_Km_F26BP = 0.000682;
  v_PFK_CF26BP = 0.0174;
  v_PFK_Km_F16BP = 0.111;
  v_PFK_CF16BP = 0.397;
  v_G3PDH_Km_DHAP = 0.4;
  v_G3PDH_Km_GLY = 1;
  v_G3PDH_Km_NADH = 0.023;
  v_G3PDH_Km_NAD = 0.93;
  v_G3PDH_Keq_G3PDH = 4300;
  v_G3PDH_v_max = 70.15;
  v_succinate_Km_succinate = 21.4;
  time_ = ;

  // Assignment rules:
  v_GLT0 := v_GLT_v_max*(GLCo0 - GLCi0/v_GLT_Keq_Glc)/(v_GLT_Km_Glco*(1 + GLCo0/v_GLT_Km_Glco + GLCi0/v_GLT_Km_Glci + 0.91*GLCo0*GLCi0/(v_GLT_Km_Glci*v_GLT_Km_Glco)));
  v_GLK0 := v_GLK_v_max/(v_GLK_Km_GLCi*v_GLK_Km_ATP)*(GLCi0*ATP0 - G6P0*ADP0/v_GLK_Keq_GLK)/((1 + GLCi0/v_GLK_Km_GLCi + G6P0/v_GLK_Km_G6P)*(1 + ATP0/v_GLK_Km_ATP + ADP0/v_GLK_Km_ADP));
  v_PGI0 := v_PGI_v_max/v_PGI_Km_G6P*(G6P0 - F6P0/v_PGI_Keq_PGI)/(1 + G6P0/v_PGI_Km_G6P + F6P0/v_PGI_Km_F6P);
  v_PFK0 := v_PFK_v_max*v_PFK_gR*(F6P0/v_PFK_Km_F6P)*(ATP0/v_PFK_Km_ATP)*(v_PFK_R/(v_PFK_R^2 + v_PFK_L*v_PFK_T^2));
  v_ALD0 := v_ALD_v_max/v_ALD_Km_F16P*(F16P0 - Keq_TPI/(1 + Keq_TPI)*TRIO0*(1/(1 + Keq_TPI))*TRIO0/v_ALD_Keq_ALD)/(1 + F16P0/v_ALD_Km_F16P + Keq_TPI/(1 + Keq_TPI)*TRIO0/v_ALD_Km_GAP + 1/(1 + Keq_TPI)*TRIO0/v_ALD_Km_DHAP + Keq_TPI/(1 + Keq_TPI)*TRIO0*(1/(1 + Keq_TPI))*TRIO0/(v_ALD_Km_GAP*v_ALD_Km_DHAP) + F16P0*(Keq_TPI/(1 + Keq_TPI))*TRIO0/(v_ALD_Km_GAPi*v_ALD_Km_F16P));
  v_GAPDH0 := (v_GAPDH_v_max_f*(Keq_TPI/(1 + Keq_TPI))*TRIO0*NAD0/(v_GAPDH_Km_GAP*v_GAPDH_Km_NAD) - v_GAPDH_v_max_r*BPG0*NADH0/(v_GAPDH_Km_BPG*v_GAPDH_Km_NADH))/((1 + Keq_TPI/(1 + Keq_TPI)*TRIO0/v_GAPDH_Km_GAP + BPG0/v_GAPDH_Km_BPG)*(1 + NAD0/v_GAPDH_Km_NAD + NADH0/v_GAPDH_Km_NADH));
  v_G3PDH0 := v_G3PDH_v_max/(v_G3PDH_Km_DHAP*v_G3PDH_Km_NADH)*(1/(1 + Keq_TPI)*TRIO0*NADH0 - GLY0*NAD0/v_G3PDH_Keq_G3PDH)/((1 + 1/(1 + Keq_TPI)*TRIO0/v_G3PDH_Km_DHAP + GLY0/v_G3PDH_Km_GLY)*(1 + NADH0/v_G3PDH_Km_NADH + NAD0/v_G3PDH_Km_NAD));
  v_PGK0 := v_PGK_v_max/(v_PGK_Km_P3G*v_PGK_Km_ATP)*(v_PGK_Keq_PGK*BPG0*ADP0 - P3G0*ATP0)/((1 + BPG0/v_PGK_Km_BPG + P3G0/v_PGK_Km_P3G)*(1 + ATP0/v_PGK_Km_ATP + ADP0/v_PGK_Km_ADP));
  v_PGM0 := v_PGM_v_max/v_PGM_Km_P3G*(P3G0 - P2G0/v_PGM_Keq_PGM)/(1 + P3G0/v_PGM_Km_P3G + P2G0/v_PGM_Km_P2G);
  v_ENO0 := v_ENO_v_max/v_ENO_Km_P2G*(P2G0 - PEP0/v_ENO_Keq_ENO)/(1 + P2G0/v_ENO_Km_P2G + PEP0/v_ENO_Km_PEP);
  v_PYK0 := v_PYK_v_max/(v_PYK_Km_PEP*v_PYK_Km_ADP)*(PEP0*ADP0 - PYR0*ATP0/v_PYK_Keq_PYK)/((1 + PEP0/v_PYK_Km_PEP + PYR0/v_PYK_Km_PYR)*(1 + ATP0/v_PYK_Km_ATP + ADP0/v_PYK_Km_ADP));
  v_PDC0 := v_PDC_v_max*(PYR0^v_PDC_nPDC/v_PDC_Km_PYR^v_PDC_nPDC)/(1 + PYR0^v_PDC_nPDC/v_PDC_Km_PYR^v_PDC_nPDC);
  v_ADH0 := -(v_ADH_v_max/(v_ADH_Ki_NAD*v_ADH_Km_ETOH)*((NAD0*ETOH0 - NADH0*ACE0/v_ADH_Keq_ADH)/(1 + NAD0/v_ADH_Ki_NAD + v_ADH_Km_NAD*ETOH0/(v_ADH_Ki_NAD*v_ADH_Km_ETOH) + v_ADH_Km_NADH*ACE0/(v_ADH_Ki_NADH*v_ADH_Km_ACE) + NADH0/v_ADH_Ki_NADH + NAD0*ETOH0/(v_ADH_Ki_NAD*v_ADH_Km_ETOH) + v_ADH_Km_NADH*NAD0*ACE0/(v_ADH_Ki_NAD*v_ADH_Ki_NADH*v_ADH_Km_ACE) + v_ADH_Km_NAD*ETOH0*NADH0/(v_ADH_Ki_NAD*v_ADH_Km_ETOH*v_ADH_Ki_NADH) + NADH0*ACE0/(v_ADH_Ki_NADH*v_ADH_Km_ACE) + NAD0*ETOH0*ACE0/(v_ADH_Ki_NAD*v_ADH_Km_ETOH*v_ADH_Ki_ACE) + ETOH0*NADH0*ACE0/(v_ADH_Ki_ETOH*v_ADH_Ki_NADH*v_ADH_Km_ACE))));
  v_succinate0 := v_succinate_Km_succinate*ACE0;
  v_ATP0 := v_ATP_Km_ATPase*ATP0;
  DHAP0 := TRIO0/(1 + Keq_TPI);
  GAP0 := TRIO0*Keq_TPI/(1 + Keq_TPI);
  ADP0 := (SUM_P - sqrt(P0^2*(1 - 4*ADP_Keq_AK) + 2*SUM_P*P0*(4*ADP_Keq_AK - 1) + SUM_P^2))/(1 - 4*ADP_Keq_AK);
  ATP0 := (P0 - ADP0)/2;
  AMP0 := SUM_P - (ATP0 + ADP0);
  v_PFK_L := v_PFK_L0*((1 + v_PFK_Ci_ATP*(ATP0/v_PFK_Ki_ATP))/(1 + ATP0/v_PFK_Ki_ATP))^2*((1 + v_PFK_CAMP*(AMP0/v_PFK_Km_AMP))/(1 + AMP0/v_PFK_Km_AMP))^2*((1 + v_PFK_CF26BP*(F26P0/v_PFK_Km_F26BP) + v_PFK_CF16BP*(F16P0/v_PFK_Km_F16BP))/(1 + F26P0/v_PFK_Km_F26BP + F16P0/v_PFK_Km_F16BP))^2;
  v_PFK_R := 1 + F6P0/v_PFK_Km_F6P + ATP0/v_PFK_Km_ATP + v_PFK_gR*(F6P0/v_PFK_Km_F6P)*(ATP0/v_PFK_Km_ATP);
  v_PFK_T := 1 + v_PFK_CATP*(ATP0/v_PFK_Km_ATP);

  // Rate rules:
  GLCi0' = v_GLT0 - v_GLK0;
  G6P0' = v_GLK0 - (v_PGI0 + 2*v_trehalose0 + v_glycogen0);
  F6P0' = v_PGI0 - v_PFK0;
  F16P0' = v_PFK0 - v_ALD0;
  TRIO0' = 2*v_ALD0 - (v_GAPDH0 + v_G3PDH0);
  BPG0' = v_GAPDH0 - v_PGK0;
  P3G0' = v_PGK0 - v_PGM0;
  P2G0' = v_PGM0 - v_ENO0;
  PEP0' = v_ENO0 - v_PYK0;
  PYR0' = v_PYK0 - v_PDC0;
  ACE0' = v_PDC0 - (v_ADH0 + 2*v_succinate0);
  P0' = v_PGK0 + v_PYK0 - (v_GLK0 + v_PFK0 + v_ATP0 + v_trehalose0 + v_glycogen0 + 4*v_succinate0);
  NADH0' = v_GAPDH0 + 3*v_succinate0 - (v_ADH0 + v_G3PDH0);
  NAD0' = v_ADH0 + v_G3PDH0 - (v_GAPDH0 + 3*v_succinate0);
end
