// SBML level 2 version 4

model topp_2000____main()
  // Originally created by libAntimony v1.4 (using libSBML 4.1.0-b2)

  // Compartments:
  compartment default_compartment = 1;

  // Parameters:
  G = 600;
  glucose_dynamics_R0 = 846;
  glucose_dynamics_SI = 0.72;
  glucose_dynamics_EG0 = 1.44;
  I = 0;
  insulin_dynamics_alpha = 2000;
  insulin_dynamics_sigma = 43.2;
  insulin_dynamics_k = 432;
  beta = 0;
  beta_cell_dynamics_d0 = 0.06;
  beta_cell_dynamics_r1 = 0.00084;
  beta_cell_dynamics_r2 = 2.4e-6;
  time_ = ;

  // Rate rules:
  G' = glucose_dynamics_R0 - (glucose_dynamics_EG0 + glucose_dynamics_SI*I)*G;
  I' = beta/1*insulin_dynamics_sigma*G^2/(insulin_dynamics_alpha + G^2) - insulin_dynamics_k*I;
  beta' = (beta_cell_dynamics_r1*G + (-beta_cell_dynamics_d0) + (-beta_cell_dynamics_r2*G^2))*beta;
end
