// SBML level 2 version 4

model tran_2009____main()
  // Originally created by libAntimony v1.4 (using libSBML 4.1.0-b2)

  // Compartments:
  compartment default_compartment = 1;

  // Parameters:
  len_thin = 1.2;
  len_thick = 1.65;
  len_hbare = 0.1;
  SL = 2.2;
  TRPNCaL = 0.01477301;
  TRPNCaH = 0.130661;
  Ca_binding_to_troponin_to_thin_filament_regulation_Qkon = 1.5;
  Ca_binding_to_troponin_to_thin_filament_regulation_Qkoff = 1.3;
  Ca_binding_to_troponin_to_thin_filament_regulation_Qkn_p = 1.6;
  Ca_binding_to_troponin_to_thin_filament_regulation_Qkp_n = 1.6;
  Ca_binding_to_troponin_to_thin_filament_regulation_kon = 0.05;
  Ca_binding_to_troponin_to_thin_filament_regulation_koffL = 0.25;
  Ca_binding_to_troponin_to_thin_filament_regulation_koffH = 0.025;
  Ca_binding_to_troponin_to_thin_filament_regulation_perm50 = 0.5;
  Ca_binding_to_troponin_to_thin_filament_regulation_nperm = 15;
  Ca_binding_to_troponin_to_thin_filament_regulation_kn_p = 0.5;
  Ca_binding_to_troponin_to_thin_filament_regulation_kp_n = 0.05;
  Ca_binding_to_troponin_to_thin_filament_regulation_koffmod = 1;
  Ca_binding_to_troponin_to_thin_filament_regulation_pH = 7.15;
  Ca_binding_to_troponin_to_thin_filament_regulation_m = 1;
  Ca_binding_to_troponin_to_thin_filament_regulation_kdHCa = 0.02;
  TmpC = 22;
  Cai = 200;
  fapp = 0.5;
  gapp = 0.07;
  hf = 2;
  hb = 0.4;
  gxb = 0.07;
  thin_filament_regulation_and_crossbridge_cycling_rates_gslmod = 6;
  thin_filament_regulation_and_crossbridge_cycling_rates_hfmdc = 5;
  thin_filament_regulation_and_crossbridge_cycling_rates_hbmdc = 0;
  thin_filament_regulation_and_crossbridge_cycling_rates_sigmap = 8;
  thin_filament_regulation_and_crossbridge_cycling_rates_sigman = 1;
  thin_filament_regulation_and_crossbridge_cycling_rates_xbmodsp = 0.2;
  thin_filament_regulation_and_crossbridge_cycling_rates_Qfapp = 6.25;
  thin_filament_regulation_and_crossbridge_cycling_rates_Qgapp = 2.5;
  thin_filament_regulation_and_crossbridge_cycling_rates_Qhf = 6.25;
  thin_filament_regulation_and_crossbridge_cycling_rates_Qhb = 6.25;
  thin_filament_regulation_and_crossbridge_cycling_rates_Qgxb = 6.25;
  x_0 = 0.007;
  xXBpostr = 0.007000054;
  xXBprer = 3.412128e-8;
  XBpostr = 1.810176e-6;
  XBprer = 3.049496e-7;
  kMgATP = 15400000000;
  kdADP = 4;
  xPi_cons = 2000;
  MgATP_cons = 5000;
  regulation_and_crossbridge_cycling_state_equations_N_NoXB = 1;
  regulation_and_crossbridge_cycling_state_equations_P_NoXB = 4.074372e-8;
  regulation_and_crossbridge_cycling_state_equations_P = 0.9999978;
  regulation_and_crossbridge_cycling_state_equations_MgADP_cons = 36;
  regulation_and_crossbridge_cycling_state_equations_xPi = 2000;
  regulation_and_crossbridge_cycling_state_equations_MgATP = 5000;
  regulation_and_crossbridge_cycling_state_equations_MgADP = 36.3;
  mean_strain_of_strongly_bound_states_xPsi = 2;
  normalised_active_and_passive_force_kxb = 120;
  normalised_active_and_passive_force_intf = -4.511345e-6;
  normalised_active_and_passive_force_SL_c = 2.25;
  normalised_active_and_passive_force_SLrest = 1.85;
  normalised_active_and_passive_force_SLset = 1.9;
  normalised_active_and_passive_force_PCon_t = 0.002;
  normalised_active_and_passive_force_PExp_t = 10;
  normalised_active_and_passive_force_PCon_c = 0.02;
  normalised_active_and_passive_force_PExp_c = 70;
  normalised_active_and_passive_force_KSE = 1;
  normalised_active_and_passive_force_SEon = 1;
  calculation_of_micromolar_per_millisecondes_of_Ca_for_apparent_Ca_binding_kxb = 120;
  calculation_of_micromolar_per_millisecondes_of_Ca_for_apparent_Ca_binding_Trop_conc = 70;
  time_ = ;

  // Assignment rules:
  SOVFThick := sarcomere_geometry_len_sovr*2/(len_thick - len_hbare);
  SOVFThin := sarcomere_geometry_len_sovr/len_thin;
  sarcomere_geometry_sovr_ze := ;
  sarcomere_geometry_sovr_cle := ;
  sarcomere_geometry_len_sovr := sarcomere_geometry_sovr_ze - sarcomere_geometry_sovr_cle;
  dTRPNCaL := Ca_binding_to_troponin_to_thin_filament_regulation_konT*Cai*(1 - TRPNCaL) - Ca_binding_to_troponin_to_thin_filament_regulation_koffLT*TRPNCaL;
  dTRPNCaH := Ca_binding_to_troponin_to_thin_filament_regulation_konT*Cai*(1 - TRPNCaH) - Ca_binding_to_troponin_to_thin_filament_regulation_koffHT*TRPNCaH;
  kn_pT := Ca_binding_to_troponin_to_thin_filament_regulation_kn_p*Ca_binding_to_troponin_to_thin_filament_regulation_permtot*Ca_binding_to_troponin_to_thin_filament_regulation_Qkn_p^((TmpC - 37)/10);
  kp_nT := Ca_binding_to_troponin_to_thin_filament_regulation_kp_n*Ca_binding_to_troponin_to_thin_filament_regulation_inprmt*Ca_binding_to_troponin_to_thin_filament_regulation_Qkp_n^((TmpC - 37)/10);
  H := 10e6*10^(-Ca_binding_to_troponin_to_thin_filament_regulation_pH);
  H_cons := 10e6*10^(-7.15);
  Ca_binding_to_troponin_to_thin_filament_regulation_konT := (Ca_binding_to_troponin_to_thin_filament_regulation_kdHCa^Ca_binding_to_troponin_to_thin_filament_regulation_m + H_cons^Ca_binding_to_troponin_to_thin_filament_regulation_m)/(Ca_binding_to_troponin_to_thin_filament_regulation_kdHCa^Ca_binding_to_troponin_to_thin_filament_regulation_m + H^Ca_binding_to_troponin_to_thin_filament_regulation_m)*Ca_binding_to_troponin_to_thin_filament_regulation_kon*Ca_binding_to_troponin_to_thin_filament_regulation_Qkon^((TmpC - 37)/10);
  Ca_binding_to_troponin_to_thin_filament_regulation_koffLT := Ca_binding_to_troponin_to_thin_filament_regulation_koffL*Ca_binding_to_troponin_to_thin_filament_regulation_koffmod*Ca_binding_to_troponin_to_thin_filament_regulation_Qkoff^((TmpC - 37)/10);
  Ca_binding_to_troponin_to_thin_filament_regulation_koffHT := Ca_binding_to_troponin_to_thin_filament_regulation_koffH*Ca_binding_to_troponin_to_thin_filament_regulation_koffmod*Ca_binding_to_troponin_to_thin_filament_regulation_Qkoff^((TmpC - 37)/10);
  Ca_binding_to_troponin_to_thin_filament_regulation_Tropreg := (1 - SOVFThin)*TRPNCaL + SOVFThin*TRPNCaH;
  Ca_binding_to_troponin_to_thin_filament_regulation_permtot := sqrt(abs(1/(1 + (Ca_binding_to_troponin_to_thin_filament_regulation_perm50/Ca_binding_to_troponin_to_thin_filament_regulation_Tropreg)^Ca_binding_to_troponin_to_thin_filament_regulation_nperm)));
  Ca_binding_to_troponin_to_thin_filament_regulation_inprmt := ;
  fappT := fapp*thin_filament_regulation_and_crossbridge_cycling_rates_xbmodsp*thin_filament_regulation_and_crossbridge_cycling_rates_Qfapp^((TmpC - 37)/10);
  gappT := gapp*thin_filament_regulation_and_crossbridge_cycling_rates_gapslmd*thin_filament_regulation_and_crossbridge_cycling_rates_xbmodsp*thin_filament_regulation_and_crossbridge_cycling_rates_Qgapp^((TmpC - 37)/10);
  hfT := hf*thin_filament_regulation_and_crossbridge_cycling_rates_hfmd*thin_filament_regulation_and_crossbridge_cycling_rates_xbmodsp*thin_filament_regulation_and_crossbridge_cycling_rates_Qhf^((TmpC - 37)/10);
  hbT := hb*thin_filament_regulation_and_crossbridge_cycling_rates_hbmd*thin_filament_regulation_and_crossbridge_cycling_rates_xbmodsp*thin_filament_regulation_and_crossbridge_cycling_rates_Qhb^((TmpC - 37)/10);
  gxbT := gxb*thin_filament_regulation_and_crossbridge_cycling_rates_gxbmd*thin_filament_regulation_and_crossbridge_cycling_rates_xbmodsp*thin_filament_regulation_and_crossbridge_cycling_rates_Qgxb^((TmpC - 37)/10);
  thin_filament_regulation_and_crossbridge_cycling_rates_hfmd := exp(-xXBprer/abs(xXBprer)*thin_filament_regulation_and_crossbridge_cycling_rates_hfmdc*(xXBprer/x_0)^2);
  thin_filament_regulation_and_crossbridge_cycling_rates_hbmd := exp((xXBpostr - x_0)/abs(xXBpostr - x_0)*thin_filament_regulation_and_crossbridge_cycling_rates_hbmdc*((xXBpostr - x_0)/x_0)^2);
  thin_filament_regulation_and_crossbridge_cycling_rates_gxbmd := ;
  thin_filament_regulation_and_crossbridge_cycling_rates_gapslmd := 1 + (1 - SOVFThick)*thin_filament_regulation_and_crossbridge_cycling_rates_gslmod;
  dXBpostr := alpha3_minus*regulation_and_crossbridge_cycling_state_equations_P + alpha2_plus*XBprer - (alpha2_minus + alpha3_plus)*XBpostr;
  dXBprer := alpha1_plus*regulation_and_crossbridge_cycling_state_equations_P + alpha2_minus*XBpostr - (alpha1_minus + alpha2_plus)*XBprer;
  alpha1_plus := fappT;
  alpha2_plus := hfT;
  alpha3_plus := regulation_and_crossbridge_cycling_state_equations_MgATP*(gxbT/MgATP_cons)*((kdADP + regulation_and_crossbridge_cycling_state_equations_MgADP_cons)/(kdADP + regulation_and_crossbridge_cycling_state_equations_MgADP));
  alpha1_minus := regulation_and_crossbridge_cycling_state_equations_xPi*(gappT/xPi_cons);
  alpha2_minus := H*(hbT/H_cons)*((kdADP + regulation_and_crossbridge_cycling_state_equations_MgADP_cons)/regulation_and_crossbridge_cycling_state_equations_MgADP_cons)*(regulation_and_crossbridge_cycling_state_equations_MgADP/(kdADP + regulation_and_crossbridge_cycling_state_equations_MgADP));
  alpha3_minus := regulation_and_crossbridge_cycling_state_equations_fxbT;
  regulation_and_crossbridge_cycling_state_equations_fxbT := kdADP*fappT*hfT*(gxbT/MgATP_cons)/(gappT/xPi_cons*(hbT/H_cons)*kMgATP);
  regulation_and_crossbridge_cycling_state_equations_N := 1 - (regulation_and_crossbridge_cycling_state_equations_P + XBprer + XBpostr);
  dxXBpostr := dSL/2 + mean_strain_of_strongly_bound_states_xPsi/mean_strain_of_strongly_bound_states_dutypostr*alpha2_plus*(xXBprer + x_0 - xXBpostr);
  dxXBprer := dSL/2 + mean_strain_of_strongly_bound_states_xPsi/mean_strain_of_strongly_bound_states_dutyprer*(-(alpha1_plus*xXBprer) + alpha2_minus*(xXBpostr - (x_0 + xXBprer)));
  mean_strain_of_strongly_bound_states_dutyprer := (alpha3_minus*alpha2_minus + alpha3_plus*alpha1_plus + alpha2_minus*alpha1_plus)/(alpha1_plus*alpha2_plus + alpha3_minus*alpha1_minus + alpha3_minus*alpha2_plus + alpha3_minus*alpha2_minus + alpha3_plus*alpha1_plus + alpha2_minus*alpha1_plus + alpha2_plus*alpha3_plus + alpha3_minus*alpha1_minus + alpha3_plus*alpha1_minus);
  mean_strain_of_strongly_bound_states_dutypostr := (alpha1_plus*alpha2_plus + alpha3_minus*alpha1_minus + alpha3_minus*alpha2_plus)/(alpha1_plus*alpha2_plus + alpha3_minus*alpha1_minus + alpha3_minus*alpha2_plus + alpha3_minus*alpha2_minus + alpha3_plus*alpha1_plus + alpha2_minus*alpha1_plus + alpha2_plus*alpha3_plus + alpha3_minus*alpha1_minus + alpha3_plus*alpha1_minus);
  dSL := 0;
  SSXBpostr := (fapp*hf + normalised_active_and_passive_force_fxb*gapp + normalised_active_and_passive_force_fxb*hb)/(hf*gxb + hb*gapp + gxb*gapp + normalised_active_and_passive_force_fxb*hb + gxb*fapp + hb*fapp + normalised_active_and_passive_force_fxb*gapp + fapp*hf + normalised_active_and_passive_force_fxb*hb);
  SSXBprer := (normalised_active_and_passive_force_fxb*hb + gxb*fapp + hbT*fapp)/(hf*gxb + hb*gapp + gxb*gapp + normalised_active_and_passive_force_fxb*hb + gxb*fapp + hb*fapp + normalised_active_and_passive_force_fxb*gapp + fapp*hf + normalised_active_and_passive_force_fxb*hb);
  normalised_active_and_passive_force_Fnordv := normalised_active_and_passive_force_kxb*x_0*SSXBpostr;
  normalised_active_and_passive_force_force := normalised_active_and_passive_force_kxb*SOVFThick*(xXBpostr*XBpostr + xXBprer*XBprer);
  normalised_active_and_passive_force_active := 1*normalised_active_and_passive_force_force/normalised_active_and_passive_force_Fnordv;
  normalised_active_and_passive_force_ppforce := normalised_active_and_passive_force_ppforce_t + normalised_active_and_passive_force_ppforce_c;
  normalised_active_and_passive_force_ppforce_t := (SL - normalised_active_and_passive_force_SLrest)/abs(SL - normalised_active_and_passive_force_SLrest)*normalised_active_and_passive_force_PCon_t*(exp(normalised_active_and_passive_force_PExp_t*abs(SL - normalised_active_and_passive_force_SLrest)) - 1);
  normalised_active_and_passive_force_ppforce_c := ;
  normalised_active_and_passive_force_preload := abs(normalised_active_and_passive_force_SLset - normalised_active_and_passive_force_SLrest)/(normalised_active_and_passive_force_SLset - normalised_active_and_passive_force_SLrest)*normalised_active_and_passive_force_PCon_t*(exp(normalised_active_and_passive_force_PExp_t*abs(normalised_active_and_passive_force_SLset - normalised_active_and_passive_force_SLrest)) - 1);
  normalised_active_and_passive_force_afterload := ;
  normalised_active_and_passive_force_fxb := kdADP*fapp*hf*(gxb/MgATP_cons)/(gapp/xPi_cons*(hb/H_cons)*kMgATP);
  calculation_of_micromolar_per_millisecondes_of_Ca_for_apparent_Ca_binding_FrSBXB := (XBpostr + XBprer)/(SSXBpostr + SSXBprer);
  calculation_of_micromolar_per_millisecondes_of_Ca_for_apparent_Ca_binding_dFrSBXB := (dXBpostr + dXBprer)/(SSXBpostr + SSXBprer);
  calculation_of_micromolar_per_millisecondes_of_Ca_for_apparent_Ca_binding_dsovr_ze := ;
  calculation_of_micromolar_per_millisecondes_of_Ca_for_apparent_Ca_binding_dsovr_cle := ;
  calculation_of_micromolar_per_millisecondes_of_Ca_for_apparent_Ca_binding_dlen_sovr := calculation_of_micromolar_per_millisecondes_of_Ca_for_apparent_Ca_binding_dsovr_ze - calculation_of_micromolar_per_millisecondes_of_Ca_for_apparent_Ca_binding_dsovr_cle;
  calculation_of_micromolar_per_millisecondes_of_Ca_for_apparent_Ca_binding_dSOVFThick := 2*calculation_of_micromolar_per_millisecondes_of_Ca_for_apparent_Ca_binding_dlen_sovr/(len_thick - len_hbare);
  calculation_of_micromolar_per_millisecondes_of_Ca_for_apparent_Ca_binding_dSOVFThin := calculation_of_micromolar_per_millisecondes_of_Ca_for_apparent_Ca_binding_dlen_sovr/len_thin;
  calculation_of_micromolar_per_millisecondes_of_Ca_for_apparent_Ca_binding_dforce := calculation_of_micromolar_per_millisecondes_of_Ca_for_apparent_Ca_binding_kxb*calculation_of_micromolar_per_millisecondes_of_Ca_for_apparent_Ca_binding_dSOVFThick*(xXBpostr*XBpostr + xXBprer*XBprer) + calculation_of_micromolar_per_millisecondes_of_Ca_for_apparent_Ca_binding_kxb*SOVFThick*(dxXBpostr*XBpostr + xXBpostr*dXBpostr + dxXBprer*XBprer + xXBprer*dXBprer);
  calculation_of_micromolar_per_millisecondes_of_Ca_for_apparent_Ca_binding_TropTot := calculation_of_micromolar_per_millisecondes_of_Ca_for_apparent_Ca_binding_Trop_conc*((1 - SOVFThin)*TRPNCaL + SOVFThin*(calculation_of_micromolar_per_millisecondes_of_Ca_for_apparent_Ca_binding_FrSBXB*TRPNCaH + (1 - calculation_of_micromolar_per_millisecondes_of_Ca_for_apparent_Ca_binding_FrSBXB)*TRPNCaL));
  calculation_of_micromolar_per_millisecondes_of_Ca_for_apparent_Ca_binding_dTropTot := calculation_of_micromolar_per_millisecondes_of_Ca_for_apparent_Ca_binding_Trop_conc*(-calculation_of_micromolar_per_millisecondes_of_Ca_for_apparent_Ca_binding_dSOVFThin*TRPNCaL + (1 - SOVFThin)*dTRPNCaL + calculation_of_micromolar_per_millisecondes_of_Ca_for_apparent_Ca_binding_dSOVFThin*(calculation_of_micromolar_per_millisecondes_of_Ca_for_apparent_Ca_binding_FrSBXB*TRPNCaH + (1 - calculation_of_micromolar_per_millisecondes_of_Ca_for_apparent_Ca_binding_FrSBXB)*TRPNCaL) + SOVFThin*(calculation_of_micromolar_per_millisecondes_of_Ca_for_apparent_Ca_binding_dFrSBXB*TRPNCaH + calculation_of_micromolar_per_millisecondes_of_Ca_for_apparent_Ca_binding_FrSBXB*dTRPNCaH + (1 - calculation_of_micromolar_per_millisecondes_of_Ca_for_apparent_Ca_binding_FrSBXB)*dTRPNCaL - calculation_of_micromolar_per_millisecondes_of_Ca_for_apparent_Ca_binding_dFrSBXB*TRPNCaL));

  // Rate rules:
  SL' = dSL;
  TRPNCaL' = dTRPNCaL;
  TRPNCaH' = dTRPNCaH;
  xXBpostr' = dxXBpostr;
  xXBprer' = dxXBprer;
  XBpostr' = dXBpostr;
  XBprer' = dXBprer;
  regulation_and_crossbridge_cycling_state_equations_N_NoXB' = kp_nT*regulation_and_crossbridge_cycling_state_equations_P_NoXB - kn_pT*regulation_and_crossbridge_cycling_state_equations_N_NoXB;
  regulation_and_crossbridge_cycling_state_equations_P_NoXB' = kn_pT*regulation_and_crossbridge_cycling_state_equations_N_NoXB - kp_nT*regulation_and_crossbridge_cycling_state_equations_P_NoXB;
  regulation_and_crossbridge_cycling_state_equations_P' = kn_pT*regulation_and_crossbridge_cycling_state_equations_N - (kp_nT + alpha1_plus)*regulation_and_crossbridge_cycling_state_equations_P;
  normalised_active_and_passive_force_intf' = normalised_active_and_passive_force_preload + normalised_active_and_passive_force_afterload - (normalised_active_and_passive_force_ppforce + normalised_active_and_passive_force_active);
end
