// SBML level 2 version 4

model tran_model_2009____main()
  // Originally created by libAntimony v1.4 (using libSBML 4.1.0-b2)

  // Compartments:
  compartment default_compartment = 1;

  // Parameters:
  SERCA_k_p1 = 25900;
  SERCA_k_p2 = 2540;
  SERCA_k_p3 = 20.5;
  SERCA_k_m1 = 16;
  SERCA_k_m2 = 67200;
  SERCA_k_m3 = 149;
  SERCA_kdcai = 0.9;
  SERCA_kdcasr = 2.24;
  SERCA_kdh1 = 1.09e-5;
  SERCA_kdhi = 0.00354;
  SERCA_kdhsr = 1.05e-8;
  SERCA_kdh = 7.24e-5;
  SERCA_n = 2;
  SERCA_Ca_i = 0.00015;
  SERCA_Ca_sr = 0;
  SERCA_H_i = 0.0001;
  SERCA_ATP = 5;
  SERCA_ADP = 0.0363;
  SERCA_P_i = 1;
  time_ = ;

  // Assignment rules:
  SERCA_T_Cai := SERCA_Ca_i/SERCA_kdcai;
  SERCA_T_Casr := SERCA_Ca_sr/SERCA_kdcasr;
  SERCA_T_H1 := SERCA_H_i/SERCA_kdh1;
  SERCA_T_Hi := SERCA_H_i^SERCA_n/SERCA_kdhi;
  SERCA_T_Hsr := SERCA_H_i^SERCA_n/SERCA_kdhsr;
  SERCA_T_H := SERCA_H_i/SERCA_kdh;
  SERCA_a_p1 := SERCA_k_p1*SERCA_ATP;
  SERCA_a_p2 := SERCA_k_p2*SERCA_T_Cai^2/(SERCA_T_Cai^2 + SERCA_T_Cai^2*SERCA_T_Hi + SERCA_T_Hi*(1 + SERCA_T_H1));
  SERCA_a_p3 := SERCA_k_p3*SERCA_T_Hsr/(SERCA_T_Casr^2*SERCA_T_H + SERCA_T_H + SERCA_T_Hsr*(1 + SERCA_T_H));
  SERCA_a_m1 := SERCA_k_m1*SERCA_T_Hi/(SERCA_T_Cai^2 + SERCA_T_Cai^2*SERCA_T_Hi + SERCA_T_Hi*(1 + SERCA_T_H1));
  SERCA_a_m2 := SERCA_k_m2*SERCA_ADP*SERCA_T_Casr^2*SERCA_T_H/(SERCA_T_Casr^2*SERCA_T_H + SERCA_T_H + SERCA_T_Hsr*(1 + SERCA_T_H));
  SERCA_a_m3 := SERCA_k_m3*SERCA_P_i;
  SERCA_s1 := SERCA_a_p2*SERCA_a_p3 + SERCA_a_m1*SERCA_a_p3 + SERCA_a_m1*SERCA_a_m2;
  SERCA_s2 := SERCA_a_p1*SERCA_a_p3 + SERCA_a_m2*SERCA_a_p1 + SERCA_a_m2*SERCA_a_m3;
  SERCA_s3 := SERCA_a_p1*SERCA_a_p2 + SERCA_a_m3*SERCA_a_m1 + SERCA_a_m3*SERCA_a_p2;
  SERCA_v_cycle := (SERCA_a_p1*SERCA_a_p2*SERCA_a_p3 - SERCA_a_m1*SERCA_a_m2*SERCA_a_m3)/(SERCA_s1 + SERCA_s2 + SERCA_s3);

  // Rate rules:
  SERCA_Ca_sr' = 1;
end
