// SBML level 2 version 4

model tyson_1991____main()
  // Originally created by libAntimony v1.3 (using libSBML 4.1.0-b2)

  // Compartments:
  compartment default_compartment = 1;

  // Parameters:
  C20 = 0.001;
  k6 = 1;
  k9 = 100;
  M0 = 0.001;
  P = 1;
  CP0 = 0.001;
  Y0 = 0.001;
  pM0 = 0.001;
  k2 = 0;
  aa = 1;
  YP0 = 0.001;
  k7 = 0.6;
  k4 = 180;
  reaction_constants_k4_ = 0.018;
  time_ = ;

  // Assignment rules:
  k8 := k9/P;
  k3 := 200/reaction_constants_CT;
  k5 := 0/P;
  F := reaction_constants_k4_ + k4*(M0/reaction_constants_CT)^2;
  k1 := 0.015*reaction_constants_CT/aa;
  reaction_constants_CT := C20 + CP0 + pM0 + M0;
  reaction_constants_YT := Y0 + YP0 + pM0 + M0;
  reaction_constants_YT_CT := reaction_constants_YT/reaction_constants_CT;
  reaction_constants_M_CT := M0/reaction_constants_CT;

  // Rate rules:
  C20' = k6*M0 + k9*CP0 - k8*P*C20;
  M0' = pM0*F - (k5*P*M0 + k6*M0);
  CP0' = k8*P*C20 - (k9*CP0 + k3*CP0*Y0);
  Y0' = aa*k1 - (k3*CP0*Y0 + k2*Y0);
  pM0' = k3*CP0*Y0 + k5*P*M0 - pM0*F;
  YP0' = k6*M0 - k7*YP0;
end
