// SBML level 2 version 4

model ueda_2001____main()
  // Originally created by libAntimony v1.4 (using libSBML 4.1.0-b2)

  // Compartments:
  compartment default_compartment = 1;

  // Parameters:
  Per_m0 = 0.5;
  Per_m_B1 = 0;
  Per_m_C1 = 0;
  Per_m_S1 = 1.45;
  Per_m_D1 = 0.94;
  Per_m_L1 = 0.3;
  Per_m_R1 = 1.02;
  Per_m_A1 = 0.45;
  PT_n0 = 1;
  CC_n0 = 0.4;
  D0 = 0.012;
  a = 1;
  r = 4;
  Per_c0 = 0.6;
  Per_c_S2 = 0.48;
  Per_c_D2 = 0.44;
  Per_c_L2 = 0.2;
  Per_c_Dbt_c = 1;
  V1 = 1.45;
  V2 = 1.45;
  Tim_c0 = 0.8;
  PT_c0 = 0.9;
  Tim_m0 = 0.7;
  Tim_m_B2 = 0;
  Tim_m_C2 = 0;
  Tim_m_S3 = 1.45;
  Tim_m_D3 = 0.94;
  Tim_m_L3 = 0.3;
  Tim_m_R2 = 1.02;
  Tim_m_A2 = 0.45;
  Tim_c_S4 = 0.48;
  Tim_c_D4 = 0.44;
  Tim_c_L4 = 0.2;
  PT_c_D5 = 0.44;
  PT_c_L5 = 0.2;
  K1 = 2;
  K2 = 2;
  T1 = 1.73;
  T2 = 0.72;
  PT_n_D6 = 0.29;
  PT_n_L6 = 0.2;
  Clk_m0 = 0.1;
  Clk_m_B3 = 0.6;
  Clk_m_C3 = 0;
  Clk_m_S5 = 1.63;
  Clk_m_D7 = 0.54;
  Clk_m_L7 = 0.13;
  Clk_m_R3 = 0.89;
  Clk_m_A3 = 0.8;
  Clk_c0 = 0.2;
  Clk_c_S6 = 0.47;
  Clk_c_D8 = 0.6;
  Clk_c_L8 = 0.2;
  V3 = 1.63;
  V4 = 1.63;
  Cyc_c0 = 1;
  CC_c0 = 0.3;
  CC_c_D9 = 0.6;
  CC_c_L9 = 0.2;
  K3 = 2;
  K4 = 2;
  T3 = 1.63;
  T4 = 0.52;
  CC_n_D10 = 0.3;
  CC_n_L10 = 0.2;
  time_ = ;

  // Rate rules:
  Per_m0' = Per_m_C1 + Per_m_S1*(((CC_n0/Per_m_A1)^a + Per_m_B1)/(1 + (PT_n0/Per_m_R1)^r + (CC_n0/Per_m_A1)^a + Per_m_B1)) - (Per_m_D1*(Per_m0/(Per_m_L1 + Per_m0)) + D0*Per_m0);
  PT_n0' = T1*(PT_c0/(K1 + PT_c0)) - (T2*(PT_n0/(K2 + PT_n0)) + PT_n_D6*(PT_n0/(PT_n_L6 + PT_n0)) + D0*PT_n0);
  CC_n0' = T3*(CC_c0/(K3 + CC_c0)) - (T4*(CC_n0/(K4 + CC_n0)) + CC_n_D10*(CC_n0/(CC_n_L10 + CC_n0)) + D0*CC_n0);
  Per_c0' = Per_c_S2*Per_m0 + V2*PT_c0 - (V1*Per_c0*Tim_c0 + Per_c_D2*Per_c_Dbt_c*(Per_c0/(Per_c_L2 + Per_c0)) + D0*Per_c0);
  Tim_c0' = Tim_c_S4*Tim_m0 + V2*PT_c0 - (V1*Per_c0*Tim_c0 + Tim_c_D4*(Tim_c0/(Tim_c_L4 + Tim_c0)) + D0*Tim_c0);
  PT_c0' = V1*Per_c0*Tim_c0 + T2*(PT_n0/(K2 + PT_n0)) - (V2*PT_c0 + T1*(PT_c0/(K1 + PT_c0)) + PT_c_D5*(PT_c0/(PT_c_L5 + PT_c0)) + D0*PT_c0);
  Tim_m0' = Tim_m_C2 + Tim_m_S3*(((CC_n0/Tim_m_A2)^a + Tim_m_B2)/(1 + (PT_n0/Tim_m_R2)^r + (CC_n0/Tim_m_A2)^a + Tim_m_B2)) - (Tim_m_D3*(Tim_m0/(Tim_m_L3 + Tim_m0)) + D0*Tim_m0);
  Clk_m0' = Clk_m_C3 + Clk_m_S5*(((PT_n0/Clk_m_A3)^a + Clk_m_B3)/(1 + (CC_n0/Clk_m_R3)^r + (PT_n0/Clk_m_A3)^a + Clk_m_B3)) - (Clk_m_D7*(Clk_m0/(Clk_m_L7 + Clk_m0)) + D0*Clk_m0);
  Clk_c0' = Clk_c_S6*Clk_m0 + V4*CC_c0 - (V3*Clk_c0*Cyc_c0 + Clk_c_D8*(Clk_c0/(Clk_c_L8 + Clk_c0)) + D0*Clk_c0);
  CC_c0' = V3*Clk_c0*Cyc_c0 + T4*(CC_n0/(K4 + CC_n0)) - (V4*CC_c0 + T3*(CC_c0/(K3 + CC_c0)) + CC_c_D9*(CC_c0/(CC_c_L9 + CC_c0)) + D0*CC_c0);
end
