// SBML level 2 version 4

model vanbeek_model_2007____main()
  // Originally created by libAntimony v1.4 (using libSBML 4.1.0-b2)

  // Compartments:
  compartment default_compartment = 1;

  // Parameters:
  ATP_cyt0 = 5912.77;
  V_cyt = 0.75;
  ADP_cyt0 = 64;
  PCr_cyt0 = 5000;
  Cr_cyt0 = 10500;
  Pi_cyt0 = 913;
  ATP_ims0 = 5912.77;
  V_ims = 0.0625;
  ADP_ims0 = 39;
  PCr_ims0 = 5000;
  Cr_ims0 = 10500;
  Pi_ims0 = 910;
  J_CKMM_Kia = 9e2;
  J_CKMM_Kb = 1.55e4;
  J_CKMM_Kib = 3.49e4;
  J_CKMM_Kic = 2.224e2;
  J_CKMM_Kd = 1.67e3;
  J_CKMM_Kid = 4.73e3;
  J_CKMM_Vmax_MM_f = 1.144e4;
  J_CKMM_Vmax_MM_b = 4.804e4;
  J_CKMi_Kia = 7.5e2;
  J_CKMi_Kb = 5.2e3;
  J_CKMi_Kib = 2.88e4;
  J_CKMi_Kic = 2.048e2;
  J_CKMi_Kd = 5e2;
  J_CKMi_Kid = 1.6e3;
  J_CKMi_Vmax_Mi_f = 8.82e2;
  J_CKMi_Vmax_Mi_b = 3.704e3;
  J_hyd_J_hyd_basis_1 = 486.5;
  J_hyd_J_hyd_basis_2 = 627.6;
  J_hyd_freq_1 = 135;
  J_hyd_freq_2 = 220;
  J_hyd_nb_of_cycles_1 = 5;
  J_syn_KPi = 8e2;
  J_syn_KADP = 25;
  J_syn_V_max_syn = 1.504e4;
  J_diff_ATP_PS_tot_ATP = 13.3;
  J_diff_ADP_PS_tot_ADP = 13.3;
  J_diff_PCr_PS_tot_PCr = 155;
  J_diff_Cr_PS_tot_Cr = 155;
  J_diff_Pi_PS_tot_Pi = 194;
  time_ = ;

  // Assignment rules:
  J_hyd0 := ;
  J_CKMM0 := (J_CKMM_Vmax_MM_f*(ATP_cyt0*Cr_cyt0/(J_CKMM_Kia*J_CKMM_Kb)) - J_CKMM_Vmax_MM_b*(ADP_cyt0*PCr_cyt0/(J_CKMM_Kic*J_CKMM_Kd)))/J_CKMM_Den_MMCK;
  J_diff_ATP0 := J_diff_ATP_PS_tot_ATP*(ATP_ims0 - ATP_cyt0);
  J_diff_ADP0 := J_diff_ADP_PS_tot_ADP*(ADP_ims0 - ADP_cyt0);
  J_diff_PCr0 := J_diff_PCr_PS_tot_PCr*(PCr_ims0 - PCr_cyt0);
  J_diff_Cr0 := J_diff_Cr_PS_tot_Cr*(Cr_ims0 - Cr_cyt0);
  J_diff_Pi0 := J_diff_Pi_PS_tot_Pi*(Pi_ims0 - Pi_cyt0);
  J_CKMi0 := (J_CKMi_Vmax_Mi_f*(ATP_ims0*Cr_ims0/(J_CKMi_Kia*J_CKMi_Kb)) - J_CKMi_Vmax_Mi_b*(ADP_ims0*PCr_ims0/(J_CKMi_Kic*J_CKMi_Kd)))/J_CKMi_Den_MiCK;
  J_syn0 := J_syn_V_max_syn*(ADP_ims0*Pi_ims0/(J_syn_KPi*J_syn_KADP*J_syn_Den_syn));
  J_CKMM_Den_MMCK := 1 + Cr_cyt0/J_CKMM_Kib + PCr_cyt0/J_CKMM_Kid + ATP_cyt0*(1/J_CKMM_Kia + Cr_cyt0/(J_CKMM_Kia*J_CKMM_Kb)) + ADP_cyt0*(1/J_CKMM_Kic + PCr_cyt0/(J_CKMM_Kid*J_CKMM_Kc) + Cr_cyt0/(J_CKMM_Kic*J_CKMM_KIb));
  J_CKMM_KIb := J_CKMM_Kib;
  J_CKMM_Kc := J_CKMM_Kic*J_CKMM_Kd/J_CKMM_Kid;
  J_CKMi_Den_MiCK := 1 + Cr_ims0/J_CKMi_Kib + PCr_ims0/J_CKMi_Kid + ATP_ims0*(1/J_CKMi_Kia + Cr_ims0/(J_CKMi_Kia*J_CKMi_Kb)) + ADP_ims0*(1/J_CKMi_Kic + PCr_ims0/(J_CKMi_Kid*J_CKMi_Kc) + Cr_ims0/(J_CKMi_Kic*J_CKMi_KIb));
  J_CKMi_KIb := J_CKMi_Kib;
  J_CKMi_Kc := J_CKMi_Kic*J_CKMi_Kd/J_CKMi_Kid;
  J_hyd_H_ATPmax := ;
  J_hyd_t_cycle_1 := 60/J_hyd_freq_1;
  J_hyd_t_cycle_2 := 60/J_hyd_freq_2;
  J_hyd_t_cycle := ;
  J_hyd_duration_1 := J_hyd_nb_of_cycles_1*J_hyd_t_cycle_1;
  J_hyd_ltime := ;
  J_syn_Den_syn := 1 + ADP_ims0/J_syn_KADP + Pi_ims0/J_syn_KPi + ADP_ims0*Pi_ims0/(J_syn_KADP*J_syn_KPi);

  // Rate rules:
  ATP_cyt0' = (J_diff_ATP0 - (J_hyd0 + J_CKMM0))/V_cyt;
  ADP_cyt0' = (J_diff_ADP0 + J_hyd0 + J_CKMM0)/V_cyt;
  PCr_cyt0' = (J_diff_PCr0 + J_CKMM0)/V_cyt;
  Cr_cyt0' = (J_diff_Cr0 - J_CKMM0)/V_cyt;
  Pi_cyt0' = (J_diff_Pi0 + J_hyd0)/V_cyt;
  ATP_ims0' = (J_syn0 - (J_diff_ATP0 + J_CKMi0))/V_ims;
  ADP_ims0' = (J_CKMi0 - (J_syn0 + J_diff_ADP0))/V_ims;
  PCr_ims0' = (J_CKMi0 - J_diff_PCr0)/V_ims;
  Cr_ims0' = -(J_CKMi0 + J_diff_Cr0)/V_ims;
  Pi_ims0' = -(J_syn0 + J_diff_Pi0)/V_ims;
end
