// SBML level 2 version 4

model vancapelle_durrer_1980_version02____main()
  // Originally created by libAntimony v1.4 (using libSBML 4.1.0-b2)

  // Compartments:
  compartment default_compartment = 1;

  // Parameters:
  membrane_C = 0.01;
  membrane_T = 50;
  membrane_Y = 0.07;
  membrane_Vm = -78.6;
  membrane_af = 3.837854e-5;
  membrane_bf = 0.00584649;
  membrane_cf = 0.2531834;
  membrane_df = 2.356256;
  time_ = ;

  // Assignment rules:
  membrane_Y_infinity_Vm := ;
  membrane_I_ion := -membrane_Y*membrane_i1_Vm - (1 - membrane_Y)*membrane_i0_Vm;
  membrane_i1_Vm := ;
  membrane_i0_Vm := membrane_i1_Vm + membrane_f_Vm;
  membrane_f_Vm := ;

  // Rate rules:
  membrane_Y' = 1/membrane_T*(membrane_Y_infinity_Vm - membrane_Y);
end
