// SBML level 2 version 4

model vendelin_model_2000____main()
  // Originally created by libAntimony v1.4 (using libSBML 4.1.0-b2)

  // Compartments:
  compartment default_compartment = 1;

  // Parameters:
  D_ATP = 1.45e2;
  D_ADP = 1.45e2;
  D_AMP = 1.45e2;
  D_PCr = 2.6e2;
  D_Cr = 2.6e2;
  D_Pi = 3.27e2;
  v_CK_Kia = 9e2;
  v_CK_Kib = 3.49e4;
  v_CK_Kb = 1.55e4;
  v_CK_Kic = 2.224e2;
  v_CK_KIb = 3.49e4;
  v_CK_Kid = 4.73e3;
  v_CK_Kd = 1.67e3;
  v_CK_V1 = 1.3e4;
  v_CK_V1_ = 5.48e4;
  fATPx_KDTx = 17;
  ATPx0 = ;
  Mgx = 380;
  fATPext_KDText = 24;
  Mgext = 1e3;
  ATPi0 = ;
  fADPx_KDDx = 282;
  fADPext_KDDext = 347;
  ADPi0 = ;
  v_AK_kfa = 63.8;
  v_AK_kba = 1.68;
  v_AKmit_kfa = 63.8;
  v_AKmit_kba = 1.68;
  H_ATP_H_ATPmax = 3.626e4;
  AMPi0 = ;
  PCri0 = ;
  Cri0 = ;
  Pii0 = ;
  R_ATP = 0.16;
  R_ADP = 0.16;
  R_AMP = 0.16;
  R_PCr = 260;
  R_Cr = 260;
  R_Pi = 327;
  FVi = 0.0625;
  Li = 0.1;
  v_MiCK_V1 = 7.7e3;
  v_MiCK_V1_ = 2.97e4;
  v_MiCK_Kia_G = 7.12e2;
  v_MiCK_Kia = 1.61e2;
  v_MiCK_Kic_G = 1.42e2;
  v_MiCK_Kic = 1.1e4;
  v_MiCK_Kd = 5e2;
  v_MiCK_Kb = 5.2e3;
  v_MiCK_Kib = 2.6e4;
  v_MiCK_Kid = 1.6e3;
  v_MiCK_KIb = 2.6e4;
  v_exch_R_exch_ATP = 1.88;
  v_exch_R_exch_ADP = 1.88;
  UQ0 = ;
  FVx = 0.1875;
  c3plus0 = ;
  NAD0 = ;
  Hx0 = ;
  na = 2.5;
  u = 0.861;
  Pix0 = ;
  oxidative_phosphorylation_k_L1 = 2.1895e3;
  oxidative_phosphorylation_k_L2 = 0.003;
  oxidative_phosphorylation_k_dh = 5.75e4;
  oxidative_phosphorylation_k_sn = 2.96e4;
  oxidative_phosphorylation_k_C1 = 2e2;
  oxidative_phosphorylation_k_C3 = 1.142e2;
  oxidative_phosphorylation_k_C4 = 2.351;
  oxidative_phosphorylation_k_mO = 150;
  oxidative_phosphorylation_k_mN = 100;
  oxidative_phosphorylation_pD = 0.8;
  oxidative_phosphorylation_O2 = 2.4e2;
  oxidative_phosphorylation_vfPI = 138.5;
  oxidative_phosphorylation_vbPI = 138.5;
  oxidative_phosphorylation_pKa = 6.8;
  pHext = 6.9;
  NADH_NAD_tot = 2.97e3;
  UQH2_UQ_tot = 1.35e3;
  c2plus_ctot = 2.7e2;
  a2plus_atot = 1.35e2;
  ADPx_Ax = 1e4;
  eta = 10e6;
  r_buff_r_buff0 = 0.022;
  T = 298;
  R = 0.0083;
  F = 0.0965;
  v_ANT_Kg = 4.25;
  v_ANT_Ki = 4.25;
  delta_Gsn_delta_Gsn0 = 31.9;
  redox_potentials_En0 = -320;
  redox_potentials_Eu0 = 85;
  redox_potentials_Ec0 = 250;
  redox_potentials_Ea0 = 540;
  time_ = ;
  ATP0 = ;
  ADP0 = ;
  AMP0 = ;
  PCr0 = ;
  Cr0 = ;
  Pi_0 = ;
  fATP_KDT = ;
  Mg = ;
  ATPext = ;
  fATPg_KDTg = ;
  ATPg = ;
  Mgg = ;
  fATPi_KDTi = ;
  Mgi = ;
  fADP_KDD = ;
  ADPext = ;
  fADPg_KDDg = ;
  ADPg = ;
  fADPi_KDDi = ;
  G_CK_x = ;
  G_CK_y = ;
  G_H_x = ;
  G_H_y = ;
  diffusion_through_mitochondrial_membrane_ATP_diff = ;
  diffusion_through_mitochondrial_membrane_ADP_diff = ;
  diffusion_through_mitochondrial_membrane_AMP_diff = ;
  diffusion_through_mitochondrial_membrane_PCr_diff = ;
  diffusion_through_mitochondrial_membrane_Cr_diff = ;
  diffusion_through_mitochondrial_membrane_Pi_diff = ;
  diffusion_through_mitochondrial_membrane_n = ;
  delta_Hx0 = ;
  v_ANT_v_ANT_XG = ;
  v_ANT_v_ANT_XI = ;

  // Assignment rules:
  G_CK0 := ;
  v_CK0 := (v_CK_V1*(mATP0*Cr0/(v_CK_Kia*v_CK_Kb)) - v_CK_V1_*(mADP0*PCr0/(v_CK_Kic*v_CK_Kd)))/v_CK_DenCK;
  G_AK0 := G_CK0;
  v_AK0 := v_AK_kfa*fADP0*mADP0 - v_AK_kba*mATP0*AMP0;
  G_H0 := ;
  H_ATP0 := ;
  v_CK_Kc := v_CK_Kic*v_CK_Kd/v_CK_Kid;
  v_CK_DenCK := 1 + Cr0/v_CK_Kib + PCr0/v_CK_Kid + mATP0*(1/v_CK_Kia + Cr0/(v_CK_Kia*v_CK_Kb)) + mADP0*(1/v_CK_Kic + PCr0/(v_CK_Kid*v_CK_Kc) + Cr0/(v_CK_Kic*v_CK_KIb));
  mATP0 := ATP0 - fATP0;
  mADP0 := ADP0 - fADP0;
  fATP0 := ATP0/(1 + Mg/fATP_KDT);
  fATPx0 := ATPx0/(1 + Mgx/fATPx_KDTx);
  fATPext0 := ATPext/(1 + Mgext/fATPext_KDText);
  fATPg0 := ATPg/(1 + Mgg/fATPg_KDTg);
  fATPi0 := ATPi0/(1 + Mgi/fATPi_KDTi);
  mATPx_mATPx := ATPx0 - fATPx0;
  mATPext_mATPext := ATPext - fATPext0;
  mATPg0 := ATPg - fATPg0;
  mATPi0 := ATPi0 - fATPi0;
  fADP0 := ADP0/(1 + Mg/fADP_KDD);
  fADPx0 := ADPx0/(1 + Mgx/fADPx_KDDx);
  ADPx0 := ADPx_Ax - ATPx0;
  fADPext0 := ADPext/(1 + Mgext/fADPext_KDDext);
  fADPg0 := ADPg/(1 + Mgg/fADPg_KDDg);
  fADPi0 := ADPi0/(1 + Mgi/fADPi_KDDi);
  mADPx_mADPx := ADPx0 - fADPx0;
  mADPext_mADPext := ADPext - fADPext0;
  mADPg0 := ADPg - fADPg0;
  mADPi0 := ADPi0 - fADPi0;
  v_AKmit0 := v_AKmit_kfa*fADP0*mADP0 - v_AKmit_kba*mATP0*AMP0;
  v_ANT0 := v_ANT_v_ANT_XG + v_ANT_v_ANT_XI;
  v_MiCK0 := v_MiCK_v_MiCK_G + v_MiCK_v_MiCK_I;
  v_PI := oxidative_phosphorylation_vfPI*Hext0*(Pii0/(1 + 10^(pHext - oxidative_phosphorylation_pKa))) - oxidative_phosphorylation_vbPI*Hx0*(Pix0/(1 + 10^(pHx0 - oxidative_phosphorylation_pKa)));
  v_MiCK_v_MiCK_G := (v_MiCK_V1*(mATPg0*Cri0/(v_MiCK_Kia_G*v_MiCK_Kb)) - v_MiCK_V1_*(mADPg0*PCri0/(v_MiCK_Kic_G*v_MiCK_Kd)))/v_MiCK_DenMiCK;
  v_MiCK_v_MiCK_I := (v_MiCK_V1*(mATPi0*Cri0/(v_MiCK_Kia*v_MiCK_Kb)) - v_MiCK_V1_*(mADPi0*PCri0/(v_MiCK_Kic*v_MiCK_Kd)))/v_MiCK_DenMiCK;
  v_MiCK_DenMiCK := 1 + Cri0/v_MiCK_Kib + PCri0/v_MiCK_Kid + (mATPg0/v_MiCK_Kia_G + mATPi0/v_MiCK_Kia)*(1 + Cri0/v_MiCK_Kb) + (mADPg0/v_MiCK_Kic_G + mADPi0/v_MiCK_Kic)*(1 + PCri0/v_MiCK_Kd + Cri0/v_MiCK_KIb);
  v_exch_ATP := v_exch_R_exch_ATP*(ATPi0 - ATPg);
  v_exch_ADP := v_exch_R_exch_ADP*(ADPi0 - ADPg);
  v_C1 := oxidative_phosphorylation_k_C1*(Eu - (En + 2*delta_p0));
  v_C3 := oxidative_phosphorylation_k_C3*(Ec - (Eu + (2 - u)*delta_p0));
  v_O2 := 0.5*oxidative_phosphorylation_k_C4*a2plus0*c2plus0*(oxidative_phosphorylation_O2/(oxidative_phosphorylation_O2 + oxidative_phosphorylation_k_mO));
  v_dh := oxidative_phosphorylation_k_dh/(1 + oxidative_phosphorylation_k_mN/(NAD0/NADH0))^oxidative_phosphorylation_pD;
  delta_Hx := -(2*(2 + u)*v_O2 + 4*v_C1 + (4 - 2*u)*v_C3 - (na*v_sn + v_ANT0*u + (1 - u)*v_PI + v_leak))/(FVx*r_buff0);
  r_buff0 := r_buff_r_buff0*eta*(delta_pH0/delta_Hx0);
  v_sn := oxidative_phosphorylation_k_sn*((10^(delta_Gsn0/Z0) - 1)/(10^(delta_Gsn0/Z0) + 1));
  v_leak := oxidative_phosphorylation_k_L1*(10^(oxidative_phosphorylation_k_L2*delta_p0) - 1);
  delta_p0 := 1/(1 - u)*delta_pH0;
  delta_Gsn0 := na*delta_p0 - delta_Gsn_delta_Gsn0/F + Z0*ln(eta*ATPx0/(ADPx0*Pix0));
  Z0 := ln(10)*(R*T/F);
  En := redox_potentials_En0 + Z0/2*ln(NAD0/NADH0);
  Eu := redox_potentials_Eu0 + Z0/2*ln(UQ0/UQH20);
  Ec := redox_potentials_Ec0 + Z0/2*ln(c3plus0/c2plus0);
  Ea := Ec + (1 + u)*delta_p0;
  NADH0 := NADH_NAD_tot - NAD0;
  c2plus0 := c2plus_ctot - c3plus0;
  a2plus0 := a2plus_atot - a3_2;
  Hext0 := eta*1^(-pHext);
  pHx0 := -ln(eta*Hx0);
  UQH20 := UQH2_UQ_tot - UQ0;
  a3_2 := 10^((Ea - redox_potentials_Ea0)*Z0);
  delta_pH0 := Z0*(pHext - pHx0);
  delta_psi0 := -(delta_p0 - delta_pH0);

  // Rate rules:
  ATPx0' = (v_sn - v_ANT0)/FVx;
  ATPi0' = R_ATP/Li*(ATP0 - ATPi0) + v_ANT0/FVi - v_MiCK0/FVi + v_AKmit0/FVi;
  ADPi0' = R_ADP/Li*(ADP0 - ADPi0) - (2*v_AKmit0/FVi + v_ANT0/FVi) + v_MiCK0/FVi;
  AMPi0' = R_AMP/Li*(AMP0 - AMPi0) + v_AKmit0/FVi;
  PCri0' = R_PCr/Li*(PCr0 - PCri0) + v_AKmit0/FVi;
  Cri0' = R_Cr/Li*(Cr0 - Cri0) - v_MiCK0/FVi;
  Pii0' = R_Pi/Li*(Pi_0 - Pii0) - v_PI/FVi;
  UQ0' = (v_C3 - v_C1)/FVx;
  c3plus0' = 2*(2*v_O2 - v_C3)/FVx;
  NAD0' = (v_C1 - v_dh)/FVx;
  Hx0' = delta_Hx;
  Pix0' = (v_PI - v_sn)/FVx;
end
