// SBML level 2 version 4

model vilar_2006____main()
  // Originally created by libAntimony v1.4 (using libSBML 4.1.0-b2)

  // Compartments:
  compartment default_compartment = 1;

  // Parameters:
  l_RI_RII0 = 0;
  RI0 = 20;
  RII0 = 20;
  ka = 1;
  ki = 0.333333333;
  kcd = 0.0277777778;
  klid = 0.25;
  RI_endo0 = 0;
  l_RI_RII_endo0 = 40;
  kr = 0.033333333;
  p_RI = 8;
  alpha = 1;
  RII_endo0 = 0;
  p_RII = 4;
  time_ = ;

  // Assignment rules:
  l0 := ;

  // Rate rules:
  l_RI_RII0' = ka*l0*RI0*RII0 - (kcd + klid + ki)*l_RI_RII0;
  RI0' = p_RI + kr*RI_endo0 + alpha*kr*l_RI_RII_endo0 - (ka*l0*RI0*RII0 + (kcd + ki)*RI0);
  RII0' = p_RII + kr*RII_endo0 + alpha*kr*l_RI_RII_endo0 - (ka*l0*RI0*RII0 + (kcd + ki)*RII0);
  RI_endo0' = ki*RI0 - kr*RI_endo0;
  l_RI_RII_endo0' = ki*l_RI_RII0 - kr*l_RI_RII_endo0;
  RII_endo0' = ki*RII0 - kr*RII_endo0;
end
