// SBML level 2 version 4

model vilar_rnx_2006____main()
  // Originally created by libAntimony v1.4 (using libSBML 4.1.0-b2)

  // Compartments:
  compartment default_compartment = 1;

  // Parameters:
  RI0 = 20;
  RII0 = 20;
  ka = 1;
  l_RI_RII0 = 0;
  kcd = 0.0277777778;
  klid = 0.25;
  ki = 0.333333333;
  p_RI = 8;
  RI_endo0 = 0;
  kr = 0.033333333;
  l_RI_RII_endo0 = 40;
  p_RII = 4;
  RII_endo0 = 0;
  time_ = ;

  // Assignment rules:
  v14 := ka*l0*RI0*RII0;
  l0 := ;
  v20 := kcd*l_RI_RII0;
  v30 := klid*l_RI_RII0;
  v40 := ki*l_RI_RII0;
  v50 := p_RI;
  v60 := kcd*RI0;
  v70 := ki*RI0;
  v80 := kr*RI_endo0;
  v90 := kr*l_RI_RII_endo0;
  v100 := p_RII;
  v110 := kcd*RII0;
  v120 := ki*RII0;
  v130 := kr*RII_endo0;

  // Rate rules:
  RI0' = v50 + v80 + v90 - (v14 + v60 + v70);
  RII0' = v90 + v100 + v130 - (v14 + v110 + v120);
  l_RI_RII0' = v14 - (v20 + v30 + v40);
  RI_endo0' = v70 - v80;
  l_RI_RII_endo0' = v40 - v90;
  RII_endo0' = v120 - v130;
end
