// SBML level 2 version 4

model vilar_kueh_barkai_leibler_2002____main()
  // Originally created by libAntimony v1.3 (using libSBML 4.1.0-b2)

  // Compartments:
  compartment default_compartment = 1;

  // Parameters:
  A0 = 0;
  C0 = 0;
  DA0 = 1;
  DAp0 = 0;
  DR0 = 1;
  DRP0 = ;
  MA0 = 0;
  MR0 = 0;
  R0 = 0;
  RXN1_Gamma_1 = 2;
  RXN2_Delta_1 = 1;
  RXN3_Delta_2 = 1;
  RXN4_Delta_3 = 0.2;
  RXN5_Gamma_2 = 1;
  RXN6_Thetha_1 = 50;
  RXN7_Alpha_1 = 50;
  RXN8_Alpha_2 = 500;
  RXN9_Delta_4 = 10;
  RXN10_BetaA_1 = 50;
  RXN11_Gamma_3 = 1;
  RXN12_Theta_2 = 100;
  RXN13_Alpha_3 = 0.01;
  RXN14_Alpha_4 = 50;
  RXN15_Delta_5 = 0.5;
  RXN16_BetaR_1 = 5;
  time_ = ;

  // Assignment rules:
  RXN17 := A0*R0*RXN1_Gamma_1;
  RXN20 := A0*RXN2_Delta_1;
  RXN50 := A0*DA0*RXN5_Gamma_2;
  RXN110 := A0*DR0*RXN11_Gamma_3;
  RXN60 := DAp0*RXN6_Thetha_1;
  RXN100 := MA0*RXN10_BetaA_1;
  RXN120 := DRP0*RXN12_Theta_2;
  RXN30 := C0*RXN3_Delta_2;
  RXN70 := DA0*RXN7_Alpha_1;
  RXN80 := DAp0*RXN8_Alpha_2;
  RXN130 := DR0*RXN13_Alpha_3;
  RXN140 := DRP0*RXN14_Alpha_4;
  RXN90 := MA0*RXN9_Delta_4;
  RXN150 := MR0*RXN15_Delta_5;
  RXN160 := MR0*RXN16_BetaR_1;
  RXN40 := R0*RXN4_Delta_3;

  // Rate rules:
  A0' = 1/1*(-1*RXN17 + (-1*RXN20) + (-1*RXN50) + (-1*RXN110) + RXN60 + RXN100 + RXN120);
  C0' = 1/1*(-1*RXN30 + RXN17);
  DA0' = 1/1*(-1*RXN50 + (-1*RXN70) + RXN60 + RXN70);
  DAp0' = 1/1*(-1*RXN60 + (-1*RXN80) + RXN50 + RXN80);
  DR0' = 1/1*(-1*RXN110 + (-1*RXN130) + RXN120 + RXN130);
  DRP0' = 1/1*(-1*RXN120 + (-1*RXN140) + RXN110 + RXN140);
  MA0' = 1/1*(-1*RXN90 + (-1*RXN100) + RXN70 + RXN80 + RXN100);
  MR0' = 1/1*(-1*RXN150 + (-1*RXN160) + RXN130 + RXN140 + RXN160);
  R0' = 1/1*(-1*RXN17 + (-1*RXN40) + RXN30 + RXN160);
end
