// SBML level 2 version 4

model wang_2006____main()
  // Originally created by libAntimony v1.4 (using libSBML 4.1.0-b2)

  // Compartments:
  compartment default_compartment = 1;

  // Parameters:
  k_0 = 0.0001;
  k_1 = 3.4;
  k_2 = 4;
  k_3 = 4.5;
  k_4 = 1.2;
  k_5 = 0.12;
  k_6 = 14;
  k_7 = 2;
  k_8 = 10.5;
  k_9 = 0.6;
  k_10 = 3;
  k_11 = 0.26;
  C_PLC_T = 0.01;
  K_D = 0.01;
  K_P = 0.004;
  K_R = 0.2;
  K_G = 0.025;
  K_S = 0.025;
  K_ER = 0.075;
  K_C1 = 1;
  K_C2 = 2;
  beta = 0.05;
  lambda_ = 0.001;
  rho = 0.2;
  n = 4;
  m = 2;
  w = 3;
  APLC0 = 0.001;
  C_cyt0 = 0.2;
  G = 0.001;
  IP_30 = 0.001;
  C_ER0 = 1;
  time_ = ;

  // Assignment rules:
  R_APLC := APLC0/(K_P + APLC0);
  R_PKC := DG0/(K_D + DG0)*C_cyt0/(K_R + C_cyt0);
  R_G := G^n/(K_G^n + G^n);
  R_DG := DG0^m/(K_D^m + DG0^m);
  R_IP_3 := IP_30^3/(K_S^3 + IP_30^3);
  R_Cyt1 := C_cyt0/(K_C1 + C_cyt0);
  R_Cyt2 := C_cyt0/(K_C2 + C_cyt0);
  R_ER := C_ER0^w/(K_ER^w + C_ER0^w);
  DG0 := IP_30;
  APLC_PLC := C_PLC_T - APLC0;

  // Rate rules:
  APLC0' = k_4*R_G*R_DG*APLC_PLC - k_5*APLC0;
  C_cyt0' = beta*(rho*(k_8*R_IP_3*R_ER - k_9*R_Cyt1) - k_10*R_Cyt2 + k_11);
  G' = k_0 + k_1*G - k_2*R_APLC*G - k_3*R_PKC*G;
  IP_30' = k_6*APLC0 - k_7*IP_30;
  C_ER0' = lambda_*(-k_8*R_IP_3*R_ER + k_9*R_Cyt1);
end
