// SBML level 2 version 4

model warren_2009____main()
  // Originally created by libAntimony v1.4 (using libSBML 4.1.0-b2)

  // Compartments:
  compartment default_compartment = 1;

  // Parameters:
  volume_i0 = 1450;
  volume_er_gamma = 4.9;
  volumeCa_i0 = 75.83359;
  volumeCa_er0 = 1199.737;
  volume_iIP30 = -3.282874e-93;
  PIP20 = 1;
  PIP2_PIP2_Total = 5;
  IPX_PIP2_Total = 25;
  J_ip3R_J_ip3R0 = 10;
  ATP_e = 0;
  receptor_MechanicalStimulation = 0;
  receptor_V_mech0 = 1;
  C_1 = 2.6;
  C_2 = 0.02;
  C_3 = 2.3;
  C_4 = 10;
  receptor_V_ATP = 0.001;
  receptor_K_ATP = 0.0001;
  J_ip3D_Beta_1 = 0;
  J_ip3D_Beta_2 = 36;
  J_ip3D_K_rc = 0.3;
  J_ip3D_K_IP3 = 0.01;
  O0 = -2.420135e-89;
  Jipt_Jipt0 = 28;
  Jryr_Ka = 0.3722419;
  Jryr_Kb = 0.636005;
  Jryr_Kc = 0.0571428;
  Jryr_Jryr0 = 0;
  Jer_Jer0 = 0.0035;
  Jserca_Vserca = 0.09;
  Jserca_Kserca = 0.04;
  Jin_Vm = -39;
  Jin_R = 8314;
  Jin_T = 310;
  Jin_F = 96485;
  Jin_z_Ca = 2;
  Jin_Ca_ext = 1300;
  Jin_P_pm_1 = 0.6;
  Jin_P_pm_2 = 28;
  Jpm_Vpm = 0.072;
  Jpm_Kpm = 0.6;
  I10 = 2.243433e-81;
  I20 = 1.012768e-40;
  k1_ = 0.88;
  k2 = 0.5;
  k3 = 0.5;
  k5 = 0.02;
  constants_alpha_1 = 40;
  constants_beta_1 = 0.8;
  constants_alpha_4 = 0.06;
  constants_beta_4 = 0.01;
  time_ = ;

  // Assignment rules:
  volume_i1 := volume_i0;
  volume_er0 := volume_i1/volume_er_gamma;
  Jipt0 := Jipt_Jipt0*volume_i0*Jipt_Pipt*(Ca_er0 - Ca_i0);
  Jryr0 := Jryr_Jryr0*volume_i0*(Ca_er0 - Ca_i0);
  Jer0 := Jer_Jer0*volume_i0*(Ca_er0 - Ca_i0);
  Jserca0 := volume_i0*Jserca_Vserca*Ca_i0^2/(Jserca_Kserca^2 + Ca_i0^2)*1/Ca_er0;
  Jin0 := Jin_Jin_1 + Jin_Jin_2;
  Jpm0 := Jpm_Vpm*volume_i0*Ca_i0^2/(Jpm_Kpm^2 + Ca_i0^2);
  Ca_i0 := volumeCa_i0/volume_i1;
  Ca_er0 := volumeCa_er0/volume_er0;
  J_ip3P0 := V_IP3*PIP20;
  J_ip3D0 := (J_ip3D_Beta_1 + J_ip3D_Beta_2*J_ip3D_F_Ca^2)*IP30/(J_ip3D_K_IP3 + IP30);
  IP30 := volume_iIP30/volume_i1;
  J_ip3R0 := J_ip3R_J_ip3R0;
  IPX0 := 1 - IP30/IPX_PIP2_Total - PIP20;
  V_IP3 := C_1*ATP_e/(C_2 + ATP_e) + C_3*ATP_e^2/(C_4^2 + ATP_e^2);
  V_mech := ;
  J_ip3D_F_Ca := Ca_i0/(J_ip3D_K_rc + Ca_i0);
  Jipt_Pipt := O0^4;
  Jryr_Pryr := Jryr_W_inf*(1 + (Jryr_Ka/Ca_i0)^4 + (Ca_i0/Jryr_Kb)^3)/(1 + 1/Jryr_Kc + (Ca_i0/Jryr_Kb)^3 + (Jryr_Ka/Ca_i0)^4);
  Jryr_W_inf := (1 + (Jryr_Ka/Ca_i0)^4 + (Ca_i0/Jryr_Kb)^3)/(1 + 1/Jryr_Kc + (Ca_i0/Jryr_Kb)^3 + (Jryr_Ka/Ca_i0)^4);
  Jin_V_Ca := Jin_R*Jin_T/(Jin_z_Ca*Jin_F)*ln(Jin_Ca_ext/Ca_i0);
  Jin_Iin_1 := volume_i0*Jin_P_pm_1*(Jin_V_Ca - Jin_Vm);
  Jin_Iin_2 := volume_i0*Jin_P_pm_2*V_mech*(Jin_V_Ca - Jin_Vm);
  Jin_Jin_1 := Jin_Iin_1/(Jin_z_Ca*Jin_F);
  Jin_Jin_2 := Jin_Iin_2/(Jin_z_Ca*Jin_F);
  O_S := 1 - (O0 + I10 + I20);
  k1 := constants_alpha_1*Ca_i0^3/(constants_beta_1^3 + Ca_i0^3);
  k4 := constants_alpha_4*IP30/(constants_beta_4 + IP30);

  // Rate rules:
  volumeCa_i0' = Jipt0 + Jryr0 + Jer0 - Jserca0 + (Jin0 - Jpm0);
  volumeCa_er0' = -(Jipt0 + Jryr0 + Jer0 - Jserca0);
  volume_iIP30' = (J_ip3P0 - J_ip3D0)*volume_i1;
  PIP20' = J_ip3R0*IPX0 - J_ip3P0/PIP2_PIP2_Total;
  ATP_e' = -receptor_V_ATP*ATP_e/(receptor_K_ATP + ATP_e);
  O0' = k1*IP30*O_S - (k1_*O0 + k2*O0);
  I10' = k2*O0 - (k3 + k4)*I10;
  I20' = k4*I10 - k5*I20;
end
