// SBML level 2 version 4

model waugh_model_2007____main()
  // Originally created by libAntimony v1.3 (using libSBML 4.1.0-b2)

  // Compartments:
  compartment default_compartment = 1;

  // Parameters:
  phi_I0 = 200;
  k1 = 0.05;
  k2 = 0.693;
  k3 = 0.002;
  k5 = 0.0025;
  k6 = 0.0004;
  d1 = 0.2;
  phi_R0 = 200;
  F0 = 50;
  C0 = 10;
  T0 = 6;
  k4 = 0.07;
  k7 = 0.004;
  d2 = 9.1;
  P0 = 2;
  k8 = 0.015;
  k9 = 0.0015;
  d3 = 4;
  k10 = 0.924;
  d4 = 2.5;
  k11 = 5;
  d5 = 1.5e-5;
  H0 = 0.01;
  k12 = 0.001;
  d6 = 0.7;
  K_T_tau1 = -2.47;
  K_T_tau2 = 21.94;
  K_T_tau3 = 6.41;
  K_T_tau4 = 1.75;
  M_P_tau1 = 15.333;
  M_P_tau2 = -167.21;
  M_P_tau3 = 452.38;
  M_P_tau4 = 2.6593;
  f_T_tau1 = 0.0092;
  f_T_tau2 = -0.1552;
  f_T_tau3 = 0.6279;
  f_T_tau4 = 0.2527;
  g_C_tau1 = -4.33e-10;
  g_C_tau2 = 9e-7;
  g_C_tau3 = -0.00055;
  g_C_tau4 = 0.13;
  time_ = ;

  // Assignment rules:
  alpha := -(0.197*ln(H0)) + 0.4407;
  K_T0 := K_T_tau1*T0^3 + K_T_tau2*T0^2 + K_T_tau3*T0 + K_T_tau4;
  T_Apligraf := ;
  P_Apligraf := ;
  F_Apligraf := ;
  M_P0 := M_P_tau1*P0^3 + M_P_tau2*P0^2 + M_P_tau3*P0 + M_P_tau4;
  C_Apligraf := ;
  f_T0 := f_T_tau1*T0^3 + f_T_tau2*T0^2 + f_T_tau3*T0 + f_T_tau4;
  g_C0 := g_C_tau1*C0^3 + g_C_tau2*C0^2 + g_C_tau3*C0 + g_C_tau4;
  H_Apligraf := ;

  // Rate rules:
  phi_I0' = alpha*K_T0 + k1*k2*phi_I0*(1 - (k3*(phi_I0 + phi_R0) + k5*F0 + k6*C0)) - d1*phi_I0;
  phi_R0' = (1 - alpha)*K_T0 + k1*k2*phi_R0*(1 - (k3*(phi_I0 + phi_R0) + k5*F0 + k6*C0)) - d1*phi_R0;
  F0' = M_P0 + k10*F0*(1 - (k3*(phi_I0 + phi_R0) + k5*F0 + k6*C0)) + F_Apligraf - d4*F0;
  C0' = k11*F0*f_T0*g_C0 + C_Apligraf - d5*F0*C0;
  T0' = k4*phi_I0 + k7*F0 + T_Apligraf - d2*T0;
  P0' = k8*(phi_I0 + phi_R0) + k9*F0 + P_Apligraf - d3*P0;
  H0' = k12*F0 + H_Apligraf - d6*H0;
end
