// SBML level 2 version 4

model Proximal_Tubule_NHE3____main()
  // Originally created by libAntimony v1.3 (using libSBML 4.1.0-b2)

  // Compartments:
  compartment default_compartment = 1;

  // Parameters:
  C_ext_Na = 1;
  C_ext_H = 0.000251189;
  C_ext_NH4 = 0;
  C_int_Na = 0;
  C_int_H = 0.001;
  C_int_NH4 = 0;
  XTxP0_NHE3_Na = 0.0016;
  XTxP0_NHE3_H = 0.00048;
  XTxP0_NHE3_NH4 = 0.0016;
  K_NHE3_Na = 30;
  K_NHE3_H = 7.2e-5;
  K_NHE3_NH4 = 27;
  time_ = ;

  // Assignment rules:
  NHE3_XTxP_NHE3_Na := XTxP0_NHE3_Na*2*C_int_H/(C_int_H + 1e-6);
  NHE3_XTxP_NHE3_H := XTxP0_NHE3_H*2*C_int_H/(C_int_H + 1e-6);
  NHE3_XTxP_NHE3_NH4 := XTxP0_NHE3_NH4*2*C_int_H/(C_int_H + 1e-6);
  NHE3_alpha_ext_Na := C_ext_Na/K_NHE3_Na;
  NHE3_beta_ext_H := C_ext_H/K_NHE3_H;
  NHE3_gamma_ext_NH4 := C_ext_NH4/K_NHE3_NH4;
  NHE3_alpha_int_Na := C_int_Na/K_NHE3_Na;
  NHE3_beta_int_H := C_int_H/K_NHE3_H;
  NHE3_gamma_int_NH4 := C_int_NH4/K_NHE3_NH4;
  NHE3_sum_NHE3 := (1 + NHE3_alpha_ext_Na + NHE3_beta_ext_H + NHE3_gamma_ext_NH4)*(NHE3_XTxP_NHE3_Na*NHE3_alpha_int_Na + NHE3_XTxP_NHE3_H*NHE3_beta_int_H + NHE3_XTxP_NHE3_NH4*NHE3_gamma_int_NH4) + (1 + NHE3_alpha_int_Na + NHE3_beta_int_H + NHE3_gamma_int_NH4)*(NHE3_XTxP_NHE3_Na*NHE3_alpha_ext_Na + NHE3_XTxP_NHE3_H*NHE3_beta_ext_H + NHE3_XTxP_NHE3_NH4*NHE3_gamma_ext_NH4);
  J_NHE3_Na := NHE3_XTxP_NHE3_Na*NHE3_XTxP_NHE3_H/NHE3_sum_NHE3*(NHE3_alpha_ext_Na*NHE3_beta_int_H - NHE3_alpha_int_Na*NHE3_beta_ext_H) + NHE3_XTxP_NHE3_Na*NHE3_XTxP_NHE3_NH4/NHE3_sum_NHE3*(NHE3_alpha_ext_Na*NHE3_gamma_int_NH4 - NHE3_alpha_int_Na*NHE3_gamma_ext_NH4);
  J_NHE3_H := NHE3_XTxP_NHE3_Na*NHE3_XTxP_NHE3_H/NHE3_sum_NHE3*(NHE3_alpha_int_Na*NHE3_beta_ext_H - NHE3_alpha_ext_Na*NHE3_beta_int_H) + NHE3_XTxP_NHE3_H*NHE3_XTxP_NHE3_NH4/NHE3_sum_NHE3*(NHE3_beta_ext_H*NHE3_gamma_int_NH4 - NHE3_beta_int_H*NHE3_gamma_ext_NH4);
  J_NHE3_NH4 := NHE3_XTxP_NHE3_Na*NHE3_XTxP_NHE3_NH4/NHE3_sum_NHE3*(NHE3_alpha_int_Na*NHE3_gamma_ext_NH4 - NHE3_alpha_ext_Na*NHE3_gamma_int_NH4) + NHE3_XTxP_NHE3_H*NHE3_XTxP_NHE3_NH4/NHE3_sum_NHE3*(NHE3_gamma_ext_NH4*NHE3_beta_int_H - NHE3_beta_ext_H*NHE3_gamma_int_NH4);
  J_NHE3_Na_Max := NHE3_XTxP_NHE3_Na*NHE3_XTxP_NHE3_H/(NHE3_XTxP_NHE3_Na + NHE3_XTxP_NHE3_H);
  NHE3_K_Na := (NHE3_beta_int_H + 2*NHE3_beta_int_H*NHE3_beta_ext_H + NHE3_beta_ext_H)/(NHE3_beta_int_H + (1 + NHE3_beta_int_H)*NHE3_XTxP_NHE3_Na/NHE3_XTxP_NHE3_H);
  NHE3_plot := C_ext_Na/(J_NHE3_Na/J_NHE3_Na_Max);

  // Rate rules:
  C_ext_Na' = 100;
end
