// SBML level 2 version 4

model Proximal_Tubule_NHE3____main()
  // Originally created by libAntimony v1.4 (using libSBML 4.1.0-b2)

  // Compartments:
  compartment default_compartment = 1;

  // Parameters:
  C_ext_Na = 1;
  C_ext_H = 5.4954e-5;
  C_ext_NH4 = 0;
  C_int_Na = 0;
  C_int_NH4 = 0;
  Concentrations_pH_int = 4;
  XTxP0_NHE3_Na = 0.0016;
  XTxP0_NHE3_H = 0.00048;
  XTxP0_NHE3_NH4 = 0.0016;
  K_NHE3_Na = 30;
  K_NHE3_H = 7.2e-5;
  K_NHE3_NH4 = 27;
  time_ = ;

  // Assignment rules:
  C_int_H := 1e3*10^(-Concentrations_pH_int);
  NHE3_XTxP_NHE3_Na := XTxP0_NHE3_Na*2*C_int_H/(C_int_H + 1e-3);
  NHE3_XTxP_NHE3_H := XTxP0_NHE3_H*2*C_int_H/(C_int_H + 1e-3);
  NHE3_XTxP_NHE3_NH4 := XTxP0_NHE3_NH4*2*C_int_H/(C_int_H + 1e-3);
  NHE3_alpha_ext_Na := C_ext_Na/K_NHE3_Na;
  NHE3_beta_ext_H := C_ext_H/K_NHE3_H;
  NHE3_gamma_ext_NH4 := C_ext_NH4/K_NHE3_NH4;
  NHE3_alpha_int_Na := C_int_Na/K_NHE3_Na;
  NHE3_beta_int_H := C_int_H/K_NHE3_H;
  NHE3_gamma_int_NH4 := C_int_NH4/K_NHE3_NH4;
  NHE3_sum_NHE3 := (1 + NHE3_alpha_ext_Na + NHE3_beta_ext_H + NHE3_gamma_ext_NH4)*(NHE3_XTxP_NHE3_Na*NHE3_alpha_int_Na + NHE3_XTxP_NHE3_H*NHE3_beta_int_H + NHE3_XTxP_NHE3_NH4*NHE3_gamma_int_NH4) + (1 + NHE3_alpha_int_Na + NHE3_beta_int_H + NHE3_gamma_int_NH4)*(NHE3_XTxP_NHE3_Na*NHE3_alpha_ext_Na + NHE3_XTxP_NHE3_H*NHE3_beta_ext_H + NHE3_XTxP_NHE3_NH4*NHE3_gamma_ext_NH4);
  J_NHE3_Na := NHE3_XTxP_NHE3_Na*NHE3_XTxP_NHE3_H/NHE3_sum_NHE3*(NHE3_alpha_ext_Na*NHE3_beta_int_H - NHE3_alpha_int_Na*NHE3_beta_ext_H) + NHE3_XTxP_NHE3_Na*NHE3_XTxP_NHE3_NH4/NHE3_sum_NHE3*(NHE3_alpha_ext_Na*NHE3_gamma_int_NH4 - NHE3_alpha_int_Na*NHE3_gamma_ext_NH4);
  J_NHE3_H := NHE3_XTxP_NHE3_Na*NHE3_XTxP_NHE3_H/NHE3_sum_NHE3*(NHE3_alpha_int_Na*NHE3_beta_ext_H - NHE3_alpha_ext_Na*NHE3_beta_int_H) + NHE3_XTxP_NHE3_H*NHE3_XTxP_NHE3_NH4/NHE3_sum_NHE3*(NHE3_beta_ext_H*NHE3_gamma_int_NH4 - NHE3_beta_int_H*NHE3_gamma_ext_NH4);
  J_NHE3_NH4 := NHE3_XTxP_NHE3_Na*NHE3_XTxP_NHE3_NH4/NHE3_sum_NHE3*(NHE3_alpha_int_Na*NHE3_gamma_ext_NH4 - NHE3_alpha_ext_Na*NHE3_gamma_int_NH4) + NHE3_XTxP_NHE3_H*NHE3_XTxP_NHE3_NH4/NHE3_sum_NHE3*(NHE3_gamma_ext_NH4*NHE3_beta_int_H - NHE3_beta_ext_H*NHE3_gamma_int_NH4);
  NHE3_J_NHE3_Na_Max := XTxP0_NHE3_Na*XTxP0_NHE3_H/(XTxP0_NHE3_Na + XTxP0_NHE3_H);
  NHE3_plot := J_NHE3_Na/NHE3_J_NHE3_Na_Max;
  J_NHE3_Na2 := XTxP0_NHE3_Na*XTxP0_NHE3_H/NHE3_sum0_NHE3*(NHE3_alpha_ext_Na*NHE3_beta_int_H - NHE3_alpha_int_Na*NHE3_beta_ext_H) + XTxP0_NHE3_Na*XTxP0_NHE3_NH4/NHE3_sum_NHE3*(NHE3_alpha_ext_Na*NHE3_gamma_int_NH4 - NHE3_alpha_int_Na*NHE3_gamma_ext_NH4);
  J_NHE3_H2 := XTxP0_NHE3_Na*XTxP0_NHE3_H/NHE3_sum0_NHE3*(NHE3_alpha_int_Na*NHE3_beta_ext_H - NHE3_alpha_ext_Na*NHE3_beta_int_H) + XTxP0_NHE3_H*XTxP0_NHE3_NH4/NHE3_sum_NHE3*(NHE3_beta_ext_H*NHE3_gamma_int_NH4 - NHE3_beta_int_H*NHE3_gamma_ext_NH4);
  J_NHE3_NH42 := XTxP0_NHE3_Na*XTxP0_NHE3_NH4/NHE3_sum0_NHE3*(NHE3_alpha_int_Na*NHE3_gamma_ext_NH4 - NHE3_alpha_ext_Na*NHE3_gamma_int_NH4) + XTxP0_NHE3_H*XTxP0_NHE3_NH4/NHE3_sum_NHE3*(NHE3_gamma_ext_NH4*NHE3_beta_int_H - NHE3_beta_ext_H*NHE3_gamma_int_NH4);
  NHE3_sum0_NHE3 := (1 + NHE3_alpha_ext_Na + NHE3_beta_ext_H + NHE3_gamma_ext_NH4)*(XTxP0_NHE3_Na*NHE3_alpha_int_Na + XTxP0_NHE3_H*NHE3_beta_int_H + XTxP0_NHE3_NH4*NHE3_gamma_int_NH4) + (1 + NHE3_alpha_int_Na + NHE3_beta_int_H + NHE3_gamma_int_NH4)*(XTxP0_NHE3_Na*NHE3_alpha_ext_Na + XTxP0_NHE3_H*NHE3_beta_ext_H + XTxP0_NHE3_NH4*NHE3_gamma_ext_NH4);
  NHE3_plot2 := J_NHE3_Na2/NHE3_J_NHE3_Na_Max;

  // Rate rules:
  Concentrations_pH_int' = 5;
end
