// SBML level 2 version 4

model weinstein_1998_renal_H_K_ATPase_model____main()
  // Originally created by libAntimony v1.3 (using libSBML 4.1.0-b2)

  // Compartments:
  compartment default_compartment = 1;

  // Parameters:
  K2_E10 = ;
  k1 = 1.3e7;
  k1_ = 6.5;
  k9 = 1.75;
  k9_ = 3.5e1;
  K2_E20 = ;
  K2_E1_ATP0 = ;
  ATP = 2;
  k2a = 8.9e3;
  k2a_ = 7.3e4;
  k11 = 5e2;
  k11_ = 5;
  K2_E2_ATP0 = ;
  K_E1_ATP0 = ;
  K = 20;
  k2b = 8.9e3;
  k2b_ = 7.3e4;
  E1_ATP0 = ;
  k3a = 5.3e9;
  k3a_ = 6.6e2;
  H_E1_ATP0 = ;
  H = 4;
  k3b = 5.3e9;
  k3b_ = 6.6e2;
  H2_E1_ATP0 = ;
  k4 = 5e1;
  k4_ = 2.5e6;
  H2_E1_P0 = ;
  ADP = 0.04;
  k5 = 4e1;
  k5_ = 2e2;
  H2_E2_P0 = ;
  k6a = 5e7;
  k6a_ = 8e12;
  H_E2_P0 = ;
  k6b = 5e7;
  k6b_ = 8e12;
  E2_P0 = ;
  k7a = 2.6e10;
  k7a_ = 1.5e8;
  K_E2_P0 = ;
  k7b = 2.6e10;
  k7b_ = 1.5e8;
  K2_E2_P0 = ;
  k8 = 5.4e1;
  k8_ = 3.2e1;
  P = 5;
  k10 = 5e4;
  k10_ = 5e1;
  time_ = ;

  // Rate rules:
  K2_E10' = k9*K2_E20 + k1_*K2_E1_ATP0 - (k9_*K2_E10 + k1*ATP*K2_E10);
  K2_E20' = k8*K2_E2_P0 + k10_*K2_E2_ATP0 + k9_*K2_E10 - (k8_*P*K2_E20 + k10*ATP*K2_E20 + k9*K2_E20);
  K2_E1_ATP0' = k1*ATP*K2_E10 + k11*K2_E2_ATP0 + k2a_*K*K_E1_ATP0 - (k11_*K2_E1_ATP0 + k1_*K2_E1_ATP0 + k2a*K2_E1_ATP0);
  K2_E2_ATP0' = k10*ATP*K2_E20 + k11_*K2_E1_ATP0 - (k10_*K2_E2_ATP0 + k11*K2_E2_ATP0);
  K_E1_ATP0' = k2a*K2_E1_ATP0 + k2b_*K*E1_ATP0 - (k2a_*K_E1_ATP0 + k2b*K_E1_ATP0);
  E1_ATP0' = k2b*K_E1_ATP0 + k3a_*H_E1_ATP0 - (k2b_*K*E1_ATP0 + k3a*H*E1_ATP0);
  H_E1_ATP0' = k3a*H*E1_ATP0 + k3b_*H2_E1_ATP0 - (k3a_*H_E1_ATP0 + k3b*H*H_E1_ATP0);
  H2_E1_ATP0' = k3b*H*H_E1_ATP0 + k4_*ADP*H2_E1_P0 - (k3b_*H2_E1_ATP0 + k4*H2_E1_ATP0);
  H2_E1_P0' = k4*H2_E1_ATP0 + k5_*H2_E2_P0 - (k4_*ADP*H2_E1_P0 + k5*H2_E1_P0);
  H2_E2_P0' = k6a_*H*H_E2_P0 + k5*H2_E1_P0 - (k6a*H2_E2_P0 + k5_*H2_E2_P0);
  H_E2_P0' = k6a*H2_E2_P0 + k6b_*H*E2_P0 - (k6a_*H*H_E2_P0 + k6b*H_E2_P0);
  E2_P0' = k7a_*K_E2_P0 + k6b*H_E2_P0 - (k6b_*H*E2_P0 + k7a*K*E2_P0);
  K_E2_P0' = k7a*K*E2_P0 + k7b_*K2_E2_P0 - (k7a_*K_E2_P0 + k7b*K*K_E2_P0);
  K2_E2_P0' = k7b*K*K_E2_P0 + k8_*P*K2_E20 - (k8*K2_E2_P0 + k7b_*K2_E2_P0);
end
