// SBML level 2 version 4

model weinstein_2000_AE1____main()
  // Originally created by libAntimony v1.4 (using libSBML 4.1.0-b2)

  // Compartments:
  compartment default_compartment = 1;

  // Parameters:
  HCO3_i = 0;
  HCO3_e = 26;
  Cl_i = 29;
  Cl_e = 114;
  Concentrations_x_Tmax = 1;
  K_I = 172;
  Kc_p = 50;
  Kc_pp = 50;
  Kb_p = 198;
  Kb_pp = 198;
  Pc_p = 562;
  Pc_pp = 61;
  Pb_p = 1247;
  Pb_pp = 135;
  time_ = ;

  // Assignment rules:
  x_T := Concentrations_x_Tmax/(1 + HCO3_i/K_I);
  AE1_beta_p := HCO3_e/Kb_p;
  AE1_beta_pp := HCO3_i/Kb_pp;
  AE1_gamma_p := Cl_e/Kc_p;
  AE1_gamma_pp := Cl_i/Kc_pp;
  AE1_sigma := (1 + AE1_beta_p + AE1_gamma_p)*(Pb_pp*AE1_beta_pp + Pc_pp*AE1_gamma_pp) + (1 + AE1_beta_pp + AE1_gamma_pp)*(Pb_p*AE1_beta_p + Pc_p*AE1_gamma_p);
  AE1_x_p := x_T*(Pb_pp*AE1_beta_pp + Pc_pp*AE1_gamma_pp)/AE1_sigma;
  AE1_x_pp := x_T*(Pb_p*AE1_beta_p + Pc_p*AE1_gamma_p)/AE1_sigma;
  J_HCO3 := x_T/AE1_sigma*(Pb_pp*AE1_beta_pp*Pc_p*AE1_gamma_p - Pb_p*AE1_beta_p*Pc_pp*AE1_gamma_pp);
  J_Cl := -J_HCO3;
  Jb_influx := x_T/AE1_sigma*Pb_p*AE1_beta_p*(Pb_pp*AE1_beta_pp + Pc_pp*AE1_gamma_pp);
  Jc_influx := x_T/AE1_sigma*Pc_p*AE1_gamma_p*(Pb_pp*AE1_beta_pp + Pc_pp*AE1_gamma_pp);
  AE1_Jo_bm := (1/x_T*(1/Pb_p + 1/Pb_pp + Kb_pp/(Pb_pp*HCO3_i)))^(-1);
  AE1_Ji_bm := (1/x_T*(1/Pb_p + 1/Pb_pp + Kb_p/(Pb_p*HCO3_e)))^(-1);
  AE1_Js_bm := (1/x_T*(1/Pb_p + 1/Pb_pp))^(-1);
  AE1_Jo_cm := (1/x_T*(1/Pc_p + 1/Pc_pp + Kc_pp/(Pc_pp*Cl_i)))^(-1);
  AE1_Ji_cm := (1/x_T*(1/Pc_p + 1/Pc_pp + Kc_p/(Pc_p*Cl_e)))^(-1);
  AE1_Js_cm := (1/x_T*(1/Pc_p + 1/Pc_pp))^(-1);

  // Rate rules:
  HCO3_i' = 60;
end
