// SBML level 2 version 4

model westermark_2003____main()
  // Originally created by libAntimony v1.4 (using libSBML 4.1.0-b2)

  // Compartments:
  compartment default_compartment = 1;

  // Parameters:
  v_GK_V_GK = 10;
  v_GK_S0_5_GK = 8;
  v_GK_h_GK = 1.7;
  Glc0 = ;
  v_GPI_Keq_GPI = 0.3;
  G6P0 = ;
  F6P0 = ;
  v_PFK_V_PFK = 100;
  v_PFK_S0_5_FBA = 5;
  v_PFK_X0_5 = 10;
  v_PFK_h_PFK = 2.5;
  v_PFK_h_act = 1;
  v_PFK_KT = 2;
  v_PFK_KO = 30;
  FBP0 = ;
  v_FBA_V_FBA = 25;
  v_FBA_Q0_5_FBA = 0.275;
  v_FBA_P0_5_FBA = 0.5;
  v_FBA_S0_5_GAPD = 5;
  v_FBA_Keq_FBA = 0.1;
  Keq_TPI = 0.045;
  DHAP0 = ;
  G3P0 = ;
  v_GAPD_V_GAPD = 250;
  time_ = ;
  rho = ;

  // Assignment rules:
  v_GK0 := v_GK_V_GK*(Glc0/v_GK_S0_5_GK)^v_GK_h_GK/(1 + (Glc0/v_GK_S0_5_GK)^v_GK_h_GK);
  v_GPI0 := v_GPI_Keq_GPI*G6P0*F6P0;
  v_PFK0 := v_PFK_V_PFK*(Glc0/v_PFK_S0_5_PFK)^v_PFK_h_PFK/(1 + (Glc0/v_PFK_S0_5_PFK)^v_PFK_h_PFK);
  pi_pfk := FBP0/(v_PFK_S0_5_FBA*v_PFK_S0_5_PFK);
  v_PFK_S0_5_PFK := ((0.25 + 2*v_PFK_V_PFK/v_PFK_k_cat_K_PFK)^0.5 + 0.5)/(v_PFK_KT^(-1) + v_PFK_KO^(-1)*((0.25 + 2*v_PFK_V_PFK/v_PFK_k_cat_K_PFK)^0.5 - 0.5));
  v_PFK_sigma := F6P0/v_PFK_S0_5_PFK;
  v_PFK_alpha := 5*v_PFK_h_PFK_;
  v_PFK_q := v_PFK_S0_5_FBA/v_PFK_X0_5;
  v_PFK_h_PFK_ := v_PFK_h_PFK - (v_PFK_h_PFK - v_PFK_h_act)*(v_PFK_q*pi_pfk/(1 + v_PFK_q*pi_pfk));
  v_PFK_k_cat_K_PFK := v_PFK_V_PFK/3;
  v_FBA0 := v_FBA_V_FBA*pi_pfk*(1 - v_FBA_p*v_FBA_r*rho^2/(pi_pfk*v_FBA_Keq_FBA))/(1 + pi_pfk + v_FBA_r*rho + v_FBA_p*v_FBA_r*rho^2);
  v_FBA_r := v_FBA_S0_5_GAPD/(v_FBA_Q0_5_FBA*Keq_TPI);
  v_FBA_p := v_FBA_S0_5_GAPD/v_FBA_P0_5_FBA;
  v_TPI0 := Keq_TPI*DHAP0*G3P0;
  v_GAPD0 := v_GAPD_V_GAPD*rho/(1 + rho);

  // Rate rules:
  Glc0' = v_GK0;
  G6P0' = v_GK0 + v_GPI0;
  F6P0' = v_PFK0 + v_GPI0;
  FBP0' = v_PFK0 + v_FBA0;
  DHAP0' = v_TPI0 + v_FBA0;
  G3P0' = v_TPI0 + v_GAPD0 + v_FBA0;
end
