// SBML level 2 version 4

model wierschem_2004____main()
  // Originally created by libAntimony v1.4 (using libSBML 4.1.0-b2)

  // Compartments:
  compartment default_compartment = 1;

  // Parameters:
  membrane_C_m = 5300;
  V = -67.018;
  Ca_current_g_Ca_ = 1200;
  Ca_current_V_Ca = 25;
  Ca_current_v_m = -20;
  Ca_current_s_m = 12;
  K_current_g_K_ = 3000;
  V_K = -75;
  n = 0.00011;
  K_current_K_channel_activation_tau_n = 16;
  K_current_K_channel_activation_v_n = -16;
  K_current_K_channel_activation_s_n = 5.6;
  Ca_activated_K_current_g_KCa_ = 300;
  Ca_activated_K_current_k_D = 0.3;
  c = 0.15666;
  ATP = 2.1047;
  ATP_sensitive_K_current_g_KATP_ = 350;
  ATP_sensitive_K_current_nucleotides_tau_c = 1200;
  ATP_sensitive_K_current_nucleotides_eta = 185;
  ATP_sensitive_K_current_nucleotides_v = 10;
  ATP_sensitive_K_current_nucleotides_k = 20;
  ATP_sensitive_K_current_nucleotides_ADP = 0.085817;
  Ca_influx_f = 0.001;
  Ca_influx_alpha = 2.25e-6;
  Ca_influx_k_c = 0.1;
  time_ = ;

  // Assignment rules:
  I_Ca := Ca_current_g_Ca_*Ca_current_m_infinity*(V - Ca_current_V_Ca);
  I_K := K_current_g_K_*n*(V - V_K);
  I_KCa := Ca_activated_K_current_g_KCa_*Ca_activated_K_current_omega*(V - V_K);
  I_KATP := (V - V_K)*ATP_sensitive_K_current_g_KATP_/ATP;
  Ca_current_m_infinity := 1/(1 + exp((Ca_current_v_m - V)/Ca_current_s_m));
  K_current_K_channel_activation_n_infinity := 1/(1 + exp((K_current_K_channel_activation_v_n - V)/K_current_K_channel_activation_s_n));
  Ca_activated_K_current_omega := 1/(1 + Ca_activated_K_current_k_D/c);
  ATP_sensitive_K_current_nucleotides_phi := ATP*(1 + ATP_sensitive_K_current_nucleotides_k*ATP_sensitive_K_current_nucleotides_ADP)^2;
  J_mem := -Ca_influx_f*(Ca_influx_alpha*I_Ca + Ca_influx_k_c*c);

  // Rate rules:
  V' = -(I_Ca + I_K + I_KCa + I_KATP)/membrane_C_m;
  n' = (K_current_K_channel_activation_n_infinity - n)/K_current_K_channel_activation_tau_n;
  c' = J_mem;
  ATP' = (ATP_sensitive_K_current_nucleotides_v - ATP_sensitive_K_current_nucleotides_phi)/(1000*ATP_sensitive_K_current_nucleotides_tau_c);
  ATP_sensitive_K_current_nucleotides_ADP' = (ATP_sensitive_K_current_nucleotides_phi - ATP_sensitive_K_current_nucleotides_eta*ATP_sensitive_K_current_nucleotides_ADP)/(1000*ATP_sensitive_K_current_nucleotides_tau_c);
end
