// SBML level 2 version 4

model wodarz_hamer_model_2007_version01____main()
  // Originally created by libAntimony v1.4 (using libSBML 4.1.0-b2)

  // Compartments:
  compartment default_compartment = 1;

  // Parameters:
  T0 = 1000;
  delta = 0.01;
  gamma = 0.005;
  lambda_ = 1;
  v0 = 0.0001;
  I0 = 0.0001;
  alpha = 0.2;
  x0 = 10;
  r = 1;
  y0 = 0;
  k = 10;
  d = 0.001;
  beta = 0.3;
  a = 0.2;
  u = 1;
  eta = 1;
  time_ = ;

  // Rate rules:
  T0' = lambda_ - (delta*T0 + gamma*T0*v0);
  v0' = eta*(y0 + I0) - u*v0;
  I0' = gamma*T0*v0 - alpha*I0;
  x0' = r*x0*v0*(1 - (x0 + y0)/k) - (d*x0 + beta*x0*v0);
  y0' = beta*x0*v0 + r*y0*v0*(1 - (x0 + y0)/k) - a*y0;
end
