// SBML level 2 version 4

model wodarz_1999____main()
  // Originally created by libAntimony v1.3 (using libSBML 4.1.0-b2)

  // Compartments:
  compartment default_compartment = 1;

  // Parameters:
  x0 = 10;
  x_lamda = 1;
  x_d = 0.1;
  beta = 0.5;
  y0 = 0.1;
  y_a = 0.2;
  p = 1;
  z0 = 0;
  w0 = 0.001;
  w_b = 0.01;
  c = 0.1;
  q = 0.5;
  z_h = 0.1;
  time_ = ;

  // Assignment rules:
  s := ;
  y_log_y := ln(y0*1);
  w_log_w := ln(w0*1);

  // Rate rules:
  x0' = x_lamda - (x_d*x0 + s*beta*x0*y0);
  y0' = s*beta*x0*y0 - (y_a*y0 + p*y0*z0);
  z0' = c*q*y0*w0 - z_h*z0;
  w0' = c*x0*y0*w0 - (c*q*y0*w0 + w_b*w0);
end
