// SBML level 2 version 4

model wodarz_2007a____main()
  // Originally created by libAntimony v1.3 (using libSBML 4.1.0-b2)

  // Compartments:
  compartment default_compartment = 1;

  // Parameters:
  x0 = 1;
  d = 0.1;
  gamma = 0.5;
  lambda_ = 10;
  beta = 0.1;
  v0 = 1;
  y00 = 0;
  a0 = 0.1;
  eta = 0.01;
  phi = 0.1;
  L0 = 0;
  y10 = 0;
  a1 = 0.2;
  k = 1;
  u = 1;
  time_ = ;

  // Assignment rules:
  R0_R0 := lambda_*eta/(d*a1*(a0 + eta))*(beta + gamma*phi/(phi + d));

  // Rate rules:
  x0' = lambda_ - (d*x0 + beta*x0*v0 + gamma*x0*v0);
  v0' = k*y10 - u*v0;
  y00' = beta*x0*v0 - (a0*y00 + eta*y00) + phi*L0;
  L0' = gamma*x0*v0 - (phi*L0 + d*L0);
  y10' = eta*y00 - a1*y10;
end
