// SBML level 2 version 4

model wodarz_2007c____main()
  // Originally created by libAntimony v1.4 (using libSBML 4.1.0-b2)

  // Compartments:
  compartment default_compartment = 1;

  // Parameters:
  x0 = 1;
  d = 0.1;
  gamma = 0.5;
  lambda_ = 10;
  beta = 0.1;
  v0 = 1;
  y00 = 0;
  a0 = 0.1;
  eta = 0.01;
  phi = 0.1;
  L0 = 0;
  pa = 1e-6;
  za0 = 1;
  p_i = 1;
  zi0 = 0.1;
  y10 = 0;
  a1 = 0.2;
  k = 1;
  u = 1;
  m_80 = 0;
  r = 1;
  m_70 = 0;
  m_60 = 0;
  m_50 = 0;
  m_40 = 0;
  m_30 = 0;
  m_20 = 0;
  m_10 = 0;
  m_00 = 0;
  alpha = 0.2;
  ca = 15.5;
  ba = 0.1;
  xi = 0.01;
  ci = 12;
  bi = 0.1;
  time_ = ;

  // Assignment rules:
  zi_log_zi := ln(zi0);
  R0_R0 := lambda_*eta/(d*a1*(a0 + eta))*(beta + gamma*phi/(phi + d));

  // Rate rules:
  x0' = lambda_ - (d*x0 + beta*x0*v0 + gamma*x0*v0);
  v0' = k*y10 - u*v0;
  y00' = beta*x0*v0 - (a0*y00 + eta*y00 + pa*y00*za0 + p_i*y00*zi0) + phi*L0;
  L0' = gamma*x0*v0 - (phi*L0 + d*L0);
  za0' = alpha*m_80 + ca*(y00 + y10)*za0 - ba*za0;
  zi0' = xi + ci*(y00 + y10)*zi0 - bi*zi0;
  y10' = eta*y00 - (a1*y10 + pa*y10*za0 + p_i*y10*zi0);
  m_80' = 2*r*m_70 - r*m_80;
  m_70' = 2*r*m_60 - r*m_70;
  m_60' = 2*r*m_50 - r*m_60;
  m_50' = 2*r*m_40 - r*m_50;
  m_40' = 2*r*m_30 - r*m_40;
  m_30' = 2*r*m_20 - r*m_30;
  m_20' = 2*r*m_10 - r*m_20;
  m_10' = 2*r*m_00 - r*m_10;
  m_00' = -r*m_00;
end
