// SBML level 2 version 4

model wolf_2001____main()
  // Originally created by libAntimony v1.3 (using libSBML 4.1.0-b2)

  // Compartments:
  compartment default_compartment = 1;

  // Parameters:
  S10 = 5.8;
  Jo = 3;
  S20 = 0.9;
  S30 = 0.2;
  S40 = 0.2;
  S4_ex0 = 0.1;
  S4_ex_phi = 0.1;
  A30 = 2.4;
  A2_A = 4;
  N20 = 0.1;
  N1_N = 1;
  v1_K_I = 0.52;
  v1_k_1 = 100;
  v1_q = 4;
  v2_k_2 = 6;
  v3_k_3 = 16;
  v4_k_4 = 100;
  v5_k_5 = 1.28;
  v6_k_6 = 12;
  v7_k = 1.3;
  S4_flux_rate_across_the_plasma_membrane_kappa = 13;
  time_ = ;

  // Assignment rules:
  v10 := v1_k_1*S10*A30*v1_f_A3;
  v20 := v2_k_2*S20*N10;
  v60 := v6_k_6*S20*N20;
  v30 := v3_k_3*S30*A20;
  v40 := v4_k_4*S40*N20;
  J := S4_flux_rate_across_the_plasma_membrane_kappa*(S40 - S4_ex0);
  v70 := v7_k*S4_ex0;
  v50 := v5_k_5*A30;
  A20 := A2_A - A30;
  N10 := N1_N - N20;
  v1_f_A3 := (1 + (A30/v1_K_I)^v1_q)^(-1);

  // Rate rules:
  S10' = Jo - v10;
  S20' = 2*v10 - (v20 + v60);
  S30' = v20 - v30;
  S40' = v30 - (v40 + J);
  S4_ex0' = S4_ex_phi*J - v70;
  A30' = 2*v30 - (2*v10 + v50);
  N20' = v20 - (v40 + v60);
end
