// SBML level 2 version 4

model wolf_sohn_heinrich_kuriyama_2001_version01____main()
  // Originally created by libAntimony v1.3 (using libSBML 4.1.0-b2)

  // Compartments:
  compartment default_compartment = 1;

  // Parameters:
  S10 = 1.892469;
  S_S = 2;
  sul0 = 0.012871557;
  aps0 = 0.053366179;
  pap0 = 0.082791522;
  hyd0 = 0.159317029;
  cys0 = 0.805117739;
  eth0 = 10.25247;
  v130 = 4;
  aco0 = 1.13936;
  oxy0 = 6.146549;
  v100 = 80;
  A3_c0 = 1.570848;
  A3_m0 = 1.835158;
  A_c_A_c = 2;
  A_m_A_m = 2;
  N20 = 1.933616;
  N_N = 2;
  oah0 = 5.571685;
  v1_v0 = 1.6;
  v1_n = 4;
  v1_Kc = 0.1;
  v2_k2 = 0.2;
  v3_k3 = 0.2;
  v4_k4 = 0.2;
  v5_k5 = 0.1;
  v6_k6 = 0.12;
  v7_k7 = 10;
  v8_k8 = 10;
  v9_k9 = 10;
  v11A_alpha = 0.1;
  v11A_m = 4;
  v11A_KH = 0.5;
  v11A_k11 = 10;
  v11B_KA = 1;
  v12_k12 = 5;
  v14_k14 = 10;
  v15_k15 = 5;
  v16_k16 = 10;
  v17_k17 = 0.02;
  v18_k18 = 1;
  time_ = ;

  // Assignment rules:
  v80 := v8_k8*aco0*S2;
  v90 := v9_k9*S10*N1;
  S2 := S_S - S10;
  v11 := v1_v0*v1_f1;
  v20 := v2_k2*sul0*A3_c0;
  v30 := v3_k3*aps0*A3_c0;
  v40 := v4_k4*pap0*N20;
  v50 := v5_k5*hyd0*oah0;
  v170 := v17_k17*hyd0;
  v60 := v6_k6*cys0;
  v70 := v7_k7*eth0*N1;
  v150 := v15_k15*aco0;
  v11A0 := v11A_k11*N20*oxy0*v11A_f2/(v11A_alpha*N20 + oxy0);
  v140 := v14_k14*oxy0;
  v120 := v12_k12*A3_c0;
  v160 := v16_k16*A3_m0*A2_c;
  v11B0 := 3*v11A0*A2_m/(v11B_KA + A2_m);
  A2_c := A_c_A_c - A3_c0;
  A2_m := A_m_A_m - A3_m0;
  N1 := N_N - N20;
  v180 := v18_k18*oah0;
  v1_f1 := (1 + (cys0/v1_Kc)^v1_n)^(-1);
  v11A_f2 := (1 + (hyd0/v11A_KH)^v11A_m)^(-1);

  // Rate rules:
  S10' = v80 - v90;
  sul0' = v11 - v20;
  aps0' = v20 - v30;
  pap0' = v30 - v40;
  hyd0' = v40 - (v50 + v170);
  cys0' = v50 - v60;
  eth0' = v130 - v70;
  aco0' = v70 - (v80 + v150);
  oxy0' = v100 - (v11A0 + v140);
  A3_c0' = v160 - (v20 + v30 + v120);
  A3_m0' = v11B0 - v160;
  N20' = 2*v70 + 4*v90 - (3*v40 + v11A0);
  oah0' = v150 - (v50 + v180);
end
