// SBML level 2 version 4

model wu_jeneson_beard_2006____main()
  // Originally created by libAntimony v1.3 (using libSBML 4.1.0-b2)

  // Compartments:
  compartment default_compartment = 1;

  // Parameters:
  O2_x = 3.48e-5;
  X_AtC = 0;
  RT = 2.5775;
  F = 0.096484;
  fixed_parameters_dG_C1o = -69.37;
  fixed_parameters_dG_C3o = -32.53;
  fixed_parameters_dG_C4o = -122.94;
  dG_F1o = 36.03;
  K_DT = 2.4e-5;
  K_DD = 0.000347;
  K_AK = 0.4331;
  K_CK = 1660000000;
  V_cyto = 0.894;
  V_mito = 0.056;
  n_A = 3;
  C_tot = 0.0027;
  CR_tot = 0.0427;
  Q_tot = 0.00135;
  NAD_tot = 0.00297;
  fixed_parameters_pH_C = 7;
  K_c = 0.15;
  deltaPsi = 166.67;
  k_PI1 = 0.0001553;
  k_PI2 = 0.0008222;
  k_PI3 = 0.0003601;
  k_PI4 = 0.005651;
  k_PIH = 0.0002542;
  r = 4.559;
  X_DH = 0.0866;
  X_C1 = 4405;
  X_C3 = 4.887;
  X_C4 = 6.766e-5;
  X_F1 = 1000;
  X_ANT = 0.008123;
  X_PI1 = 385000;
  X_KH = 56510000;
  X_Hle = 200;
  X_K = 0;
  k_mADP = 3.5e-6;
  X_AK = 10000000;
  X_CK = 10000000;
  X_MgA = 10000000;
  k_O2 = 0.00012;
  x_buff = 100;
  C_IM = 6.75e-6;
  X_A = 85;
  X_PI2 = 327;
  gamma = 5.99;
  NADH_x = 0.0015723;
  Q_x = 0.000675;
  Cox_x = 0.00135;
  ATP_x = 0.0026657;
  ATP_mx = 0.0026046;
  ADP_x = 0.0073343;
  ADP_mx = 0.0054765;
  pH_x = 7;
  K_x = 0.14661;
  Mg_x = 0.0010229;
  PI_x = 0.000172;
  ATP_i = 0.0065339;
  ATP_mi = 0.0063812;
  ADP_i = 6.5773e-5;
  ADP_mi = 4.8866e-5;
  AMP_i = 2.8837e-7;
  PI_i = 0.000172;
  Mg_i = 0.0010029;
  ATP_c = 0.0081312;
  ADP_c = 6.85e-5;
  AMP_c = 3.0911e-7;
  ATP_mc = 0.0079786;
  ADP_mc = 5.1958e-5;
  PI_c = 0.0087702;
  Mg_c = 0.001003;
  PCr_c = 0.023589;
  J_ANT_mincon = 1e-9;
  J_Hle_mincond = 1e-6;
  J_K_mincond = 1e-6;
  time_ = ;

  // Assignment rules:
  dG_C1op := fixed_parameters_dG_C1o - 1*RT*ln(H_x/1e-7);
  dG_C3op := fixed_parameters_dG_C3o + 2*RT*ln(H_x/1e-7);
  dG_C4op := fixed_parameters_dG_C4o - 2*RT*ln(H_x/1e-7);
  dG_H := F*deltaPsi + RT*ln(H_i/H_x);
  k_dHPI := 1*10^(-6.75);
  k_dHatp := 1*10^(-6.48);
  k_dHadp := 1*10^(-6.29);
  W_m := 0.664*1.09;
  W_c := 0.807*1.044;
  W_x := 0.9*W_m;
  W_i := 0.1*W_m;
  Rm_cyto := V_mito/V_cyto;
  Rm_cell := V_mito;
  Rc_cell := V_cyto;
  H_c := 1*10^(-fixed_parameters_pH_C);
  H_i := H_c;
  K_i := K_c;
  H_x := 1*10^(-pH_x);
  NAD_x := NAD_tot - NADH_x;
  QH2_x := Q_tot - Q_x;
  Cred_x := C_tot - Cox_x;
  ATP_fx := ATP_x - ATP_mx;
  ADP_fx := ADP_x - ADP_mx;
  J_DH0 := X_DH*(r*NAD_x - NADH_x)*(1 + PI_x/k_PI1)/(1 + PI_x/k_PI2);
  J_C10 := X_C1*(exp(-(dG_C1op + 4*dG_H)/RT)*NADH_x*Q_x - NAD_x*QH2_x);
  J_C30 := X_C3*(1 + PI_x/k_PI3)/(1 + PI_x/k_PI4)*(exp(-(dG_C3op + 4*dG_H - 2*F*deltaPsi)/(2*RT))*Cox_x*sqrt(QH2_x) - Cred_x*sqrt(Q_x));
  J_C40 := ;
  J_F10 := X_F1*(exp(-(dG_F1o - n_A*dG_H)/RT)*K_DD/K_DT*ADP_mx*PI_x - ATP_mx*1);
  J_PI10 := X_PI1*(H_i*H2PIi - H_x*H2PIx)/(H2PIi + k_PIH);
  J_KH0 := X_KH*(K_i*H_x - K_x*H_i);
  J_Hle0 := ;
  J_K0 := ;
  J_MgATP_x0 := X_MgA*(ATP_fx*Mg_x - K_DT*ATP_mx);
  J_MgADP_x0 := X_MgA*(ADP_fx*Mg_x - K_DD*ADP_mx);
  J_ANT0 := ;
  ATP_fi := ATP_i - ATP_mi;
  ADP_fi := ADP_i - ADP_mi;
  J_ATP0 := gamma*X_A*(ATP_c - ATP_i);
  J_AKi0 := X_AK*(K_AK*ADP_i*ADP_i - AMP_i*ATP_i);
  J_ADP0 := gamma*X_A*(ADP_c - ADP_i);
  J_AMP0 := gamma*X_A*(AMP_c - AMP_i);
  J_MgATP_i0 := X_MgA*(ATP_fi*Mg_i - K_DT*ATP_mi);
  J_MgADP_i0 := X_MgA*(ADP_fi*Mg_i - K_DD*ADP_mi);
  J_PI20 := gamma*X_PI2*(PI_c - PI_i);
  J_AKc0 := X_AK*1*(K_AK*ADP_c*ADP_c - AMP_c*ATP_c);
  J_AtC0 := X_AtC;
  J_CKc0 := X_CK*1*(K_CK*ADP_c*PCr_c*H_c - ATP_c*Cr_c);
  J_MgATP_c0 := X_MgA*1*(ATP_fc*Mg_c - K_DT*ATP_mc);
  J_MgADP_c0 := X_MgA*1*(ADP_fc*Mg_c - K_DD*ADP_mc);
  ATP_fc := ATP_c - ATP_mc;
  ADP_fc := ADP_c - ADP_mc;
  Cr_c := CR_tot - PCr_c;
  J_ANT_Psi_x := -0.65*deltaPsi;
  J_ANT_Psi_i := 0.35*deltaPsi;
  H2PIi := PI_i*H_i/(H_i + k_dHPI);
  H2PIx := PI_x*H_x/(H_x + k_dHPI);

  // Rate rules:
  deltaPsi' = (4*J_C10 + 2*J_C30 + 4*J_C40 - n_A*J_F10 - J_ANT0 - J_Hle0 - J_K0)/C_IM;
  NADH_x' = (J_DH0 - J_C10)/W_x;
  Q_x' = -(J_C10 - J_C30)/W_x;
  Cox_x' = -(2*J_C30 - 2*J_C40)/W_x;
  ATP_x' = (J_F10 - J_ANT0)/W_x;
  ATP_mx' = J_MgATP_x0/W_x;
  ADP_x' = (-J_F10 + J_ANT0)/W_x;
  ADP_mx' = J_MgADP_x0/W_x;
  pH_x' = -1/2.303*x_buff*(J_DH0 - 5*J_C10 - 2*J_C30 - 4*J_C40 + (n_A - 1)*J_F10 + 2*J_PI10 - J_KH0 + J_Hle0)/W_x;
  K_x' = (J_KH0 + J_K0)/W_x;
  Mg_x' = (-J_MgADP_x0 - J_MgATP_x0)/W_x;
  PI_x' = (-J_F10 + J_PI10)/W_x;
  ATP_i' = (J_ATP0 + J_ANT0 + J_AKi0)/W_i;
  ATP_mi' = J_MgATP_i0/W_i;
  ADP_i' = (J_ADP0 - J_ANT0 - 2*J_AKi0)/W_i;
  ADP_mi' = J_MgADP_i0/W_i;
  AMP_i' = (J_AMP0 + J_AKi0)/W_i;
  PI_i' = (-J_PI10 + J_PI20)/W_i;
  Mg_i' = (-J_MgADP_i0 - J_MgATP_i0)/W_i;
  ATP_c' = (-Rm_cyto*J_ATP0 + J_AKc0 - J_AtC0/Rc_cell + J_CKc0)/W_c;
  ADP_c' = (-Rm_cyto*J_ADP0 - 2*J_AKc0 + J_AtC0/Rc_cell - J_CKc0)/W_c;
  AMP_c' = (-Rm_cyto*J_AMP0 + J_AKc0)/W_c;
  ATP_mc' = J_MgATP_c0/W_c;
  ADP_mc' = J_MgADP_c0/W_c;
  PI_c' = (-J_PI20*Rm_cyto + J_AtC0/Rc_cell)/W_c;
  Mg_c' = (-J_MgATP_c0 - J_MgADP_c0)/W_c;
  PCr_c' = -J_CKc0/W_c;
end
