// SBML level 2 version 4

model yanagihara_model_1980____main()
  // Originally created by libAntimony v1.3 (using libSBML 4.1.0-b2)

  // Compartments:
  compartment default_compartment = 1;

  // Parameters:
  V = -62.83;
  membrane_Cm = 1;
  m = 0.047938;
  h = 0.95994;
  n = 0.509494;
  d = 3.2e-5;
  f = 1;
  q = 0.010759;
  time_ = ;

  // Assignment rules:
  i_Na := 0.5*m^3*h*(V - 30);
  i_K := 0.7*n*(exp(0.0277*(V + 90)) - 1)/exp(0.0277*(V + 40));
  i_Leak := 0.8*(1 - exp(-(V + 60)/20));
  i_s := 12.5*(0.95*d + 0.05)*(0.95*f + 0.05)*(exp((V - 10)/15) - 1);
  i_h := 0.4*q*(V + 45);
  sodium_channel_sodium_channel_m_gate_alpha_m := 1*(V + 37)/(-exp((V + 37)/(-10)) + 1);
  sodium_channel_sodium_channel_m_gate_beta_m := 40*exp((V + 62)/(-17.8));
  sodium_channel_sodium_channel_h_gate_alpha_h := 1.209e-3*exp((V + 20)/(-6.534));
  sodium_channel_sodium_channel_h_gate_beta_h := 1/(1 + exp((V + 30)/(-10)));
  potassium_channel_potassium_channel_n_gate_alpha_n := 0.009*1/(1 + exp(-(V + 3.8)/9.71)) + 0.0006;
  potassium_channel_potassium_channel_n_gate_beta_n := -2.25e-4*(V + 40)/(1 - exp((V + 40)/13.3));
  calcium_channel_calcium_channel_d_gate_alpha_d := 0.0145*(V + 35)/(1 - exp(-(V + 35)/2.5)) + 0.03125*V/(1 - exp(-V/4.8));
  calcium_channel_calcium_channel_d_gate_beta_d := -4.21e-3*(V - 5)/(-exp((V - 5)/2.5) + 1);
  calcium_channel_calcium_channel_f_gate_alpha_f := -3.55e-4*(V + 20)/(-exp((V + 20)/5.633) + 1);
  calcium_channel_calcium_channel_f_gate_beta_f := 0.000944*(V + 60)/(1 + exp(-(V + 29.5)/4.16));
  hyperpolarization_activated_channel_hyperpolarization_activated_channel_q_gate_alpha_q := 0.00034*(V + 100)/(exp((V + 100)/4.4) - 1) + 4.95e-5;
  hyperpolarization_activated_channel_hyperpolarization_activated_channel_q_gate_beta_q := 0.0005*(V + 40)/(1 - exp(-(V + 40)/6)) + 8.45e-5;

  // Rate rules:
  V' = -(i_Na + i_K + i_Leak + i_s + i_h)/membrane_Cm;
  m' = sodium_channel_sodium_channel_m_gate_alpha_m*(1 - m) - sodium_channel_sodium_channel_m_gate_beta_m*m;
  h' = sodium_channel_sodium_channel_h_gate_alpha_h*(1 - h) - sodium_channel_sodium_channel_h_gate_beta_h*h;
  n' = potassium_channel_potassium_channel_n_gate_alpha_n*(1 - n) - potassium_channel_potassium_channel_n_gate_beta_n*n;
  d' = calcium_channel_calcium_channel_d_gate_alpha_d*(1 - d) - calcium_channel_calcium_channel_d_gate_beta_d*d;
  f' = calcium_channel_calcium_channel_f_gate_alpha_f*(1 - f) - calcium_channel_calcium_channel_f_gate_beta_f*f;
  q' = hyperpolarization_activated_channel_hyperpolarization_activated_channel_q_gate_alpha_q*(1 - q) - hyperpolarization_activated_channel_hyperpolarization_activated_channel_q_gate_beta_q*q;
end
