// SBML level 2 version 4

model yates_stark_klein_antia_callard_model_2007_version01____main()
  // Originally created by libAntimony v1.3 (using libSBML 4.1.0-b2)

  // Compartments:
  compartment default_compartment = 1;

  // Parameters:
  x0 = 10e-1;
  d1 = 0.005;
  a = 0.03333;
  r = 1;
  y0 = 0;
  kappa = 1;
  p = 200;
  z0 = 0.01;
  z_v = 0.5;
  time_ = ;

  // Assignment rules:
  y_d2 := (-(99*a*d1) + a*r + d1*r)/(a - d1);

  // Rate rules:
  x0' = 2*r*y0 - (a*x0*(1 - x0/kappa) + d1*x0*(x0/kappa));
  y0' = a*x0*(1 - x0/kappa) - ((r + y_d2)*y0 + p*z0*y0);
  z0' = p*z0*y0 - z_v*z0;
end
