// SBML level 2 version 4

model zager_model_2007____main()
  // Originally created by libAntimony v1.4 (using libSBML 4.1.0-b2)

  // Compartments:
  compartment default_compartment = 1;

  // Parameters:
  Cgen_pp0 = 0;
  Ppp = 0.59;
  Cgen_pp_Vpp = 0.188;
  Cgen_rp0 = 0;
  Prp = 1.94;
  Cgen_rp_Vrp = 0.012;
  Cgen_rp_kgen_urine = 9.5;
  Cgen_l0 = 0;
  Vl = 0.0092;
  Pl = 3.61;
  Vmax = 25.25;
  Km = 0.6231;
  Cgen_GI0 = 0;
  Cgen_GI_VGI = 0.011;
  Ccon_l0 = 0;
  kbile = 111.72;
  Ccon_ROB0 = 0;
  Ccon_ROB_VROB = 0.2408;
  Ccon_ROB_kcon_urine = 0;
  Acon_b0 = 0;
  Acon_b_tbasal = 0.0865;
  Acon_b_ct = 1.0107;
  Acon_b_cgen = 0.06561;
  model_parameters_cv = 1;
  model_parameters_epsilon = 0.1;
  model_parameters_m_rat = 0.25;
  time_ = ;

  // Assignment rules:
  Qpp := 0.528*Qt;
  H_Cgen_pp := ;
  H_Cgen_B := ;
  Qt := 14.1*model_parameters_m_rat^0.75;
  Cgen_B0 := (Qrp*H_Cgen_rp*Cgen_rp0/Prp + Qpp*H_Cgen_pp*Cgen_pp0/Ppp + (Ql + QGI)*H_Cgen_l*Cgen_l0/Pl)/Qt;
  Qrp := 0.289*Qt;
  H_Cgen_rp := ;
  Ql := 0.03*Qt;
  H_Cgen_l := ;
  vinf := ;
  H_Cgen_GI := ;
  QGI := 0.153*Qt;
  H_Ccon_l := ;
  H_Ccon_ROB := ;
  Acon_b_d_t_Cgen_l := Acon_b_tbasal + Acon_b_cgen*H_Cgen_l*Cgen_l0*exp(-(time_/Acon_b_ct));
  model_parameters_F := -2/model_parameters_epsilon^3*time_^3 + 3/model_parameters_epsilon^2*time_^2;
  model_parameters_G := 1;
  model_parameters_H := 3*(1 - time_)^2/model_parameters_epsilon^2 - 2*(1 - time_)^3/model_parameters_epsilon^3;
  model_parameters_I := 0;

  // Rate rules:
  Cgen_pp0' = (Qpp*H_Cgen_B*Cgen_B0 - Qpp*H_Cgen_pp*Cgen_pp0/Ppp)/Cgen_pp_Vpp;
  Cgen_rp0' = (Qrp*H_Cgen_B*Cgen_B0 - Qrp*H_Cgen_rp*Cgen_rp0/Prp)/Cgen_rp_Vrp - Cgen_rp_kgen_urine*H_Cgen_rp*Cgen_rp0;
  Cgen_l0' = (Ql*H_Cgen_B*Cgen_B0 - (Ql + QGI)*H_Cgen_l*Cgen_l0/Pl + vinf + QGI*H_Cgen_GI*Cgen_GI0/Prp)/Vl - Vmax*H_Cgen_l*Cgen_l0/(Km + H_Cgen_l*Cgen_l0);
  Cgen_GI0' = (QGI*H_Cgen_B*Cgen_B0 - QGI*H_Cgen_GI*Cgen_GI0/Prp)/Cgen_GI_VGI;
  Ccon_l0' = Vmax*H_Cgen_l*Cgen_l0/(Km + H_Cgen_l*Cgen_l0) - (kbile*H_Ccon_l*Ccon_l0 + (Ql + QGI)*(H_Ccon_l*Ccon_l0 - H_Ccon_ROB*Ccon_ROB0)/Vl);
  Ccon_ROB0' = (Ql + QGI)*(H_Ccon_l*Ccon_l0 - H_Ccon_ROB*Ccon_ROB0)/Ccon_ROB_VROB - Ccon_ROB_kcon_urine*H_Ccon_ROB*Ccon_ROB0;
  Acon_b0' = kbile*H_Ccon_l*Ccon_l0*Vl;
end
