// SBML level 3 version 2

model bistable(s1, s2)

  // Compartments:
  compartment default_compartment = 1;

  // Species:
  species s1 in default_compartment;
  species s2 in default_compartment;

  // Parameters:
  k1 = 1;
  k2 = 1;
  k0 = 0.1;
  k3 = 1;
  k4 = 1;
  x = ;

  // Reactions:
  g1: -> s1; k1*(1 + x)/(1 + k2*s2^2);  // modifiers: s2
  g2: -> s2; k3/(1 + k4*s1^2);  // modifiers: s1
  _J0: s1 -> ; k0*s1;
  _J1: s2 -> ; k0*s2;
end

model ringoscil(x)

  // Compartments:
  compartment default_compartment = 1;

  // Species:
  species x in default_compartment;
  species s1 in default_compartment;
  species s2 in default_compartment;
  species s3 in default_compartment;

  // Parameters:
  k1 = 2;
  k0 = 0.1;

  // Reactions:
  g1: -> s1; k1/(1 + x + s3^2);  // modifiers: x, s3
  g2: -> s2; k1/(1 + s1^3);  // modifiers: s1
  g3: -> s3; k1/(1 + s2^3);  // modifiers: s2
  _J0: s1 -> ; k0*s1;
  _J1: s2 -> ; k0*s2;
  _J2: s3 -> ; k0*s3;
end

model ffn(x, s2)

  // Compartments:
  compartment default_compartment = 1;

  // Species:
  species x in default_compartment;
  species s2 in default_compartment;
  species s1 in default_compartment;

  // Parameters:
  k1 = 0.1;
  k2 = 0.1*k0;
  k0 = 0.1;

  // Reactions:
  g1: -> s1; x/(1 + x);  // modifiers: x
  g2: -> s2; x*s1/(1 + x + s1);  // modifiers: x, s1
  _J0: s1 -> ; k1*s1;
  _J1: s2 -> ; k2*s2;
end

model combined_model(x)

  // Sub-modules:
  A: bistable();
  B: ringoscil();
  C: ffn();

  // Compartments:
  compartment default_compartment = 1; A.default_compartment is default_compartment; B.default_compartment is default_compartment; C.default_compartment is default_compartment;

  // Species:
  species x in default_compartment; C.x is x;
  species y in default_compartment; A.s1 is y; C.s2 is y;
  species z in default_compartment; A.s2 is z; B.x is z;
end

model __main()

  // Sub-modules:
  C: combined_model();

  // Compartments:
  compartment default_compartment = 1; C.default_compartment is default_compartment;

  // Species:
  species x in default_compartment = 10; C.x is x;

  // Parameters:
  k0 = 0.1;

  // Reactions:
  _J0: x -> ; k0*x;
end
