// SBML level 3 version 2

model __main()

  // Compartments:
  compartment default_compartment = 1;

  // Species:
  species x in default_compartment = 10;
  species C_y in default_compartment;
  species C_z in default_compartment;
  species C_B_s1 in default_compartment;
  species C_B_s2 in default_compartment;
  species C_B_s3 in default_compartment;
  species C_C_s1 in default_compartment;

  // Parameters:
  C_A_k1 = 1;
  C_A_k2 = 1;
  C_A_k0 = 0.1;
  C_A_k3 = 1;
  C_A_k4 = 1;
  C_B_k1 = 2;
  C_B_k0 = 0.1;
  C_C_k1 = 0.1;
  C_C_k2 = 0.1*C_C_k0;
  C_C_k0 = 0.1;
  k0 = 0.1;
  C_A_x = ;

  // Reactions:
  C_A_g1: -> C_y; C_A_k1*(1 + C_A_x)/(1 + C_A_k2*C_z^2);  // modifiers: C_z
  C_A_g2: -> C_z; C_A_k3/(1 + C_A_k4*C_y^2);  // modifiers: C_y
  C_A__J0: C_y -> ; C_A_k0*C_y;
  C_A__J1: C_z -> ; C_A_k0*C_z;
  C_B_g1: -> C_B_s1; C_B_k1/(1 + C_z + C_B_s3^2);  // modifiers: C_z, C_B_s3
  C_B_g2: -> C_B_s2; C_B_k1/(1 + C_B_s1^3);  // modifiers: C_B_s1
  C_B_g3: -> C_B_s3; C_B_k1/(1 + C_B_s2^3);  // modifiers: C_B_s2
  C_B__J0: C_B_s1 -> ; C_B_k0*C_B_s1;
  C_B__J1: C_B_s2 -> ; C_B_k0*C_B_s2;
  C_B__J2: C_B_s3 -> ; C_B_k0*C_B_s3;
  C_C_g1: -> C_C_s1; x/(1 + x);  // modifiers: x
  C_C_g2: -> C_y; x*C_C_s1/(1 + x + C_C_s1);  // modifiers: x, C_C_s1
  C_C__J0: C_C_s1 -> ; C_C_k1*C_C_s1;
  C_C__J1: C_y -> ; C_C_k2*C_y;
  _J0: x -> ; k0*x;
end
