// SBML level 2 version 4

model combined_model()

  // Compartments:
  compartment default_compartment = 1;

  // Species:
  species x in default_compartment;
  species y in default_compartment;
  species z in default_compartment;
  species B_s1 in default_compartment;
  species B_s2 in default_compartment;
  species B_s3 in default_compartment;
  species C_s1 in default_compartment;

  // Parameters:
  A_k1 = 1;
  A_k2 = 1;
  A_k0 = 0.1;
  A_k3 = 1;
  A_k4 = 1;
  B_k1 = 2;
  B_k0 = 0.1;
  C_k1 = 0.1;
  C_k2 = 0.1*C_k0;
  C_k0 = 0.1;
  A_x = ;

  // Reactions:
  A_g1: -> y; A_k1*(1 + A_x)/(1 + A_k2*z^2);  // modifiers: z
  A_g2: -> z; A_k3/(1 + A_k4*y^2);  // modifiers: y
  A__J0: y -> ; A_k0*y;
  A__J1: z -> ; A_k0*z;
  B_g1: -> B_s1; B_k1/(1 + z + B_s3^2);  // modifiers: z, B_s3
  B_g2: -> B_s2; B_k1/(1 + B_s1^3);  // modifiers: B_s1
  B_g3: -> B_s3; B_k1/(1 + B_s2^3);  // modifiers: B_s2
  B__J0: B_s1 -> ; B_k0*B_s1;
  B__J1: B_s2 -> ; B_k0*B_s2;
  B__J2: B_s3 -> ; B_k0*B_s3;
  C_g1: -> C_s1; x/(1 + x);  // modifiers: x
  C_g2: -> y; x*C_s1/(1 + x + C_s1);  // modifiers: x, C_s1
  C__J0: C_s1 -> ; C_k1*C_s1;
  C__J1: y -> ; C_k2*y;
end
