// SBML level 3 version 2

model CompTest3_antimony_roundtrip()
  // CompTest

  // Compartments:
  compartment Cell = 1;

  // Species:
  species C1__S1 in Cell = 0;
  species C1__S2 in Cell = 0;
  species $S1 in Cell = 0;
  species S2 in Cell = 0;

  // Parameters:
  C1__R3_kf0 = 1;
  C1__R1_kf0 = 1;
  C1__V2 = 0;
  C1__R1_kf = 0.1;
  C1__R3_kf = 0.1;
  C1__R1_kr = 1;
  C1__R3_kr = 1;
  C1__kd = 0.0075; C1__kd is "Degradation rate";
  C1__kmdiff_f = 1; C1__kmdiff_f is "Forward membrane diffusion rate";
  C1__kmdiff_r = 0.01; C1__kmdiff_r is "Reverse membrane diffusion rate";
  C1__kecd = 0.005; C1__kecd is "Extracellular degradation rate";
  C1__kecdiff = 1; C1__kecdiff is "Extracellular diffusion rate";
  C1__np = 10; C1__np is "Stoichiometry of production";
  C1__ko = 0.05; C1__ko is "Open complex production rate";
  topKf = 3;
  kr_f = 0.5; kr_f is "Forward repression binding rate";
  kr_r = 1; kr_r is "Reverse repression binding rate";
  ka_f = 0.0033; ka_f is "Forward activation binding rate";
  ka_r = 1; ka_r is "Reverse activation binding rate";
  kc_f = 0.05; kc_f is "Forward complex formation rate";
  kc_r = 1; kc_r is "Reverse complex formation rate";
  ko_f = 0.033; ko_f is "Forward RNAP binding rate";
  ko_r = 1; ko_r is "Reverse RNAP binding rate";
  kao_f = 1; kao_f is "Forward activated RNAP binding rate";
  kao_r = 1; kao_r is "Reverse activated RNAP binding rate";
  kmdiff_f = 1; kmdiff_f is "Forward membrane diffusion rate";
  kmdiff_r = 0.01; kmdiff_r is "Reverse membrane diffusion rate";
  kd = 0.0075; kd is "Degradation rate";
  kecd = 0.005; kecd is "Extracellular degradation rate";
  nc = 2; nc is "Stoichiometry of binding";
  nr = 30; nr is "Initial RNAP count";
  ko = 0.05; ko is "Open complex production rate";
  kb = 0.0001; kb is "Basal production rate";
  ng = 2; ng is "Initial promoter count";
  np = 10; np is "Stoichiometry of production";
  ka = 0.25; ka is "Activated production rate";
  kecdiff = 1; kecdiff is "Extracellular diffusion rate";
  C1__x = ;

  // Assignment rules:
  C1__V1 := C1__S1 + C1__S2;

  // Rate rules:
  S1' = 1;

  // Reactions:
  C1__R1: C1__S1 => C1__S2; C1__R1_kf0*C1__S1;
  C1__R3: C1__S2 => C1__S1; C1__R3_kf0*C1__S2;

  // Constraints:
  constraint 1 == 1;
  constraint 2 == 2;
end
