// SBML level 3 version 2

model doc0()

  // Compartments:
  compartment sub1__C = 1;

  // Species:
  substanceOnly species sub1__s1 in sub1__C = 1;

  // Parameters:
  timeconv = 60;
  t5 = 1;
  t4 = 1;
  t1 = 1;
  t2 = time/timeconv + 3;
  extentconv = 1000;

  // Assignment rules:
  t3 := delay(t1, timeconv*3);

  // Rate rules:
  t1' = (time/timeconv*t1 + 3)/timeconv;

  // Algebraic rules:
  0 = t4 - delay(t3, timeconv*(time/timeconv));

  // Reactions:
  sub1__J0: -> sub1__s1; sub1__s1*t3*(time/timeconv)/delay(t5, timeconv*2e4)/timeconv*extentconv;

  // Events:
  sub1___E0: at (1/(time/timeconv)*timeconv) after (time/timeconv > 3): t5 = time/timeconv;

  // Constraints:
  constraint time/timeconv < t4*t5;
end
