// SBML level 3 version 1

model aggregate()
  // model units - time: time_unit, extent: extent

  // Compartments:
  compartment submod1__c = 1 submod1__litre;
  compartment c = 1 litre;

  // Species:
  substanceOnly species submod1__S1 in submod1__c = 1;  // substance in submod1__extent
  substanceOnly species S in c = 1;  // substance in submod1__extent
  substanceOnly species S1 in c = 1;  // substance in submod1__extent

  // Parameters:
  submod1__R1_k = 0.1 submod1__second;
  R1_k = 0.1 second;

  // Reactions:
  submod1__R1: submod1__S1 => ; submod1__S1/submod1__R1_k;
  R1: S1 => S; S/R1_k;

  // Unit definitions:
  unit submod1__extent = mole;
  unit submod1__time_unit = second;
  unit submod1__mole_per_litre = mole / litre;
  unit extent = mole;
  unit time_unit = second;
  unit mole_per_litre = mole / litre;
  unit submod1__litre = 1;
  unit extent_per_submod1__litre = 1;
  unit submod1__second = 1;
end
