// SBML level 3 version 2

model foo()

  // Compartments:
  compartment default_compartment = 1;

  // Species:
  species S1 in default_compartment = 10;
  species S2 in default_compartment = 0;

  // Parameters:
  k1 = 0.3;

  // Reactions:
  J0: S1 -> 2 S2; k1*S1^x;
end

model implied_reaction_override()

  // Sub-modules:
  sub0: foo();

  // Compartments:
  compartment default_compartment = 1; sub0.default_compartment is default_compartment;

  // Species:
  species sub0__S2 in default_compartment; sub0.S2 is sub0__S2;

  // Parameters:
  sub0__k1 = 0; sub0.k1 is sub0__k1;

  // Reactions:
  sub0__J0: -> 2 sub0__S2; sub0__k1; sub0.J0 is sub0__J0;
end
