// SBML level 2 version 4

model MODEL1504010000()

  // Compartments:
  compartment default_compartment = 1;

  // Species:
  species PYR in default_compartment;
  species ADP in default_compartment;
  species P in default_compartment;
  species O2 in default_compartment;
  species ATP in default_compartment;
  species NADH in default_compartment;
  species NAD in default_compartment;

  // Parameters:
  nop = ;
  nox = ;
  nnad = ;
  V_OXPHOS = ;
  KM_OXPHOS_PYR = ;
  KM_OXPHOS_O2 = ;
  KM_OXPHOS_ADP = ;

  // Reactions:
  OXPHOS: PYR -> (-nop) ADP + (-nop) P + (-nox) O2 + nop ATP; V_OXPHOS*(PYR/(PYR + KM_OXPHOS_PYR))*(O2/(O2 + KM_OXPHOS_O2))*(ADP/(ADP + KM_OXPHOS_ADP));
  MAS: NADH -> (-nnad) ADP + (-nnad) P + NAD + nnad ATP; V_OXPHOS*(PYR/(PYR + KM_OXPHOS_PYR))*(O2/(O2 + KM_OXPHOS_O2))*(ADP/(ADP + KM_OXPHOS_ADP));  // modifiers: PYR, O2
end
