// SBML level 3 version 2

model __main()

  // Compartments:
  compartment default_compartment = 1;

  // Species:
  species A in default_compartment;
  species B in default_compartment;
  species C in default_compartment;
  species D in default_compartment;

  // Parameters:
  k1 = ;
  k2 = ;

  // Assignment rules:
  J0_B_stoich := n;
  J1_C_stoich := n;
  J1_B_stoich := n;
  J2_B_stoich := n;
  J2_C_stoich := m;
  J2_D_stoich := n;

  // Reactions:
  J0: n A -> J0_B_stoich B; k1*A^n;
  J1: J1_C_stoich C -> J1_B_stoich B; k1*C^n;
  J2: m A + J2_B_stoich B -> J2_C_stoich C + J2_D_stoich D; k2;
end
