// SBML level 3 version 1

function f(x)
  2*x;
end

function neighborQuantityLeft(a)
  0;
end

function neighborQuantityRight(a)
  0;
end

function neighborQuantityAbove(a)
  0;
end

function neighborQuantityBelow(a)
  0;
end

function getCompartmentLocationX(a)
  0;
end

function getCompartmentLocationY(a)
  0;
end

model CompTest()

  // Compartments:
  compartment Cell = 1;

  // Species:
  species S2 in Cell = 0;
  species S1 in Cell = 0;

  // Parameters:
  C1_V2 = 0;
  C1_R1_kf = 0.1;
  C1_R3_kf = 0.1;
  C1_kr_f = 0.5; C1_kr_f is "Forward repression binding rate";
  C1_kr_r = 1; C1_kr_r is "Reverse repression binding rate";
  C1_ka_f = 0.0033; C1_ka_f is "Forward activation binding rate";
  C1_ka_r = 1; C1_ka_r is "Reverse activation binding rate";
  C1_kc_f = 0.05; C1_kc_f is "Forward complex formation rate";
  C1_kc_r = 1; C1_kc_r is "Reverse complex formation rate";
  C1_ko_f = 0.033; C1_ko_f is "Forward RNAP binding rate";
  C1_ko_r = 1; C1_ko_r is "Reverse RNAP binding rate";
  C1_kao_f = 1; C1_kao_f is "Forward activated RNAP binding rate";
  C1_kao_r = 1; C1_kao_r is "Reverse activated RNAP binding rate";
  C1_kmdiff_f = 1; C1_kmdiff_f is "Forward membrane diffusion rate";
  C1_kmdiff_r = 0.01; C1_kmdiff_r is "Reverse membrane diffusion rate";
  C1_kd = 0.0075; C1_kd is "Degradation rate";
  C1_kecd = 0.005; C1_kecd is "Extracellular degradation rate";
  C1_nc = 2; C1_nc is "Stoichiometry of binding";
  C1_nr = 30; C1_nr is "Initial RNAP count";
  C1_ko = 0.05; C1_ko is "Open complex production rate";
  C1_kb = 0.0001; C1_kb is "Basal production rate";
  C1_ng = 2; C1_ng is "Initial promoter count";
  C1_np = 10; C1_np is "Stoichiometry of production";
  C1_ka = 0.25; C1_ka is "Activated production rate";
  C1_kecdiff = 1; C1_kecdiff is "Extracellular diffusion rate";
  C1_kf = 2;
  C1_R1_kr = 1;
  C1_R3_kr = 1;
  C1_R1_kf0 = 1;
  topKf = 3;
  kr_f = 0.5; kr_f is "Forward repression binding rate";
  kr_r = 1; kr_r is "Reverse repression binding rate";
  ka_f = 0.0033; ka_f is "Forward activation binding rate";
  ka_r = 1; ka_r is "Reverse activation binding rate";
  kc_f = 0.05; kc_f is "Forward complex formation rate";
  kc_r = 1; kc_r is "Reverse complex formation rate";
  ko_f = 0.033; ko_f is "Forward RNAP binding rate";
  ko_r = 1; ko_r is "Reverse RNAP binding rate";
  kao_f = 1; kao_f is "Forward activated RNAP binding rate";
  kao_r = 1; kao_r is "Reverse activated RNAP binding rate";
  kmdiff_f = 1; kmdiff_f is "Forward membrane diffusion rate";
  kmdiff_r = 0.01; kmdiff_r is "Reverse membrane diffusion rate";
  kd = 0.0075; kd is "Degradation rate";
  kecd = 0.005; kecd is "Extracellular degradation rate";
  nc = 2; nc is "Stoichiometry of binding";
  nr = 30; nr is "Initial RNAP count";
  ko = 0.05; ko is "Open complex production rate";
  kb = 0.0001; kb is "Basal production rate";
  ng = 2; ng is "Initial promoter count";
  np = 10; np is "Stoichiometry of production";
  ka = 0.25; ka is "Activated production rate";
  kecdiff = 1; kecdiff is "Extracellular diffusion rate";
  C1_x = ;

  // Assignment rules:
  C1_V1 := S2 + S1;

  // Rate rules:
  C1_V2' = S2*S1;

  // Reactions:
  C1_R1: S2 => S1; C1_kf*S2;
  C1_R3: S1 => S2; topKf*S1;

  // Unit definitions:
  unit C1_second = second;
end
