// SBML level 3 version 1

function get2DArrayElement(a, b, c)
  a;
end

model QTPop()

  // Compartments:
  compartment GRID__QuorumTrigger_default = 1;
  compartment default = 1;

  // Species:
  species GRID__QuorumTrigger_Env in GRID__QuorumTrigger_default = 0;
  species GRID__QuorumTrigger_LuxR in GRID__QuorumTrigger_default = 0;
  species GRID__QuorumTrigger_Complex in GRID__QuorumTrigger_default = 0;
  species GRID__QuorumTrigger_LuxI in GRID__QuorumTrigger_default = 0;
  species GRID__QuorumTrigger_GFP in GRID__QuorumTrigger_default = 0;
  species GRID__QuorumTrigger_P1 in GRID__QuorumTrigger_default = 2;
  species GRID__QuorumTrigger_P5 in GRID__QuorumTrigger_default = 2;
  species LuxI in default = 0;

  // Parameters:
  GRID__QuorumTrigger_kr_f = 0.5; GRID__QuorumTrigger_kr_f is "Forward repression binding rate";
  GRID__QuorumTrigger_kr_r = 1; GRID__QuorumTrigger_kr_r is "Reverse repression binding rate";
  GRID__QuorumTrigger_ka_f = 0.0033; GRID__QuorumTrigger_ka_f is "Forward activation binding rate";
  GRID__QuorumTrigger_ka_r = 1; GRID__QuorumTrigger_ka_r is "Reverse activation binding rate";
  GRID__QuorumTrigger_kc_f = 0.05; GRID__QuorumTrigger_kc_f is "Forward complex formation rate";
  GRID__QuorumTrigger_kc_r = 1; GRID__QuorumTrigger_kc_r is "Reverse complex formation rate";
  GRID__QuorumTrigger_ko_f = 0.033; GRID__QuorumTrigger_ko_f is "Forward RNAP binding rate";
  GRID__QuorumTrigger_ko_r = 1; GRID__QuorumTrigger_ko_r is "Reverse RNAP binding rate";
  GRID__QuorumTrigger_kao_f = 1; GRID__QuorumTrigger_kao_f is "Forward activated RNAP binding rate";
  GRID__QuorumTrigger_kao_r = 1; GRID__QuorumTrigger_kao_r is "Reverse activated RNAP binding rate";
  GRID__QuorumTrigger_kmdiff_f = 1; GRID__QuorumTrigger_kmdiff_f is "Forward membrane diffusion rate";
  GRID__QuorumTrigger_kmdiff_r = 0.01; GRID__QuorumTrigger_kmdiff_r is "Reverse membrane diffusion rate";
  GRID__QuorumTrigger_kd = 0.0075; GRID__QuorumTrigger_kd is "Degradation rate";
  GRID__QuorumTrigger_kecd = 0.005; GRID__QuorumTrigger_kecd is "Extracellular degradation rate";
  GRID__QuorumTrigger_nc = 2; GRID__QuorumTrigger_nc is "Stoichiometry of binding";
  GRID__QuorumTrigger_nr = 30; GRID__QuorumTrigger_nr is "Initial RNAP count";
  GRID__QuorumTrigger_ko = 0.05; GRID__QuorumTrigger_ko is "Open complex production rate";
  GRID__QuorumTrigger_kb = 0.0001; GRID__QuorumTrigger_kb is "Basal production rate";
  GRID__QuorumTrigger_ng = 2; GRID__QuorumTrigger_ng is "Initial promoter count";
  GRID__QuorumTrigger_np = 10; GRID__QuorumTrigger_np is "Stoichiometry of production";
  GRID__QuorumTrigger_ka = 0.25; GRID__QuorumTrigger_ka is "Activated production rate";
  GRID__QuorumTrigger_kecdiff = 1; GRID__QuorumTrigger_kecdiff is "Extracellular diffusion rate";
  kr_f = 0.5; kr_f is "Forward repression binding rate";
  kr_r = 1; kr_r is "Reverse repression binding rate";
  ka_f = 0.0033; ka_f is "Forward activation binding rate";
  ka_r = 1; ka_r is "Reverse activation binding rate";
  kc_f = 0.05; kc_f is "Forward complex formation rate";
  kc_r = 1; kc_r is "Reverse complex formation rate";
  ko_f = 0.033; ko_f is "Forward RNAP binding rate";
  ko_r = 1; ko_r is "Reverse RNAP binding rate";
  kao_f = 1; kao_f is "Forward activated RNAP binding rate";
  kao_r = 1; kao_r is "Reverse activated RNAP binding rate";
  kmdiff_f = 1; kmdiff_f is "Forward membrane diffusion rate";
  kmdiff_r = 0.01; kmdiff_r is "Reverse membrane diffusion rate";
  kd = 0.0075; kd is "Degradation rate";
  kecd = 0.005; kecd is "Extracellular degradation rate";
  nc = 2; nc is "Stoichiometry of binding";
  nr = 30; nr is "Initial RNAP count";
  ko = 0.05; ko is "Open complex production rate";
  kb = 0.0001; kb is "Basal production rate";
  ng = 2; ng is "Initial promoter count";
  np = 10; np is "Stoichiometry of production";
  ka = 0.25; ka is "Activated production rate";
  kecdiff = 1; kecdiff is "Extracellular diffusion rate";
  QuorumTrigger_size = 16;
  Degradation_LuxI_kecd = 0.005 u_1_second_n1;
  Diffusion_LuxI_Above_kecdiff = 1 u_1_second_n1;
  Diffusion_LuxI_Below_kecdiff = 1 u_1_second_n1;
  Diffusion_LuxI_Left_kecdiff = 1 u_1_second_n1;
  Diffusion_LuxI_Right_kecdiff = 1 u_1_second_n1;
  a = ;
  QuorumTrigger__locations = ;
  i = ;
  j = ;
  Degradation_LuxI_i = ;
  Degradation_LuxI_j = ;
  Diffusion_LuxI_Above_i = ;
  Diffusion_LuxI_Above_j = ;
  Diffusion_LuxI_Below_i = ;
  Diffusion_LuxI_Below_j = ;
  Diffusion_LuxI_Left_i = ;
  Diffusion_LuxI_Left_j = ;
  Diffusion_LuxI_Right_i = ;
  Diffusion_LuxI_Right_j = ;
  MembraneDiffusion_LuxI_i = ;
  MembraneDiffusion_LuxI_j = ;

  // Reactions:
  GRID__QuorumTrigger_Production_P1: => 10 GRID__QuorumTrigger_LuxR; GRID__QuorumTrigger_P1*(GRID__QuorumTrigger_kb*(GRID__QuorumTrigger_ko_f/GRID__QuorumTrigger_ko_r)*GRID__QuorumTrigger_nr + GRID__QuorumTrigger_ka*(GRID__QuorumTrigger_kao_f/GRID__QuorumTrigger_kao_r)*GRID__QuorumTrigger_nr*(GRID__QuorumTrigger_ka_f/GRID__QuorumTrigger_ka_r*GRID__QuorumTrigger_Env)^GRID__QuorumTrigger_nc)/(1 + GRID__QuorumTrigger_ko_f/GRID__QuorumTrigger_ko_r*GRID__QuorumTrigger_nr + GRID__QuorumTrigger_kao_f/GRID__QuorumTrigger_kao_r*GRID__QuorumTrigger_nr*(GRID__QuorumTrigger_ka_f/GRID__QuorumTrigger_ka_r*GRID__QuorumTrigger_Env)^GRID__QuorumTrigger_nc);  // modifiers: GRID__QuorumTrigger_Env, GRID__QuorumTrigger_P1
  GRID__QuorumTrigger_Complex_Complex: 2 GRID__QuorumTrigger_LuxR + 2 GRID__QuorumTrigger_LuxI -> GRID__QuorumTrigger_Complex; GRID__QuorumTrigger_kc_f*GRID__QuorumTrigger_LuxR^GRID__QuorumTrigger_nc*GRID__QuorumTrigger_LuxI^GRID__QuorumTrigger_nc - GRID__QuorumTrigger_kc_r*GRID__QuorumTrigger_Complex;
  GRID__QuorumTrigger_Production_P5: => 10 GRID__QuorumTrigger_GFP + 10 GRID__QuorumTrigger_LuxI + 10 GRID__QuorumTrigger_LuxR; GRID__QuorumTrigger_P5*(GRID__QuorumTrigger_kb*(GRID__QuorumTrigger_ko_f/GRID__QuorumTrigger_ko_r)*GRID__QuorumTrigger_nr + GRID__QuorumTrigger_ka*(GRID__QuorumTrigger_kao_f/GRID__QuorumTrigger_kao_r)*GRID__QuorumTrigger_nr*(GRID__QuorumTrigger_ka_f/GRID__QuorumTrigger_ka_r*GRID__QuorumTrigger_Complex)^GRID__QuorumTrigger_nc)/(1 + GRID__QuorumTrigger_ko_f/GRID__QuorumTrigger_ko_r*GRID__QuorumTrigger_nr + GRID__QuorumTrigger_kao_f/GRID__QuorumTrigger_kao_r*GRID__QuorumTrigger_nr*(GRID__QuorumTrigger_ka_f/GRID__QuorumTrigger_ka_r*GRID__QuorumTrigger_Complex)^GRID__QuorumTrigger_nc);  // modifiers: GRID__QuorumTrigger_Complex, GRID__QuorumTrigger_P5
  GRID__QuorumTrigger_Degradation_GFP: GRID__QuorumTrigger_GFP => ; GRID__QuorumTrigger_kd*GRID__QuorumTrigger_GFP;
  GRID__QuorumTrigger_Degradation_LuxI: GRID__QuorumTrigger_LuxI => ; GRID__QuorumTrigger_kd*GRID__QuorumTrigger_LuxI;
  GRID__QuorumTrigger_Degradation_Complex: GRID__QuorumTrigger_Complex => ; GRID__QuorumTrigger_kd*GRID__QuorumTrigger_Complex;
  GRID__QuorumTrigger_Degradation_LuxR: GRID__QuorumTrigger_LuxR => ; GRID__QuorumTrigger_kd*GRID__QuorumTrigger_LuxR;
  GRID__QuorumTrigger_MembraneDiffusion_LuxI: GRID__QuorumTrigger_LuxI -> ; GRID__QuorumTrigger_kmdiff_f*GRID__QuorumTrigger_LuxI - GRID__QuorumTrigger_kmdiff_r;
  Degradation_LuxI: LuxI => ; Degradation_LuxI_kecd*get2DArrayElement(LuxI, Degradation_LuxI_i, Degradation_LuxI_j);
  Diffusion_LuxI_Above: LuxI -> LuxI; Diffusion_LuxI_Above_kecdiff*get2DArrayElement(LuxI, Diffusion_LuxI_Above_i, Diffusion_LuxI_Above_j) - Diffusion_LuxI_Above_kecdiff*get2DArrayElement(LuxI, Diffusion_LuxI_Above_i - 1, Diffusion_LuxI_Above_j + 0);
  Diffusion_LuxI_Below: LuxI -> LuxI; Diffusion_LuxI_Below_kecdiff*get2DArrayElement(LuxI, Diffusion_LuxI_Below_i, Diffusion_LuxI_Below_j) - Diffusion_LuxI_Below_kecdiff*get2DArrayElement(LuxI, Diffusion_LuxI_Below_i + 1, Diffusion_LuxI_Below_j + 0);
  Diffusion_LuxI_Left: LuxI -> LuxI; Diffusion_LuxI_Left_kecdiff*get2DArrayElement(LuxI, Diffusion_LuxI_Left_i, Diffusion_LuxI_Left_j) - Diffusion_LuxI_Left_kecdiff*get2DArrayElement(LuxI, Diffusion_LuxI_Left_i + 0, Diffusion_LuxI_Left_j - 1);
  Diffusion_LuxI_Right: LuxI -> LuxI; Diffusion_LuxI_Right_kecdiff*get2DArrayElement(LuxI, Diffusion_LuxI_Right_i, Diffusion_LuxI_Right_j) - Diffusion_LuxI_Right_kecdiff*get2DArrayElement(LuxI, Diffusion_LuxI_Right_i + 0, Diffusion_LuxI_Right_j + 1);
  MembraneDiffusion_LuxI: LuxI -> LuxI; get2DArrayElement(kmdiff_f, MembraneDiffusion_LuxI_i, MembraneDiffusion_LuxI_j)*get2DArrayElement(LuxI, MembraneDiffusion_LuxI_i, MembraneDiffusion_LuxI_j) - get2DArrayElement(kmdiff_r, MembraneDiffusion_LuxI_i, MembraneDiffusion_LuxI_j)*get2DArrayElement(LuxI, MembraneDiffusion_LuxI_i, MembraneDiffusion_LuxI_j);

  // Events:
  GRID__QuorumTrigger_event0: at (time >= 10000), t0=false, persistent=false, fromTrigger=false: GRID__QuorumTrigger_Env = 100;

  // Unit definitions:
  unit u_1_second_n1 = 1 / second;
end
