// SBML level 3 version 1

function neighborQuantityLeft(a)
  0;
end

function neighborQuantityRight(a)
  0;
end

function neighborQuantityAbove(a)
  0;
end

function neighborQuantityBelow(a)
  0;
end

function getCompartmentLocationX(a)
  0;
end

function getCompartmentLocationY(a)
  0;
end

model exchangetest()

  // Compartments:
  compartment default_compartment = 1;
  compartment Cell = 1;

  // Species:
  species A_S1 in default_compartment;

  // Parameters:
  X = ;
  A_y = ;
  R = 20;
  U1 = ;
  A_kr_f = 0.5; A_kr_f is "Forward repression binding rate";
  A_kr_r = 1; A_kr_r is "Reverse repression binding rate";
  A_ka_f = 0.0033; A_ka_f is "Forward activation binding rate";
  A_ka_r = 1; A_ka_r is "Reverse activation binding rate";
  A_kc_f = 0.05; A_kc_f is "Forward complex formation rate";
  A_kc_r = 1; A_kc_r is "Reverse complex formation rate";
  A_ko_f = 0.033; A_ko_f is "Forward RNAP binding rate";
  A_ko_r = 1; A_ko_r is "Reverse RNAP binding rate";
  A_kao_f = 1; A_kao_f is "Forward activated RNAP binding rate";
  A_kao_r = 1; A_kao_r is "Reverse activated RNAP binding rate";
  A_kmdiff_f = 1; A_kmdiff_f is "Forward membrane diffusion rate";
  A_kmdiff_r = 0.01; A_kmdiff_r is "Reverse membrane diffusion rate";
  A_kd = 0.0075; A_kd is "Degradation rate";
  A_kecd = 0.005; A_kecd is "Extracellular degradation rate";
  A_nc = 2; A_nc is "Stoichiometry of binding";
  A_nr = 30; A_nr is "Initial RNAP count";
  A_ko = 0.05; A_ko is "Open complex production rate";
  A_kb = 0.0001; A_kb is "Basal production rate";
  A_ng = 2; A_ng is "Initial promoter count";
  A_np = 10; A_np is "Stoichiometry of production";
  A_ka = 0.25; A_ka is "Activated production rate";
  A_kecdiff = 1; A_kecdiff is "Extracellular diffusion rate";
  extentconv = 10;
  timeconv = 60;
  cf = 100;
  kr_f = 0.5; kr_f is "Forward repression binding rate";
  kr_r = 1; kr_r is "Reverse repression binding rate";
  ka_f = 0.0033; ka_f is "Forward activation binding rate";
  ka_r = 1; ka_r is "Reverse activation binding rate";
  kc_f = 0.05; kc_f is "Forward complex formation rate";
  kc_r = 1; kc_r is "Reverse complex formation rate";
  ko_f = 0.033; ko_f is "Forward RNAP binding rate";
  ko_r = 1; ko_r is "Reverse RNAP binding rate";
  kao_f = 1; kao_f is "Forward activated RNAP binding rate";
  kao_r = 1; kao_r is "Reverse activated RNAP binding rate";
  kmdiff_f = 1; kmdiff_f is "Forward membrane diffusion rate";
  kmdiff_r = 0.01; kmdiff_r is "Reverse membrane diffusion rate";
  kd = 0.0075; kd is "Degradation rate";
  kecd = 0.005; kecd is "Extracellular degradation rate";
  nc = 2; nc is "Stoichiometry of binding";
  nr = 30; nr is "Initial RNAP count";
  ko = 0.05; ko is "Open complex production rate";
  kb = 0.0001; kb is "Basal production rate";
  ng = 2; ng is "Initial promoter count";
  np = 10; np is "Stoichiometry of production";
  ka = 0.25; ka is "Activated production rate";
  kecdiff = 1; kecdiff is "Extracellular diffusion rate";
  A_k1 = ;

  // Assignment rules:
  Q := (X/cf - 3)*cf;
  U2 := X/cf*cf;

  // Rate rules:
  X' = 0.2/extentconv*cf;
  U1' = 0.3/extentconv*cf;

  // Reactions:
  A__J0: A_S1 -> ; A_k1*A_S1/extentconv*timeconv;

  // Events:
  A__E0: at (X/cf > 3), priority = Q/cf: A_y = 4;
  A__E1: at (X/cf > 3), priority = R/cf: A_y = 5;
end
