// SBML level 3 version 1

model doc0()

  // Compartments:
  compartment sub1_sub1_sub1_C;

  // Species:
  species sub1_sub1_sub1_s1 in sub1_sub1_sub1_C = 1/sub1_sub1_sub1_C;

  // Parameters:
  sub1_sub1_timeconv = 60;
  sub1_sub1_extentconv = 10;
  sub1_timeconv = 60;
  sub1_extentconv = 10;
  timeconv = 60;
  extentconv = 10;

  // Reactions:
  sub1_sub1_sub1_J0: -> sub1_sub1_sub1_s1; sub1_sub1_sub1_s1*(time/timeconv/sub1_timeconv/sub1_sub1_timeconv)/delay(sub1_sub1_sub1_s1, timeconv*sub1_timeconv*sub1_sub1_timeconv*2e4)/sub1_sub1_timeconv*sub1_sub1_extentconv/sub1_timeconv*sub1_extentconv/timeconv*extentconv;
end
